* fichier : @solvmec_04.dgibi
************************************************************************
* Test du mini solveur mecanique (procedure @SOLVMEC)                  *
* - eprouvette entaillee en traction                                   *
* - comportement elastique avec endommagement                          *
*                                                                      *
* On compare les resultats a ceux de la procedure PASAPAS              *
************************************************************************


** Options generales
OPTI 'DIME' 2 'ELEM' 'QUA4' 'MODE' 'PLAN' 'CONT' 'ECHO' 0 ;


** Geometrie : barre rectangulaire l x h avec une
*  entaille circulaire de largeur le et profondeur pe
l  = 1.0 ;
h  = 0.1 ;
le = 0.1 * l ;
pe = 0.1 * h ;


** Maillage
ne = 21 ;
* barre rectangulaire
p0 = 0. 0. ;
p1 = l  0. ;
lb = DROI ne p0 p1 ;
mai = lb TRAN 3 (0. h) ;
ld = mai COTE 2 ;
lh = mai COTE 3 ;
lg = mai COTE 4 ;
* deplacement des noeuds pour l'entaille circulaire
p2 = ((l - le) / 2.) h ;
p3 = ((l + le) / 2.) h ;
re = (pe / 2.) + (le * le / (8. * pe)) ;
p4 = (l / 2.) (h - pe + re) ;
xh yh = COOR lh ;
pmil = xh POIN 'COMPRIS' (COOR 1 p2) (COOR 1 p3) ;
DEPL pmil 'PROJ' 'CYLI' (0. 1.) 'CERC' p4 p2 ;
cmai = CONT mai ;
*****TRAC mai 'TITR' 'Maillage' ;


** Modele et caracteristiques materiau
mo = MODE mai 'MECANIQUE' 'ELASTIQUE' 'ISOTROPE' 'ENDOMMAGEMENT' 'MAZARS' ;
ma = MATE mo 'YOUN' 1.E9 'NU' 0.3 'ATRA' 1.   'ACOM' 1.2   'KTR0' 1.E-5
                                  'BTRA' 1.E4 'BCOM' 1.5E3 'BETA' 1.06 ;


** Blocages
clg = BLOQ 'UX' lg ;
clb = BLOQ 'UY' lb ;
cld = BLOQ 'UX' ld ;
cl  = clg ET clb ET cld ;


** Chargement : deplacement impose sur ld
uimp = 9.E-5 ;
fuim = DEPI cld uimp ;
ev1  = EVOL 'MANU' 'Temps' (PROG 0. 1.) 'Coef' (PROG 0. 1.) ;
cha  = CHAR 'DIMP' fuim ev1 ;


** Resolutions avec PASAPAS et @SOLVMEC
tab1 = TABL ;
tab1 . 'MODELE'                   = mo ;
tab1 . 'CARACTERISTIQUES'         = ma ;
tab1 . 'BLOCAGES_MECANIQUES'      = cl ;
tab1 . 'CHARGEMENT'               = cha ;
tab1 . 'TEMPS_CALCULES'           = PROG 0.01 'PAS' 0.01 1. ;
tab1 . 'MOVA'                     = 'D' ;
tab2 = COPI tab1 ;

TEMP 'ZERO' ;
PASAPAS tab1 ;
tpp = TEMP 'HORL' ;

TEMP 'ZERO' ;
@SOLVMEC tab2 ;
tms = TEMP 'HORL' ;


** Performances
MESS ;
MESS 'Duree d''execution (ms)' ;
MESS '----------------------' ;
MESS 'PASAPAS  :' ' ' tpp ;
MESS '@SOLVMEC :' ' ' tms ;
MESS ;


** Post traitement : courbes F     (resultante des reactions a gauche) vs Temps
*                            D max (def. plas. eq. max)                vs Temps
n1 = DIME (tab2 . 'TEMPS') ;
ltp  = PROG ;
lr1  = PROG ;
lr2  = PROG ;
ld1  = PROG ;
ld2  = PROG ;
lerr = PROG ;
lerd = PROG ;
rprev = 0. ;
REPE b1 n1 ;
* temps
  ltp = ltp ET (tab1 . 'TEMPS' . (&b1 - 1)) ;
* effort de reaction
  r1 = tab1 . 'REACTIONS' . (&b1 - 1) ;
  r2 = tab2 . 'REACTIONS' . (&b1 - 1) ;
  SI (EGA &b1 1) ;
    rr1 = 0. ;
    rr2 = 0. ;
  SINON ;
    rr1 = -1. * (@TOTAL r1 lg 'FX') ;
    rr2 = -1. * (@TOTAL r2 lg 'FX') ;
*   on ne calcule pas l'erreur sur l'effort quand il s'effondre
    SI ((rprev - rr1) > 3.E3) ;
      lerr = lerr ET 0. ;
    SINON ;
      lerr = lerr ET (ABS ((rr1 - rr2) / rr1)) ;
    FINSI ;
  FINSI ;
  lr1 = lr1 ET rr1 ;
  lr2 = lr2 ET rr2 ;
  rprev = rr1 ;
* endommagement
  vi1 = tab1 . 'VARIABLES_INTERNES' . (&b1 - 1) ;
  vi2 = tab2 . 'VARIABLES_INTERNES' . (&b1 - 1) ;
  dmax1 = MAXI (EXCO 'D' vi1) ;
  dmax2 = MAXI (EXCO 'D' vi2) ;
  ld1 = ld1 ET dmax1 ;
  ld2 = ld2 ET dmax2 ;
  SI (dmax1 > 1.E-10) ;
    lerd = lerd ET (ABS ((dmax1 - dmax2) / dmax1)) ;
  FINSI ;
FIN b1 ;
* ecarts relatifs max
err = MAXI 'ABS' lerr ;
erd = MAXI 'ABS' lerd ;
MESS ;
MESS 'Ecarts relatifs max' ;
MESS '-------------------' ;
MESS 'Endommagement max :' ' ' erd ;
MESS 'Reaction          :' ' ' err ;
MESS ;
* trace des courbes
tleg = TABL ;
tleg . 'TITRE'     = TABL ;
tleg . 'TITRE' . 1 = CHAI 'Pasapas' ;
tleg . 'TITRE' . 2 = CHAI 'Mini solveur' ;
tleg . 2 = MOT 'MARQ ROND NOLI' ;
evd1 = EVOL        'MANU' 'Temps' ltp 'D max' ld1 ;
evd2 = EVOL 'ROUG' 'MANU' 'Temps' ltp 'D max' ld2 ;
*****DESS (evd1 ET evd2) 'TITR' 'D max vs Temps' 'LEGE' tleg 'NO' ;
evr1 = EVOL        'MANU' 'Temps' ltp 'Reaction' lr1 ;
evr2 = EVOL 'ROUG' 'MANU' 'Temps' ltp 'Reaction' lr2 ;
*****DESS (evr1 ET evr2) 'TITR' 'Force vs Temps' 'LEGE' tleg 'NO' ;

** Test et erreur si ecart trop important
SI ((erd > 2.E-3) OU (err > 1.E-3)) ;
  ERRE 'Ecart trop important entre les resultats de @SOLVMEC et de PASAPAS' ;
FINSI ;

FIN ;
