************************************************************************
* Section : Langage
************************************************************************
* Cas-test de calculs d'integrales avec les elements a integration
* reduite C20R et P15R
************************************************************************

OPTI 'DIME' 3 'ELEM' 'CU20';
XZPREC = (VALE 'PREC') * 100.;

**************
* CUBE C20R
**************

P1 = 0. 0. 0.;
P2 = 1. 0. 0.;
D1 = DROI 1 P1 P2;
S1 = D1 TRAN 1 (0. 1. 0.);
V1 = S1 VOLU 'TRAN' 1 (0. 0. 1.);
* TRAC V1;FIN;

MO = MODE V1 'MECANIQUE' 'ELASTIQUE' 'C20R';

* VOLUME A PARTIR D’UN CHAMP CONSTANT
UN = MANU 'CHML' MO 'SCAL' 1.;
VOL = INTG MO UN;
ECART = ABS (VOL - 1.);
MESS ECART XZPREC;
SI (ECART > XZPREC);
    MESS 'ERREUR DANS INTG POUR UN CHAMP CONSTANT';
    ERRE 5;
FINSI;

* CHAMP LINEAIRE
Z = COOR 3 UN;
RES = INTG MO Z;
ECART = ABS (RES - 0.5);
MESS ECART XZPREC;
SI (ECART > XZPREC);
    MESS 'ERREUR DANS INTG POUR UN CHAMP LINEAIRE';
    ERRE 5;
FINSI;

* CHAMP QUADRATIQUE
RES = INTG MO (Z**2);
ECART = ABS (RES - (1./3.));
MESS ECART XZPREC;
SI (ECART > XZPREC);
    MESS 'ERREUR DANS INTG POUR UN CHAMP QUADRATIQUE';
    ERRE 5;
FINSI;

**************
* PRISME P15R
**************

P1 = 0. 0. 0.;
P2 = 1. 0. 0.;
P3 = 0. 1. 0.;
D1 = DROI 1 (DROI 1 (DROI 1 P1 P2) P3) P1;
S1 = SURF 'PLAN' D1;
V1 = S1 VOLU 'TRAN' 1 (0. 0. 1.);
* TRAC V1;FIN;

MO = MODE V1 'MECANIQUE' 'ELASTIQUE' 'P15R';

* VOLUME A PARTIR D’UN CHAMP CONSTANT
UN = MANU 'CHML' MO 'SCAL' 1.;
VOL = INTG MO UN;
ECART = ABS (VOL - 0.5);
MESS ECART XZPREC;
SI (ECART > XZPREC);
    MESS 'ERREUR DANS INTG POUR UN CHAMP CONSTANT';
    ERRE 5;
FINSI;

* CHAMP LINEAIRE
Z = COOR 3 UN;
RES = INTG MO Z;
ECART = ABS (RES - 0.25);
MESS ECART XZPREC;
SI (ECART > XZPREC);
    MESS 'ERREUR DANS INTG POUR UN CHAMP LINEAIRE';
    ERRE 5;
FINSI;

* CHAMP QUADRATIQUE
RES = INTG MO (Z**2);
ECART = ABS (RES - (1./6.));
MESS ECART XZPREC;
SI (ECART > XZPREC);
    MESS 'ERREUR DANS INTG POUR UN CHAMP QUADRATIQUE';
    ERRE 5;
FINSI;

FIN;
