* fichier : Oxydation_Chimique_01.dgibi

************************************************************************
* Section : Diffusion Fick
* Section : Changement_De_Phase Changement_De_Phase
************************************************************************

************************************************************************
* JEU DE DONNEES :
*   DESCRIPTION :
*   -------------
* - Simule la diffusion chimique d'une espece conduisant a la formation
*   d'une couche d'oxyde
*   L'espece diffuse a travers l'oxyde et passe dans le metal
*   La couche d'oxyde croit lorsque le potentiel chimique le permet
************************************************************************


************************************************************************
'DEBP' PARATHER PRECED*'TABLE' TEMM*'FLOTTANT';
************************************************************************
* PROCEDURE PARATHER :
*   DESCRIPTION :
*   -------------
*   Cette procedure permet de modifier le materiaux en l'exprimant au temps 'TEMM'
*     - Les composantes KD, CDIF
*
*   ENTREES :
*   ---------
*   - PRECED : TABLE complete de PASAPAS
*   - TEMM   : Temps 'MOYEN' (tient compte de la 'RELAXATION_THETA')
*
*   SORTIES :
*   ---------
*   - Aucune
*
************************************************************************
  ETAB    = PRECED.'WTABLE';
  MOD_DIF = ETAB.'MOD_DIF' ;
  MAT_DIF = ETAB.'MAT_DIF' ;

  Mu1     = 'EXCO'  ETAB.'THER_COURANT' 'MU' 'MU';
  Mu1     = 'CHAN' 'CHAM' Mu1 MOD_DIF 'NOEUD'    ;

  Prop1   ='CHAN' 'CONS' ('NOMC' PROPHA1 'SCAL') CONS1;
  Prop1   ='CHAN' 'TYPE' Prop1 'SCALAIRE';

  MASQ11  ='MASQ' Prop1  'INFE'         1.D-8  ;
  MASQ21  ='MASQ' Prop1  'SUPE' (1.D0 - 1.D-8) ;
  MASQC1  ='MASQ' (MASQ11 + MASQ21) 'INFE' 0.5 ;

  GA11    =('IPOL'  Mu1   EVG1) 'NOMC' 'SCAL';
  DI11    =('IPOL'  Mu1   EVD1) 'NOMC' 'SCAL';
  CO11    =('IPOL'  Mu1   EVC1) 'NOMC' 'SCAL';

  GA21    =('IPOL'  Mu1   EVG2) 'NOMC' 'SCAL';
  DI21    =('IPOL'  Mu1   EVD2) 'NOMC' 'SCAL';
  CO21    =('IPOL'  Mu1   EVC2) 'NOMC' 'SCAL';

* Combinaison du metal et de l'oxyde avec les MASQUES
  GA1     =(GA11*MASQ11) + (GA21*MASQ21) + (GA21*MASQC1);
  CO1     =(CO11*MASQ11) + (CO21*MASQ21) + (CO21*MASQC1);
  DI1     =(DI11*MASQ11) + (DI21*MASQ21) + (DI21*MASQC1);

  Mu1     ='NOMC' Mu1 'SCAL';
  Ci1     = CO1/GA1*('EXP' ( Mu1 / (R_gaz * T_ini)));

  MCHTMP1 = Ci1 / (R_gaz * T_ini) ;
  MCHCDIF1='CHAN' 'COMP' 'CDIF' MCHTMP1        ;
  MCHKD1  ='CHAN' 'COMP' 'KD'  (MCHTMP1 * DI1) ;

*  REMPLACEMENT DU MATERIAUX
  MCHCDIF1       ='CHAN' 'RIGIDITE' MOD_DIF MCHCDIF1  ;
  MCHKD1         ='CHAN' 'RIGIDITE' MOD_DIF MCHKD1    ;
  ETAB.'MAT_DIF' = MCHKD1 'ET' MCHCDIF1               ;
  ETAB.'MAT_TOT' = ETAB.'MAT_DIF' 'ET' ETAB.'MAT_PHA' ;
'FINP';

************************************************************************
'DEBP' CHARTHER PRECED*'TABLE'  tt*'FLOTTANT' ;
************************************************************************
* PROCEDURE CHARTHER :
*   DESCRIPTION :
*   -------------
* - met a jour le second membre
* - met a jour la rigidite
************************************************************************
  ETAB    = PRECED.'WTABLE'        ;
  MOD_DIF = ETAB.'MOD_DIF'         ;
  MAT_DIF = ETAB.'MAT_DIF'         ;
  TETA    = ETAB.'RELAXATION_THETA';
  Dt      = ETAB.'DT'              ;

* Second membre du au changement de variable
  Mu0CHP  ='EXCO' PRECED.'CONTINUATION'.'CONCENTRATIONS' 'MU' 'MU' ;
  Mu0     ='CHAN' 'CHAM' Mu0CHP MOD_DIF 'NOEUD';

  Mu1CHP  ='EXCO'  ETAB.'THER_COURANT'  'MU' 'MU';
  Mu1     ='CHAN' 'CHAM' Mu1CHP MOD_DIF 'NOEUD'  ;

  Prop1   ='CHAN' 'CONS' ('NOMC' PROPHA1 'SCAL') CONS1;
  Prop1   ='CHAN' 'TYPE' Prop1 'SCALAIRE';

  MASQ11  ='MASQ' Prop1  'INFE'         1.D-8  ;
  MASQ21  ='MASQ' Prop1  'SUPE' (1.D0 - 1.D-8) ;
  MASQC1  ='MASQ' (MASQ11 + MASQ21) 'INFE' 0.5 ;

  GA10    =('IPOL' Mu0 EVG1) 'NOMC' 'SCAL';
  CO10    =('IPOL' Mu0 EVC1) 'NOMC' 'SCAL';
  GA20    =('IPOL' Mu0 EVG2) 'NOMC' 'SCAL';
  CO20    =('IPOL' Mu0 EVC2) 'NOMC' 'SCAL';

  GA11    =('IPOL' Mu1 EVG1) 'NOMC' 'SCAL';
  CO11    =('IPOL' Mu1 EVC1) 'NOMC' 'SCAL';
  GA21    =('IPOL' Mu1 EVG2) 'NOMC' 'SCAL';
  CO21    =('IPOL' Mu1 EVC2) 'NOMC' 'SCAL';

  dlnCGdt =(('LOG' (CO11/GA11)) - ('LOG' (CO10/GA10))) +
           (('LOG' (CO21/GA21)) - ('LOG' (CO20/GA20))) / Dt ;

* Combinaison du metal et de l'oxyde avec les MASQUES
  GA1     =(GA11*MASQ11) + (GA21*MASQ21) + (GA21*MASQC1);
  CO1     =(CO11*MASQ11) + (CO21*MASQ21) + (CO21*MASQC1);

*  Mu0     ='NOMC' Mu0 'SCAL';
  Mu1     ='NOMC' Mu1 'SCAL';

*  Ci0     = CONS0/GA0*(EXP ( Mu0 / (R_gaz * T_ini)));
  Ci1     = CO1/GA1*('EXP' ( Mu1 / (R_gaz * T_ini)));

*  SOUR0   ='SOUR' MOD_DIF (-1.D0 * Ci0 * dlnCGdt) ;
  SOUR1   ='SOUR' MOD_DIF (-1.D0 * Ci1 * dlnCGdt) ;

* Second membre et RIGIDITE du a la condition de CONVECTION au bord
*  RIG2    = 'COND' MOD2 MAT2 ;
*  RIG2    = 'CHAN' 'INCO' RIG2 ('MOTS' 'T') ('MOTS' 'MU') ('MOTS' 'Q') ('MOTS' 'QM');

*  Mu_ext  = 'IPOL' EVMu_Ext TEMM ;
*  SOUR2   = 'CONV' MOD2 MAT2 'T' Mu_ext;
*  SOUR2   = 'CHAN' 'COMP' 'QM' SOUR2;

* Remplissage des indices de sortie : ADDI_MATRICE ET ADDI_SECOND
  TAA ='TABL';
*  TAA.'ADDI_MATRICE'= RIG2 ;
*  TAA.'ADDI_SECOND' = ((1.D0 - THETA)*SOUR1) + (THETA*SOUR1);
*  TAA.'ADDI_SECOND' = SOUR1 'ET' SOUR2 ;
  TAA.'ADDI_SECOND' = SOUR1 ;
'FINP' TAA;
************************************************************************

'OPTI' 'DIME' 2 'ELEM' 'QUA4' ;
'OPTI' 'SAUV' 'Potentiel_Chimique_1.sauv';

* MAILLAGE *
DX1   = 30. ;
DY    = 1.  ;

P1    = 0. 0. ;
P2    = P1 'PLUS' (0. DY);
NBE1  = 1 ;
L1    ='DROI' NBE1 P1 P2 ;
L2    = L1 'PLUS' (DX1 0.);

NBE2  = 100 ;
S1    ='REGL' L1 NBE2 L2 'COUL' ROUG;
STOT  = S1;

P3    = 'POIN' 1 L2;
CONT1 = 'CONT' STOT;
L4    = 'POIN' CONT1 'DROI' P1 P3 1.D-4;
L4    = 'ELEM' CONT1 'APPU' 'STRI' L4  ;
L4    =('INVE' L4)   'COUL' 'BOUT'     ;
L5    = 'DROI' (NBE2 * 2) P1 P3        ;

* MODELE *
CONS1  ='MOT' 'TOTO';

MOD1   ='MODE' S1 'DIFFUSION' 'INCO' 'MU' 'QM' 'CONS' CONS1;
MOD2   ='MODE' L1 'THERMIQUE' 'CONVECTION';
MOD3   ='MODE' S1 'CHANGEMENT_PHASE' 'PARFAIT' 'INCO' 'MU' 'QM' 'CONS' 'CHP1';
MODTOT = MOD1 'ET' MOD3 ;

* MATERIAU *
R_gaz  = 8.314        ;
T_ini  = 273.15 + 30. ;

************************************************************************
* Indice 1 : Dans le METAL (ie : Mu <= Mu_ChPh)
* Indice 2 : Dans l' OXYDE (ie : Mu >= Mu_ChPh)
************************************************************************
Mu_ChPh=-15000.D0 ;
Mu_mini=-20000.D0 ;
Mu_maxi=-10000.D0 ;

* Proprietes dans le METAL
LMU1   ='PROG' Mu_mini Mu_ChPh ;
C1     = 3300. ;
LC1    = C1 * (LMU1**0) ;
EVC1   ='EVOL' 'CYAN' 'MANU' 'MU' LMU1 'C1' LC1;

Xi_eq  = 0.05 ; 'COMM' 'Fraction molaire a saturation' ;
G1     =('EXP' (Mu_ChPh /(R_gaz*T_ini))) / Xi_eq ;
LG1    = G1 * (LMU1**0) ;
EVG1   ='EVOL' 'VERT' 'MANU' 'MU' LMU1 'G1' LG1;

EaD1   = 65000. ;
LnD1   = -22.   ;
D1     ='EXP'((EaD1 /(R_gaz*T_ini)) + LnD1)  ;
LD1    = D1 * (LMU1**0) ;
EVD1   ='EVOL' 'ROUG' 'MANU' 'MU' LMU1 'D1' LD1;

* Proprietes dans l'OXYDE
PAMU2  = 10. ;
LMU2   ='PROG' Mu_ChPh 'PAS' PAMU2 Mu_maxi ;
C2     = 2800.    ;
LC2    = C2 * (LMU2**0) ;
EVC2   ='EVOL' 'BLEU' 'MANU' 'MU' LMU2 'C2' LC2;

Xi_ox  = 2./3. ; 'COMM' 'Fraction molaire dans l oxyde' ;
G2     =('EXP' (LMU2 /(R_gaz*T_ini))) / Xi_ox ;
LG2    = G2 * (LMU2**0) ;
EVG2   ='EVOL' 'BOUT' 'MANU' 'MU' LMU2 'G2' LG2;

EaD2   = 55000. ;
LnD2   = -20.   ;
D2     ='EXP'((EaD2 /(R_gaz*T_ini)) + LnD2)  ;
LD2    = D2 * (LMU2**0) ;
EVD2   ='EVOL' 'BRIQ' 'MANU' 'MU' LMU2 'D2' LD2;

* Quelques DESSINS
*OPTI TRAC 'PSC';
*DESS (EVC1 ET EVC2) ;
*DESS ((LOG EVG1) ET (LOG EVG2) ) ;
*DESS (EVG1 ET EVG2) ;
*DESS (EVD1 ET EVD2);

* Materiau bidon (Change dans PARATHER)
MAT1   ='MATE' MOD1 'KD' 1. 'CDIF' 1. ;
MAT2   ='MATE' MOD2 'H'  1. ;
MAT3   ='MATE' MOD3 'PRIM' Mu_ChPh 'DUAL' 1670. ;
MATTOT = MAT1 'ET' MAT3 ;

* Conditions aux limites
BLOQ1 ='BLOQ' 'MU' L1   ;
*BLOQ2 = BLOQ 'MU' L2   ;
BLOTOT= BLOQ1 ;

* Chargement
Mu_imp1 = Mu_maxi ;
Mu_imp2 = Mu_mini ;
CHP1  ='DEPI'  1.D0  BLOQ1 ;
EVO1  ='EVOL' 'MANU' 'TEMP' ('PROG' 0. 2.0 2.001 4.) 'MU' ('PROG' Mu_imp1 Mu_imp1 Mu_imp1 Mu_imp1) ;
CHAR1 ='CHAR' 'CIMP' CHP1 EVO1 ;

*CHP2  = DEPI  Mu_imp2  BLOQ2 ;
*EVO2  = EVOL 'MANU' 'TEMP' (PROG 0. 1.D10) 'MU' (PROG 1. 1.) ;
*CHAR2 = CHAR 'CIMP' CHP2 EVO2 ;
*CHATOT= CHAR1 ET CHAR2;
CHATOT   = CHAR1;

* Potentiel chimique 'au loin'
*EVMu_Ext ='EVOL' 'MANU' 'TEMP' ('PROG' 0. 2.5 2.501 4.) 'T' ('PROG' Mu_imp1  Mu_imp1  Mu_imp2  Mu_imp2);

* CONDITIONS INITIALES
Mu_ini  = Mu_mini ;
CHMUini ='MANU' 'CHPO' STOT 1 'MU' Mu_ini 'NATU' 'DIFFUS';
CHPini  ='ZERO'  MOD3 'VARINTER';

* PASAPAS
LTPS1 = PROG 0. 'PAS' 0.005 0.05 'PAS' 0.05  3.;
LTPS2 = PROG 0. 'PAS' 0.05  3.;
LTPS2 = LTPS1;

TAB1  = TABL ;
TAB1.'MODELE'                = MODTOT ;
TAB1.'CARACTERISTIQUES'      = MATTOT ;
TAB1.'BLOCAGES_DIFFUSIONS'   = BLOTOT ;
TAB1.'CHARGEMENT'            = CHATOT ;

TAB1.'CONCENTRATIONS'        ='TABL'  ;
TAB1.'CONCENTRATIONS'. 0     = CHMUini;

TAB1.'PROPORTIONS_PHASE'     ='TABL'   ;
TAB1.'PROPORTIONS_PHASE'. 0  = CHPini  ;

TAB1.'TEMPS_CALCULES'        = LTPS1  ;
TAB1.'TEMPS_SAUVES'          = LTPS2  ;
TAB1.'TEMPS_SAUVEGARDES'     = LTPS2  ;
TAB1.'ECONOMIQUE'            = VRAI   ;

TAB1.'PROCEDURE_PARATHER'    = VRAI   ;
TAB1.'PROCEDURE_CHARTHER'    = VRAI   ;
TAB1.'PROCESSEURS'           ='MONOPROCESSEUR' ;
TAB1.'PRECISION'             = 1.D-6  ;
TAB1.'MAXITERATION'          = 25     ;

* AUGMENTATION EN CAS DE NON CONVERGENCE :
*MAT_AUG='MATE' MOD1 'KD' 0.4 'CDIF' 0.8 ;
*CAPA1  ='CAPA' MODTOT MAT_AUG ;
*KDIF1 ='COND' MODTOT MATTOT ;
*FLOT1 = XTMX  CHMUini CAPA1 ;
*FLOT2 = XTMX  CHMUini KDIF1 ;
*MESS FLOT1 FLOT2;
*TAB1.'DIFFUSION_AUGMENTEE'= CAPA1 * 1.D2 ;

'SAUV';
 PASAPAS TAB1;
'SAUV';

* Post-Traitement
'OPTI' 'REST' 'Potentiel_Chimique_1.sauv';
'REST';
'OPTI' 'SAUV' 'Potentiel_Chimique_1.sauv';
'SAUV';
'OPTI' 'TRAC' 'PSC';

G_ini_1 ='MINI' LG1;
G_ini_2 ='MAXI' LG1;
LTPSCAL ='PROG'    ;
LXFRONT ='PROG'    ;

MODloc ='MODE' ('CHAN' 'TRI3' S1 ) 'DIFFUSION' 'INCO' 'MU' 'QM' 'CONS' CONS1; 'COMM' 'Pour ISOV...';
EvCHPH ='EVOL' 'NOIR' 'MANU' 'ABS' ('PROG' 0. DX1) 'MU' ('PROG' Mu_ChPh Mu_ChPh);
'REPE' SURI (DIME TAB1.'TEMPS');
  III     = &SURI ;
  Mui     = TAB1.'CONCENTRATIONS'.     (III - 1) ;
  Pi      = TAB1.'PROPORTIONS_PHASE'.  (III - 1) ;
  Tps     = TAB1.'TEMPS'         .     (III - 1) ;

  Mui     ='EXCO'  Mui 'MU' 'MU';

* Recherche de l'interface par interpolation lineaire
  Moy1    =('INTG' Pi MOD3) / ('INTG' (Pi ** 0) MOD3);
  COXi    = Moy1*DX1;

  LTPSCAL = LTPSCAL 'ET' Tps  ;
  LXFRONT = LXFRONT 'ET' COXi ;


  Mu1     = 'CHAN' 'CHAM' Mui MOD1 'NOEUD' ;

  Prop1   ='CHAN' 'CONS' ('NOMC' Pi 'SCAL') CONS1;
  Prop1   ='CHAN' 'TYPE' Prop1 'SCALAIRE';

  MASQ1  ='MASQ' Prop1  'INFE'         1.D-8  ;
  MASQ2  ='MASQ' Prop1  'SUPE' (1.D0 - 1.D-8) ;
  MASQC  ='MASQ' (MASQ1 + MASQ2) 'INFE' 0.5 ;

  GA11    =('IPOL' Mu1 EVG1) 'NOMC' 'SCAL';
  DI11    =('IPOL' Mu1 EVD1) 'NOMC' 'SCAL';
  CO11    =('IPOL' Mu1 EVC1) 'NOMC' 'SCAL';

  GA21    =('IPOL' Mu1 EVG2) 'NOMC' 'SCAL';
  DI21    =('IPOL' Mu1 EVD2) 'NOMC' 'SCAL';
  CO21    =('IPOL' Mu1 EVC2) 'NOMC' 'SCAL';


* Combinaison du metal et de l'oxyde avec les MASQUES
  GA1     =(GA11*MASQ1) + (GA21*MASQ2) + (GA21*MASQC);
  CO1     =(CO11*MASQ1) + (CO21*MASQ2) + (CO21*MASQC);
  DI1     =(DI11*MASQ1) + (DI21*MASQ2) + (DI21*MASQC);

  Mu1     = 'NOMC'  Mu1  'SCAL';
  Xi1     =('EXP' ( Mu1 / (R_gaz * T_ini))) / GA1;
  Ci1     = CO1*Xi1 ;
  XiPROI  =('PROI' L5 Xi1) 'NOMC' 'Xi'  ;
  CiPROI  =('PROI' L5 Ci1) 'NOMC' 'Ci'  ;
  COPROI  =('PROI' L5 CO1) 'NOMC' 'CONS';
  GaPROI  =('PROI' L5 GA1) 'NOMC' 'GAMM';

  EvMui   ='EVOL' 'BLEU' 'CHPO' Mui    'MU'   L4 ;
  EvXi    ='EVOL' 'BOUT' 'CHPO' XiPROI 'Xi'   L5 ;
  EvCi    ='EVOL' 'BOUT' 'CHPO' CiPROI 'Ci'   L5 ;
  EvCO    ='EVOL' 'BOUT' 'CHPO' COPROI 'CONS' L5 ;
  EvGa    ='EVOL' 'ROUG' 'CHPO' GaPROI 'GAMM' L5 ;

 'OPTI' 'EPTR' 0;
 'TRAC' Pi MOD3 ('CONT' S1);
 'OPTI' 'EPTR' 10;
 'DESS' (EvMui 'ET' EvCHPH) 'GRIL' 'TIRC' 'GRIS' 'XBOR' 0. DX1 'YBOR' Mu_mini  Mu_maxi 'YGRA' ((Mu_maxi-Mu_mini) / 10.);
 'DESS' EvXi  'GRIL' 'TIRC' 'GRIS' 'XBOR' 0. DX1 'YBOR' 0.D0    0.7D0   'YGRA' 0.1D0  ;
 'DESS' EvCi  'GRIL' 'TIRC' 'GRIS' 'XBOR' 0. DX1 'YBOR' 0.D0    2000.   'YGRA' 200.   ;
 'DESS' EvCO  'GRIL' 'TIRC' 'GRIS' 'XBOR' 0. DX1   ;
 'DESS' EvGa  'GRIL' 'TIRC' 'GRIS' 'XBOR' 0. DX1   ;

'FIN' SURI;


EVXFRONa ='EVOL' 'ROUG' 'MANU' 'TEMP' LTPSCAL 'X**2' (LXFRONT ** 2);
EVXFRONb ='EVOL' 'ROUG' 'MANU' 'TEMP' LTPSCAL 'X'     LXFRONT      ;

* Solution du probleme Quasi-Stationnaire 1D
* Reaction consideree : M + Nu.O <=> MO_Nu
Xi_2  = 1./3. ;
Nu    = Xi_2/(1. - Xi_2);
Csat  = C1/('IPOL' Mu_ChPh EVG1)*('EXP' ( Mu_ChPh / (R_gaz * T_ini)));

Alpha   = 1.D0;
LXFRONQS=(2*Alpha*C2*D2*(Mu_imp1 - Mu_ChPh) * LTPSCAL /
         (R_gaz*T_ini*(C2-(Csat/Nu)))) ** 0.5 ;
EVQSa1  ='EVOL' 'BOUT' 'MANU' 'TEMP' LTPSCAL 'X**2' (LXFRONQS ** 2);
EVQSb1  ='EVOL' 'BOUT' 'MANU' 'TEMP' LTPSCAL 'X'     LXFRONQS      ;

Alpha   = 0.5D0;
LXFRONQS=(2*Alpha*C2*D2*(Mu_imp1 - Mu_ChPh) * LTPSCAL /
         (R_gaz*T_ini*(C2-(Csat/Nu)))) ** 0.5 ;
EVQSa2  ='EVOL' 'BLEU' 'MANU' 'TEMP' LTPSCAL 'X**2' (LXFRONQS ** 2);
EVQSb2  ='EVOL' 'BLEU' 'MANU' 'TEMP' LTPSCAL 'X'     LXFRONQS      ;

DESS (EVXFRONa ET EVQSa1 ET EVQSa2) 'GRIL' 'TIRC' 'GRIS' ;
DESS (EVXFRONb ET EVQSb1 ET EVQSb2) 'GRIL' 'TIRC' 'GRIS' ;
OPTI 'SAUV' 'Potentiel_Chimique_1.sauv';
SAUV;
FIN;
