'FIN' ;
'COMM' fichier : acqulatb.dgibi
'COMM' Ce jeu de données contenait les données à lire pour le test ;
'COMM' acqulata.dgibi ;
'COMM' Celles-ci sont désormais incluses dans acqulata.dgibi.
'COMM' Ce jeu de données est désormais inutile.
