* fichier : cormasse.dgibi
*
*
* Tests de la procédure cormasse qui corrige un chpo afin que ses valeurs
* soient positives et inférieures à Maxrho, et que que son intégrale
* soit égale à une valeur cible.
*
'OPTI' 'DIME' 2 'ELEM' 'QUA4' ;
*
Lref = 3. ;
p1   = 0.   0.   ;
p2   = Lref 0.   ;
p3   = Lref Lref ;
p4   = 0.   Lref ;
vtf  = 'MANU' 'QUA4' P1 P2 P3 P4 ;
Mvtf = 'CHAN' vtf 'QUAF' ;
'ELIM' Mvtf 1.D-5 ;
$vtf = 'MODE' Mvtf 'NAVIER_STOKES' 'QUAF' ;
vtf  = 'DOMA' $vtf 'MAILLAGE' ;
*
x y    = 'COOR' vtf ;
MaxRho = 10000. ;
*
*
* 1. Champ uniforme 2 : Mcfd=18
*
*
RHOi = 'KCHT' $vtf 'SCAL' 'SOMMET' 2. ;
*
* 1.1/ Correction nulle
mcible1 = 18. ;
dRHO1 RHOk1 MiCFD = CORMASSE $vtf RHOi Mcible1 MaxRho ;
*
* 1.2/ Correction uniforme +9 / V = +1
mcible2 = 27. ;
dRHO2 RHOk2 MiCFD = CORMASSE $vtf RHOi Mcible2 MaxRho ;
*
* 1.3/Correction uniforme -9 / V = -1
mcible3 = 9. ;
dRHO3 RHOk3 MiCFD = CORMASSE $vtf RHOi Mcible3 MaxRho ;
*
*
* 2. Champ non uniforme linéaire (y+1) : Mcfd=22.5
*
*
RHOi = 'KCHT' $vtf 'SCAL' 'SOMMET' (y '+' 1.) ;
*
* 2.4/Correction uniforme -9/V = -1 en restant positif
mcible4 = 13.500000001 ;
dRHO4 RHOk4 MiCFD = CORMASSE $vtf RHOi Mcible4 MaxRho ;
*
* 2.5/Idem légèrement négatif
mcible5 = 13.499999999 ;
dRHO5 RHOk5 MiCFD = CORMASSE $vtf RHOi Mcible5 MaxRho ;
*
* 2.6/Correction non uniforme (redistribution du négatif)
mcible6 = 9. ;
dRHO6 RHOk6 MiCFD = CORMASSE $vtf RHOi Mcible6 MaxRho ;
*
* 2.7/Correction non uniforme (redistribution du négatif)
mcible7 = 1. ;
dRHO7 RHOk7 MiCFD = CORMASSE $vtf RHOi Mcible7 MaxRho ;
*
*
* Tests de non-régression
*
*
'LIST' (rhok2 '-' 1.);
'LIST' (rhok2 '-' 3.);
'LIST' (rhok3 '-' 1.);
'LIST' (rhok4 '-' y);
'LIST' (rhok5 '-' y);
'LIST' (rhok6 '-' 2.4) ;
'LIST' (rhok7 '-' (2./3.));
*
erho1 = rhok1 '-' 2. ;
val1 = 'MAXI' erho1 'ABS' ;
erho2 = rhok2 '-' 3. ;
val2 = 'MAXI' erho2 'ABS' ;
erho3 = rhok3 '-' 1. ;
val3 = 'MAXI' erho3 'ABS' ;
erho4 = rhok4 '-' y ;
val4 = 'MAXI' erho4 'ABS' ;
erho5 = rhok5 '-' y ;
val5 = 'MAXI' erho5 'ABS' ;
erho6 = ('REDU' rhok6 (p3 'ET' p4)) '-' 2.4 ;
val6 = 'MAXI' erho6 'ABS' ;
erho7 = ('REDU' rhok7 (p3 'ET' p4)) '-' (2./3.) ;
val7 = 'MAXI' erho7 'ABS' ;
'MESS' val1 val2 val3 val4 val5 val6 val7 ;
*
graph = faux ;
'SI' graph ;
   'TRAC' vtf RHOk1 'TITR' 'Rho_i=2 , Rho_f=2' ;
   'TRAC' vtf RHOk2 'TITR' 'Rho_i=2 , Rho_f=3' ;
   'TRAC' vtf RHOk3 'TITR' 'Rho_i=2 , Rho_f=1' ;
   'TRAC' vtf RHOk4 'TITR' 'Rho_i=y+1 , Rho_f=y^+' ;
   'TRAC' vtf RHOk5 'TITR' 'Rho_i=y+1 , Rho_f=y^-' ;
   'TRAC' vtf RHOk6
   'TITR' 'Rho_i=y+1 , Rho_f=(0,0.9,2.4) en (bas,milieu,haut)' ;
   'TRAC' vtf RHOk7
   'TITR' 'Rho_i=y+1 , Rho_f=(0,0,2/3) en (bas,milieu,haut)' ;
'FINS' ;
*
vmax = 'MAXI' ('PROG' val1 val2 val3 val4 val5 val6 val7) ;
'SI' (vmax '>' 1.D-8) ;
   'ERRE' 5 ;
'FINS' ;
*
'FIN' ;
