* fichier : dync01.dgibi
*
*********************************************************************
*                                                                   *
*      RÉPONSE FORCEE D'UN OSCILLATEUR DE DUFFING                   *
*      OPTION EXPOSANT DE L'OPERATEUR DYNE (raideur cubique)        *
*                                                                   *
*      CREATION : 25/01/2018                                        *
*                                                                   *
*      MANIP KOALA (CEA,DEN,DM2S,SEMT,DYN)                          *
*                                                                   *
*                                                                   *
*                             _____                                 *
*                            |     |                                *
*                            |  m  |                                *
*                            |_____|                                *
*                               |                                   *
*  /|                      /    |                                   *
*  /|----[k]----[xi]----(knl)----                                   *
*  /|                    /       ----> F(t)                         *
*                               |----> x                            *
*                                                                   *
*********************************************************************


*********************************************************************
*     Parametres globaux
*********************************************************************
GRAPH = FAUX;

OPTION DIME 2 ELEM SEG2 ;
OPTION 'TRAC' 'PSC' 'EPTR' 5 'POTR' 'TIMES_16';


*********************************************************************
*     PARAMETRES DU MODELE
*********************************************************************
* nombre de modes a calculer
  NMODE = 1;
* nombre de harmoniques a calculer et NFFT
  NHBM = 5;   NFFT = 256;
* Amplitude chargement
  Fext0 = 1.;
* Parametre non-lineaire fnl=knl*x^3
  knl = 0.25 ;


*********************************************************************
*     DEFINITION DU MODELE
*********************************************************************

*--------------------- Characteristiques du modele ----------------
*masse frequence propre (Hz), raideur
 xi = 0.1/2.;
 m = 1.;
 k = 1.;
*point de la masse
 p1 = poin 0. 0. ;

*------------------Calcul des Modes Propres --------------

 p1A = point 0. 0.;
 phi1 = manu chpo p1 1 'UX' 1. NATURE DIFFUS;

 TMOD = TABLE 'BASE_MODALE';
 TMOD . 'MODES' = TABL 'BASE_DE_MODES';
 TMOD . 'MODES' . 'MAILLAGE' = manu 'POI1' p1;
 TMOD . 'MODES' . 1 = TABL 'MODE';
 TMOD . 'MODES' . 1 . 'POINT_REPERE'       = p1A ;
 TMOD . 'MODES' . 1 . 'NUMERO_MODE'        = 1;
 TMOD . 'MODES' . 1 . 'FREQUENCE'          = 1./(2.*PI);
 TMOD . 'MODES' . 1 . 'MASSE_GENERALISEE'  = m;
 TMOD . 'MODES' . 1 . 'DEFORMEE_MODALE'    = phi1;


*********************************************************************
*  LIAISONS, CHARGEMENT ET AMORTISSEMENT
*********************************************************************

*----------------------------------------------*
*  CHARGEMENT = EXCITATION HARMONIQUE
*----------------------------------------------*
  GFC1 = MANU CHPO p1A 1 'FALF' Fext0 ;

*----------------------------------------------*
*     Les FORCES due a la raideur non-lineaire
*----------------------------------------------*

  TL3 = TABLE 'LIAISON_ELEMENTAIRE' ;
  TL3 . 'TYPE_LIAISON' = MOT  'COUPLAGE_DEPLACEMENT';
  TL3 . 'SUPPORT'      = p1A ;
  TL3 . 'ORIGINE'      = p1A ;
  TL3 . 'COEFFICIENT'  = -1.*knl ;
  TL3 . 'EXPOSANT'     = 3   ;

*----------------------------------------------*
*     Regroupement des LIAISONS
*----------------------------------------------*
  TAB_LIAI   = TABLE 'LIAISON' ;
  TAB_LIAI . 'LIAISON_A' = TABLE 'LIAISON_A';
  TAB_LIAI . 'LIAISON_A' . 1 = TL3;

*----------------------------------------------*
*     L'AMORTISSEMENT (attention en % pour AMOR)
*----------------------------------------------*
  TAB_AMOR = TABLE 'AMORTISSEMENT';
  TAB_AMOR . 'AMORTISSEMENT' = AMOR TMOD (100.*(prog xi));

*********************************************************************
*     CALCUL NON LINEAIRE REPONSE FORCEE : TABLES DYNC
*********************************************************************
*nouvelle syntaxe pour TAB_CHAR
* chargement spatial : GFC1
* sur l'harmonique fondamentale 1 ==> F=Fext*cos(wt)
      TAB_CHAR = TABLE 'CHARGEMENT';
      TAB_CHAR . 1 =  GFC1;
* constant avec la frequence, si F=w^2*(...) ==> BALOURD = 1 (eg. JEFFCOTT)
*      TAB_CHAR . 'BALOURD' = 0;

* Approximation pour la solution initiale à fréquence fixe
      VEC_INIT = TABLE 'INITIAL';
      Wext =  0.01;
      VEC_INIT . 'FREQUENCE' = Wext ;
*bp      VEC_INIT . 2 = 0.5;
*bp : on utilise desormais la convention j=0 +1 -1 +2 -1 ... +nhbm -nhbm
*bp   ainsi qu'un chpoint
      Q0 = MANU CHPO p1A 1 'ALFA' 0.5 ;
      VEC_INIT . +1 = Q0;

* Paramètres numériques pour la continuation
      PAR_NUM = TABLE 'PARAMETRES_NUMERIQUES';
      PAR_NUM . 'TYPE'    = MOT 'FORC';
      PAR_NUM . 'VAL_FIN' = 2.5;
      PAR_NUM . 'DS0'     =    0.01;
      PAR_NUM . 'DSMAX'   =   0.05;
      PAR_NUM . 'DSMIN'   =  1.E-4;
      PAR_NUM . 'ITERMOY' =    3.4;
      PAR_NUM . 'ITERMAX' =     30;
      PAR_NUM . 'ANGLE_MIN'  =     0.;
      PAR_NUM . 'ANGLE_MAX'  =    50.;
      PAR_NUM . 'ISENS'   =    1.;
      PAR_NUM . 'NBPAS'   =    1000;
*----------------------------------------------------------------------*
* Appel a l'operateur
* opti impi 3;
      TCON = DYNC TMOD TAB_CHAR TAB_LIAI TAB_AMOR VEC_INIT PAR_NUM
             NHBM NFFT;
* opti impi 0 donn 5;
*----------------------------------------------------------------------*


*********************************************************************
*     CALCUL NON LINEAIRE MODE NON-LINEAIRE : TABLES DYNC
*********************************************************************

* qq modifs dans les donnees d'entree
      PAR_NUM . 'TYPE'       = MOT 'NNM';
*       PAR_NUM . 'VAL_INI'    = 0.001;  ---> VEC_INIT . 'ENERGIE'
      PAR_NUM . 'VAL_FIN'    = 25;
*       PAR_NUM . 'MODE_DEBUT' = 1;      ---> VEC_INIT . 'MODE' = 1
*
*-----------------------------------------------------------------------
* Appel a l'operateur
* rem. : a) pour l'instant, pas de TAB_AMOR
*        b) VEC_INIT basée sur l'energie initiale
     VEC_INIT = TABLE 'INITIAL';
     VEC_INIT . 'MODE' = 1;
     VEC_INIT . 'ENERGIE' = 0.001;
 opti impi 3;
      TNNM = DYNC TMOD TAB_CHAR TAB_LIAI PAR_NUM VEC_INIT NHBM NFFT;
 opti impi 0;
*-----------------------------------------------------------------------


************************************************************************
*  POST-TRAITEMENT
************************************************************************

* BACKBONE
* --------
*     frequence
      FNNM = TNNM . 'REPONSE' . 'FREQUENCE';
*     MAX de la NORME2 des COEFFICIENTS de FOURIER pour chaque freq
      ANNM = TNNM . 'REPONSE' . 'NORME_DEPLACEMENT';
      EVNNM = EVOL MANU '\w' FNNM  '|Q|' ANNM;

* COURBE DE REPONSE FORCE
* -----------------------
*     frequence
      FREQ = TCON . 'REPONSE' . 'FREQUENCE';
*     MAX de la NORME2 des COEFFICIENTS de FOURIER pour chaque freq
      AMPS = TCON . 'REPONSE' . 'NORME_DEPLACEMENT';
      XY = EVOL MANU '\w' FREQ  '|Q|' AMPS;
* stabilite
      STAB = TCON . 'REPONSE' . 'STABILITE';
      TABSTB = TABLE;
      TABSTB . 'LIGNE_VARIABLE' = TABL ENTI;
      TABSTB . 'LIGNE_VARIABLE' . 1 = STAB;
  TITR 'Duffing : courbe de reponse';
  DESS XY TABSTB ;

  TITR 'Duffing : courbe de reponse + NNM';
  DESS (XY ET EVNNM) TABSTB XBOR 0.0 2.5 XGRA 0.5 YBOR 0.0 5.0 YGRA 1.0; ;


*     BIFURCATIONS
*     ------------

* recup
      NBIF = DIME TCON . 'BIFURCATION' . 'TYPE';
      prLP_Q = PROG;  prLP_w = PROG;
      prBP_Q = PROG;  prBP_w = PROG;
      prPD_Q = PROG;  prPD_w = PROG;
      prNS_Q = PROG;  prNS_w = PROG;
      REPE BBIF NBIF;
        typbif = EXTR TCON . 'BIFURCATION' . 'TYPE'               &BBIF;
        Qbif   = EXTR TCON . 'BIFURCATION' . 'NORME_DEPLACEMENT'  &BBIF;
        wbif   = EXTR TCON . 'BIFURCATION' . 'FREQUENCE'          &BBIF;
        SI (EGA typbif 'LP'); prLP_Q = prLP_Q et Qbif; prLP_w = prLP_w et wbif; FINSI;
        SI (EGA typbif 'BP'); prBP_Q = prBP_Q et Qbif; prBP_w = prBP_w et wbif; FINSI;
        SI (EGA typbif 'PD'); prPD_Q = prPD_Q et Qbif; prPD_w = prPD_w et wbif; FINSI;
        SI (EGA typbif 'NS'); prNS_Q = prNS_Q et Qbif; prNS_w = prNS_w et wbif; FINSI;
      FIN  BBIF;

* creation d'1 evolution + table de dessin
      ibif  = 1;
      evBIF = VIDE 'EVOLUTIO';
* Limit Point
      si ((dime prLP_w) > 0);  ibif = ibif + 1;
        evLP = EVOL MANU LEGE 'LP' '\w' prLP_w '|Q|' prLP_Q;
        evBIF = evBIF et evLP;
        TABSTB . ibif = MOT 'NOLI MARQ LOSA';
      finsi;
* Branch Point
      si ((dime prBP_w) > 0);  ibif = ibif + 1;
        evBP = EVOL MANU LEGE 'BP' '\w' prBP_w '|Q|' prBP_Q;
        evBIF = evBIF et evBP;
        TABSTB . ibif = MOT 'NOLI MARQ CARR';
      finsi;
* Period Doubling Point
      si ((dime prPD_w) > 0);  ibif = ibif + 1;
        evPD = EVOL MANU LEGE 'PD' '\w' prPD_w '|Q|' prPD_Q;
        evBIF = evBIF et evPD;
        TABSTB . ibif = MOT 'NOLI MARQ TRID';
      finsi;
* Neimark Sacker Point
      si ((dime prNS_w) > 0);  ibif = ibif + 1;
        evNS = EVOL MANU LEGE 'NS' '\w' prNS_w '|Q|' prNS_Q;
        evBIF = evBIF et evNS;
        TABSTB . ibif = MOT 'NOLI MARQ TRIU';
      finsi;

  TITRE 'Duffing : courbe de reponse + bifurcations';
  DESS (XY ET evBIF) TABSTB ;
  DESS (XY ET evBIF) TABSTB XBOR 0.1 0.5 XGRA 0.1;
  DESS (XY ET evBIF) TABSTB XBOR 2.10 2.25 XGRA 0.05 YBOR 4.2 4.5 YGRA 0.05;

* STABILITE via les EXPOSANTS DE FLOQUET
* --------------------------------------
  TEXP_R = TCON . 'REPONSE' . 'EXPOSANT_REEL';
  TEXP_I = TCON . 'REPONSE' . 'EXPOSANT_IMAGINAIRE';
  exp_R = VIDE 'EVOLUTIO';
  exp_I = VIDE 'EVOLUTIO';
   coco = MOTS 'ROUG' 'BLEU' 'VERT' 'AZUR' 'ORAN' 'VIOL' 'TURQ' ;
  repe bexp;
    si (non (exis TEXP_R &bexp)); quit bexp ; finsi;
    coco_i = EXTR coco &bexp;
    exp_R = exp_R ET (evol coco_i 'MANU' '\w' FREQ '\m_{R}' TEXP_R . &bexp);
    exp_I = exp_I ET (evol coco_i 'MANU' '\w' FREQ '\m_{I}' TEXP_I . &bexp);
  fin bexp;

  TITR 'Duffing : exposants de Floquet';
  DESS exp_R;
  DESS exp_I;


* DETAIL DES HARMONIQUES DU 1ER MODE
* ----------------------------------
* imode = 1;
* le POINT_REPERE est p1A
  mycoco = @PALETTE (nhbm + 1);
  TABSTB2 = TABLE;
  TABSTB2 . 'LIGNE_VARIABLE' = TABL ENTI;
  ev1 = VIDE 'EVOLUTIO';
  j = 0;
  repe bhbm (nhbm + 1);
    si (EGA j 0);
      AMPj = TCON . REPONSE . COEFFICIENTS . j . p1A;
    sinon;
      AMPjC = TCON . REPONSE . COEFFICIENTS .     j  . p1A;
      AMPjS = TCON . REPONSE . COEFFICIENTS . (-1*j) . p1A;
      AMPj = ((AMPjC**2) + (AMPjS**2))**0.5;
    finsi;
    coco = EXTR mycoco &bhbm;
    ev1 = ev1 ET (EVOL coco 'MANU' 'LEGE' (chai 'j='j) '\w' FREQ '|Q^{j}|' AMPj);
    TABSTB2 . 'LIGNE_VARIABLE' . &bhbm = STAB;
    j = j + 1;
  fin  bhbm;

  TITR 'Duffing : Reponse du 1er mode';
  DESS ev1 'LEGE' TABSTB2;
  DESS ev1 'LEGE' XBOR 0.1 0.5 XGRA 0.1 TABSTB2;


* TEMPOREL ET PORTRAITS DE PHASE POUR QUELQUES POINTS
* ---------------------------------------------------

* base de fonctions T (et leur derivees T2) sur une periode adimensionnee
  T  = TABL;
  T2 = TABL;
  time = PROG 0. PAS (360./NFFT) 360.;
* terme constant
  T  . 1 = PROG (NFFT + 1)*1.;
  T2 . 1 = PROG (NFFT + 1)*0.;
* harmonique +j et -j
  j = 0;
  REPE bhbm nhbm; j = j + 2;
    T  .  j      = COS (&bhbm * time) ;
    T  . (j + 1) = SIN (&bhbm * time) ;
    T2 .  j      =  -1. * &bhbm * T  . (j + 1);
    T2 . (j + 1) =        &bhbm * T  .  j     ;
  FIN bhbm;

* boucle sur les solutions a tracer
  wprog = PROG 0.23 0.39 1.0 2.0 ;
  REPE BW (DIME wprog);
    w    = EXTR wprog &BW;
    ipas = POSI 1. 'DANS' (MASQ FREQ 'EGSUPE' w);
    w    = EXTR FREQ ipas;
*   harmonique 0
    Qprog = PROG (EXTR  TCON . REPONSE . COEFFICIENTS . 0 . p1A  ipas);
*   harmonique +j et -j
    REPE bhbm nhbm; j= &bhbm; jm = -1 * j;
      Qprog = Qprog et (EXTR  TCON . REPONSE . COEFFICIENTS . j  . p1A  ipas)
                    et (EXTR  TCON . REPONSE . COEFFICIENTS . jm . p1A  ipas);
    FIN bhbm;
*   q(t) = [T] * Q
    qtime    = COLI T  Qprog;
    dotqtime = COLI T2 Qprog;
*   trace du portrait de phase
    evphase = EVOL 'AZUR' 'MANU' 'q' qtime 'dq/dt' dotqtime;
    DESS evphase 'TITR' (CHAI 'Duffing : w=' FORMAT '(F6.3)' w) 'CARR';
  FIN BW;


************************************************************************
* TEST DE BON FONCTIONNEMENT
************************************************************************

* listreel des erreurs
  prERR = PROG;

* amplitude max et w correspondant a la 1ere resonance (harmonique 1)
  wref1 = 2.210;
  Qref1 = 4.475;
  imax1 wmax1 Qmax1 = MAXI XY;
  prERR = prERR et (wmax1 - wref1) et (Qmax1 - Qref1);

* resonance harmonique 3
  wref3 = 0.38;
  Qref3 = 1.03;
  XY3   = EXTR XY 'COMP' 0.3 1.5;
  FREQ3 = EXTR XY3 'ABSC';
  AMPS3 = EXTR XY3 'ORDO';
  dXY3  = (ENLE AMPS3 1) - (ENLE AMPS3 (dime AMPS3));
  imax3= POSI 1. 'DANS' (dXY3 MASQ EGINFE 0.);
  wmax3 = EXTR FREQ3 imax3;
  Qmax3 = EXTR AMPS3 imax3;
  prERR = prERR et (wmax3 - wref3) et (Qmax3 - Qref3);

* test
  ERRMAX = MAXI prERR 'ABS';
  SI (ERRMAX > 0.05);
    LIST prERR;
    ERRE 5;
  FINSI;

* nombre et/ou type et/ou localisation des bifurcations
  SI ( (NBIF NEG 2) OU ((dime prLP_w) NEG 2) );
    ERRE 5;
  FINSI;


************************************************************************
* PERFORMANCES
************************************************************************
  TEMP IMPR MAXI CPU;

* opti donn 5 trac X;
FIN ;
