* fichier : g_decouplage_8.dgibi
****************************************************
* Section : Mecanique Rupture
****************************************************
*                                                  *
*      VERIFICATION DE LA PROCEDURE G_THETA        *
*    POUR LE CALCUL DE KIII POUR UNE FISSURE       *
*         PENNY-SHAPED DANS UN CYLINDRE            *
*                        -                         *
*    COMPARAISON ENTRE LE RESULTAT DE DECOUPLAGE   *
*          EN 3D ET UNE SOLUTION ANALYTIQUE        *
*                      (XFEM)                      *
*                                                  *
*  SOLUTION ANALYTIQUE TIREE DE :                  *
*  "THE STRESS ANALYSIS OF CRACKS HANDBOOK"        *
*  TADA, PARIS AND IRWIN (2000)                    *
*                                                  *
****************************************************

* I - CALCUL 3D
* -------------

* OPTIONS ET BOOLEEN POUR LES TRACERS
OPTI 'DIME' 3 'ELEM' 'CUB8' ;
BTRAC = FAUX ;

* PROPRIETES MATERIAU
YOUN1 NU1 = 2.E5 0.3 ;

* I.1 - MAILLAGE
* **************

* PARAMETRES GEOMETRIQUES
* LP = RAYON DE LA FISSURE
* L1 = RAYON DU CYLINDRE
* H1 = HAUTEUR DU CYLINDRE
L1 H1 LP = 10. 15. 5. ;
PRE1 = 1.E-10 ;

* RECTANGLE AUTOUR DE LA FISSURE
P1 = (LP/2.) 0. 0. ;
P2 = (LP/2.) (LP/2.) 0. ;
P3 = (3.*LP/2.) (LP/2.) 0. ;
P4 = (3.*LP/2.) 0. 0. ;
N1 = 2 * 2 ;
N2 = 2 * N1 ;
D1 = DROI N1 P1 P2 ;
D2 = DROI N2 P2 P3 ;
D3 = DROI N1 P3 P4 ;
DENS1 = LP / 2. / N1 ;
CONT1 = D1 ET D2 ET D3 ;

* RAFFINEMENT VERS LA POINTE DE FISSURE
RAPP2 = 0.2 ;
DENS2 = DENS1*RAPP2 ;
CONT2 = CONT1 HOMO RAPP2 (LP 0. 0.) ;
S1 = CONT1 REGL CONT2 'DINI' DENS1 'DFIN' DENS2 ;
CONT2 = DROI N2 CONT2 (CONT2 POIN 'INIT') ;
S2 = SURF CONT2 'PLANE' ;
S2 = S2 COUL 'ROUG' ;
SURF1 = S1 ET S2 ;
* TRAC SURF1 ;FIN ;

* DERAFFINEMENT VERS L'EXTERIEUR DU CYLINDRE
RAPP3 = (L1 - (LP/2.)) / LP ;
DENS3 = DENS1*RAPP3 ;
CONT3 = (D2 ET D3) HOMO RAPP3 P1 ;
S3 = (D2 ET D3) REGL CONT3 'DINI' DENS1 'DFIN' DENS3 ;
S3 = S3 COUL 'BLEU' ;
SURF1 = SURF1 ET S3 ;
* TRAC SURF1 ;FIN ;

* EXTENSION VERTICALE
PSUP = (COOR 2 S3) POIN 'MAXI' ;
ELSUP = (CONT S3) ELEM 'APPUYE' PSUP ;
H0 = MAXI (COOR 2 S3) ;
DENS4 = DENS3 * H1 / H0 ;
S4 = ELSUP TRAN 'DINI' DENS3 'DFIN' DENS4 (0. (H1 - H0) 0.) ;
S4 = S4 COUL 'VERT' ;
SURF1 = SURF1 ET S4 ;
* TRAC SURF1 ;FIN ;

* DEFINITION DU VOLUME AVEC ROTA
* NFRONT DOIT ETRE UN MULTIPLE DE 4
NFRON = 8 ;
NFRON = (NFRON / 4) * 4 ;
VOLU1 = SURF1 VOLU NFRON 'ROTA' 360. (0. 1. 0.) (0. 0. 0.) ;
ELIM VOLU1 PRE1 ;
* TRAC 'CACH' VOLU1 'COUPE' (0. 0. 0.) (1. 0. 0.) (0. 1. 0.) ;FIN ;

* CENTRE DU CYLINDRE
CERC1 = CERC NFRON 'ROTA' 360. P1  (0. 1. 0.) (0. 0. 0.) ;
ELIM CERC1 VOLU1 PRE1 ;
A1 = (LP/2.) / 2. ;
N3 = NFRON / 4 ;
DENS5 = A1 * (2.**0.5) / N3 ;
CAR1 = DROI N3 (A1 0. 0.) (0. 0. A1) ;
CAR1 = DROI N3 CAR1 ((0.-A1) 0. 0.) ;
CAR1 = DROI N3 CAR1 (0. 0. (0.-A1)) ;
CAR1 = DROI N3 CAR1 (CAR1 POIN 'INIT') ;
S5 = SURF CAR1 'PLANE' ;
S6 = CERC1 REGL 'DINI' DENS1 'DFIN' (DENS5) CAR1 ;
SBASE = S5 ET S6 ;
PL1 = (LP/2.) 0. 0. ;
PL2 = (LP/2.) H1 0. ;
PLIG1 = VOLU1 POIN 'DROIT' PL1 PL2 PRE1 ;
LIG1 = (CHAN 'LIGNE' VOLU1) ELEM 'APPUYE' PLIG1 ;
ELIM LIG1 (PL1 ET PL2) PRE1 ;
LIG1 = LIG1 ELEM 'COMPRIS' PL1 PL2 ;
VOLU2 = (SBASE VOLU 'GENE' LIG1) COUL 'VIOL' ;
ELIM VOLU1 VOLU2 PRE1 ;
* TRAC 'CACH' (VOLU1 ET VOLU2) 'COUPE' (0. 0. 0.) (1. 0. 0.) (0. 1. 0.) ;FIN ;

* DEFINITION DE LA FISSURE ET FUSION DES NOEUDS COINCIDENTS
V1 = VOLU1 ET VOLU2 ;
ENV1 = ENVE V1 ;
V2 = V1 SYME 'PLAN' (0. 0. 0.) (1. 0. 0.) (0. 0. 1.) ;
V0 = (V1 COUL 'BLEU') ET (V2 COUL 'ROUG') ;
ELIM V1 V2 PRE1 ;
PMED = V0 POIN 'PLAN' (0. 0. 0.) (1. 0. 0.) (0. 0. 1.) PRE1 ;
X Y Z = COOR PMED ;
R = ((X**2) + (Z**2))**0.5 ;
PLEV = R POIN 'EGINFE' (LP + PRE1) ;
LEV1 = ENV1 ELEM 'APPUYE' PLEV ;
LEV1 = (LEV1 PLUS (0. 0. 0.)) COUL 'VIOL' ;
LEV1 = ORIE LEV1 (0. 1. 0.) ;

* DEFINITION DU FRONT DE FISSURE
FRON1 = (CONT LEV1) COUL 'VERT' ;
* TRAC (LEV1 ET FRON1) ;FIN ;


* I.2 - MODELE, MATERIAU ET CL
* ****************************


* DECOUPAGE EN ZONE XFEM ET ZONE FEM
VXFEM = ENV1 ELEM 'APPUYE' PLEV ;
NCOUCH = 2 ;
REPE ICOUCH (NCOUCH + 1) ;
    VXFEM = V0 ELEM 'APPUYE' 'LARGEMENT' VXFEM ;
FIN ICOUCH ;
VXFEM = VXFEM COUL 'VERT' ;
VFEM = (DIFF V0 VXFEM) COUL 'VIOL' ;
P1 P2 P3 = (0. 0. 0.) (1. 0. 0.) (0. 1. 0.) ;
SI BTRAC ;
    TRAC 'CACH' (VFEM ET VXFEM) 'COUPE' P1 P2 P3 ;
FINSI ;

* MODELE ET MATERIAU ZONE XFEM
MOD1 = MODE VXFEM 'MECANIQUE' 'ELASTIQUE' 'XC8R' ;
MAT1 = MATE MOD1 'YOUN' YOUN1 'NU' NU1 ;
PSI0 PHI0 = PSIP VXFEM LEV1 'DEUX' FRON1 ;
CHE1X = TRIE MOD1 PSI0 PHI0 ;
RELAX = RELA MOD1 ;

* MODELE ET MATERIAU ZONE FEM
MOD2 = MODE VFEM 'MECANIQUE' 'ELASTIQUE' ;
MAT2 = MATE MOD2 'YOUN' YOUN1 'NU' NU1 ;

MODTOT = MOD1 ET MOD2 ;
MATTOT = MAT1 ET MAT2 ;
RIGTOT = RIGI MATTOT MODTOT ;

* CL EN EFFORTS
DV0 = ENVE V0 ;
PSUP = (COOR 2 V0) POIN 'MAXI' ;
SSUP = DV0 ELEM 'APPUYE' PSUP ;
PINF = (COOR 2 V0) POIN 'MINI' ;
SINF = DV0 ELEM 'APPUYE' PINF ;
CHPO1 = PRES 'MASS' MODTOT 1. (SSUP ET SINF) ;
X Y Z = COOR (SSUP ET SINF) ;
CHPO2 = (NOMC 'FX' X) + (NOMC 'FY' (0.*Y)) + (NOMC 'FZ' Z) ;
MFOR = MOTS 'FX' 'FY' 'FZ' ;
NCHPO2 = (PSCA CHPO2 CHPO2 MFOR MFOR)**0.5 ;
CHPO2 = CHPO2 / (NCHPO2 + 1.E-30) ;
T1 = PVEC CHPO1 CHPO2 MFOR MFOR MFOR ;
SI BTRAC ;
    VEC1 = VECT T1 'FORC' ;
    TRAC 'CACH' VEC1 V0 ;
FINSI ;

* CL EN DEPLACEMENTS
P1 = PSUP POIN 'DROIT' (0. 0. 0.) (0. 1. 0.) PRE1 ;
P2 = PINF POIN 'DROIT' (0. 0. 0.) (0. 1. 0.) PRE1 ;
PMIL = DV0 POIN 'PLAN' (0. 0. 0.) (1. 0. 0.) (0. 0. 1.) PRE1 ;
P3 = (COOR 1 PMIL) POIN 'MAXI' ;
P4 = (COOR 1 PMIL) POIN 'MINI' ;
BLOQ1 = BLOQ (MOTS 'UX' 'UZ') (P1 ET P2) ;
BLOQ3 = BLOQ 'UZ' P3 ;
RELA1 = RELA 'UY' P1 + 'UY' P2 ;
BLOQ0 = BLOQ1 ET BLOQ3 ET RELA1 ;


* I.3 - RESOLUTION PUIS G-THETA
* *****************************

* RESO
U1 = RESO (RIGTOT ET BLOQ0 ET RELAX) T1 ;

* G_THETA
SUPTAB = TABL ;
SUPTAB.'MODELE' = MODTOT ;
SUPTAB.'CARACTERISTIQUES' = MATTOT ;
SUPTAB.'BLOCAGES_MECANIQUES' = BLOQ0 ;
SUPTAB.'CHARGEMENTS_MECANIQUES' = T1 ;
SUPTAB.'OBJECTIF' = MOT 'DECOUPLAGE' ;
SUPTAB.'PSI' = PSI0 ;
SUPTAB.'PHI' = PHI0 ;
SUPTAB.'COUCHE' = NCOUCH ;
SUPTAB.'FRONT_FISSURE' = FRON1 ;
SUPTAB.'SOLUTION_RESO' = U1 ;

G_THETA SUPTAB ;

K3D = VIDE 'EVOLUTIO' ;
REPE IMOD 3 ;
    MMOD = EXTR 'III' 1 &IMOD ;
    EVO1 = EVOL 'CHPO' SUPTAB.'CHPO_RESULTATS' (CHAI 'K' &IMOD) FRON1 ;
    K3D = K3D ET (EXTR EVO1 'COUR' 1) ;
FIN IMOD ;


* II - SOLUTION ANALYTIQUE
* ------------------------

SFRO = EXTR (EXTR K3D 'COUR' 1) 'ABSC' ;
* KI ET KII DOIVENT ETRE NULS
KA1 = 0.*SFRO ;
KA2 = 0.*SFRO ;
A B = LP L1 ;
T = 2.*PI*(B**3)/3. ;
TAUN = 2.*T*A / (PI*((B**4) - (A**4))) ;
ASB = A / B ;
GASB = 4 / (3.*PI) * (1. + (0.5*ASB) + (3./8.*(ASB**2)) + (5./16.*(ASB**3))
                            - (93./128.*(ASB**4)) + (0.038*(ASB**5))) ;
F1ASB = GASB * ((1. - ASB)**0.5) ;
KAIII = TAUN * ((PI*A)**0.5) *F1ASB ;
* KIII EST CONSTANT
KA3 = (0.*SFRO) + KAIII ;
KANA = EVOL 'MANU' SFRO KA1 ;
KANA = KANA ET (EVOL 'MANU' SFRO KA2) ;
KANA = KANA ET (EVOL 'MANU' SFRO KA3) ;


* III - COMPARAISON
* -----------------

* PRECISIONS ATTENDUES POUR L'ERREUR RELATIVE EN NORME L2
L_PREC = PROG 0.01 0.01 0.04 ;
TAB1 = TABL ;
* LES RESULTATS NUMERIQUES SONT IDENTIFIES AVEC DES CARRES
TAB1.(1) = CHAI 'MARQ CARR' ;
IND1 = 2 ;
IND2 = (NBEL FRON1) - 1 ;
REPE IMOD 3 ;
* BOUCLE SUR LES MODES
    SAUT 'LIGNE' ;
    MMOD = EXTR 'III' 1 &IMOD ;
    KNUM1 = (EXTR K3D 'COUR' &IMOD) COUL 'BLEU' ;
    KANA1 = (EXTR KANA 'COUR' &IMOD) COUL 'ROUG' ;
    SI BTRAC ;
        DESS (KNUM1 ET KANA1) TAB1 'TITR' (CHAI 'K' &IMOD) ;
    FINSI ;
* ERREUR EN NORME L2
    ERR1 = (INTG ((KNUM1 - KANA1)**2) 'INDI' IND1 IND2)**0.5 ;
    PRE1 = EXTR L_PREC &IMOD ;
* VALEUR DE COMPARAISON POUR L'ERREUR RELATIVE
    CRI1 = ((INTG (KANA1**2) 'INDI' IND1 IND2)**0.5) * PRE1 ;
    SI (EGA CRI1 0.) ;
        CRI1 = CRI1 + 1.E-8 ;
    FINSI ;
    MESS 'ERREUR SUR LE CALCUL DE K' MMOD ' :'*30 ERR1 ;
    MESS 'CRITERE' ' :'*30 CRI1 ;
    SI (ERR1 >EG CRI1) ;
        MESS 'ERREUR : L''ERREUR SUR K' MMOD ' DEPASSE LE CRITERE' ;
        ERRE 5 ;
    FINSI ;
FIN IMOD ;

FIN ;
