* fichier : gamma.dgibi
********************************************************************

************************************************************************
* Section : Mathematiques Fonctions
************************************************************************

************************************************************************
*  Cas-test de VERIFICATION  et VALIDATION pour les operateurs
*    GAMM (Fonction Gamma d'Euler)
*    BESS (Fonction Bessel)
************************************************************************
'OPTI' 'TRAC' 'PSC';
'OPTI' 'EPTR' 5    ;


*****************************************************************************
* Fonctions Gamma d'Euler
*****************************************************************************
 LRG     ='PROG' -4.995 'PAS' 0.01 4.995 ;
 LG1     ='GAMM' LRG                     ;
 EVG     ='EVOL' 'BRIQ' 'MANU' LRG LG1   ;
 Tit1    ='CHAI' 'Fonction Gamma : \G(x)';

'DESS' EVG 'TITR' Tit1 'TITX' 'x' 'TITY' '\G(x)' 'AXES' 'XBOR' -5. 5. 'YBOR' -5. 5. ;

* VALIDATION : relation de recurrence : Gamma(x+1) = x * Gamma(x)
 LG2 = 'GAMM' (LRG + 1)              ;
 Verif_G =(LG2 / (LRG * LG1)) - 1.D0 ;

* Erreur le cas echeant
 Max_Err_G ='MAXI' 'ABS' Verif_G   ;
 XPREC_G   =('VALE' 'PREC') * 100. ;
'SI' (Max_Err_G '>' XPREC_G );
   'MESS' 'Fonction GAMMA incorrecte : Erreur relative =' Max_Err_G ;
   'ERRE' 5 ;
'FINS';


*****************************************************************************
* Fonctions de Bessel de type J
*****************************************************************************
 LRJ     ='PROG' -20. 'PAS' 0.01 20. ;
 LBJ0    ='BESS' 'J0'   LRJ          ;
 LBJ1    ='BESS' 'J1'   LRJ          ;
 LBJ2    ='BESS' 'JN' 2 LRJ          ;

 EVJ0    ='EVOL' 'BRIQ' 'MANU' LRJ LBJ0 ;
 EVJ1    ='EVOL' 'BOUT' 'MANU' LRJ LBJ1 ;
 EVJ2    ='EVOL' 'BLEU' 'MANU' LRJ LBJ2 ;
 EVJ_Tot = EVJ0 'ET' EVJ1 'ET' EVJ2     ;

 TLEG1            ='TABL'                               ;
 TLEG1.'TITRE'    ='TABL'                               ;
 TLEG1.'TITRE'. 1 ='CHAI' 'f(x) = Bessel J_{0}(x)'      ;
 TLEG1.'TITRE'. 2 ='CHAI' 'f(x) = Bessel J_{1}(x)'      ;
 TLEG1.'TITRE'. 3 ='CHAI' 'f(x) = Bessel J_{2}(x)'      ;
 Tit1             ='CHAI' 'Fonction de Bessel de type J';

'DESS' EVJ_Tot 'LEGE' TLEG1 'NE' 'TITR' Tit1 'TITX' 'x' 'TITY' 'f(x)' 'AXES' 'YBOR' -1. 1.;

* VALIDATION : relation de recurrence sur les Jn : J0(x) + J2(x) = 2 * J1(x) / x
 Verif_J =(LRJ * (LBJ0 + LBJ2) / (2. * LBJ1)) - 1.D0 ;

* Erreur le cas echeant
 Max_Err_J ='MAXI' 'ABS' Verif_J  ;
 XPREC_J =('VALE' 'PREC') * 2100. ;
'SI' (Max_Err_J '>' XPREC_J );
   'MESS' 'Fonctions BESSEL J_n(x) incorrectes : Erreur relative =' Max_Err_J XPREC_J ;
   'ERRE' 5 ;
'FINS';


*****************************************************************************
* Fonctions de Bessel de type Y
*****************************************************************************
 LRY     ='PROG' 0.04 'PAS' 0.01 20. ;
 LBY0    ='BESS' 'Y0'   LRY          ;
 LBY1    ='BESS' 'Y1'   LRY          ;
 LBY2    ='BESS' 'YN' 2 LRY          ;

 EVY0    ='EVOL' 'BRIQ' 'MANU' LRY LBY0 ;
 EVY1    ='EVOL' 'BOUT' 'MANU' LRY LBY1 ;
 EVY2    ='EVOL' 'BLEU' 'MANU' LRY LBY2 ;
 EVY_Tot = EVY0 'ET' EVY1 'ET' EVY2     ;

 TLEG1            ='TABL'                               ;
 TLEG1.'TITRE'    ='TABL'                               ;
 TLEG1.'TITRE'. 1 ='CHAI' 'f(x) = Bessel Y_{0}(x)'      ;
 TLEG1.'TITRE'. 2 ='CHAI' 'f(x) = Bessel Y_{1}(x)'      ;
 TLEG1.'TITRE'. 3 ='CHAI' 'f(x) = Bessel Y_{2}(x)'      ;
 Tit1             ='CHAI' 'Fonction de Bessel de type Y';

'DESS' EVY_Tot 'LEGE' TLEG1 'SE' 'TITR' Tit1 'TITX' 'x' 'TITY' 'f(x)' 'AXES' 'YBOR' -2. 1.;

* VALIDATION : relation de recurrence sur les Y_n : Y0(x) + Y2(x) = 2 * Y1(x) / x
 Verif_Y =(LRY * (LBY0 + LBY2) / (2. * LBY1)) - 1.D0 ;

* Erreur le cas echeant
 Max_Err_Y ='MAXI' 'ABS' Verif_Y ;
 XPREC_Y =('VALE' 'PREC') * 2000. ;
'SI' (Max_Err_Y '>' XPREC_Y );
   'MESS' 'Fonctions BESSEL Y_n(x) incorrectes : Erreur relative =' Max_Err_Y XPREC_Y ;
   'ERRE' 5 ;
'FINS';

FIN;
