* fichier : mato-2d1.dgibi
************************************************************************
* Section : Maillage Autres
************************************************************************
'OPTION' 'ECHO' 0 ;
************************************************************************
* NOM         : MATO-2D1
* DESCRIPTION : Test du MAilleur TOpologique pour mailler un simple
*               carré 10x10 de manière régulière.
*
*               On teste la qualité des éléments obtenus.
*               On améliore un peu la qualité du maillage obtenu
*               avec une boucle entre r-adaptation (DEDU ADAP) et
*               remaillage.
*               Toutefois, après quelque itérations la
*               qualité oscille sans s'alméliorer car les critères
*               optimisés ne sont pas les mêmes aux deux étapes.
*
*               Issu de 2d_1.dgibi+tests
*
*
* LANGAGE     : GIBIANE-CAST3M
* AUTEUR      : Stéphane GOUNAND (CEA/DEN/DM2S/SEMT/LTA)
*               mél : stephane.gounand@cea.fr
**********************************************************************
* VERSION    : v1, 02/04/2020, version initiale
* HISTORIQUE : v1, 02/04/2020, création
* HISTORIQUE :
* HISTORIQUE :
************************************************************************
*
interact = faux ;
graph    = faux ;
complet  = FAUX ;
*
'OPTION' 'DIME' 2 'ELEM' 'TRI3' ;
*
'SI' ('NON' interact) ;
  'OPTION' 'TRAC' 'PSC' ;
'SINON' ;
  'OPTION' 'TRAC' 'X' ;
'FINSI' ;
lqual = 'PROG' 0.5 'PAS' 0.025 1. ;
*
* Création du contour
*
nx = 10 ;
*nx = 2 ; 'OPTI' debu 1 ;
pA = 0. 0. ; pB = 1. 0. ; pC = 1. 1. ; pD = 0. 1. ;
lAB = 'DROI' nx pA pB ;
lBC = 'DROI' nx pB pC ;
lCD = 'DROI' nx pC pD ;
lDA = 'DROI' nx pD pA ;
*
cnt = lAB 'ET' lBC 'ET' lCD 'ET' lDA ;
*
'SI' graph ;
   tit = 'CHAI'  'Contour ' ;
      'TRACER' 'CACH' cnt 'TITR' tit 'NOEU' ;
'FINSI' ;
*
*  Tests divers (consistance...)
*
lok = VRAI ;
*
* TEST 1  Création d'un maillage sans ajouter de noeuds
*
*   tparam = 'TABL' ;
*   tparam . 'debug' = 0  ;
*   tparam . 'graph' = vrai  ;
*   mail1 = MAILTOPO 'TRIA' cnt 'NOAJ' tparam ;
   mail1 = 'TRIA' 'TOPO' cnt 'NOAJ' ;
   'SI' graph ;
      tit = 'CHAI'  'Maillage genere sans noeud supplémentaire' ;
      'TRAC' mail1 'TITR' tit 'NOEU' ;
   'FINSI' ;
* Test 1 : on vérifie que le nombre de noeuds est conservé
nno1 = 'NBNO' cnt ;
nno2 = 'NBNO' mail1 ;
'SI' ('NEG' nno1 nno2) ;
   'MESS' '!!! TEST 1 : nombre de noeuds non conserve' ;
   lok = lok 'ET' faux ;
'FINS' ;
*
* TEST 2  Création d'un maillage en ajoutant des noeuds interieurs
*
   mail2 = 'TRIA' 'TOPO' cnt 'AJNO' ;
   'SI' graph ;
      tit = 'CHAI' 'Maillage genere en ajoutant des noeuds interieurs' ;
      'TRAC' mail2 'TITR' tit 'NOEU' ;
   'FINSI' ;
* Test 2 : on vérifie que les qualités mini, moyenne et maxi des éléments sont bonnes
qmail2 = 'INDI' 'TOPO' mail2 ;
miq = 'MINI' qmail2 ; moq = MATOUTIL 'MOYECHAM' qmail2 ;
maq = 'MAXI' qmail2 ;
'MESS'  'FORMAT' '(E9.2)' 'TEST 2 : Qmin=' miq ' Qmoy=' moq ' Qmax=' maq ;
   'SI' graph ;
      momail2 = 'MODE' mail2 'THERMIQUE' ;
      tit = 'CHAI' 'Qualite maillage avec noeuds interieurs' ;
      'TRAC' qmail2 momail2 lqual 'TITR' tit ;
   'FINSI' ;
* Sur mon linux64 au 02/04/2020 : qmin=0.64 qmoy=0.87 qmax=1.00
miqref = 0.63 ; moqref = 0.86 ; maqref = 0.99 ;
'SI' ('<EG' miq miqref) ;
   'MESS' '!!! TEST 2 : miq=' miq ' < miqref=' miqref ;
   lok = lok 'ET' faux ;
'FINS' ;
'SI' ('<EG' moq moqref) ;
   'MESS' '!!! TEST 2 : moq=' moq ' < moqref=' moqref ;
   lok = lok 'ET' faux ;
'FINS' ;
'SI' ('<EG' maq maqref) ;
   'MESS' '!!! TEST 2 : maq=' maq ' < maqref=' maqref ;
   lok = lok 'ET' faux ;
'FINS' ;
*
* TEST 2b  Une petite boucle avec de la r-adaptation (DEDU ADAP) permet
* d'améliorer la régularité du maillage mail2 mais ce n'est pas nécessaire
* pour la suite donc on saute.
*
* 2020/04/03 : On arrive à avoir qmin = 0.80
*              avec nopt = 2 ; thdedu = 0.2 ; rdepa =1. ; nitm = 1 ;
*
'SI' complet ;
   nopt = 2 ; iopt = 0 ;
* Paramètres de DEDUADAP
   thdedu = 0.2 ; rdepa = 1. ; nitm = 1 ;
   maili = mail2 ;
   'REPE' bclopt nopt ;
      iopt = iopt '+' 1 ;
      tit = 'CHAI' 'i=' iopt ;
* Partie DEDUADAP
      maili1 = maili ;
      depa = 'DEDU' 'ADAP' maili1 'THET' thdedu 'NITM' nitm ;
      depa = '*' depa rdepa ;
      mcdep = 'MAXI' depa 'ABS' ;
      'MESS' tit ' dedu max. dep=' mcdep ;
      'FORM' depa ;
      qmaili1 = 'INDI' 'TOPO' maili1 ;
      miq = 'MINI' qmaili1 ; moq = MATOUTIL 'MOYECHAM' qmaili1 ;
      maq = 'MAXI' qmaili1 ;
      'MESS'  'FORMAT' '(E9.2)' tit ' deduadap : Qmin=' miq ' Qmoy=' moq ' Qmax=' maq ;
      'SI' graph ;
         momaili1 = 'MODE' maili1 'THERMIQUE' ;
         vdep = 'VECT' depa -1. 'UX' 'UY' 'NOIR' ;
         titg = 'CHAI' tit ' deduadap' ;
         'TRAC' qmaili1 momaili1 vdep maili1 lqual 'TITR' titg ;
      'FINS' ;
* Partie MAILTOPO
      maili2 = 'REMA' maili1 ('CONT' maili1) ;
* Qualités
      qmaili2 = 'INDI' 'TOPO' maili2 ;
      miq = 'MINI' qmaili2 ; moq = MATOUTIL 'MOYECHAM' qmaili2 ;
      maq = 'MAXI' qmaili2 ;
      'MESS'  'FORMAT' '(E9.2)' tit ' mailtopo : Qmin=' miq ' Qmoy=' moq ' Qmax=' maq ;
      'SI' graph ;
         momaili2 = 'MODE' maili2 'THERMIQUE' ;
         titg = 'CHAI' tit ' mailtopo' ;
         'TRAC' qmaili2 momaili2 lqual 'TITR' titg ;
      'FINSI' ;
      maili = maili2 ;
   'FIN' bclopt ;
   mail2 = maili ;
'FINS' ;
*
* TEST 3  Remaillage du précédent avec une métrique uniforme constante
*         en espace
*
   metva = '/' 1. nx ;
   mail3 = 'REMA' mail2 ('CONT' mail2) metva  ;
   'SI' graph ;
      tit = 'CHAI' 'Maillage avec metrique constante uniforme' ;
      'TRAC' mail3 'TITR' tit 'NOEU' ;
   'FINSI' ;
* Test 3 : on vérifie que les qualités mini et moyenne des éléments sont bonnes
qmail3 = 'INDI' 'TOPO' mail3 metva ;
miq = 'MINI' qmail3 ; moq = MATOUTIL 'MOYECHAM' qmail3 ;
maq = 'MAXI' qmail3 ;
'MESS'  'FORMAT' '(E9.2)' 'TEST 3 : Qmin=' miq ' Qmoy=' moq ' Qmax=' maq ;
   'SI' graph ;
      momail3 = 'MODE' mail3 'THERMIQUE' ;
      tit = 'CHAI' 'Qualite maillage avec noeuds interieurs' ;
      'TRAC' qmail3 momail3 lqual 'TITR' tit ;
   'FINSI' ;
* Sur mon linux64 au 02/04/2020 : qmin=0.624 qmoy=0.847 qmax=1.00
miqref = 0.61 ; moqref = 0.83 ; maqref = 0.99 ;
'SI' ('<EG' miq miqref) ;
   'MESS' '!!! TEST 3 : miq=' miq ' < miqref=' miqref ;
   lok = lok 'ET' faux ;
'FINS' ;
'SI' ('<EG' moq moqref) ;
   'MESS' '!!! TEST 3 : moq=' moq ' < moqref=' moqref ;
   lok = lok 'ET' faux ;
'FINS' ;
'SI' ('<EG' maq maqref) ;
   'MESS' '!!! TEST 3 : maq=' maq ' < maqref=' maqref ;
   lok = lok 'ET' faux ;
'FINS' ;
*
* TEST 4  On vérifie qu'en remaillant le maillage précédent avec la même
* métrique uniforme constante donnée sous forme d'un champ isotrope
* constant, on ne modifie pas le maillage
*
   vcnx = '**' ('/' 1. nx) -2 ;
   cmet = 'MANU' 'CHPO' mail3 1 'G' vcnx ;
   mail4 = 'REMA' mail3 ('CONT' mail3) cmet ;
* Test 4 : on vérifie que mail4 et mail3 sont identiques ainsi que les
* qualités
dn34= 'NBEL' ('DIFF' mail3 mail4) ;
'SI' ('NEG' dn34 0) ;
   'MESS' '!!! TEST 4 : mail3 .NE. mail4' ;
   lok = lok 'ET' faux ;
'FINS' ;
qmail4 = 'INDI' 'TOPO' mail4 cmet ;
*dq34 = 'MAXI' ('-' ('REDU' qmail4 mail3) qmail3) 'ABS' ;
dq34 = 'MAXI' ('-' qmail4 qmail3) 'ABS' ;
* VALE prec un peu trop serré pour semt2
'SI' ('>' dq34 ('*' ('VALE' 'PREC') 10.)) ;
   'MESS' '!!! TEST 4 : qmail3 .NE. qmail4' ;
   lok = lok 'ET' faux ;
'FINS' ;
*
* TEST 5  On vérifie qu'en remaillant le maillage précédent avec la même
* métrique uniforme constante donnée sous forme d'un champ anisotrope
* constant, on ne modifie pas le maillage
*
   vcnx = '**' ('/' 1. nx) -2 ;
   cmet = 'MANU' 'CHPO' mail3 3 'G11' vcnx 'G22' vcnx
          'G21' 0. ;
   mail5 = 'REMA' mail3 ('CONT' mail3) cmet ;
* Test 5 : on vérifie que mail5 et mail3 sont identiques ainsi que les
* qualités
dn35= 'NBEL' ('DIFF' mail3 mail5) ;
'SI' ('NEG' dn35 0) ;
   'MESS' '!!! TEST 5 : mail3 .NE. mail5' ;
   lok = lok 'ET' faux ;
'FINS' ;
qmail5 = 'INDI' 'TOPO' mail5 cmet ;
dq35 = 'MAXI' ('-' qmail5 qmail3) 'ABS' ;
* VALE prec un peu trop serré pour semt2
'SI' ('>' dq35 ('*' ('VALE' 'PREC') 10.)) ;
   'MESS' '!!! TEST 5 : qmail3 .NE. qmail5' ;
   lok = lok 'ET' faux ;
'FINS' ;
*
* TEST 6  Une petite boucle avec de la r-adaptation (DEDU ADAP) pour voir si on peut
* améliorer la qualité du maillage mail3.
*
* La réponse est oui, on peut effectivement avoir une amélioration mais
* après quelque itérations la qualité oscille sans s'alméliorer entre
* r-adaptation et remaillage car les critères optimisés ne sont pas les
* mêmes aux deux étapes.
*
* 2020/04/03 : On arrive à avoir qmin = 0.70 avec thdedu = 1. ; rdepa =1. ; nitm = 1 ;
* 2020/04/03 : On arrive à avoir qmin = 0.76 avec thdedu = 0.2 ; rdepa =1. ; nitm = 1 ;
*
nopt = 2 ; iopt = 0 ;
* Paramètres de DEDUADAP
thdedu = 0.2 ; rdepa = 1. ; nitm = 1 ;
maili = mail3 ;
vcnx = '/' 1. nx ;
vcnx2 = '**' vcnx -2 ;
ldep = 'PROG' ; lqmin = 'PROG' ; lqmoy = 'PROG' ;
'REPE' bclopt nopt ;
   iopt = iopt '+' 1 ;
   tit = 'CHAI' 'i=' iopt ;
* Partie DEDUADAP
   maili1 = maili ;
   modi1 = 'MODE' maili1 'MECANIQUE' ;
   cmet = 'MANU' 'CHPO' maili1 3 'G11' vcnx2 'G22' vcnx2 'G21' 0. ;
   ccmet = 'CHAN' 'CHAM' cmet modi1 ;
   depa = 'DEDU' 'ADAP' maili1 'METR' ccmet modi1 'THET' thdedu 'NITM' nitm ;
   depa = '*' depa rdepa ;
   mcdep = 'MAXI' depa 'ABS' ; ldep = ldep 'ET' mcdep ;
   'MESS' tit ' dedu max. dep=' mcdep ;
   'FORM' depa ;
   qmaili1 = 'INDI' 'TOPO' maili1 vcnx ;
   miq = 'MINI' qmaili1 ; moq = MATOUTIL 'MOYECHAM' qmaili1 ;
   maq = 'MAXI' qmaili1 ;
   'MESS'  'FORMAT' '(E9.2)' tit ' deduadap : Qmin=' miq ' Qmoy=' moq ' Qmax=' maq ;
   'SI' graph ;
      momaili1 = 'MODE' maili1 'THERMIQUE' ;
      vdep = 'VECT' depa -1. 'UX' 'UY' 'NOIR' ;
      titg = 'CHAI' tit ' deduadap' ;
      'TRAC' qmaili1 momaili1 vdep maili1 lqual 'TITR' titg ;
   'FINS' ;
* Partie MAILTOPO
   maili2 = 'REMA' maili1 ('CONT' maili1) vcnx ;
* Qualités
   qmaili2 = 'INDI' 'TOPO' maili2 vcnx ;
   miq = 'MINI' qmaili2 ; moq = MATOUTIL 'MOYECHAM' qmaili2 ;
   maq = 'MAXI' qmaili2 ;
   'MESS'  'FORMAT' '(E9.2)' tit ' mailtopo : Qmin=' miq ' Qmoy=' moq ' Qmax=' maq ;
   'SI' graph ;
      momaili2 = 'MODE' maili2 'THERMIQUE' ;
      titg = 'CHAI' tit ' mailtopo' ;
      'TRAC' qmaili2 momaili2 lqual 'TITR' titg ;
   'FINSI' ;
   maili = maili2 ;
'FIN' bclopt ;
* Sur mon linux64 au 02/04/2020 : qmin=0.723 qmoy=0.890 qmax=1.00
miqref = 0.71 ; moqref = 0.88 ; maqref = 0.99 ;
'SI' ('<EG' miq miqref) ;
   'MESS' '!!! TEST 6 : miq=' miq ' < miqref=' miqref ;
   lok = lok 'ET' faux ;
'FINS' ;
'SI' ('<EG' moq moqref) ;
   'MESS' '!!! TEST 6 : moq=' moq ' < moqref=' moqref ;
   lok = lok 'ET' faux ;
'FINS' ;
'SI' ('<EG' maq maqref) ;
   'MESS' '!!! TEST 6 : maq=' maq ' < maqref=' maqref ;
   lok = lok 'ET' faux ;
'FINS' ;
*
* Test final
*
'SI' ('NON' lok) ;
   'ERREUR' 5 ;
'SINON' ;
   'SAUT' 1 'LIGN' ;
   'MESSAGE' ('CHAINE' 'Tout sest bien passe !') ;
'FINSI' ;
*
'SI' interact ;
   'OPTION' 'ECHO' 1 ;
   'OPTION' 'DONN' 5 ;
'FINSI' ;
*
* End of dgibi file MATO-2D1
*
'FIN' ;
