************************************************************************
* NOM         : OSCICYL2
* DESCRIPTION : Cylindre oscillant dans une cavité fermée
*
*               Deux paramètres : le nombre de Reynolds (convection/viscosité)
*                                 le nombre de Keulegan-Carpenter (convection/masse,trainee)
*
*
*               Bibliographie : thèse de Marion Duclercq
*                                avec Daniel BROC
*
* LANGAGE     : GIBIANE-CAST3M
* AUTEUR      : Stephane GOUNAND et Dihya MEZI (CEA/DES/ISAS/DM2S/SEMT/LTA)
*               mel : stephane.gounand@cea.fr
**********************************************************************
* VERSION    : v1, 28/01/2022, version initiale
* HISTORIQUE : v1, 28/01/2022, création
* HISTORIQUE :
* HISTORIQUE :
************************************************************************
*
*
'OPTION' 'DIME' 2 'ELEM' 'QUA8'  ;
'OPTI' 'ISOV' suli ;

graph = faux ;
*
****Definitions des parametres des  longueurs

Long = 2. ;
Haut  = 1. ;
Rayon = 20.E-2;

* Parametres pour le maillage

nx=20;
ny=10;
nc=5;
*nx = nx * 2 ;
*ny = ny * 2 ;
*nc = nc * 2 ;

********** Creation du contour exterieur
pA= 0. 0. ; pB=Long  0. ; pC= Long  Haut ; pD= 0. Haut ;
bas = 'DROI' nx pA pB;
dro= 'DROI' ny pB pC;
hau= 'DROI' nx pC pD;
gau = 'DROI' ny  pD pA;
**** Creation du cercle
pcen= (Long * 0.5)  (Haut * 0.5) ;
pE = ((0.5 * Long) '-' Rayon)  (0.5 * Haut);
pF = ((0.5 * Long) )  ((0.5 * Haut) '+'Rayon );
pG= ((0.5 * Long)'+' Rayon )  ((0.5 * Haut) );
pH=((0.5 * Long) )  ((0.5 * Haut) '-' Rayon );
CE1 = 'CERCLE' nc pE pcen pF;
CE2= 'CERCLE' nc CE1 pcen pG;
CE3= 'CERCLE' nc CE2 pcen pH;
CE= 'CERCLE' nc  CE3 pcen pE;
* Contour du maillage exterieur
cmt1= bas 'ET' dro 'ET' hau 'ET' gau ;
*** Contour total avec cercle
cmt= bas 'ET' dro 'ET' hau 'ET' gau 'DIFF' CE;
mt = 'SURFACE' cmt;
'ELIMINATION' mt 1.E-9;
* Changer le maillage en un maillage quadratique fluide
_mt='CHAN' mt 'QUAF';
*'TRAC' _mt nclk ;


**** Conditions de blocage
*** Vitesse
mblox = 'BLOQUE' 'UX' cmt1 ;
mbloy = 'BLOQUE' 'UY' cmt1 ;
mblocx = 'BLOQUE' 'UX' CE  ;
mblocy = 'BLOQUE' 'UY' CE  ;

**** Physique
***  nombre de Reynolds de 100
***  nombre de Keulegan-Carpenter de 2
Re = 100. ;
nre= 1 '/' Re ;
KC = 2. ;

**** Numérique
*** Pas de temps (cf. thèse Marion Duclercq)
'SI' ('>' KC 2.) ;
   dt = 0.05 '/' KC ;
'SINO' ;
   dt = 0.025 ;
'FINS' ;
*dt = dt * 4. ;


  mns1 = mode _mt 'NAVIER_STOKES' 'NLIN' 'QUAF' 'LINE' 'CHPO' 'GAP7' ;
 cns1 = mate mns1 REYN Re FREQ (dt**(-1));

*** Pression
 mapcen = extr mns1 'CENT' ;
 pp2 = 'POIN' mapcen 'PROC' (0.5 0.5) ;
 mblop = 'BLOQ' 'LX1' pp2 ;


 mtbid = changer _mt line ;
mbid = mode mtbid mecanique elastique ;
cbid = mate mbid youn 1.e10 nu 0.3 rho 2.;

**** Matrices fixes du probleme
*** Rigidité (objet RIGIDITE)
* mrigi = 'NLIN' gdisc _mt A B mot1 mot2 ;
  nrigi = rigi (mns1 et mbid) (cns1 et cbid) ;
  rigbid = rigi (mbid) (cbid) ;
*** Contrainte div U
 ndiv = rigi 'DIVE' (mns1 et mbid) (cns1 et cbid) ;
*** Masse pondérée par le pas de temps
 nmass = mass (mns1 et mbid) (cns1 et cbid) ;


**** Conditions initiales
U0 = 'MANUEL' 'CHPO' _mt 2 'UX' 0. 'UY' 0. ;
UNM = U0 ;
UN  = U0 ;
solu= UN;
EPS= 1.0D-9;
tps= 0. ;

*
*
abs_t = prog 0. pas Dt (105*Dt) ;
ord_t = 'SIN' (360. '*' abs_t) ;
ev_t = evol vert manu ' t' abs_t ord_t ;
abcs_CE = ((coor 1 CE) - (coor 1 pcen))/Rayon ; abcs_CE = abs abcs_CE ;
fbl_CE = 'DEPI' mblocx ('NOMC' 'UX' abcs_CE) ;
char_t = 'CHAR' 'DIMP' fbl_CE ev_t ;

*

t_fltub = table 'PASAPAS' ;
t_fltub . modele = mns1 ;
t_fltub . caracteristiques = cns1 ;
t_fltub . blocages_mecaniques = mblox 'ET'
            mbloy  'ET' mblop 'ET' mblocx 'ET' mblocy ;
t_fltub . chargement = char_t ;
t_fltub . temps_calcules = abs_t ;
*t_fltub . temps_calcules = prog 0. Dt ;

pasapas t_fltub ;


nomvit = 'EXTR' mns1 'DEPL' ;

si (graph) ;
repeter BTRA ((dime abs_t) - 1) ;
 solu = t_fltub . vitesses_fluide . &btra ;
 unpip = 'EXCO' solu nomvit ;
*** synthèse
   vun = 'VECTEUR' unpip (* (4. '/' nx) 1.2) nomvit 'JAUN' ;
 pnp = t_fltub . pression_fluide . &btra ;
'TRAC' pnp vun _mt (contour mt) 16 'TITR' ' PRESSION AUX NOEUDS'  ;

fin btra ;

'TRAC' pnp vun _mt  16 'TITR' ' PRESSION AUX NOEUDS'  ;
finsi ;
*opti donn 5 ;
*
* End of dgibi file oscillations
*
'FIN' ;
