* fichier : ottovari_traction.dgibi
************************************************************************
*                 Test du modele OTTOVARI en traction                  *
************************************************************************

ITRAC = FAUX ;

TITR 'Test en traction simple' ;
OPTI 'DIME' 3 'ELEM' 'CUB8' 'MODE' 'TRID' ;

*------------------------------------------------------
*           DEFINITION DE LA GEOMETRIE
*------------------------------------------------------
A1= 0.   0.   0.;
B1= 1.5  0.   0.;
C1= 1.5  1.5  0.;
D1= 0.   1.5  0.;
A2= 0.   0.   1.;
B2= 1.5  0.   1.;
C2= 1.5  1.5  1.;
D2= 0.   1.5  1.;
*
L1 = A1 DROIT 1 B1  ;
L2 = B1 DROIT 1 C1  ;
L3 = C1 DROIT 1 D1  ;
L4 = D1 DROIT 1 A1  ;
LL = L1 ET L2 ET L3 ET L4 ;
SU1= SURF LL 'PLAN' ;
M1 = A2 DROIT 1 B2  ;
M2 = B2 DROIT 1 C2  ;
M3 = C2 DROIT 1 D2  ;
M4 = D2 DROIT 1 A2  ;
MM = M1 ET M2 ET M3 ET M4 ;
SU2= SURF MM 'PLAN' ;
SU = SU1 VOLU 1 SU2 ;

*------------------------------------------------------
*           DEFINITION DES CONDITIONS AUX LIMITES
*                ET DES DEPLACEMENTS IMPOSES
*------------------------------------------------------
CL4 = (BLOQ L4 'UX') ET (BLOQ M4 'UX') ;
CL2 = (BLOQ L2 'UX') ET (BLOQ M2 'UX') ;
CL1 = (BLOQ L1 'UY') ET (BLOQ M1 'UY') ;
CL5 = BLOQ SU1 'UZ' ;
CL  = CL1 ET CL2 ET CL4 ET CL5 ;

DEP = DEPI CL2 1.5E-4 ;

*------------------------------------------------------
*           DEFINITION DES PROPRIETES MATERIELLES
*------------------------------------------------------
MO   = MODE SU 'MECANIQUE' 'ELASTIQUE' 'ISOTROPE' 'PLASTIQUE' 'OTTOVARI' 'CONS' 'BETON' ;
TBET = TAILLE MO ;

YG  = 40000. ;
RTR = 1.1 ;
GF  = (RTR * 3.E-4) * 0.5 ;
MA = MATE MO 'YOUN' YG 'NU' 0.21 'LTR' RTR 'GFTR' GF 'BTR' 0.2 'LCS' 20. ;
MA = MA ET TBET ;

LI1 = PROG 0. 'PAS'  0.5 2.  'PAS'  0.5 18.;
LI2 = PROG 0. 'PAS'  0.5 2.  'PAS' -0.5  1.
              'PAS'  0.5 1.5 'PAS' -0.5  0.5 'PAS'  0.5  2.5
              'PAS' -0.5 1.  'PAS'  0.5  5.  'PAS' -0.5 -1.;
EV  = EVOL 'MANU' 'T' LI1 'F(T)' LI2 ;

*------------------------------------------
*            APPEL A PASAPAS
*------------------------------------------
CHA1 = CHAR 'DIMP' DEP EV ;
LIS1 = PROG 0. 'PAS' 0.1 18. ;
TAB1 = TABLE ;
TAB1.'MODELE' = MO ;
TAB1.'CARACTERISTIQUES' = MA ;
TAB1.'BLOCAGES_MECANIQUES' = CL ;
TAB1.'CHARGEMENT' = CHA1 ;
TAB1.'TEMPS_CALCULES' = LIS1 ;
TAB1.FTOL = 0.000001 ;
PASAPAS TAB1 ;

*------------------------------------------
*          POST TRAITEMENT
*------------------------------------------
PGX = PROG 0. ;
PGY = PROG 0. ;
TT = TAB1 . CONTRAINTES ;
NN = (DIME TT) - 1  ;
REPE BOU NN ;
  FF = EXTR (REDU TAB1 . CONTRAINTES . &BOU MO) 'SMXX' 1 1 1 ;
  EPS = EPSI MO (TAB1 . DEPLACEMENTS . &BOU) ;
  GG = EXTR EPS 'EPXX' 1 1 1 ;
  PGX = PGX ET (PROG GG) ;
  PGY = PGY ET (PROG FF) ;
FIN BOU ;
EV1 = EVOL 'ROUG' 'MANU' 'ABS' PGX 'ORD' PGY ;
SI ITRAC ;
  DESS EV1 'AXES' ;
FINSI ;

FIN ;
