*+++++++++++++++++++++++++++++++++++++++++++++++++++++++++++++++++++++
* Problem description:
*
* In the example below, we study the effects caused by the progressive
* strain localization. The structure consists of a bar under uniform
* tension in which the load is applied via displacement control at the
* right edge. At this edge, only the direction of the displacement
* is known a priori. The displacement intensity is calculated in such
* a way to respect the path equation specified by the user. Here, the
* defaut path equation (CMSI) is replaced by the CNDI (De Borst, 1987)
* via the user procedure PILOINDI. The relative displacement variation
* between two user-defined nodes is controlled during the simulations.
* For more details, the interested reader is referred to
* (De Borst, 1987; Rastiello et al., 2019; Oliveira et al., 2021,
* Rastiello et al., 2022). An unstable response is induced by
* increasing the value of NELX. The higher this number, the more
* severe the snap-back becomes. On the other hand, the lower this
* number, the more the snap-back tends to fade away.
*
* R. De Borst. Computation of post-bifurcation and post-failure behavior
* of strain-softening solids, Comput. Struct., Volume 25 (1987) no. 2,
* pp. 211-224
*
* G. Rastiello, F. Riccard,, B. Richard. Discontinuity-scale
* path-following methods for the embedded discontinuity modeling of
* failure in solids. Computer Methods in Applied Mechanics and
* Engineering. Volume 349, 2019, Pages 431-457, ISSN 0045-7825,
* https://doi.org/10.1016/j.cma.2019.02.030.
*
* H. Oliveira, G. Rastiello, A. Millard, I. Bitar, B. Richard.
* Implementation of path-following solvers in the finite element toolbox
* Cast3M: formulations, algorithms and applications. Volume 161, 2021,
* 103055, ISSN 0965-9978,
* https://doi.org/10.1016/j.advengsoft.2021.103055.
*
* G. Rastiello, H.L. Oliveira, A. Millard. Path-following
* methods for unstable structural responses induced by strain softening:
* a critical review. Comptes Rendus. Mécanique, Tome 350 (2022),
* pp. 205-236.
* doi : 10.5802/crmeca.112.
*
*+++++++++++++++++++++++++++++++++++++++++++++++++++++++++++++++++++++
* Contact:
* Giuseppe RASTIELLO
* CEA Paris-Saclay, Université Paris-Saclay
* DES/ISAS/DM2S/SEMT/EMSI
* email : giuseppe.rastiello[at]cea.fr
*
*+++++++++++++++++++++++++++++++++++++++++++++++++++++++++++++++++++++
*'OPTI' 'ECHO' 0;
'OPTI' 'DIME' 2 'ELEM' 'QUA4' 'MODE' 'PLAN CONTR';
'OPTI' 'TRAC' 'PSC';
*+++++++++++++++++++++++++++++++++++++++++++++++++++++++++++++++++++++
* export psc figures
PLT1 = FAUX;
* export output text
EXP1 = FAUX;
*+++++++++++++++++++++++++++++++++++++++++++++++++++++++++++++++++++++
*
* DEFINING THE PARAMETRIC GEOMETRY
*
*+++++++++++++++++++++++++++++++++++++++++++++++++++++++++++++++++++++
* bar height
H1 = 0.1;
* bar length
L1 = 1.0;
* total number of elements along the x direction
NELX = 29;
* total number of elements along the y direction
NELY = 3;
*+++++++++++++++++++++++++++++++++++++++++++++++++++++++++++++++++++++

PIN = 'TABLE';

'SI' (NELX < 3);
  'MESS' 'error: the NELX must be greater than 3 and odd';
'SINON';
  PIN.1 = 0. 0.;
'FINSI';

'REPE' BOPO NELX;
  CX = 'COOR' 1 PIN.(&BOPO);
  CX = CX + (L1/NELX);
  CY = 'COOR' 2 PIN.(&BOPO);
  PIN.(&BOPO + 1) = CX CY;
'FIN' BOPO;

LINH = 'TABLE';
'REPE' BOLI NELX;
        LINH.(&BOLI) = 'DROI' 1 PIN.(&BOLI) PIN.(&BOLI + 1);
'FIN' BOLI;

'REPE' BOLI NELX;
        'SI' (&BOLI 'EGA' 1);
                MALHA = LINH.(&BOLI);
        'SINON';
                MALHA = MALHA 'ET' LINH.(&BOLI);
        'FINSI';
'FIN' BOLI;

PSU = 'TABLE';
PSU.1 = 0. H1;

'REPE' BOPO NELX;
        CX = 'COOR' 1 PSU.(&BOPO);
        CX = CX + (L1/NELX);
        CY = 'COOR' 2 PSU.(&BOPO);
        PSU.(&BOPO + 1) = CX CY;
'FIN' BOPO;

'REPE' BOPO NELX;
        CX = 'COOR' 1 PSU.(&BOPO);
        CX = CX + (L1/NELX);
        CY = 'COOR' 2 PSU.(&BOPO);
        PSU.(&BOPO + 1) = CX CY;
'FIN' BOPO;

'REPE' BOLI NELX;
        LINH.(NELX + &BOLI) = 'DROI' 1 PSU.(&BOLI) PSU.(&BOLI + 1);
'FIN' BOLI;

'REPE' BOLI NELX;
        MALHA = MALHA 'ET' LINH.(NELX + &BOLI);
'FIN' BOLI;

*VERTICAL LINES

'REPE' BOLI (NELX+1);
        LINH.((2*NELX) + &BOLI) = 'DROI' NELY PIN.(&BOLI) PSU.(&BOLI);
'FIN' BOLI;

'REPE' BOLI (NELX+1);
        MALHA = MALHA 'ET' LINH.((2*NELX) + &BOLI);
'FIN' BOLI;

*SURFACES
AREA = 'TABLE';
'REPE' BOEX NELX;
        AREA.(&BOEX) = 'DALL' LINH.(&BOEX)
                                                LINH.(&BOEX + (2*NELX) + 1)
                                                LINH.(&BOEX + NELX)
                                                LINH.(&BOEX + (2*NELX)) ;
'FIN' BOEX;

'REPE' BOEX NELX;
        'SI' (&BOEX 'EGA' 1);
                ELASPART = AREA.(&BOEX);
        'SINON';
                'SI' (&BOEX 'EGA' ((NELX+1)/2));
                        DAMMPART = AREA.(&BOEX);
                'SINON';
                        ELASPART = ELASPART 'ET' AREA.(&BOEX);
                'FINSI';
        'FINSI';
'FIN' BOEX;

str1 = (DAMMPART 'ET' ELASPART);
leftedg = LINH.(2*NELX + 1);
PA = PIN.1;
PB = PIN.(NELX+1);
rigtedg = LINH.(3*NELX + 1);

'SI' PLT1;
  'TRAC' str1;
'FINSI';
*+++++++++++++++++++++++++++++++++++++++++++++++++++++++++++++++++++++
*
* END OF PARAMETRIC GEOMETRY
*
*+++++++++++++++++++++++++++++++++++++++++++++++++++++++++++++++++++++

*+++++++++++++++++++++++++++++++++++++++++++++++++++++++++++++++++++++
*
* DEFINING MODEL AND MATERIAL
*
*+++++++++++++++++++++++++++++++++++++++++++++++++++++++++++++++++++++
AT=1.0e0;
AC=1.2e0;
BC=1.5e+03;
BT=1.0E4;
epsd0=1.0E-4;
YG=1.0E+9;
BBT=1.06e0;
NNU=0.0;
RO =2.3E+03;

MOD1 = 'MODE' ELASPART 'MECANIQUE' 'ELASTIQUE' 'ISOTROPE';
MAT1 = 'MATE' MOD1 'YOUN' YG 'NU' NNU 'RHO' RO;

MOD2 = 'MODE' DAMMPART 'MECANIQUE' 'ELASTIQUE' 'ISOTROPE'
    'ENDOMMAGEMENT' 'MAZARS';
MAT2 = 'MATE' MOD2 'YOUN' YG 'NU' NNU 'RHO' RO 'BTRA' BT
    'KTR0' epsd0 'ATRA' AT 'ACOM' AC 'BCOM' BC 'BETA' BBT;

MODTOT = MOD1 'ET' MOD2;
MATTOT = MAT1 'ET' MAT2;

*+++++++++++++++++++++++++++++++++++++++++++++++++++++++++++++++++++++
*
* END OF MODEL AND MATERIAL
*
*+++++++++++++++++++++++++++++++++++++++++++++++++++++++++++++++++++++

*+++++++++++++++++++++++++++++++++++++++++++++++++++++++++++++++++++++
*
* DEFINING BOUNDARY CONDITIONS (known a priori)
*
*+++++++++++++++++++++++++++++++++++++++++++++++++++++++++++++++++++++
CL1 = 'BLOQ' 'UX' leftedg;
CL2 = 'BLOQ' 'UY' PA;
CLT = CL1 'ET' CL2;

*+++++++++++++++++++++++++++++++++++++++++++++++++++++++++++++++++++++
*
* END OF BOUNDARY CONDITIONS
*
*+++++++++++++++++++++++++++++++++++++++++++++++++++++++++++++++++++++

*+++++++++++++++++++++++++++++++++++++++++++++++++++++++++++++++++++++
*
* SPECIFYING THE PATH-FOLLOWING EQUATION (CNDI)
*
*+++++++++++++++++++++++++++++++++++++++++++++++++++++++++++++++++++++

'DEBP' PILOINDI PRECED*'TABLE'  U*'CHPOINT' DU*'CHPOINT'
       DUI*'CHPOINT' DUII*'CHPOINT' DTAU*'FLOTTANT';

  UU3 = 'EXTR' DU 'UX' PIN.((NELX+3)/2);
  UU2 = 'EXTR' DU 'UX' PIN.((NELX+1)/2);
  Pk  = (UU3 - UU2) + (-1.0*DTAU);

  HK = 'MANU' 'CHPO' PIN.((NELX+3)/2) 'UX' 1.;
  HK = HK + ('MANU' 'CHPO' PIN.((NELX+1)/2) 'UX' -1.);

  COMP_PF = 'MOTS' 'UX' 'UY' ;

*  --- Obtaining D_eta -----------------
  AUX1 = 'XTY' HK duI  COMP_PF COMP_PF;
  AUX2 = 'XTY' HK duII COMP_PF COMP_PF;
  D_eta= (-1.0)*((Pk+AUX1)/AUX2);

'FINPROC' D_ETA ;

*+++++++++++++++++++++++++++++++++++++++++++++++++++++++++++++++++++++
*
* END OF USER DEFINED PROCEDURE
*
*+++++++++++++++++++++++++++++++++++++++++++++++++++++++++++++++++++++

*+++++++++++++++++++++++++++++++++++++++++++++++++++++++++++++++++++++
*
* PROBLEM SOLUTION
*
*+++++++++++++++++++++++++++++++++++++++++++++++++++++++++++++++++++++
*
* number of time increments
ntincrem = 40;
*
* control parameter
TAU = 1.0E-6;
*
* direction of the applied displacement (u_hat)
CL3 = 'BLOQ' 'UX' rigtedg;
CLT = CLT 'ET' CL3;
uch = 'DEPI' CL3 1.0;
*
lis_incr= 'PROG' 0. 'PAS' 1    (ntincrem. * 1) ;
lis_tau = 'PROG' 0. 'PAS' TAU  (ntincrem. * TAU) ;
ev1 = 'EVOL' 'MANU' 't' lis_incr 'tau' lis_tau ;
*
****  preparing PASAPAS input table
tab1 = 'TABLE';
tab1 . 'MOVA' = 'D' ;
tab1 . 'BLOCAGES_MECANIQUES' = CLT ;
tab1 . 'CARACTERISTIQUES' = mattot ;
tab1 . 'MODELE' = modtot ;
tab1 . 'TEMPS_CALCULES' = lis_incr ;
tab1 . 'INITIALISATION' = FAUX;

****  lines to be included for ativating path-following control ******
tab1 . 'PILOTAGE_INDIRECT'     = VRAI;
tab1 . 'DEPLACEMENTS_PILOTES'  = uch ;
tab1 . 'PARAMETRE_DE_PILOTAGE' = ev1 ;


PASAPAS tab1;

*+++++++++++++++++++++++++++++++++++++++++++++++++++++++++++++++++++++
*
* END OF SOLUTION
*
*+++++++++++++++++++++++++++++++++++++++++++++++++++++++++++++++++++++

*+++++++++++++++++++++++++++++++++++++++++++++++++++++++++++++++++++++
*
* BEGIN OF POST-PROCESSING
*
*+++++++++++++++++++++++++++++++++++++++++++++++++++++++++++++++++++++
*
****  procedure @TOTAL adapted
'DEBPROC' RESFORCE CH1*'CHPOINT' GEO*'MAILLAGE' COMP1*'MOT' ;
  CH2 = 'REDU' CH1 GEO ;
  CHTOT = 'RESU' CH2 ;
  P1 = ('EXTR' CHTOT MAIL) 'POIN' 1 ;
  TOT1 = 'EXTR' CHTOT COMP1 P1 ;
'FINPROC' TOT1 ;
*
*
nn = 'DIME' tab1 . 'TEMPS';
*
PROF = 'PROG' 0.;
PROT = 'PROG' 0.;
PROD = 'PROG' 0.;
LISCT = 'PROG' 0.;
*
deplaca = 0.*(tab1 . 'DEPLACEMENTS' . 1) ;
*
'REPE' LAB (nn - 1 ) ;
  ii = &LAB ;
  TT     = tab1 . 'TEMPS' . ii ;
  deplac = tab1 . 'DEPLACEMENTS' . ii ;
  force_indirect = 'REAC' CL3 deplac  ;
  FF = RESFORCE force_indirect rigtedg 'FX' ;
  DD = 'EXTR' deplac 'UX' PB ;
  du = deplac - deplaca;
        CT = ('EXTR' du 'UX' PIN.((NELX+3)/2)) - ('EXTR' du 'UX' PIN.((NELX+1)/2));
  deplaca = deplac ;

  PROT = PROT 'ET' ( 'PROG' TT) ;
  PROF = PROF 'ET' ( 'PROG' FF) ;
  PROD = PROD 'ET' ( 'PROG' DD) ;
  LISCT= LISCT 'ET' ('PROG' CT);
'FIN' LAB ;


PROETA = TAB1 . 'COEFFICIENT_DE_PILOTAGE' ;
evo11 = 'EVOL' 'TURQ' 'MANU' 'disp' PROD 'forc' PROF ;
evo12 = 'EVOL' 'ROUG' 'MANU' 'increment' PROT 'eta' PROETA ;
evo13 = 'EVOL' 'BLEU' 'MANU' 'increment' PROT 'crit pilo' LISCT ;

'SI' PLT1;
  'DESS' evo11 ;
  'DESS' evo12 ;
  'DESS' evo13 ;
'FINSI';

'SI' EXP1;
  @EXCEL1 evo11 'forc_displ_cndi.txt' ;
  @EXCEL1 evo13 'crit_pilo_cndi.txt' ;
'FINSI';
fin;
*+++++++++++++++++++++++++++++++++++++++++++++++++++++++++++++++++++++
*
* END OF POST-PROCESSING
*
*+++++++++++++++++++++++++++++++++++++++++++++++++++++++++++++++++++++

*+++++++++++++++++++++++++++++++++++++++++++++++++++++++++++++++++++++
*
* BEGIN OF NON-REGRESSION TEST
*
*+++++++++++++++++++++++++++++++++++++++++++++++++++++++++++++++++++++
refx = 'PROG' 0.;
refx = refx 'ET' ('PROG' 2.90000E-05);
refx = refx 'ET' ('PROG' 5.80000E-05);
refx = refx 'ET' ('PROG' 8.70000E-05);
refx = refx 'ET' ('PROG' 9.94401E-05);
refx = refx 'ET' ('PROG' 9.42679E-05);
refx = refx 'ET' ('PROG' 8.61551E-05);
refx = refx 'ET' ('PROG' 7.69734E-05);
refx = refx 'ET' ('PROG' 6.78383E-05);
refx = refx 'ET' ('PROG' 5.93717E-05);
refx = refx 'ET' ('PROG' 5.18792E-05);
refx = refx 'ET' ('PROG' 4.54704E-05);
refx = refx 'ET' ('PROG' 4.01377E-05);
refx = refx 'ET' ('PROG' 3.58090E-05);
refx = refx 'ET' ('PROG' 3.23800E-05);
refx = refx 'ET' ('PROG' 2.97354E-05);
refx = refx 'ET' ('PROG' 2.77612E-05);
refx = refx 'ET' ('PROG' 2.63512E-05);
refx = refx 'ET' ('PROG' 2.54126E-05);
refx = refx 'ET' ('PROG' 2.51180E-05);
refx = refx 'ET' ('PROG' 2.49084E-05);
refx = refx 'ET' ('PROG' 2.48010E-05);
refx = refx 'ET' ('PROG' 2.48025E-05);
refx = refx 'ET' ('PROG' 2.48823E-05);
refx = refx 'ET' ('PROG' 2.57337E-05);
refx = refx 'ET' ('PROG' 2.63513E-05);
refx = refx 'ET' ('PROG' 2.70516E-05);
refx = refx 'ET' ('PROG' 2.78171E-05);
refx = refx 'ET' ('PROG' 2.86341E-05);
refx = refx 'ET' ('PROG' 2.94914E-05);
refx = refx 'ET' ('PROG' 3.03804E-05);
refx = refx 'ET' ('PROG' 3.12941E-05);
refx = refx 'ET' ('PROG' 3.22272E-05);
refx = refx 'ET' ('PROG' 3.31753E-05);
refx = refx 'ET' ('PROG' 3.41351E-05);
refx = refx 'ET' ('PROG' 3.51041E-05);
refx = refx 'ET' ('PROG' 3.60801E-05);
refx = refx 'ET' ('PROG' 3.70616E-05);
refx = refx 'ET' ('PROG' 3.80473E-05);
refx = refx 'ET' ('PROG' 3.90364E-05);
refx = refx 'ET' ('PROG' 4.00279E-05);

refy = 'PROG' 0.;
refy = refy 'ET' ('PROG' 2.90000E+03);
refy = refy 'ET' ('PROG' 5.80000E+03);
refy = refy 'ET' ('PROG' 8.70000E+03);
refy = refy 'ET' ('PROG' 9.88487E+03);
refy = refy 'ET' ('PROG' 9.24561E+03);
refy = refy 'ET' ('PROG' 8.30178E+03);
refy = refy 'ET' ('PROG' 7.24724E+03);
refy = refy 'ET' ('PROG' 6.19754E+03);
refy = refy 'ET' ('PROG' 5.21707E+03);
refy = refy 'ET' ('PROG' 4.33749E+03);
refy = refy 'ET' ('PROG' 3.57014E+03);
refy = refy 'ET' ('PROG' 2.91426E+03);
refy = refy 'ET' ('PROG' 2.36236E+03);
refy = refy 'ET' ('PROG' 1.90364E+03);
refy = refy 'ET' ('PROG' 1.52618E+03);
refy = refy 'ET' ('PROG' 1.21822E+03);
refy = refy 'ET' ('PROG' 9.69401E+02);
refy = refy 'ET' ('PROG' 7.73314E+02);
refy = refy 'ET' ('PROG' 7.19625E+02);
refy = refy 'ET' ('PROG' 6.63529E+02);
refy = refy 'ET' ('PROG' 6.09011E+02);
refy = refy 'ET' ('PROG' 5.45930E+02);
refy = refy 'ET' ('PROG' 4.77951E+02);
refy = refy 'ET' ('PROG' 1.79610E+02);
refy = refy 'ET' ('PROG' 1.39974E+02);
refy = refy 'ET' ('PROG' 1.08913E+02);
refy = refy 'ET' ('PROG' 8.46308E+01);
refy = refy 'ET' ('PROG' 6.56719E+01);
refy = refy 'ET' ('PROG' 5.08949E+01);
refy = refy 'ET' ('PROG' 3.93960E+01);
refy = refy 'ET' ('PROG' 3.04612E+01);
refy = refy 'ET' ('PROG' 2.35283E+01);
refy = refy 'ET' ('PROG' 1.81555E+01);
refy = refy 'ET' ('PROG' 1.39968E+01);
refy = refy 'ET' ('PROG' 1.07813E+01);
refy = refy 'ET' ('PROG' 8.29775E+00);
refy = refy 'ET' ('PROG' 6.38138E+00);
refy = refy 'ET' ('PROG' 4.90400E+00);
refy = refy 'ET' ('PROG' 3.76605E+00);
refy = refy 'ET' ('PROG' 2.89026E+00);

tol1 = 1.0e-4;
maxres = 0.;
'REPE' BTEST (nn - 1 ) ;
 V1 = 'EXTR' refx (&BTEST + 1);
 V2 = 'EXTR' prod (&BTEST + 1);
 res1 = 'ABS' ((V1 - V2)/V1);
 'SI' (res1 > maxres); maxres = res1; 'FINSI';

 W1 = 'EXTR' refy (&BTEST + 1);
 W2 = 'EXTR' prof (&BTEST + 1);
 res2 = 'ABS' ((W1 - W2)/W1);
 'SI' (res2 > maxres); maxres = res2; 'FINSI';

'FIN' BTEST ;

err1 = maxres > tol1;

'SI' err1;
 'ERRE' 5 ;
'FINSI';

*+++++++++++++++++++++++++++++++++++++++++++++++++++++++++++++++++++++
*
* END OF NON-REGRESSION TEST
*
*+++++++++++++++++++++++++++++++++++++++++++++++++++++++++++++++++++++
'FIN';
