* fichier : pressuhx1.dgibi
*
* Containment pressurization (Phebus size) with heat losses.
* 3D mesh of a 14.5 m3 cylindrical containment with a 10cm in depth vertical wall.
*
* Initial pressure and temperature are 1bar and 40oC with the wall at 60oC.
* Steam is injected at a constant 50g/s mass flow rate and a temperature of 150oC.
*
* Transient is computed for 50s. We check the pressure, the averaged temperature,
* the velocity and the condensation mass flow rate (that starts at 20s) evolutions.
*
* Compare to pressu.dgibi, hereafter heat losses are considered : the
* containment is in contact with air or water. The water table elevation
* is moving with time ; air and water heat transfer coefficient and
* temperature are known with time for both (use of a personnel procedur)
*
* Auteurs : E. Studer, J.P. Magnaud    Novembre 1999
*
'OPTI' 'DIME' 3 'ELEM' 'CU20' 'DENS' 1. 'TRAC' 'PSC' ;
*
COMPLET = FAUX ;
GRAPH   = faux ;
'SI' COMPLET ;
  nbit = 100 ;
  DT0  = 1.  ;
  n1   = 1  ;
  n2   = 4  ;
  n3   = 4  ;
  nn   = 2  ;
'SINO' ;
  nbit = 100 ;
  DT0  = 10. ;
  n1   = 1  ;
  n2   = 2  ;
  n3   = 4  ;
  nn   = 1  ;
'FINS' ;
epsi = 1.D-2 ;
*
*
* Mesh
*
*
* ri=cavity radius, h1=cavity height, sp=wall depth,
* fg1=break to cavity radius ratio
ri  = 1.052 ;
h1  = 4.163 ;
sp  = 0.10  ;
fg1 = 0.25  ;
fg2 = fg1 * (2.0 ** 0.5) / 2. ;
*
p0  = 0.000    0.000    0.000 ;
p1  = (ri*fg1) 0.000    0.000 ;
p2  = (ri*fg2) (ri*fg2) 0.000 ;
p3  = 0.000    (ri*fg1) 0.000 ;
p4  = ri       0.000    0.000 ;
p5  = 0.000    ri       0.000 ;
p6  = (ri+sp)  0.000    0.000 ;
p7  = 0.000    (ri+sp)  0.000 ;
*
* Fluid and structure basement surfaces
* (built by symetry)
l1    = 'DROI' p0 p1 n1        ;
l2    = 'DROI' p1 p2 n1        ;
l3    = 'DROI' p2 p3 n1        ;
l4    = 'DROI' p3 p0 n1        ;
l5    = 'CERC' p4 p0 p5 (2*n1) ;
l6    = 'CERC' p6 p0 p7 (2*n1) ;
basf0 = 'DALL' l1 l2 l3 l4 'PLAN' ;
basf1 = ('REGL' (l2 'ET' l3) l5 n2) ;
*
l44   = 'COTE' 2 basf1;
ax4   = ('INVE' l4) 'ET' l44 ;
l11   = 'COTE' 4 basf1;
ax1   = l11 'ET' ('INVE' l1) ;
basf  = basf0 'ET' ('REGL' (l2 'ET' l3) l5 n2) ;
'ELIM' basf epsi ;
basf  = basf 'ET' ('SYME' basf 'DROI' p0 p3) ;
ax11  = ('SYME' ax1 'DROI' p0 p3) 'ET' ('INVE' ax1) ;
'ELIM' basf epsi ;
basf  = basf 'ET' ('SYME' basf 'DROI' p0 p1) ;
ax44  = ('INVE' ax4) 'ET' ('SYME' ax4 'DROI' p0 p4) ;
'ELIM' basf epsi ;
basm  =  'REGL' l5 l6 n3 ;
basm  =  basm 'ET' ('SYME' basm 'DROI' p0 p3) ;
'ELIM' basm epsi ;
basm  =  basm 'ET' ('SYME'  basm 'DROI' p0 p1) ;
'ELIM' basm epsi ;
l5    = l5 'ET' ('SYME' l5 'DROI' p0 p1) ;
l5    = l5 'ET' ('SYME' l5 'DROI' p0 p3) ;
l6    = l6 'ET' ('SYME' l6 'DROI' p0 p1) ;
l6    = l6 'ET' ('SYME' l6 'DROI' p0 p3) ;
*
* Fluid and structure volumes
* (built by translation)
nz1   = ('ENTI' (h1 '/' (ri '/' 2.))) '*' nn ;
v1    = 0. 0. h1 ;
mt    = basf 'VOLU' nz1 'TRAN' v1 ;
wall  = (basm 'VOLU' nz1 'TRAN' v1) 'COUL' 'ROUG' ;
*
plan1 = ax11 'TRAN' nz1 v1 ;
plan4 = ax44 'TRAN' nz1 v1 ;
pari  = l5   'TRAN' nz1 v1 ;
pare  = l6   'TRAN' nz1 v1 ;
pti   = 'POIN' 1 l5 ;
pte   = 'POIN' 1 l6 ;
lzi   = pti d nz1 (pti 'PLUS' v1) ;
lze   = pte d nz1 (pte 'PLUS' v1) ;
*
'ELIM' (mt 'ET' wall 'ET' plan1 'ET' plan4 'ET'
        pari 'ET' pare 'ET' lzi 'ET' lze) epsi ;
*
* Break at the basement if any
pjg    =  'POIN' basf 'PROC' (0. 0. 0.) ;
breche = ('ELEM' basf 'APPUIE' 'LARGEMENT' pjg) 'COUL' 'VERT' ;
*
*
* Data for execrxt.procedur
*
*
rxt = 'TABLE' ;
rxt . 'VERSION' = 'V0' ;
rxt . 'vtf'     = mt ;
rxt . 'epsi'    = epsi ;
rxt . 'pi'      = 0. 0. 0.5 ;
*
rxt . 'DISCR' = 'MACRO';
rxt . 'KPRE'  = 'CENTRE';
rxt . 'DT0'   = DT0 ;
*
rxt . 'MODTURB' = 'NUTURB' ;
rxt . 'NUT'     = 1.D-2    ;
*
rxt . 'THERMP'  = VRAI   ;
rxt . 'vtp'     = wall   ;
rxt . 'LAMBDA'  = 15.    ;
rxt . 'ROCP'    = 3.9E6  ;
rxt . 'Tp0'     = 60.    ;
rxt . 'ECHAN'   = 10.    ;
*

*
rxt . 'VAPEUR' = VRAI   ;
rxt . 'TF0'    = 40.0   ;
rxt . 'PT0'    = 1.0e5  ;
rxt . 'Yvap0'  = 0.0023 ;
*
rxt . 'Breches'                    = 'TABLE' ;
rxt . 'Breches' . 'A'              = 'TABLE' ;
rxt . 'Breches' . 'A' . 'scenario' = 'TABLE' ;
rxt . 'Breches' . 'A' . 'Maillage' =  breche ;
rxt . 'Breches' . 'A' . 'diru'     =  (0. 0. 1.) ;
rxt . 'Breches' . 'A' . 'scenario' . 't'      = 'PROG' 0.0   1000.0 ;
rxt . 'Breches' . 'A' . 'scenario' . 'qeau'   = 'PROG' 0.050  0.050 ;
rxt . 'Breches' . 'A' . 'scenario' . 'qair'   = 'PROG' 0.000  0.000 ;
rxt . 'Breches' . 'A' . 'scenario' . 'tinj'   = 'PROG' 150.0  150.0 ;
*
rxt . 'GRAPH'   = GRAPH ;
rxt . 'DETMAT'  = VRAI ;
rxt . 'FRPREC'  = 5 ;
rxt . 'RENU'    = 'RIEN' ;
*
*===================================================================
* Use of a personnal procedur to impose external temperature and heat
* transfer coefficient
*
rxt . 'ECHEXT' = vrai ;
rxt . 'parext' = pare ;
rxt . 'HEXT'   = 0.   ;
rxt . 'TPEXT'  = 0.   ;
rxt . 'PERSO'    = vrai      ;
rxt . 'PRCPERSO' = 'MAPROCX' ;
rxt . 'TABPERSO' = 'TABLE'   ;
*
'DEBPROC' MAPROCX TPS*'FLOTTANT' rxt*'TABLE' ;
*
* Heat transfer coeff h=h(z) with h=hair if z>z(t) and h=hwater
* otherwise (case KAS1 of the PROCHEXT procedur).
   hz   = 'EVOL' 'MANU' ('PROG' 0. 1.e3) ('PROG'   2.   2.) ;
   hair = 'EVOL' 'MANU' ('PROG' 0. 1.e3) ('PROG'   5.   5.) ;
   tair = 'EVOL' 'MANU' ('PROG' 0. 1.e3) ('PROG'  45.  45.) ;
   hmer = 'EVOL' 'MANU' ('PROG' 0. 1.e3) ('PROG' 100. 100.) ;
   tmer = 'EVOL' 'MANU' ('PROG' 0. 1.e3) ('PROG'  25.  25.) ;
   PROCHEXT TPS RXT 'KAS1' HZ HAIR TAIR HMER TMER ;
'FINP' ;
*
*===================================================================
*
*
* Transient (with restart after 2 time steps)
*
*
EXECRXT  2    rxt       ;
EXECRXT  (nbit - 2) rxt ;
*
*
* Tests
*
*
'SI' ('NON' COMPLET) ;
  ERR1 = 0 ;

  list rxt . 'TIC' . 'Qc' ;

lqc = 'PROG'
  0.0000      0.0000      0.0000      4.06144E-04 2.65253E-03
  4.88866E-03 9.33116E-03 1.21678E-02 1.62777E-02 1.83519E-02
  2.15684E-02 2.30288E-02 2.48999E-02 2.70823E-02 2.87962E-02
  3.10941E-02 3.24963E-02 3.41493E-02 3.54498E-02 3.65196E-02
  3.74724E-02 3.83095E-02 3.90539E-02 3.97239E-02 4.03333E-02
  4.08906E-02 4.14022E-02 4.18734E-02 4.23087E-02 4.27117E-02
  4.30854E-02 4.34323E-02 4.37547E-02 4.40546E-02 4.43339E-02  ;
lqc = lqc 'ET' ('PROG'
  4.45941E-02 4.48367E-02 4.50632E-02 4.52746E-02 4.54723E-02
  4.56571E-02 4.58301E-02 4.59921E-02 4.61439E-02 4.62862E-02
  4.64198E-02 4.65453E-02 4.66632E-02 4.67740E-02 4.68782E-02
  4.69764E-02 4.70688E-02 4.71560E-02 4.72381E-02 4.73156E-02
  4.73888E-02 4.74579E-02 4.75232E-02 4.75849E-02 4.76433E-02
  4.76986E-02 4.77509E-02 4.78005E-02 4.78474E-02 4.78919E-02
  4.79341E-02 4.79741E-02 4.80121E-02 4.80482E-02 4.80824E-02) ;
lqc = lqc 'ET' ('PROG'
  4.81150E-02 4.81459E-02 4.81753E-02 4.82032E-02 4.82298E-02
  4.82551E-02 4.82791E-02 4.83020E-02 4.83238E-02 4.83445E-02
  4.83643E-02 4.83831E-02 4.84010E-02 4.84181E-02 4.84343E-02
  4.84498E-02 4.84646E-02 4.84787E-02 4.84921E-02 4.85048E-02
  4.85170E-02 4.85286E-02 4.85397E-02 4.85502E-02 4.85602E-02
  4.85698E-02 4.85789E-02 4.85876E-02 4.85958E-02 4.86037E-02
  4.86112E-02) ;

  tic = rxt . 'TIC' ;
  ERQc = 'SOMM' ('ABS'(lqc  - tic . 'Qc' ))  ;
  'MESS' 'ERQc=' ERQc ;
  'SI' (ERQc '>' 1.e-4) ; err1 = err1 '+' 1 ; 'FINS' ;
  'SI' ('NEG' ERR1 0) ;
    'ERRE' 5 ;
  'FINS' ;
'FINS' ;
*
*
* Plots devoted to pressu... cases
*
*
'SI' GRAPH ;
  tbt = rxt . 'TBT' ;
  tic = rxt . 'TIC' ;
*
  $vtf = rxt . 'GEO' . '$vtf' ;
  vtf  = 'DOMA'  $vtf 'MAILLAGE' ;
*
  Mpl1 = 'CHAN' 'QUAF' plan1 ;
  Mpl4 = 'CHAN' 'QUAF' plan4 ;
  'ELIM' (vtf 'ET' Mpl1 'ET' Mpl4) epsi ;
  $mpl1 = 'MODE' Mpl1 'NAVIER_STOKES' 'MACRO' ;
  $mpl4 = 'MODE' Mpl4 'NAVIER_STOKES' 'MACRO' ;
  plan1 = 'DOMA' $mpl1 'MAILLAGE' ;
  plan4 = 'DOMA' $mpl4 'MAILLAGE' ;
  plan  = plan1 'ET' plan4 ;
  cplan = 'CONT' plan ;
*
  'SI' ('EXIS' tic 'TP') ;
    $vtp = rxt . 'GEO' . '$vtp' ;
    vtp  = 'DOMA'  $vtp 'MAILLAGE' ;
  'FINS' ;
  paroif  = rxt . 'GEO' . 'paroif';
  cparoif = 'CONT' paroif ;
*
  axe  = p0 d nz1 (p0 plus v1) ;
  axe = 'CHAN' axe 'QUAF' ;
  'ELIM' (axe 'ET' mt) epsi ;
*
  un   = tic . 'UN';
  unp  = 'REDU' un plan ;
  ung  = 'VECT' un  0.5 'UX' 'UY' 'UZ' 'JAUN' ;
  ungp = 'VECT' unp 0.5 'UX' 'UY' 'UZ' 'JAUN' ;
  tf   = tic . 'TF' ;
  rho  = tic . 'RHO' ;
  rair = tic . 'RAIR' ;
  'SI' tbt . 'THE'    ; rhe  = tic . 'RHE'  ; 'FINS' ;
  'SI' tbt . 'TH2'    ; rh2  = tic . 'RH2'  ; 'FINS' ;
  'SI' tbt . 'TCO'    ; rco  = tic . 'RCO'  ; 'FINS' ;
  'SI' tbt . 'TCO2'   ; rco2 = tic . 'RCO2' ; 'FINS' ;
  'SI' tbt . 'VAPEUR' ; rvp  = tic . 'RVP'  ; 'FINS' ;
*
  evauz = 'EVOL' 'CHPO' ('EXCO' un 'UZ') axe ;
  'DESS' evauz
  'TITR' 'Velocity with the z axis' 'MIMA'
  'GRIL' 'POIN' 'GRIS' 'TITX' 'z' 'TITY' ' m/s' ;
  'TRAC' ung plan ('CONT' plan) 'TITR' ' Velocity' ;
*
  evatf = 'EVOL' 'CHPO' tf  axe ;
  'DESS' evatf
  'TITR' 'Gas temperature with the z axis' 'MIMA'
  'GRIL' 'POIN' 'GRIS' 'TITX' 'z' 'TITY' ' C' ;
  'TRAC' tf plan cplan 'TITR' ' Temperature' ;
  'TRAC' tf paroif cparoif 'TITR' ' Temperature' ;
*
  evarh = 'EVOL' 'CHPO' rho axe ;
  'DESS' evarh
  'TITR' 'Gas density with the z axis' 'MIMA'
  'GRIL' 'POIN' 'GRIS' 'TITX' 'z' 'TITY' ' kg/m3' ;
  'TRAC' rho plan ('CONT' plan) ungp 'TITR' ' Density & velocity' ;
  'TRAC' rho paroif cparoif 'TITR' ' Density' ;
*
  evavap = 'EVOL' 'CHPO' rvp axe ;
  'DESS' evavap
  'TITR' 'Steam density with the z axis' 'MIMA'
  'GRIL' 'POIN' 'GRIS' 'TITX' 'z' 'TITY' ' kg/m3' ;
  'TRAC' rvp plan cplan 'TITR' ' Steam density' ;
*
  Fcond = rxt . 'TIC' . 'Fcondw';
  'TRAC' fcond paroif cparoif 'TITR' ' Fcond kg/m**2' ;
*
* Wall temperature
  'SI' ('EXIS' tic 'TP') ;
     'TRAC' tic . 'TP' vtp 'TITR' ' Wall temperature' ;
  'FINS' ;
*
*
* Specific plots
*
*
  TAB1 = TABLE ;
  TAB1 . 1 = 'MARQ LOSA REGU' ;
  TAB1 . 2 = 'MARQ TRIU REGU' ;
  TAB1 . 3 = 'MARQ PLUS TIRM' ;
  TAB1 . 4 = 'MARQ CARR TIRM' ;
  TAB1 . 'TITRE' = TABLE ;
*
*---------------------------------------> Hext, Text , ...

  TAB1 . 'TITRE' . 1 = 'MOT' 'TP int' ;
  TAB1 . 'TITRE' . 2 = 'MOT' 'TP ext' ;
  TAB1 . 'TITRE' . 3 = 'MOT' 'Text'   ;
  TAB1 . 'TITRE' . 4 = 'MOT' 'TF int' ;

  evtpi  = ('EVOL' 'CHPO' tic . 'TP'    lzi) 'COUL' 'ROUG' ;
  evtpe  = ('EVOL' 'CHPO' tic . 'TP'    lze) 'COUL' 'BLEU' ;
  evtpxt = ('EVOL' 'CHPO' tic . 'TPEXT' lze) 'COUL' 'BLEU' ;
  evtfi  = ('EVOL' 'CHPO' tic . 'TF'    lzi) 'COUL' 'ROUG' ;
  'DESS' (evtpi 'ET' evtpe 'ET' evtpxt 'ET' evtfi)
  'TITR' 'Gas, wall and external temperatures (KAS1)' 'MIMA'
  'GRIL' 'POIN' 'GRIS' 'TITX' 'z(m)' 'TITY' ' C'
  'LEGE' tab1 ;

  TAB1 . 'TITRE' . 1 = 'MOT' 'Hext ' ;

  hext = 'ELNO' tic . 'HEXTc' rxt . 'GEO' . '$parext' ;
  evhxt  = 'EVOL' 'CHPO' hext lze ;
  'DESS'  evhxt
  'TITR' 'Hext (KAS1)' 'MIMA'
  'GRIL' 'POIN' 'GRIS' 'TITX' 'z(m)' 'TITY' 'W/m^2/K'
  'LEGE' tab1 ;
  'TRAC' hext  pare 'TITR' 'Hext (KAS1)'         ;
  'TRAC' tic . 'TPEXT' pare 'TITR' 'Text (KAS1)' ;

*
*---------------------------------------> Pressure
* Why TPi and not TFi for air ans steam ?

  TAB1 . 'TITRE' . 1 = 'MOT' 'PT' ;
  TAB1 . 'TITRE' . 2 = 'MOT' 'Psat(TPi)' ;
  TAB1 . 'TITRE' . 3 = 'MOT' 'Pair(TPi)' ;
  TAB1 . 'TITRE' . 4 = 'MOT' 'Pvap(TPi)' ;

  Psattp = PSATT (tic . 'TP' + 273.15)  ;
  PT     = 'EXTR' ('DIME' tic . 'PT') (tic . 'PT') ;
  Pair   = ('EXTR' tic . 'Rhomn' 1) '*' 287.1 '*' tic . 'TP' ;
  pvi    = PT - Pair ;

  evpsattpi = 'EVOL' 'CHPO' Psattp lzi ;
  evpt     = 'EVOL' 'MANU' ('PROG' 0. h1) ('PROG' PT PT) ;
  evpair   = 'EVOL' 'CHPO' pair lzi ;
  evpvi    = 'EVOL' 'CHPO' pvi lzi ;
  'DESS' (evPT et evpsattpi et evpair et evpvi)
  'TITR'  'Pressure' 'MIMA'
  'GRIL' 'POIN' 'GRIS' 'TITX' 'z(m)' 'TITY' ' Pa'
  'LEGE' tab1 ;
*
*---------------------------------------> Density

  TAB1 . 'TITRE' . 1 = 'MOT' 'Rho' ;
  TAB1 . 'TITRE' . 2 = 'MOT' 'Rvp' ;
  TAB1 . 'TITRE' . 3 = 'MOT' 'Rnc' ;
  TAB1 . 'TITRE' . 4 = 'MOT' 'Rsat(TPi)' ;

  Rsattp   = Psattp '/' 461.73 '/' (tic . 'TP' '+' 273.15) ;

  evrhpi   = 'EVOL' 'CHPO' tic . 'RHO' lzi ;
  evrvpi   = 'EVOL' 'CHPO' tic . 'RVP' lzi ;
  evrinci  = 'EVOL' 'CHPO' (tic . 'RHO' '-' tic . 'RVP') lzi ;
  evrsati  = 'EVOL' 'CHPO' Rsattp lzi ;
  'DESS' (evrhpi 'ET' evrvpi 'ET' evrinci 'ET' evrsati)
  'TITR' 'Density at the wall' 'MIMA'
  'GRIL' 'POIN' 'GRIS' 'TITX' 'z(m)' 'TITY' 'kg/m3'
  'LEGE' tab1 ;
*
*---------------------------------------> Mass fraction

  TAB1 . 'TITRE' . 1 = 'MOT' 'Yvap' ;
  TAB1 . 'TITRE' . 2 = 'MOT' 'Ysat(TPi)' ;
  TAB1 . 'TITRE' . 3 = 'MOT' 'Yvap - Ysat(TPi)' ;

  yvi   = tic . 'RVP' '/' tic . 'RHO' ;
  ysati = ('REDU' Rsattp lzi) '/' ('REDU' tic . 'RHO' lzi) ;

  evysati = 'EVOL' 'CHPO' ysati lzi ;
  evyvi   = 'EVOL' 'CHPO' yvi lzi ;
  evdyv   = evyvi '-' evysati ;
  'DESS' (evyvi 'ET' evysati 'ET' evdyv)
  'TITR' 'Steam mass fraction at wall' 'MIMA' 'YBOR' 0. 0.4
  'GRIL' 'POIN' 'GRIS' 'TITX' 'z(m)' 'TITY' ' Mass Fraction'
  'LEGE' tab1 ;
*
*- Fin GRAPH
*
'FINSI' ;
 'FIN' ;
