* fichier : rela_non_associee_2.dgibi
*+++++++++++++++++++++++++++++++++++++++++
*
* Exemple: perforated plate under traction
* Several elements with MAZARS model in the middle
* Testing non associated condition
* -> Maximum damage zone opening incremental constraint
* -> Control by assumed displacement of the right frontier.
*
*+++++++++++++++++++++++++++++++++++++++++
'TITR' 'Displacement applied at the right edge';
'OPTI' 'DIME' 2 'ELEM' 'QUA4' 'MODE' 'PLAN CONTR';
'OPTI' 'TRAC' 'PSC';

'DEBPROC' RESFORCE CH1*CHPOINT GEO*MAILLAGE COMP1*MOT ;
 CH2 = REDU CH1 GEO ;
 CHTOT = RESU CH2 ;
 P1 = (EXTR CHTOT MAIL) POIN 1 ;
 TOT1 = EXTR CHTOT COMP1 P1 ;
'FINPROC' TOT1 ;

*+++++++++++++++++++++++++++++++++++++++++
*
* END OF USER DEFINED PROCEDURES
*
*+++++++++++++++++++++++++++++++++++++++++

** Deux choix possibles de fabrications des relations
** vrai: deformations imposees
** faux: manuelles
DEFOIMP = vrai;


*+++++++++++++++++++++++++++++++++++++++++
*
* PARAMETRIC GEOMETRY
*
*+++++++++++++++++++++++++++++++++++++++++
pig = 3.141592654;
R = 0.5;
e  = (pig/80.)*R;
e1 = (pig/80.)*R;
CC = 1. 0.85;

DTETA = ((e/R)/pig)*180.;
SINDT = SIN(DTETA);
COSDT = COS(DTETA);

DTETA1 = ((e1/R)/pig)*180.;
SINDT1 = SIN(DTETA1);
COSDT1 = COS(DTETA1);

dens1 = 1./5.;
dens2 = 1./8.;
dens3 = 2.*R*(SINDT);
dens4 = 2.*R*(SINDT1);

PA = 0. 0.;
PB = 2. 0.;
PC = 2. 2.;
PD = 0. 2.;

PE = (1.-(R*SINDT)) 0.;
PF = (1.+(R*SINDT)) 0.;
PG = (1.+(R*SINDT1)) 2.;
PH = (1.-(R*SINDT1)) 2.;

PI = 2. 0.85;
PL = 0. 0.85;

PC1 = (1.+(R*SINDT)) (0.35+(R*(1-COSDT)));
PC2 = 1.5 0.85;
PC3 = (1.+(R*SINDT1)) (1.35-(R*(1-COSDT1)));
PC4 = (1.-(R*SINDT1)) (1.35-(R*(1-COSDT1)));
PC5 = 0.5 0.85;
PC6 = (1.-(R*SINDT)) (0.35+(R*(1-COSDT)));

LAE = DROI PA PE 'DINI' dens1 'DFIN' dens3;
LC6E = DROI PE PC6 'DINI' dens3 'DFIN' dens3;
LC5C6 = CERC PC6 CC PC5 'DINI' dens3 'DFIN' dens2;
LC5L = DROI PC5 PL 'DINI' dens2 'DFIN' dens1;
LLA = DROI PL PA 'DINI' dens1 'DFIN' dens1;
LSW = LAE ET LC6E ET LC5C6 ET LC5L ET LLA;
SSW = SURF LSW;

LEF = DROI 1 PE PF;
LC1F = DROI PF PC1 'DINI' dens3 'DFIN' dens3;
LC6C1 = CERC PC1 CC PC6 'DINI' dens3 'DFIN' dens3;
LS = LEF ET LC1F ET LC6C1 ET (INVE LC6E);
SS = SURF LS;

LFB = DROI PF PB 'DINI' dens3 'DFIN' dens1;
LBI = DROI PB PI 'DINI' dens1 'DFIN' dens1;
LC2I = DROI PI PC2 'DINI' dens1 'DFIN' dens2;
LC2C1 = CERC PC2 CC PC1 'DINI' dens2 'DFIN' dens3;
LSE = LFB ET LBI ET LC2I ET LC2C1 ET (INVE LC1F);
SSE = SURF LSE;

LIC = DROI PI PC 'DINI' dens1 'DFIN' dens1;
LCG = DROI PC PG 'DINI' dens1 'DFIN' dens4;
LGC3 = DROI PG PC3 'DINI' dens4 'DFIN' dens4;
LC3C2 = CERC PC3 CC PC2 'DINI' dens4 'DFIN' dens2;
LNE = (INVE LC2I) ET LIC ET LCG ET LGC3 ET LC3C2;
SNE = SURF LNE;

LC3C4 = CERC PC3 CC PC4 'DINI' dens4 'DFIN' dens4;
LGH = DROI 1 PG PH;
LHC4 = DROI PH PC4 'DINI' dens4 'DFIN' dens4;
LN = LC3C4 ET (INVE LGC3) ET LGH ET LHC4;
SN = SURF LN;

LC4C5 = CERC PC5 CC PC4 'DINI' dens2 'DFIN' dens4;
LHD = DROI PH PD 'DINI'  dens4 'DFIN' dens1;
LDL = DROI PD PL 'DINI' dens1 'DFIN' dens1;
LNW = (INVE LC5L) ET LC4C5 ET (INVE LHC4) ET LHD ET LDL;
SNW = SURF LNW;

DAMMPART = SS ET SN;
ELASPART = SSW ET SSE ET SNE ET SNW;

LAT_E = LDL ET LLA;
LAT_D = LIC ET LBI;

ESTRUT = (DAMMPART 'ET' ELASPART);
*TRAC ESTRUT;
*+++++++++++++++++++++++++++++++++++++++++
*
* END OF PARAMETRIC GEOMETRY
*
*+++++++++++++++++++++++++++++++++++++++++

*+++++++++++++++++++++++++++++++++++++++++
*
* MODEL AND MATERIAL
*
*+++++++++++++++++++++++++++++++++++++++++
AT=1.0e0;
AC=1.2e0;
BC=1.5e+03;
BT=1.0E4;
epsd0=1.0E-4;
YG=1.0E+9;
BBT=1.06e0;
NNU=0.0;
RO =2.3E+03;

MOD1 = 'MODE' ELASPART 'MECANIQUE' 'ELASTIQUE' 'ISOTROPE';
MAT1 = 'MATE' MOD1 'YOUN' YG 'NU' NNU 'RHO' RO;

MOD2 = 'MODE' (            DAMMPART) 'MECANIQUE' 'ELASTIQUE' 'ISOTROPE' 'ENDOMMAGEMENT' 'MAZARS';
MAT2 = 'MATE' MOD2 'YOUN' YG 'NU' NNU 'RHO' RO 'BTRA' BT 'KTR0' epsd0 'ATRA' AT 'ACOM' AC 'BCOM' BC 'BETA' BBT;

MODTOT = MOD1 'ET' MOD2;
MATTOT = MAT1 'ET' MAT2;
*MODTOT =  MOD2;
*MATTOT =  MAT2;

*+++++++++++++++++++++++++++++++++++++++++
*
* END OF MODEL AND MATERIAL
*
*+++++++++++++++++++++++++++++++++++++++++

*+++++++++++++++++++++++++++++++++++++++++
*
* BOUNDARY CONDITIONS
*
*+++++++++++++++++++++++++++++++++++++++++
CL1 = 'BLOQ' 'UX' LAT_E;
***CL2 = 'BLOQ' 'UY' PA;
***CLT = CL1 'ET' CL2;
CLT = CL1 ;

***LA = ESTRUT 'POIN' 'DROIT' PA PB 0.00001;
la = lae et lef et lfb;
CL4 = 'BLOQ' 'UY' LA;
CLT = CLT ET CL4;
lb = lhd et lgh et lcg;
CL5 = rela ense lb 'UY';
CLT = CLT ET CL5;
FO_CHA = FORCE  (1 0) pc;

re_ens = rela ense LAT_d 'UX';
CLT = CLT et re_ens;


*+++++++++++++++++++++++++++++++++++++++++
*
* END OF BOUNDARY CONDITIONS
*
*+++++++++++++++++++++++++++++++++++++++++

uch = force (1   0  ) pc   ;
chdual = (uch exco 'FX' 'FX') * -1;

*  on peut construire manuellement les relations

'SI' ('NON' defoimp);

chprim1 =
         (manu chpo pc4 1 'UX' -1) + (manu chpo pc3 1 'UX'  1);
chprim2 =
         (manu chpo ph  1 'UX' -1) + (manu chpo pg  1 'UX'  1);
chprim3 =
         (manu chpo pc6 1 'UX' -1) + (manu chpo pc1 1 'UX'  1);
chprim4 =
         (manu chpo pe  1 'UX' -1) + (manu chpo pf  1 'UX'  1);

chdual = (uch exco 'FX' 'FX') * -1;
CL31 = RELA maxi         CHPRIM1 'DUAL' chdual;
CL32 = RELA maxi         CHPRIM2 'DUAL' chdual;
CL33 = RELA maxi         CHPRIM3 'DUAL' chdual;
CL34 = RELA maxi         CHPRIM4 'DUAL' chdual;

'SINON';

** transformer le maillage en segments pour pouvoir controler la deformation de certains segments
dammseg = dammpart chan ligne;
MODseg = 'MODE' dammseg 'MECANIQUE' 'ELASTIQUE' 'ISOTROPE' 'BARR';
MATseg = 'MATE' modseg 'YOUN' YG 'NU' NNU 'RHO' RO sect 1;
RISEG = RIGI MODSEG MATSEG;

rtest = rigi mattot modtot;
dtest = resou chdual (clt et rtest);
dtest = dtest * 1.0;

*  construction des relations controlant la deformation de certains elements

rdam  = riseg redu (dammseg elem  2);
ftest = dtest * rdam * -1;
gtest1 = ftest chan 'COMP' ('MOTS' 'FX' 'FY' 'FZ' 'FR' 'MX' 'MY' 'MZ')
                          ('MOTS' 'UX' 'UY' 'UZ' 'UR' 'RX' 'RY' 'RZ');
cl31 = rela maxi gtest1 'DUAL' chdual;
rdam  = riseg redu (dammseg elem 16 );
ftest = dtest * rdam * -1;
gtest2 = ftest chan 'COMP' ('MOTS' 'FX' 'FY' 'FZ' 'FR' 'MX' 'MY' 'MZ')
                          ('MOTS' 'UX' 'UY' 'UZ' 'UR' 'RX' 'RY' 'RZ');
cl32 = rela maxi gtest2 'DUAL' chdual;
rdam  = riseg redu (dammseg elem 50);
ftest = dtest * rdam * -1;
gtest3 = ftest chan 'COMP' ('MOTS' 'FX' 'FY' 'FZ' 'FR' 'MX' 'MY' 'MZ')
                          ('MOTS' 'UX' 'UY' 'UZ' 'UR' 'RX' 'RY' 'RZ');
cl33 = rela maxi gtest3 'DUAL' chdual;
rdam  = riseg redu (dammseg elem 20);
ftest = dtest * rdam * -1;
gtest4 = ftest chan 'COMP' ('MOTS' 'FX' 'FY' 'FZ' 'FR' 'MX' 'MY' 'MZ')
                          ('MOTS' 'UX' 'UY' 'UZ' 'UR' 'RX' 'RY' 'RZ');
cl34 = rela maxi gtest4 'DUAL' chdual;

**rdam  = riseg redu (dammseg elem (LECT 2 16 50 20));
**ftest = dtest * rdam * -1;
**gtest1 = ftest chan 'COMP' ('MOTS' 'FX' 'FY' 'FZ' 'FR' 'MX' 'MY' 'MZ')
**                          ('MOTS' 'UX' 'UY' 'UZ' 'UR' 'RX' 'RY' 'RZ');
**cl3  = rela      gtest1 'DUAL' chdual;
**

'FINSI';

ppil1 = cl31 extr maillage mult;
ppil2 = cl32 extr maillage mult;
ppil3 = cl33 extr maillage mult;
ppil4 = cl34 extr maillage mult;

CLT =        CL34 ET CL31 ET  CL32 et CL33 et  clt;
**CLT = CLT ET CL3;

*+++++++++++++++++++++++++++++++++++++++++

*+++++++++++++++++++++++++++++++++++++++++
*
*SOLUTION
*
*+++++++++++++++++++++++++++++++++++++++++
uch = ('DEPI' CL31 2.2d-6 ) et (depi cl32 2.2d-6 ) et
      ('DEPI' CL33 2.2d-6 ) et (depi cl34 2.2d-6  );
lis1 = prog 0. pas 5e-6 6e-4;
**uch = 'DEPI' CL3 4d-6 ;
EV1 = evol manu 't' lis1 'tau' lis1 ;
EV2 = evol manu (prog 0 1) (prog  1 1);
charg= (char DINC  uch    ev2)
et (char forc (fo_cha *1d5) ev2) ;


****  preparing PASAPAS input table
tab1=table;
tab1.blocages_mecaniques=CLT ;
tab1.caracteristiques=mattot ;
tab1.modele=modtot;
tab1.temps_calcules= lis1 ;
*tab1.stabilite     = faux ;
*tab1.deltaiter = 40      ;
tab1.precision = 1d-7;
*** tab1.grands_deplacements = vrai;
tab1.chargement=charg;

pasapas tab1;
*+++++++++++++++++++++++++++++++++++++++++
*
* END OF SOLUTION
*
*+++++++++++++++++++++++++++++++++++++++++

*+++++++++++++++++++++++++++++++++++++++++
*
* POST-PROCESSING
*
*+++++++++++++++++++++++++++++++++++++++++
nn = DIME tab1 . temps;

PROF = PROG 0.;
PROT = PROG 0.;
PROD = PROG 0.;
PROC = PROG 0.;
PROC1 = PROG 0.;
PROC2 = PROG 0.;
PROC3 = PROG 0.;
PROC4 = PROG 0.;

RECHERCHE = VRAI;
REPE LAB (nn - 1 ) ;
ii = &LAB ;
TT = tab1 . TEMPS . ii ;
deplac = tab1 . 'DEPLACEMENTS' . ii ;
force_indirect = 'REAC' CL1 deplac ;
FF = RESFORCE force_indirect LAT_E 'FX' ;
rer    = tab1 . 'REACTIONS' . ii ;
DD = 'EXTR' deplac 'UX' PB ;
ref= 'EXTR' rer    'FX' PB ;

* recherche du point ou dd et ref remonte apres le chargement initial
SI ((ii > 10) ET RECHERCHE);
   SI ((DD > DDPR) ET (FF < FFPR));
          DDCRIT = DD;
          FFCRIT = FF;
          IICRIT = II;
          RECHERCHE = FAUX;
   FINSI;
FINSI;
DDPR = DD;
FFPR = FF;


PROT = PROT et ( PROG TT) ;
PROF = PROF et ( PROG (-1.0*FF)) ;
PROD = PROD et ( PROG DD) ;
PROC1= PROC1 ET (deplac extrai vale ppil1 'LX');
PROC2= PROC2 ET (deplac extrai vale ppil2 'LX');
PROC3= PROC3 ET (deplac extrai vale ppil3 'LX');
PROC4= PROC4 ET (deplac extrai vale ppil4 'LX');
PROC = PROC ET (prog ref);
Fin LAB ;
MESS 'FORCE DEPLACEMENT INDICE' ' ' DDCRIT ' ' FFCRIT ' 'IICRIT;
SI (DDCRIT < 2.80000E-05);
  MESS 'Decharge trop importante en deplacement';
* ERREUR 5;
FINSI;
SI (FFCRIT >  -7.10000E+03);
  MESS 'Decharge trop importante en force';
* ERREUR 5;
FINSI;


*PROETA = TAB1 . 'COEFFICIENT_DE_PILOTAGE' ;
tdes = table; tdes.1 = 'MARQ LOSA';
evo11 = evol turq manu 'd' PROD 'f' PROF ; dess evo11 tdes nclk    ;
evo12 = evol jaun manu 't' PROT 'eta' PROC ; dess evo12 nclk    ;
evoc1 = evol jaun manu 't' PROT 'eta' PROC1 ;
evoc2 = evol roug manu 't' PROT 'eta' PROC2 ;
evoc3 = evol bleu manu 't' PROT 'eta' PROC3 ;
evoc4 = evol vert manu 't' PROT 'eta' PROC4 ;

evoc = evoc1 et evoc2 et evoc3 et evoc4;
dess evoc nclk    ;

*+++++++++++++++++++++++++++++++++++++++++
*
* END OF POST-PROCESSING
*
*+++++++++++++++++++++++++++++++++++++++++
fin;
