* fichier :  test_sif_2d.dgibi
************************************************************************
* Section : Mecanique Rupture
************************************************************************
* Cas test pour la procedure SIF
* 2D, plaque semi-infinie de taille l1 avec fissure interne de taille l2
* Soumise a une contrainte sig, dans la direction orthogonale a la fissure
* Test sur le calcul du KI
* Valeur theorique KI = sig * (pi*l2/(cos(pi*l2/(2*l1))))**0.5


* Options generales
OPTI 'DIME' 2 'MODE' 'PLAN' 'ELEM' 'TRI6' ;

* Parametres
l1 = 10. ;
l2 = 1. ;
sig = 42. ;

* Maillage
p1 = 0. 0. ;
p2 = (l1 - l2) 0. ;
p3 = (l1 + l2) 0. ;
p4 = (2. * l1) 0. ;
p5 = (2. * l1) (5. * l1) ;
p6 = 0. (5. * l1) ;
p7 = p5 SYME 'DROIT' p1 p4 ;
p8 = p6 SYME 'DROIT' p1 p4 ;
* --densites (loin et pres de la fissure)
den1 = l1 / 4. ;
den2 = l2 / 20. ;
l12  = DROI p1 p2 'DINI' den1 'DFIN' den2 ;
l23s = DROI p2 p3 'DINI' den2 'DFIN' den2 ;
l34  = DROI p3 p4 'DINI' den2 'DFIN' den1 ;
l45  = DROI p4 p5 'DINI' den1 'DFIN' den1 ;
l56  = DROI p5 p6 'DINI' den1 'DFIN' den1 ;
l61  = DROI p6 p1 'DINI' den1 'DFIN' den1 ;
con1 = l12 ET l23s ET l34 ET l45 ET l56 ET l61 ;
s1 = SURF con1 ;
l23i = DROI p2 p3 'DINI' den2 'DFIN' den2 ;
l47  = DROI p4 p7 'DINI' den1 'DFIN' den1 ;
l78  = DROI p7 p8 'DINI' den1 'DFIN' den1 ;
l81  = DROI p8 p1 'DINI' den1 'DFIN' den1 ;
con2 = l12 ET l23i ET l34 ET l47 ET l78 ET l81 ;
s2 = SURF con2 ;
stot = s1 ET s2 ;

* Modele et materiau
mo = MODE stot 'MECANIQUE' ;
ma = MATE mo 'YOUN' 200.E9 'NU' 0.3 ;

* Blocages
bl1 = BLOQ 'DEPL' p1 ;
bl2 = BLOQ 'UY' p4 ;

* Chargement
f1 = PRES 'MASS' mo l56 (-1. * sig) ;
f2 = PRES 'MASS' mo l78 (-1. * sig) ;
f = f1 ET f2 ;

* Resolution
r0 = RIGI mo ma ;
rig = r0 ET bl1 ET bl2 ;
u = RESO rig f ;

* Solution de reference
k1ref = sig * ((pi * l2 / (COS (pi * l2 / (2. * l1)))) ** 0.5) ;

* Solution par SIF
t1 = TABL ;
t1 . 'FRTFISS' = p2 ;
t1 . 'LEVRE_1' = l23s ;
t1 . 'MODMIXTE' = VRAI ;
t1 . 'LEVRE_2' = l23s ;
SIF ma u t1 ;
k1sif = t1 . 'K1' ;
errsif = 100. * (k1sif - k1ref) / k1ref ;

* Affichage
OPTI 'ECHO' 0 ;
SAUT 3 'LIGNE' ;
MESS 'BILAN, CALCUL DE KI' ;
MESS ;
MESS 'Solution de reference ' k1ref ;
MESS 'Calcul avec SIF       ' k1sif ;
MESS 'Ecart relatif (%)     ' errsif ;

* Test d'erreur
MESS ; MESS ;
SI ((ABS errsif) > 1.) ;
  ERRE 'ERREUR DANS LE CALCUL DU KI' ;
SINON ;
  MESS 'CAS TEST PASSE AVEC SUCCES !' ;
FINSI ;

FIN ;
