* fichier : source2.dgibi
* section : thermique
*----------------------------------------------------------------------*
*                           SOURCE2.DGIBI                              *
*----------------------------------------------------------------------*
*
* Objet :
* -------
*
* Verfication / validation d'un modele de source de chaleur.
* Cas d'une SOURCE GAUSSIENNE ISOTROPE.
*
* Description :
* -------------
* Comparaison des flux nodaux equivalents obtenus avec le modele a
* ceux obtenus en construisant le champ "a la main", puis en l'integrant
* avec l'operateur SOURCE.
*
* Type de calcul : Aucun
* Mode de calcul : 2D PLAN, AXIS et 3D
* Type d'element : TRI3 TRI6 QUA4 QUA8 TET4 TE10 PYR5 PY13 PRI6 PR15
*                  CUB8 CU20
* Objectifs      : Ecart relatif entre flux integres < 1.e-12
*                  Ecart relatif entre la chaleur totale fournie (QTOT)
*                  et la resultante sur le champ integre < 1.e-12
*
*----------------------------------------------------------------------*
*
* IG1 vrai : traces actives
IG1      = faux ;
*
*------------------------ 2D ELEMENTS LINEAIRES -----------------------*
*
opti dime 2 elem qua4 ;

* Parametres du maillage :
lo1      = 50.e-3 ;
ep1      = 20.e-3 ;

* Parametres de la source :
QT1      = 1.e3 ;
OR1      = 30.e-3 ep1 ;
RG1      = 5.e-3 ;

* Maillage :
l1       = (0 0) droi 10 (0 ep1) ;
s1       = l1    tran 50 (lo1 0) ;
l2       = s1 cote 3 ;
s2       = l2    tran 50 (lo1 ep1) ;
s2       = s2 chan tri3 ;
s0       = s1 et s2 ;

si IG1 ;
  ltyp1    = s0 elem type ;
  mot1     = mot 'ELEM =' ;
  repe bm1 (dime ltyp1) ;
    mot1     = chai mot1 ' ' (ltyp1 extr &bm1) ;
  fin bm1 ;
  mot1     = chai ' Maillage test en 2D (' mot1 ')' ;
  trac s0 titr mot1 ;
fins;

* MODE PLAN :
* -----------
*
opti mode plan ;
*
moq1     = mode s0 thermique source gaussienne ;
maq1     = mate moq1 'QTOT' QT1 'ORIG' OR1 'RGAU' RG1 ;
sq1      = sour moq1 maq1 ;

qtmoq1   = sq1 resu maxi ;

mo1      = mode s0 thermique ;
ma1      = mate mo1 k 25. ;

x1 y1    = s0 coor ;
x1 y1    = (x1 - (or1 coor 1)) (y1 - (or1 coor 2)) ;
x1 y1    = (chan cham x1 mo1 stresses) (chan cham y1 mo1 stresses) ;
xqx1     = 4. / PI / RG1 / RG1 ;
sqref1   = exp (-2. * ((x1 * x1) + (y1 * y1)) / RG1 / RG1) * QT1 * xqx1 ;
sqref1   = sour mo1 sqref1 ;

si IG1 ;
  trac sq1 S0 titr ' Flux nodaux du champ de source Gaussienne du MODELE ';
  trac sqref1 s0 titr ' Flux nodaux du champ de source Gaussienne REFERENCE' ;
  trac (sq1 - sqref1) s0 titr ' Difference des 2 champs' ;
fins ;

err1     = (maxi abs (sq1 - sqref1)) / (maxi abs sqref1) ;
list err1 ;
err2     = (abs (qtmoq1 - qt1)) / (abs qt1) ;
list err2 ;
si ((err1 > 1.e-12) ou (err2 > 1.e-4)) ;
  ERRE ' Probleme MODE SOURCE' ;
fins ;

* MODE AXIS :
* -----------
*
opti mode axis ;
*
moq1     = mode s0 thermique source gaussienne isotrope ;
maq1     = mate moq1 'QTOT' QT1 'ORIG' OR1 'RGAU' RG1 ;
sq1      = sour moq1 maq1 ;

qtmoq1   = sq1 resu maxi ;

mo1      = mode s0 thermique ;
ma1      = mate mo1 k 25. ;

x0 y0    = (or1 coor 1) (or1 coor 2) ;
x1 y1    = s0 coor ;
x1 y1    = (x1 - (or1 coor 1)) (y1 - (or1 coor 2)) ;
x1 y1    = (chan cham x1 mo1 stresses) (chan cham y1 mo1 stresses) ;
rc2      = 2. ** 0.5 ;
rcpi1    = pi ** 0.5 ;
xik1     = 0.25 * RG1 * RG1 * (exp (-2. * x0 * x0 / RG1 / RG1)) ;
xik2     = 0.5 * RG1 * x0 * rcpi1 / rc2 ;
xik3     = RG1 * x0 * (erf (x0 * rc2 / RG1)) * rcpi1 / (rc2 * rc2 * rc2) ;
xqx1     = PI * RG1 * rcpi1 / rc2 ;
xqx1     = xqx1 * (xik1 + xik2 + xik3) ;
sqref1   = exp (-2. * ((x1 * x1) + (y1 * y1)) / RG1 / RG1) * QT1 / xqx1 ;
sqref1   = sour mo1 sqref1 ;

si IG1 ;
  trac sq1 S0 titr ' Flux nodaux du champ de source Gaussienne du MODELE ';
  trac sqref1 s0 titr ' Flux nodaux du champ de source Gaussienne REFERENCE' ;
  trac (sq1 - sqref1) s0 titr ' Difference des 2 champs' ;
fins ;

err1     = (maxi abs (sq1 - sqref1)) / (maxi abs sqref1) ;
list err1 ;
err2     = (abs (qtmoq1 - qt1)) / (abs qt1) ;
list err2 ;
si ((err1 > 1.e-12) ou (err2 > 1.e-4)) ;
  ERRE ' Probleme MODE SOURCE' ;
fins ;

*---------------------- 2D ELEMENTS QUADRATIQUES ----------------------*

* Passage en EF quadratiques :
s0       = s0 chan quad ;

si IG1 ;
  ltyp1    = s0 elem type ;
  mot1     = mot 'ELEM =' ;
  repe bm1 (dime ltyp1) ;
    mot1     = chai mot1 ' ' (ltyp1 extr &bm1) ;
  fin bm1 ;
  mot1     = chai ' Maillage test en 2D (' mot1 ')' ;
  trac s0 titr mot1 ;
fins;

* MODE PLAN :
* -----------
*
opti mode plan ;
*
moq1     = mode s0 thermique source gaussienne isotrope ;
maq1     = mate moq1 'QTOT' QT1 'ORIG' OR1 'RGAU' RG1 ;
sq1      = sour moq1 maq1 ;

qtmoq1   = sq1 resu maxi ;

mo1      = mode s0 thermique ;
ma1      = mate mo1 k 25. ;

x1 y1    = s0 coor ;
x1 y1    = (x1 - (or1 coor 1)) (y1 - (or1 coor 2)) ;
x1 y1    = (chan cham x1 mo1 stresses) (chan cham y1 mo1 stresses) ;
xqx1     = 4. / PI / RG1 / RG1 ;
sqref1   = exp (-2. * ((x1 * x1) + (y1 * y1)) / RG1 / RG1) * QT1 * xqx1 ;
sqref1   = sour mo1 sqref1 ;

si IG1 ;
  trac sq1 S0 titr ' Flux nodaux du champ de source Gaussienne du MODELE ';
  trac sqref1 s0 titr ' Flux nodaux du champ de source Gaussienne REFERENCE' ;
  trac (sq1 - sqref1) s0 titr ' Difference des 2 champs' ;
fins ;

err1     = (maxi abs (sq1 - sqref1)) / (maxi abs sqref1) ;
list err1 ;
err2     = (abs (qtmoq1 - qt1)) / (abs qt1) ;
list err2 ;
si ((err1 > 1.e-12) ou (err2 > 1.e-4)) ;
  ERRE ' Probleme MODE SOURCE' ;
fins ;

* MODE AXIS :
* -----------
*
opti mode axis ;
*
moq1     = mode s0 thermique source gaussienne ;
maq1     = mate moq1 'QTOT' QT1 'ORIG' OR1 'RGAU' RG1 ;
sq1      = sour moq1 maq1 ;

qtmoq1   = sq1 resu maxi ;

mo1      = mode s0 thermique ;
ma1      = mate mo1 k 25. ;

x0 y0    = (or1 coor 1) (or1 coor 2) ;
x1 y1    = s0 coor ;
x1 y1    = (x1 - (or1 coor 1)) (y1 - (or1 coor 2)) ;
x1 y1    = (chan cham x1 mo1 stresses) (chan cham y1 mo1 stresses) ;
rc2      = 2. ** 0.5 ;
rcpi1    = pi ** 0.5 ;
xik1     = 0.25 * RG1 * RG1 * (exp (-2. * x0 * x0 / RG1 / RG1)) ;
xik2     = 0.5 * RG1 * x0 * rcpi1 / rc2 ;
xik3     = RG1 * x0 * (erf (x0 * rc2 / RG1)) * rcpi1 / (rc2 * rc2 * rc2) ;
xqx1     = PI * RG1 * rcpi1 / rc2 ;
xqx1     = xqx1 * (xik1 + xik2 + xik3) ;
sqref1   = exp (-2. * ((x1 * x1) + (y1 * y1)) / RG1 / RG1) * QT1 / xqx1 ;
sqref1   = sour mo1 sqref1 ;

si IG1 ;
  trac sq1 S0 titr ' Flux nodaux du champ de source Gaussienne du MODELE ';
  trac sqref1 s0 titr ' Flux nodaux du champ de source Gaussienne REFERENCE' ;
  trac (sq1 - sqref1) s0 titr ' Difference des 2 champs' ;
fins ;

err1     = (maxi abs (sq1 - sqref1)) / (maxi abs sqref1) ;
list err1 ;
err2     = (abs (qtmoq1 - qt1)) / (abs qt1) ;
list err2 ;
si ((err1 > 1.e-12) ou (err2 > 1.e-4)) ;
  ERRE ' Probleme MODE SOURCE' ;
fins ;

*------------------------ 3D ELEMENTS LINEAIRES -----------------------*
*
opti dime 3 elem cub8 ;
s0       = s0 chan line ;

* Maillage du volume :
v0       = s0 volu tran 5 (0 0 ep1) ;
x1       = v0 coor 1 ;

* Ajour de tetraedres :
v3       = v0 elem appu stri (x1 poin supe (1.5 * lo1)) ;
v0       = v0 diff v3 ;
v0       = v0 et (v3 chan tet4) ;

* Ajout d'un element pyramide :
el1      = (v0 elem cub8) elem 1 ;
pe1      = el1 chan poi1 ;
ps1      = pe1 poin 8 ;
py1      = manu pyr5 (pe1 poin 1) (pe1 poin 2) (pe1 poin 3) (pe1 poin 4) ps1 ;
py2      = manu pyr5 (pe1 poin 1) (pe1 poin 2) (pe1 poin 6) (pe1 poin 5) ps1 ;
py3      = manu pyr5 (pe1 poin 2) (pe1 poin 3) (pe1 poin 7) (pe1 poin 6) ps1 ;
py0      = py1 et py2 et py3 ;
v0       = (v0 diff el1) et py0 ;

si IG1 ;
  ltyp1    = v0 elem type ;
  mot1     = mot 'ELEM =' ;
  repe bm1 (dime ltyp1) ;
    mot1     = chai mot1 ' ' (ltyp1 extr &bm1) ;
  fin bm1 ;
  mot1     = chai ' Maillage test en 3D (' mot1 ')' ;
  trac v0 titr mot1 ;
fins;

* Parametres de la source en 3D
OR1      = 30.e-3 (0.5 * ep1) ep1 ;

* Modeles :
moq1     = mode V0 thermique source gaussienne ;
maq1     = mate moq1 'QTOT' QT1 'ORIG' OR1 'RGAU' RG1 ;
sq1      = sour moq1 maq1 ;

qtmoq1   = sq1 resu maxi ;

mo1      = mode V0 thermique ;
ma1      = mate mo1 k 25. ;

x1 y1 z1 = V0 coor ;
x1 y1 z1 = (x1 - (or1 coor 1)) (y1 - (or1 coor 2)) (z1 - (or1 coor 3)) ;
x1 y1 z1 = (chan cham x1 mo1 stresses) (chan cham y1 mo1 stresses) (chan cham z1 mo1 stresses) ;
xqx1     = (32. / (PI * PI * PI)) ** 0.5 / RG1 / RG1 / RG1 ;
sqref1   = exp (-2. *((x1 * x1) + (y1 * y1) + (z1 * z1)) / RG1 / RG1) * QT1 * xqx1 ;
sqref1   = sour mo1 sqref1 ;

si IG1 ;
  trac sq1 V0 titr ' Flux nodaux du champ de source Gaussienne du MODELE ' coup or1 (0 1 0) (0 0 1) ;
  trac sqref1 V0 titr ' Flux nodaux du champ de source Gaussienne REFERENCE' coup or1 (0 1 0) (0 0 1) ;
  trac (sq1 - sqref1) V0 titr ' Difference des 2 champs' coup or1 (0 1 0) (0 0 1) ;
fins ;

err1     = (maxi abs (sq1 - sqref1)) / (maxi abs sqref1) ;
list err1 ;
err2     = (abs (qtmoq1 - qt1)) / (abs qt1) ;
list err2 ;
si ((err1 > 1.e-12) ou (err2 > 2.e-4)) ;
  ERRE ' Probleme MODE SOURCE' ;
fins ;

*---------------------- 3D ELEMENTS QUADRATIQUES ----------------------*
*
v0       = v0 chan quad ;

si IG1 ;
  ltyp1    = v0 elem type ;
  mot1     = mot 'ELEM =' ;
  repe bm1 (dime ltyp1) ;
    mot1     = chai mot1 ' ' (ltyp1 extr &bm1) ;
  fin bm1 ;
  mot1     = chai ' Maillage test en 3D (' mot1 ')' ;
  trac v0 titr mot1 ;
fins;

* Modeles :
moq1     = mode V0 thermique source gaussienne isotrope ;
maq1     = mate moq1 'QTOT' QT1 'ORIG' OR1 'RGAU' RG1 ;
sq1      = sour moq1 maq1 ;

qtmoq1   = sq1 resu maxi ;

mo1      = mode V0 thermique ;
ma1      = mate mo1 k 25. ;

x1 y1 z1 = V0 coor ;
x1 y1 z1 = (x1 - (or1 coor 1)) (y1 - (or1 coor 2)) (z1 - (or1 coor 3)) ;
x1 y1 z1 = (chan cham x1 mo1 stresses) (chan cham y1 mo1 stresses) (chan cham z1 mo1 stresses) ;
xqx1     = (32. / (PI * PI * PI)) ** 0.5 / RG1 / RG1 / RG1 ;
sqref1   = exp (-2. *((x1 * x1) + (y1 * y1) + (z1 * z1)) / RG1 / RG1) * QT1 * xqx1 ;
sqref1   = sour mo1 sqref1 ;

si IG1 ;
  trac sq1 V0 titr ' Flux nodaux du champ de source Gaussienne du MODELE ' ;
  trac sqref1 V0 titr ' Flux nodaux du champ de source Gaussienne REFERENCE' ;
  trac (sq1 - sqref1) V0 titr ' Difference des 2 champs' ;
fins ;

err1     = (maxi abs (sq1 - sqref1)) / (maxi abs sqref1) ;
list err1 ;
err2     = (abs (qtmoq1 - qt1)) / (abs qt1) ;
list err2 ;
si ((err1 > 1.e-12) ou (err2 > 1.e-4)) ;
  ERRE ' Probleme MODE SOURCE' ;
fins ;

*-------------------------------- FIN ---------------------------------*
fin ;
