* fichier : test1_deconv2.dgibi
********************************************************************
************************************************************************
* Section : Mecanique Dynamique
************************************************************************
*
* Test pour la procedure DECONV
*
********************************************************************
*
* On procede a convoluer une onde S sur une colonne
* de sol jusqu'à la surface libre. Le signal est imposé
* à -20 metres de profonduer
*
********************************************************************
* Les caracteristiques du sol sont:
* Vs = 400 m/s
* rho = 2000 kg/m3
* nu = 1./3
* beta = 1%
********************************************************************
*
*  Contacts:
*    Alberto FRAU  DEN/DANS/DM2S/SEMT/EMSI
*            alberto.frauetcea.fr
*    Fan WANG  DEN/DANS/DM2S/SEMT/EMSI
*            fan.wangetcea.fr
********************************************************************
*
OPTI DIME 2 MODE FOUR 1 ELEM QUA8;
OPTI TRAC 'PSC';
*

*
* geometrie
HTOT1 = (20.);
*
* caracterisitques du sol
* vitesse onde de cisaillement
VSSOL1 = 400.;
* masse volumique
RHOSOL1 = 2000.;
* module de cisaillement
GSOL1 = ((VSSOL1)**(2))*(RHOSOL1);
* coef de Poisson
NUSOL1 = (1./3);
* module d'young
ESOL1 = (GSOL1)*((2)*(1 + NUSOL1));
* vitesse onde de pression
VPSOL1 = 2*VSSOL1;
* amortissement
BET_SOL1 = 0.01;
*
* frequence pour l'amortissemenrt de Rayleigh
F1 = 4.;
*F2 = 12.;
F2 = 20.;
*
* taille maillage maximale
DS1 = VSSOL1/((35.)*(8));
*
* nombre des elements pour la colonne de sol
NH1 = ENTI(HTOT1/DS1) + 1;
*
* sortie graphique
GRAP1 = 0;
*
***************************************************
*   SIGNAL SISMIQUE
***************************************************
*
LT1 = PROG;
LA1 = PROG;
*
LT1 = LT1 ET (PROG 0.0000E+000 1.0000E-002 2.0000E-002 3.0000E-002
4.0000E-002 5.0000E-002 6.0000E-002 7.0000E-002 8.0000E-002 9.0000E-002
1.0000E-001 1.1000E-001 1.2000E-001 1.3000E-001 1.4000E-001 1.5000E-001
1.6000E-001 1.7000E-001 1.8000E-001 1.9000E-001 2.0000E-001 2.1000E-001
2.2000E-001 2.3000E-001 2.4000E-001 2.5000E-001 2.6000E-001 2.7000E-001
);
LT1 = LT1 ET (PROG 2.8000E-001 2.9000E-001 3.0000E-001 3.1000E-001
3.2000E-001 3.3000E-001 3.4000E-001 3.5000E-001 3.6000E-001 3.7000E-001
3.8000E-001 3.9000E-001 4.0000E-001 4.1000E-001 4.2000E-001 4.3000E-001
4.4000E-001 4.5000E-001 4.6000E-001 4.7000E-001 4.8000E-001 4.9000E-001
5.0000E-001 5.1000E-001 5.2000E-001 5.3000E-001 5.4000E-001 5.5000E-001
);
LT1 = LT1 ET (PROG 5.6000E-001 5.7000E-001 5.8000E-001 5.9000E-001
6.0000E-001 6.1000E-001 6.2000E-001 6.3000E-001 6.4000E-001 6.5000E-001
6.6000E-001 6.7000E-001 6.8000E-001 6.9000E-001 7.0000E-001 7.1000E-001
7.2000E-001 7.3000E-001 7.4000E-001 7.5000E-001 7.6000E-001 7.7000E-001
7.8000E-001 7.9000E-001 8.0000E-001 8.1000E-001 8.2000E-001 8.3000E-001
);
LT1 = LT1 ET (PROG 8.4000E-001 8.5000E-001 8.6000E-001 8.7000E-001
8.8000E-001 8.9000E-001 9.0000E-001 9.1000E-001 9.2000E-001 9.3000E-001
9.4000E-001 9.5000E-001 9.6000E-001 9.7000E-001 9.8000E-001 9.9000E-001
1.0000E+000 1.0100E+000 1.0200E+000 1.0300E+000 1.0400E+000 1.0500E+000
1.0600E+000 1.0700E+000 1.0800E+000 1.0900E+000 1.1000E+000 1.1100E+000
);
LT1 = LT1 ET (PROG 1.1200E+000 1.1300E+000 1.1400E+000 1.1500E+000
1.1600E+000 1.1700E+000 1.1800E+000 1.1900E+000 1.2000E+000 1.2100E+000
1.2200E+000 1.2300E+000 1.2400E+000 1.2500E+000 1.2600E+000 1.2700E+000
1.2800E+000 1.2900E+000 1.3000E+000 1.3100E+000 1.3200E+000 1.3300E+000
1.3400E+000 1.3500E+000 1.3600E+000 1.3700E+000 1.3800E+000 1.3900E+000
);
LT1 = LT1 ET (PROG 1.4000E+000 1.4100E+000 1.4200E+000 1.4300E+000
1.4400E+000 1.4500E+000 1.4600E+000 1.4700E+000 1.4800E+000 1.4900E+000
1.5000E+000 1.5100E+000 1.5200E+000 1.5300E+000 1.5400E+000 1.5500E+000
1.5600E+000 1.5700E+000 1.5800E+000 1.5900E+000 1.6000E+000 1.6100E+000
1.6200E+000 1.6300E+000 1.6400E+000 1.6500E+000 1.6600E+000 1.6700E+000
);
LT1 = LT1 ET (PROG 1.6800E+000 1.6900E+000 1.7000E+000 1.7100E+000
1.7200E+000 1.7300E+000 1.7400E+000 1.7500E+000 1.7600E+000 1.7700E+000
1.7800E+000 1.7900E+000 1.8000E+000 1.8100E+000 1.8200E+000 1.8300E+000
1.8400E+000 1.8500E+000 1.8600E+000 1.8700E+000 1.8800E+000 1.8900E+000
1.9000E+000 1.9100E+000 1.9200E+000 1.9300E+000 1.9400E+000 1.9500E+000
);
LT1 = LT1 ET (PROG 1.9600E+000 1.9700E+000 1.9800E+000 1.9900E+000
2.0000E+000 2.0100E+000 2.0200E+000 2.0300E+000 2.0400E+000 2.0500E+000
2.0600E+000 2.0700E+000 2.0800E+000 2.0900E+000 2.1000E+000 2.1100E+000
2.1200E+000 2.1300E+000 2.1400E+000 2.1500E+000 2.1600E+000 2.1700E+000
2.1800E+000 2.1900E+000 2.2000E+000 2.2100E+000 2.2200E+000 2.2300E+000
);
LT1 = LT1 ET (PROG 2.2400E+000 2.2500E+000 2.2600E+000 2.2700E+000
2.2800E+000 2.2900E+000 2.3000E+000 2.3100E+000 2.3200E+000 2.3300E+000
2.3400E+000 2.3500E+000 2.3600E+000 2.3700E+000 2.3800E+000 2.3900E+000
2.4000E+000 2.4100E+000 2.4200E+000 2.4300E+000 2.4400E+000 2.4500E+000
2.4600E+000 2.4700E+000 2.4800E+000 2.4900E+000 2.5000E+000 2.5100E+000
);
LT1 = LT1 ET (PROG 2.5200E+000 2.5300E+000 2.5400E+000 2.5500E+000
2.5600E+000 2.5700E+000 2.5800E+000 2.5900E+000 2.6000E+000 2.6100E+000
2.6200E+000 2.6300E+000 2.6400E+000 2.6500E+000 2.6600E+000 2.6700E+000
2.6800E+000 2.6900E+000 2.7000E+000 2.7100E+000 2.7200E+000 2.7300E+000
2.7400E+000 2.7500E+000 2.7600E+000 2.7700E+000 2.7800E+000 2.7900E+000
);
LT1 = LT1 ET (PROG 2.8000E+000 2.8100E+000 2.8200E+000 2.8300E+000
2.8400E+000 2.8500E+000 2.8600E+000 2.8700E+000 2.8800E+000 2.8900E+000
2.9000E+000 2.9100E+000 2.9200E+000 2.9300E+000 2.9400E+000 2.9500E+000
2.9600E+000 2.9700E+000 2.9800E+000 2.9900E+000 3.0000E+000 3.0100E+000
3.0200E+000 3.0300E+000 3.0400E+000 3.0500E+000 3.0600E+000 3.0700E+000
);
LT1 = LT1 ET (PROG 3.0800E+000 3.0900E+000 3.1000E+000 3.1100E+000
3.1200E+000 3.1300E+000 3.1400E+000 3.1500E+000 3.1600E+000 3.1700E+000
3.1800E+000 3.1900E+000 3.2000E+000 3.2100E+000 3.2200E+000 3.2300E+000
3.2400E+000 3.2500E+000 3.2600E+000 3.2700E+000 3.2800E+000 3.2900E+000
3.3000E+000 3.3100E+000 3.3200E+000 3.3300E+000 3.3400E+000 3.3500E+000
);
LT1 = LT1 ET (PROG 3.3600E+000 3.3700E+000 3.3800E+000 3.3900E+000
3.4000E+000 3.4100E+000 3.4200E+000 3.4300E+000 3.4400E+000 3.4500E+000
3.4600E+000 3.4700E+000 3.4800E+000 3.4900E+000 3.5000E+000 3.5100E+000
3.5200E+000 3.5300E+000 3.5400E+000 3.5500E+000 3.5600E+000 3.5700E+000
3.5800E+000 3.5900E+000 3.6000E+000 3.6100E+000 3.6200E+000 3.6300E+000
);
LT1 = LT1 ET (PROG 3.6400E+000 3.6500E+000 3.6600E+000 3.6700E+000
3.6800E+000 3.6900E+000 3.7000E+000 3.7100E+000 3.7200E+000 3.7300E+000
3.7400E+000 3.7500E+000 3.7600E+000 3.7700E+000 3.7800E+000 3.7900E+000
3.8000E+000 3.8100E+000 3.8200E+000 3.8300E+000 3.8400E+000 3.8500E+000
3.8600E+000 3.8700E+000 3.8800E+000 3.8900E+000 3.9000E+000 3.9100E+000
);
LT1 = LT1 ET (PROG 3.9200E+000 3.9300E+000 3.9400E+000 3.9500E+000
3.9600E+000 3.9700E+000 3.9800E+000 3.9900E+000 4.0000E+000 4.0100E+000
4.0200E+000 4.0300E+000 4.0400E+000 4.0500E+000 4.0600E+000 4.0700E+000
4.0800E+000 4.0900E+000 4.1000E+000 4.1100E+000 4.1200E+000 4.1300E+000
4.1400E+000 4.1500E+000 4.1600E+000 4.1700E+000 4.1800E+000 4.1900E+000
);
LT1 = LT1 ET (PROG 4.2000E+000 4.2100E+000 4.2200E+000 4.2300E+000
4.2400E+000 4.2500E+000 4.2600E+000 4.2700E+000 4.2800E+000 4.2900E+000
4.3000E+000 4.3100E+000 4.3200E+000 4.3300E+000 4.3400E+000 4.3500E+000
4.3600E+000 4.3700E+000 4.3800E+000 4.3900E+000 4.4000E+000 4.4100E+000
4.4200E+000 4.4300E+000 4.4400E+000 4.4500E+000 4.4600E+000 4.4700E+000
);
LT1 = LT1 ET (PROG 4.4800E+000 4.4900E+000 4.5000E+000 4.5100E+000
4.5200E+000 4.5300E+000 4.5400E+000 4.5500E+000 4.5600E+000 4.5700E+000
4.5800E+000 4.5900E+000 4.6000E+000 4.6100E+000 4.6200E+000 4.6300E+000
4.6400E+000 4.6500E+000 4.6600E+000 4.6700E+000 4.6800E+000 4.6900E+000
4.7000E+000 4.7100E+000 4.7200E+000 4.7300E+000 4.7400E+000 4.7500E+000
);
LT1 = LT1 ET (PROG 4.7600E+000 4.7700E+000 4.7800E+000 4.7900E+000
4.8000E+000 4.8100E+000 4.8200E+000 4.8300E+000 4.8400E+000 4.8500E+000
4.8600E+000 4.8700E+000 4.8800E+000 4.8900E+000 4.9000E+000 4.9100E+000
4.9200E+000 4.9300E+000 4.9400E+000 4.9500E+000 4.9600E+000 4.9700E+000
4.9800E+000 4.9900E+000 5.0000E+000 5.0100E+000 5.0200E+000 5.0300E+000
);
LT1 = LT1 ET (PROG 5.0400E+000 5.0500E+000 5.0600E+000 5.0700E+000
5.0800E+000 5.0900E+000 5.1000E+000 5.1100E+000 5.1200E+000 5.1300E+000
5.1400E+000 5.1500E+000 5.1600E+000 5.1700E+000 5.1800E+000 5.1900E+000
5.2000E+000 5.2100E+000 5.2200E+000 5.2300E+000 5.2400E+000 5.2500E+000
5.2600E+000 5.2700E+000 5.2800E+000 5.2900E+000 5.3000E+000 5.3100E+000
);
LT1 = LT1 ET (PROG 5.3200E+000 5.3300E+000 5.3400E+000 5.3500E+000
5.3600E+000 5.3700E+000 5.3800E+000 5.3900E+000 5.4000E+000 5.4100E+000
5.4200E+000 5.4300E+000 5.4400E+000 5.4500E+000 5.4600E+000 5.4700E+000
5.4800E+000 5.4900E+000 5.5000E+000 5.5100E+000 5.5200E+000 5.5300E+000
5.5400E+000 5.5500E+000 5.5600E+000 5.5700E+000 5.5800E+000 5.5900E+000
);
LT1 = LT1 ET (PROG 5.6000E+000 5.6100E+000 5.6200E+000 5.6300E+000
5.6400E+000 5.6500E+000 5.6600E+000 5.6700E+000 5.6800E+000 5.6900E+000
5.7000E+000 5.7100E+000 5.7200E+000 5.7300E+000 5.7400E+000 5.7500E+000
5.7600E+000 5.7700E+000 5.7800E+000 5.7900E+000 5.8000E+000 5.8100E+000
5.8200E+000 5.8300E+000 5.8400E+000 5.8500E+000 5.8600E+000 5.8700E+000
);
LT1 = LT1 ET (PROG 5.8800E+000 5.8900E+000 5.9000E+000 5.9100E+000
5.9200E+000 5.9300E+000 5.9400E+000 5.9500E+000 5.9600E+000 5.9700E+000
5.9800E+000 5.9900E+000 6.0000E+000 6.0100E+000 6.0200E+000 6.0300E+000
6.0400E+000 6.0500E+000 6.0600E+000 6.0700E+000 6.0800E+000 6.0900E+000
6.1000E+000 6.1100E+000 6.1200E+000 6.1300E+000 6.1400E+000 6.1500E+000
);
LT1 = LT1 ET (PROG 6.1600E+000 6.1700E+000 6.1800E+000 6.1900E+000
6.2000E+000 6.2100E+000 6.2200E+000 6.2300E+000 6.2400E+000 6.2500E+000
6.2600E+000 6.2700E+000 6.2800E+000 6.2900E+000 6.3000E+000 6.3100E+000
6.3200E+000 6.3300E+000 6.3400E+000 6.3500E+000 6.3600E+000 6.3700E+000
6.3800E+000 6.3900E+000 6.4000E+000 6.4100E+000 6.4200E+000 6.4300E+000
);
LT1 = LT1 ET (PROG 6.4400E+000 6.4500E+000 6.4600E+000 6.4700E+000
6.4800E+000 6.4900E+000 6.5000E+000 6.5100E+000 6.5200E+000 6.5300E+000
6.5400E+000 6.5500E+000 6.5600E+000 6.5700E+000 6.5800E+000 6.5900E+000
6.6000E+000 6.6100E+000 6.6200E+000 6.6300E+000 6.6400E+000 6.6500E+000
6.6600E+000 6.6700E+000 6.6800E+000 6.6900E+000 6.7000E+000 6.7100E+000
);
LT1 = LT1 ET (PROG 6.7200E+000 6.7300E+000 6.7400E+000 6.7500E+000
6.7600E+000 6.7700E+000 6.7800E+000 6.7900E+000 6.8000E+000 6.8100E+000
6.8200E+000 6.8300E+000 6.8400E+000 6.8500E+000 6.8600E+000 6.8700E+000
6.8800E+000 6.8900E+000 6.9000E+000 6.9100E+000 6.9200E+000 6.9300E+000
6.9400E+000 6.9500E+000 6.9600E+000 6.9700E+000 6.9800E+000 6.9900E+000
);
LT1 = LT1 ET (PROG 7.0000E+000 7.0100E+000 7.0200E+000 7.0300E+000
7.0400E+000 7.0500E+000 7.0600E+000 7.0700E+000 7.0800E+000 7.0900E+000
7.1000E+000 7.1100E+000 7.1200E+000 7.1300E+000 7.1400E+000 7.1500E+000
7.1600E+000 7.1700E+000 7.1800E+000 7.1900E+000 7.2000E+000 7.2100E+000
7.2200E+000 7.2300E+000 7.2400E+000 7.2500E+000 7.2600E+000 7.2700E+000
);
LT1 = LT1 ET (PROG 7.2800E+000 7.2900E+000 7.3000E+000 7.3100E+000
7.3200E+000 7.3300E+000 7.3400E+000 7.3500E+000 7.3600E+000 7.3700E+000
7.3800E+000 7.3900E+000 7.4000E+000 7.4100E+000 7.4200E+000 7.4300E+000
7.4400E+000 7.4500E+000 7.4600E+000 7.4700E+000 7.4800E+000 7.4900E+000
7.5000E+000 7.5100E+000 7.5200E+000 7.5300E+000 7.5400E+000 7.5500E+000
);
LT1 = LT1 ET (PROG 7.5600E+000 7.5700E+000 7.5800E+000 7.5900E+000
7.6000E+000 7.6100E+000 7.6200E+000 7.6300E+000 7.6400E+000 7.6500E+000
7.6600E+000 7.6700E+000 7.6800E+000 7.6900E+000 7.7000E+000 7.7100E+000
7.7200E+000 7.7300E+000 7.7400E+000 7.7500E+000 7.7600E+000 7.7700E+000
7.7800E+000 7.7900E+000 7.8000E+000 7.8100E+000 7.8200E+000 7.8300E+000
);
LT1 = LT1 ET (PROG 7.8400E+000 7.8500E+000 7.8600E+000 7.8700E+000
7.8800E+000 7.8900E+000 7.9000E+000 7.9100E+000 7.9200E+000 7.9300E+000
7.9400E+000 7.9500E+000 7.9600E+000 7.9700E+000 7.9800E+000 7.9900E+000
8.0000E+000 8.0100E+000 8.0200E+000 8.0300E+000 8.0400E+000 8.0500E+000
8.0600E+000 8.0700E+000 8.0800E+000 8.0900E+000 8.1000E+000 8.1100E+000
);
LT1 = LT1 ET (PROG 8.1200E+000 8.1300E+000 8.1400E+000 8.1500E+000
8.1600E+000 8.1700E+000 8.1800E+000 8.1900E+000 8.2000E+000 8.2100E+000
8.2200E+000 8.2300E+000 8.2400E+000 8.2500E+000 8.2600E+000 8.2700E+000
8.2800E+000 8.2900E+000 8.3000E+000 8.3100E+000 8.3200E+000 8.3300E+000
8.3400E+000 8.3500E+000 8.3600E+000 8.3700E+000 8.3800E+000 8.3900E+000
);
LT1 = LT1 ET (PROG 8.4000E+000 8.4100E+000 8.4200E+000 8.4300E+000
8.4400E+000 8.4500E+000 8.4600E+000 8.4700E+000 8.4800E+000 8.4900E+000
8.5000E+000 8.5100E+000 8.5200E+000 8.5300E+000 8.5400E+000 8.5500E+000
8.5600E+000 8.5700E+000 8.5800E+000 8.5900E+000 8.6000E+000 8.6100E+000
8.6200E+000 8.6300E+000 8.6400E+000 8.6500E+000 8.6600E+000 8.6700E+000
);
LT1 = LT1 ET (PROG 8.6800E+000 8.6900E+000 8.7000E+000 8.7100E+000
8.7200E+000 8.7300E+000 8.7400E+000 8.7500E+000 8.7600E+000 8.7700E+000
8.7800E+000 8.7900E+000 8.8000E+000 8.8100E+000 8.8200E+000 8.8300E+000
8.8400E+000 8.8500E+000 8.8600E+000 8.8700E+000 8.8800E+000 8.8900E+000
8.9000E+000 8.9100E+000 8.9200E+000 8.9300E+000 8.9400E+000 8.9500E+000
);
LT1 = LT1 ET (PROG 8.9600E+000 8.9700E+000 8.9800E+000 8.9900E+000
9.0000E+000 9.0100E+000 9.0200E+000 9.0300E+000 9.0400E+000 9.0500E+000
9.0600E+000 9.0700E+000 9.0800E+000 9.0900E+000 9.1000E+000 9.1100E+000
9.1200E+000 9.1300E+000 9.1400E+000 9.1500E+000 9.1600E+000 9.1700E+000
9.1800E+000 9.1900E+000 9.2000E+000 9.2100E+000 9.2200E+000 9.2300E+000
);
LT1 = LT1 ET (PROG 9.2400E+000 9.2500E+000 9.2600E+000 9.2700E+000
9.2800E+000 9.2900E+000 9.3000E+000 9.3100E+000 9.3200E+000 9.3300E+000
9.3400E+000 9.3500E+000 9.3600E+000 9.3700E+000 9.3800E+000 9.3900E+000
9.4000E+000 9.4100E+000 9.4200E+000 9.4300E+000 9.4400E+000 9.4500E+000
9.4600E+000 9.4700E+000 9.4800E+000 9.4900E+000 9.5000E+000 9.5100E+000
);
LT1 = LT1 ET (PROG 9.5200E+000 9.5300E+000 9.5400E+000 9.5500E+000
9.5600E+000 9.5700E+000 9.5800E+000 9.5900E+000 9.6000E+000 9.6100E+000
9.6200E+000 9.6300E+000 9.6400E+000 9.6500E+000 9.6600E+000 9.6700E+000
9.6800E+000 9.6900E+000 9.7000E+000 9.7100E+000 9.7200E+000 9.7300E+000
9.7400E+000 9.7500E+000 9.7600E+000 9.7700E+000 9.7800E+000 9.7900E+000
);
LT1 = LT1 ET (PROG 9.8000E+000 9.8100E+000 9.8200E+000 9.8300E+000
9.8400E+000 9.8500E+000 9.8600E+000 9.8700E+000 9.8800E+000 9.8900E+000
9.9000E+000 9.9100E+000 9.9200E+000 9.9300E+000 9.9400E+000 9.9500E+000
9.9600E+000 9.9700E+000 9.9800E+000 9.9900E+000 1.0000E+001 1.0010E+001
1.0020E+001 1.0030E+001 1.0040E+001 1.0050E+001 1.0060E+001 1.0070E+001
);
LT1 = LT1 ET (PROG 1.0080E+001 1.0090E+001 1.0100E+001 1.0110E+001
1.0120E+001 1.0130E+001 1.0140E+001 1.0150E+001 1.0160E+001 1.0170E+001
1.0180E+001 1.0190E+001 1.0200E+001 1.0210E+001 1.0220E+001 1.0230E+001
1.0240E+001 1.0250E+001 1.0260E+001 1.0270E+001 1.0280E+001 1.0290E+001
1.0300E+001 1.0310E+001 1.0320E+001 1.0330E+001 1.0340E+001 1.0350E+001
);
LT1 = LT1 ET (PROG 1.0360E+001 1.0370E+001 1.0380E+001 1.0390E+001
1.0400E+001 1.0410E+001 1.0420E+001 1.0430E+001 1.0440E+001 1.0450E+001
1.0460E+001 1.0470E+001 1.0480E+001 1.0490E+001 1.0500E+001 1.0510E+001
1.0520E+001 1.0530E+001 1.0540E+001 1.0550E+001 1.0560E+001 1.0570E+001
1.0580E+001 1.0590E+001 1.0600E+001 1.0610E+001 1.0620E+001 1.0630E+001
);
LT1 = LT1 ET (PROG 1.0640E+001 1.0650E+001 1.0660E+001 1.0670E+001
1.0680E+001 1.0690E+001 1.0700E+001 1.0710E+001 1.0720E+001 1.0730E+001
1.0740E+001 1.0750E+001 1.0760E+001 1.0770E+001 1.0780E+001 1.0790E+001
1.0800E+001 1.0810E+001 1.0820E+001 1.0830E+001 1.0840E+001 1.0850E+001
1.0860E+001 1.0870E+001 1.0880E+001 1.0890E+001 1.0900E+001 1.0910E+001
);
LT1 = LT1 ET (PROG 1.0920E+001 1.0930E+001 1.0940E+001 1.0950E+001
1.0960E+001 1.0970E+001 1.0980E+001 1.0990E+001 1.1000E+001 1.1010E+001
1.1020E+001 1.1030E+001 1.1040E+001 1.1050E+001 1.1060E+001 1.1070E+001
1.1080E+001 1.1090E+001 1.1100E+001 1.1110E+001 1.1120E+001 1.1130E+001
1.1140E+001 1.1150E+001 1.1160E+001 1.1170E+001 1.1180E+001 1.1190E+001
);
LT1 = LT1 ET (PROG 1.1200E+001 1.1210E+001 1.1220E+001 1.1230E+001
1.1240E+001 1.1250E+001 1.1260E+001 1.1270E+001 1.1280E+001 1.1290E+001
1.1300E+001 1.1310E+001 1.1320E+001 1.1330E+001 1.1340E+001 1.1350E+001
1.1360E+001 1.1370E+001 1.1380E+001 1.1390E+001 1.1400E+001 1.1410E+001
1.1420E+001 1.1430E+001 1.1440E+001 1.1450E+001 1.1460E+001 1.1470E+001
);
LT1 = LT1 ET (PROG 1.1480E+001 1.1490E+001 1.1500E+001 1.1510E+001
1.1520E+001 1.1530E+001 1.1540E+001 1.1550E+001 1.1560E+001 1.1570E+001
1.1580E+001 1.1590E+001 1.1600E+001 1.1610E+001 1.1620E+001 1.1630E+001
1.1640E+001 1.1650E+001 1.1660E+001 1.1670E+001 1.1680E+001 1.1690E+001
1.1700E+001 1.1710E+001 1.1720E+001 1.1730E+001 1.1740E+001 1.1750E+001
);
LT1 = LT1 ET (PROG 1.1760E+001 1.1770E+001 1.1780E+001 1.1790E+001
1.1800E+001 1.1810E+001 1.1820E+001 1.1830E+001 1.1840E+001 1.1850E+001
1.1860E+001 1.1870E+001 1.1880E+001 1.1890E+001 1.1900E+001 1.1910E+001
1.1920E+001 1.1930E+001 1.1940E+001 1.1950E+001 1.1960E+001 1.1970E+001
1.1980E+001 1.1990E+001 1.2000E+001 1.2010E+001 1.2020E+001 1.2030E+001
);
LT1 = LT1 ET (PROG 1.2040E+001 1.2050E+001 1.2060E+001 1.2070E+001
1.2080E+001 1.2090E+001 1.2100E+001 1.2110E+001 1.2120E+001 1.2130E+001
1.2140E+001 1.2150E+001 1.2160E+001 1.2170E+001 1.2180E+001 1.2190E+001
1.2200E+001 1.2210E+001 1.2220E+001 1.2230E+001 1.2240E+001 1.2250E+001
1.2260E+001 1.2270E+001 1.2280E+001 1.2290E+001 1.2300E+001 1.2310E+001
);
LT1 = LT1 ET (PROG 1.2320E+001 1.2330E+001 1.2340E+001 1.2350E+001
1.2360E+001 1.2370E+001 1.2380E+001 1.2390E+001 1.2400E+001 1.2410E+001
1.2420E+001 1.2430E+001 1.2440E+001 1.2450E+001 1.2460E+001 1.2470E+001
1.2480E+001 1.2490E+001 1.2500E+001 1.2510E+001 1.2520E+001 1.2530E+001
1.2540E+001 1.2550E+001 1.2560E+001 1.2570E+001 1.2580E+001 1.2590E+001
);
LT1 = LT1 ET (PROG 1.2600E+001 1.2610E+001 1.2620E+001 1.2630E+001
1.2640E+001 1.2650E+001 1.2660E+001 1.2670E+001 1.2680E+001 1.2690E+001
1.2700E+001 1.2710E+001 1.2720E+001 1.2730E+001 1.2740E+001 1.2750E+001
1.2760E+001 1.2770E+001 1.2780E+001 1.2790E+001 1.2800E+001 1.2810E+001
1.2820E+001 1.2830E+001 1.2840E+001 1.2850E+001 1.2860E+001 1.2870E+001
);
LT1 = LT1 ET (PROG 1.2880E+001 1.2890E+001 1.2900E+001 1.2910E+001
1.2920E+001 1.2930E+001 1.2940E+001 1.2950E+001 1.2960E+001 1.2970E+001
1.2980E+001 1.2990E+001 1.3000E+001 1.3010E+001 1.3020E+001 1.3030E+001
1.3040E+001 1.3050E+001 1.3060E+001 1.3070E+001 1.3080E+001 1.3090E+001
1.3100E+001 1.3110E+001 1.3120E+001 1.3130E+001 1.3140E+001 1.3150E+001
);
LT1 = LT1 ET (PROG 1.3160E+001 1.3170E+001 1.3180E+001 1.3190E+001
1.3200E+001 1.3210E+001 1.3220E+001 1.3230E+001 1.3240E+001 1.3250E+001
1.3260E+001 1.3270E+001 1.3280E+001 1.3290E+001 1.3300E+001 1.3310E+001
1.3320E+001 1.3330E+001 1.3340E+001 1.3350E+001 1.3360E+001 1.3370E+001
1.3380E+001 1.3390E+001 1.3400E+001 1.3410E+001 1.3420E+001 1.3430E+001
);
LT1 = LT1 ET (PROG 1.3440E+001 1.3450E+001 1.3460E+001 1.3470E+001
1.3480E+001 1.3490E+001 1.3500E+001 1.3510E+001 1.3520E+001 1.3530E+001
1.3540E+001 1.3550E+001 1.3560E+001 1.3570E+001 1.3580E+001 1.3590E+001
1.3600E+001 1.3610E+001 1.3620E+001 1.3630E+001 1.3640E+001 1.3650E+001
1.3660E+001 1.3670E+001 1.3680E+001 1.3690E+001 1.3700E+001 1.3710E+001
);
LT1 = LT1 ET (PROG 1.3720E+001 1.3730E+001 1.3740E+001 1.3750E+001
1.3760E+001 1.3770E+001 1.3780E+001 1.3790E+001 1.3800E+001 1.3810E+001
1.3820E+001 1.3830E+001 1.3840E+001 1.3850E+001 1.3860E+001 1.3870E+001
1.3880E+001 1.3890E+001 1.3900E+001 1.3910E+001 1.3920E+001 1.3930E+001
1.3940E+001 1.3950E+001 1.3960E+001 1.3970E+001 1.3980E+001 1.3990E+001
);
LT1 = LT1 ET (PROG 1.4000E+001 1.4010E+001 1.4020E+001 1.4030E+001
1.4040E+001 1.4050E+001 1.4060E+001 1.4070E+001 1.4080E+001 1.4090E+001
1.4100E+001 1.4110E+001 1.4120E+001 1.4130E+001 1.4140E+001 1.4150E+001
1.4160E+001 1.4170E+001 1.4180E+001 1.4190E+001 1.4200E+001 1.4210E+001
1.4220E+001 1.4230E+001 1.4240E+001 1.4250E+001 1.4260E+001 1.4270E+001
);
LT1 = LT1 ET (PROG 1.4280E+001 1.4290E+001 1.4300E+001 1.4310E+001
1.4320E+001 1.4330E+001 1.4340E+001 1.4350E+001 1.4360E+001 1.4370E+001
1.4380E+001 1.4390E+001 1.4400E+001 1.4410E+001 1.4420E+001 1.4430E+001
1.4440E+001 1.4450E+001 1.4460E+001 1.4470E+001 1.4480E+001 1.4490E+001
1.4500E+001 1.4510E+001 1.4520E+001 1.4530E+001 1.4540E+001 1.4550E+001
);
LT1 = LT1 ET (PROG 1.4560E+001 1.4570E+001 1.4580E+001 1.4590E+001
1.4600E+001 1.4610E+001 1.4620E+001 1.4630E+001 1.4640E+001 1.4650E+001
1.4660E+001 1.4670E+001 1.4680E+001 1.4690E+001 1.4700E+001 1.4710E+001
1.4720E+001 1.4730E+001 1.4740E+001 1.4750E+001 1.4760E+001 1.4770E+001
1.4780E+001 1.4790E+001 1.4800E+001 1.4810E+001 1.4820E+001 1.4830E+001
);
LT1 = LT1 ET (PROG 1.4840E+001 1.4850E+001 1.4860E+001 1.4870E+001
1.4880E+001 1.4890E+001 1.4900E+001 1.4910E+001 1.4920E+001 1.4930E+001
1.4940E+001 1.4950E+001 1.4960E+001 1.4970E+001 1.4980E+001 1.4990E+001
1.5000E+001 1.5010E+001 1.5020E+001 1.5030E+001 1.5040E+001 1.5050E+001
1.5060E+001 1.5070E+001 1.5080E+001 1.5090E+001 1.5100E+001 1.5110E+001
);
LT1 = LT1 ET (PROG 1.5120E+001 1.5130E+001 1.5140E+001 1.5150E+001
1.5160E+001 1.5170E+001 1.5180E+001 1.5190E+001 1.5200E+001 1.5210E+001
1.5220E+001 1.5230E+001 1.5240E+001 1.5250E+001 1.5260E+001 1.5270E+001
1.5280E+001 1.5290E+001 1.5300E+001 1.5310E+001 1.5320E+001 1.5330E+001
1.5340E+001 1.5350E+001 1.5360E+001 1.5370E+001 1.5380E+001 1.5390E+001
);
LT1 = LT1 ET (PROG 1.5400E+001 1.5410E+001 1.5420E+001 1.5430E+001
1.5440E+001 1.5450E+001 1.5460E+001 1.5470E+001 1.5480E+001 1.5490E+001
1.5500E+001 1.5510E+001 1.5520E+001 1.5530E+001 1.5540E+001 1.5550E+001
1.5560E+001 1.5570E+001 1.5580E+001 1.5590E+001 1.5600E+001 1.5610E+001
1.5620E+001 1.5630E+001 1.5640E+001 1.5650E+001 1.5660E+001 1.5670E+001
);
LT1 = LT1 ET (PROG 1.5680E+001 1.5690E+001 1.5700E+001 1.5710E+001
1.5720E+001 1.5730E+001 1.5740E+001 1.5750E+001 1.5760E+001 1.5770E+001
1.5780E+001 1.5790E+001 1.5800E+001 1.5810E+001 1.5820E+001 1.5830E+001
1.5840E+001 1.5850E+001 1.5860E+001 1.5870E+001 1.5880E+001 1.5890E+001
1.5900E+001 1.5910E+001 1.5920E+001 1.5930E+001 1.5940E+001 1.5950E+001
);
LT1 = LT1 ET (PROG 1.5960E+001 1.5970E+001 1.5980E+001 1.5990E+001
1.6000E+001 1.6010E+001 1.6020E+001 1.6030E+001 1.6040E+001 1.6050E+001
1.6060E+001 1.6070E+001 1.6080E+001 1.6090E+001 1.6100E+001 1.6110E+001
1.6120E+001 1.6130E+001 1.6140E+001 1.6150E+001 1.6160E+001 1.6170E+001
1.6180E+001 1.6190E+001 1.6200E+001 1.6210E+001 1.6220E+001 1.6230E+001
);
LT1 = LT1 ET (PROG 1.6240E+001 1.6250E+001 1.6260E+001 1.6270E+001
1.6280E+001 1.6290E+001 1.6300E+001 1.6310E+001 1.6320E+001 1.6330E+001
1.6340E+001 1.6350E+001 1.6360E+001 1.6370E+001 1.6380E+001 1.6390E+001
1.6400E+001 1.6410E+001 1.6420E+001 1.6430E+001 1.6440E+001 1.6450E+001
1.6460E+001 1.6470E+001 1.6480E+001 1.6490E+001 1.6500E+001 1.6510E+001
);
LT1 = LT1 ET (PROG 1.6520E+001 1.6530E+001 1.6540E+001 1.6550E+001
1.6560E+001 1.6570E+001 1.6580E+001 1.6590E+001 1.6600E+001 1.6610E+001
1.6620E+001 1.6630E+001 1.6640E+001 1.6650E+001 1.6660E+001 1.6670E+001
1.6680E+001 1.6690E+001 1.6700E+001 1.6710E+001 1.6720E+001 1.6730E+001
1.6740E+001 1.6750E+001 1.6760E+001 1.6770E+001 1.6780E+001 1.6790E+001
);
LT1 = LT1 ET (PROG 1.6800E+001 1.6810E+001 1.6820E+001 1.6830E+001
1.6840E+001 1.6850E+001 1.6860E+001 1.6870E+001 1.6880E+001 1.6890E+001
1.6900E+001 1.6910E+001 1.6920E+001 1.6930E+001 1.6940E+001 1.6950E+001
1.6960E+001 1.6970E+001 1.6980E+001 1.6990E+001 1.7000E+001 1.7010E+001
1.7020E+001 1.7030E+001 1.7040E+001 1.7050E+001 1.7060E+001 1.7070E+001
);
LT1 = LT1 ET (PROG 1.7080E+001 1.7090E+001 1.7100E+001 1.7110E+001
1.7120E+001 1.7130E+001 1.7140E+001 1.7150E+001 1.7160E+001 1.7170E+001
1.7180E+001 1.7190E+001 1.7200E+001 1.7210E+001 1.7220E+001 1.7230E+001
1.7240E+001 1.7250E+001 1.7260E+001 1.7270E+001 1.7280E+001 1.7290E+001
1.7300E+001 1.7310E+001 1.7320E+001 1.7330E+001 1.7340E+001 1.7350E+001
);
LT1 = LT1 ET (PROG 1.7360E+001 1.7370E+001 1.7380E+001 1.7390E+001
1.7400E+001 1.7410E+001 1.7420E+001 1.7430E+001 1.7440E+001 1.7450E+001
1.7460E+001 1.7470E+001 1.7480E+001 1.7490E+001 1.7500E+001 1.7510E+001
1.7520E+001 1.7530E+001 1.7540E+001 1.7550E+001 1.7560E+001 1.7570E+001
1.7580E+001 1.7590E+001 1.7600E+001 1.7610E+001 1.7620E+001 1.7630E+001
);
LT1 = LT1 ET (PROG 1.7640E+001 1.7650E+001 1.7660E+001 1.7670E+001
1.7680E+001 1.7690E+001 1.7700E+001 1.7710E+001 1.7720E+001 1.7730E+001
1.7740E+001 1.7750E+001 1.7760E+001 1.7770E+001 1.7780E+001 1.7790E+001
1.7800E+001 1.7810E+001 1.7820E+001 1.7830E+001 1.7840E+001 1.7850E+001
1.7860E+001 1.7870E+001 1.7880E+001 1.7890E+001 1.7900E+001 1.7910E+001
);
LT1 = LT1 ET (PROG 1.7920E+001 1.7930E+001 1.7940E+001 1.7950E+001
1.7960E+001 1.7970E+001 1.7980E+001 1.7990E+001 1.8000E+001 1.8010E+001
1.8020E+001 1.8030E+001 1.8040E+001 1.8050E+001 1.8060E+001 1.8070E+001
1.8080E+001 1.8090E+001 1.8100E+001 1.8110E+001 1.8120E+001 1.8130E+001
1.8140E+001 1.8150E+001 1.8160E+001 1.8170E+001 1.8180E+001 1.8190E+001
);
LT1 = LT1 ET (PROG 1.8200E+001 1.8210E+001 1.8220E+001 1.8230E+001
1.8240E+001 1.8250E+001 1.8260E+001 1.8270E+001 1.8280E+001 1.8290E+001
1.8300E+001 1.8310E+001 1.8320E+001 1.8330E+001 1.8340E+001 1.8350E+001
1.8360E+001 1.8370E+001 1.8380E+001 1.8390E+001 1.8400E+001 1.8410E+001
1.8420E+001 1.8430E+001 1.8440E+001 1.8450E+001 1.8460E+001 1.8470E+001
);
LT1 = LT1 ET (PROG 1.8480E+001 1.8490E+001 1.8500E+001 1.8510E+001
1.8520E+001 1.8530E+001 1.8540E+001 1.8550E+001 1.8560E+001 1.8570E+001
1.8580E+001 1.8590E+001 1.8600E+001 1.8610E+001 1.8620E+001 1.8630E+001
1.8640E+001 1.8650E+001 1.8660E+001 1.8670E+001 1.8680E+001 1.8690E+001
1.8700E+001 1.8710E+001 1.8720E+001 1.8730E+001 1.8740E+001 1.8750E+001
);
LT1 = LT1 ET (PROG 1.8760E+001 1.8770E+001 1.8780E+001 1.8790E+001
1.8800E+001 1.8810E+001 1.8820E+001 1.8830E+001 1.8840E+001 1.8850E+001
1.8860E+001 1.8870E+001 1.8880E+001 1.8890E+001 1.8900E+001 1.8910E+001
1.8920E+001 1.8930E+001 1.8940E+001 1.8950E+001 1.8960E+001 1.8970E+001
1.8980E+001 1.8990E+001 1.9000E+001 1.9010E+001 1.9020E+001 1.9030E+001
);
LT1 = LT1 ET (PROG 1.9040E+001 1.9050E+001 1.9060E+001 1.9070E+001
1.9080E+001 1.9090E+001 1.9100E+001 1.9110E+001 1.9120E+001 1.9130E+001
1.9140E+001 1.9150E+001 1.9160E+001 1.9170E+001 1.9180E+001 1.9190E+001
1.9200E+001 1.9210E+001 1.9220E+001 1.9230E+001 1.9240E+001 1.9250E+001
1.9260E+001 1.9270E+001 1.9280E+001 1.9290E+001 1.9300E+001 1.9310E+001
);
LT1 = LT1 ET (PROG 1.9320E+001 1.9330E+001 1.9340E+001 1.9350E+001
1.9360E+001 1.9370E+001 1.9380E+001 1.9390E+001 1.9400E+001 1.9410E+001
1.9420E+001 1.9430E+001 1.9440E+001 1.9450E+001 1.9460E+001 1.9470E+001
1.9480E+001 1.9490E+001 1.9500E+001 1.9510E+001 1.9520E+001 1.9530E+001
1.9540E+001 1.9550E+001 1.9560E+001 1.9570E+001 1.9580E+001 1.9590E+001
);
LT1 = LT1 ET (PROG 1.9600E+001 1.9610E+001 1.9620E+001 1.9630E+001
1.9640E+001 1.9650E+001 1.9660E+001 1.9670E+001 1.9680E+001 1.9690E+001
1.9700E+001 1.9710E+001 1.9720E+001 1.9730E+001 1.9740E+001 1.9750E+001
1.9760E+001 1.9770E+001 1.9780E+001 1.9790E+001 1.9800E+001 1.9810E+001
1.9820E+001 1.9830E+001 1.9840E+001 1.9850E+001 1.9860E+001 1.9870E+001
);
LT1 = LT1 ET (PROG 1.9880E+001 1.9890E+001 1.9900E+001 1.9910E+001
1.9920E+001 1.9930E+001 1.9940E+001 1.9950E+001 1.9960E+001 1.9970E+001
1.9980E+001 1.9990E+001 2.0000E+001 2.0010E+001 2.0020E+001 2.0030E+001
2.0040E+001 2.0050E+001 2.0060E+001 2.0070E+001 2.0080E+001 2.0090E+001
2.0100E+001 2.0110E+001 2.0120E+001 2.0130E+001 2.0140E+001 2.0150E+001
);
LT1 = LT1 ET (PROG 2.0160E+001 2.0170E+001 2.0180E+001 2.0190E+001
2.0200E+001 2.0210E+001 2.0220E+001 2.0230E+001 2.0240E+001 2.0250E+001
2.0260E+001 2.0270E+001 2.0280E+001 2.0290E+001 2.0300E+001 2.0310E+001
2.0320E+001 2.0330E+001 2.0340E+001 2.0350E+001 2.0360E+001 2.0370E+001
2.0380E+001 2.0390E+001 2.0400E+001 2.0410E+001 2.0420E+001 2.0430E+001
);
LT1 = LT1 ET (PROG 2.0440E+001 2.0450E+001 2.0460E+001 2.0470E+001
2.0480E+001 2.0490E+001 2.0500E+001 2.0510E+001 2.0520E+001 2.0530E+001
2.0540E+001 2.0550E+001 2.0560E+001 2.0570E+001 2.0580E+001 2.0590E+001
2.0600E+001 2.0610E+001 2.0620E+001 2.0630E+001 2.0640E+001 2.0650E+001
2.0660E+001 2.0670E+001 2.0680E+001 2.0690E+001 2.0700E+001 2.0710E+001
);
LT1 = LT1 ET (PROG 2.0720E+001 2.0730E+001 2.0740E+001 2.0750E+001
2.0760E+001 2.0770E+001 2.0780E+001 2.0790E+001 2.0800E+001 2.0810E+001
2.0820E+001 2.0830E+001 2.0840E+001 2.0850E+001 2.0860E+001 2.0870E+001
2.0880E+001 2.0890E+001 2.0900E+001 2.0910E+001 2.0920E+001 2.0930E+001
2.0940E+001 2.0950E+001 2.0960E+001 2.0970E+001 2.0980E+001 2.0990E+001
);
LT1 = LT1 ET (PROG 2.1000E+001 2.1010E+001 2.1020E+001 2.1030E+001
2.1040E+001 2.1050E+001 2.1060E+001 2.1070E+001 2.1080E+001 2.1090E+001
2.1100E+001 2.1110E+001 2.1120E+001 2.1130E+001 2.1140E+001 2.1150E+001
2.1160E+001 2.1170E+001 2.1180E+001 2.1190E+001 2.1200E+001 2.1210E+001
2.1220E+001 2.1230E+001 2.1240E+001 2.1250E+001 2.1260E+001 2.1270E+001
);
LT1 = LT1 ET (PROG 2.1280E+001 2.1290E+001 2.1300E+001 2.1310E+001
2.1320E+001 2.1330E+001 2.1340E+001 2.1350E+001 2.1360E+001 2.1370E+001
2.1380E+001 2.1390E+001 2.1400E+001 2.1410E+001 2.1420E+001 2.1430E+001
2.1440E+001 2.1450E+001 2.1460E+001 2.1470E+001 2.1480E+001 2.1490E+001
2.1500E+001 2.1510E+001 2.1520E+001 2.1530E+001 2.1540E+001 2.1550E+001
);
LT1 = LT1 ET (PROG 2.1560E+001 2.1570E+001 2.1580E+001 2.1590E+001
2.1600E+001 2.1610E+001 2.1620E+001 2.1630E+001 2.1640E+001 2.1650E+001
2.1660E+001 2.1670E+001 2.1680E+001 2.1690E+001 2.1700E+001 2.1710E+001
2.1720E+001 2.1730E+001 2.1740E+001 2.1750E+001 2.1760E+001 2.1770E+001
2.1780E+001 2.1790E+001 2.1800E+001 2.1810E+001 2.1820E+001 2.1830E+001
);
LT1 = LT1 ET (PROG 2.1840E+001 2.1850E+001 2.1860E+001 2.1870E+001
2.1880E+001 2.1890E+001 2.1900E+001 2.1910E+001 2.1920E+001 2.1930E+001
2.1940E+001 2.1950E+001 2.1960E+001 2.1970E+001 2.1980E+001 2.1990E+001
2.2000E+001 2.2010E+001 2.2020E+001 2.2030E+001 2.2040E+001 2.2050E+001
2.2060E+001 2.2070E+001 2.2080E+001 2.2090E+001 2.2100E+001 2.2110E+001
);
LT1 = LT1 ET (PROG 2.2120E+001 2.2130E+001 2.2140E+001 2.2150E+001
2.2160E+001 2.2170E+001 2.2180E+001 2.2190E+001 2.2200E+001 2.2210E+001
2.2220E+001 2.2230E+001 2.2240E+001 2.2250E+001 2.2260E+001 2.2270E+001
2.2280E+001 2.2290E+001 2.2300E+001 2.2310E+001 2.2320E+001 2.2330E+001
2.2340E+001 2.2350E+001 2.2360E+001 2.2370E+001 2.2380E+001 2.2390E+001
);
LT1 = LT1 ET (PROG 2.2400E+001 2.2410E+001 2.2420E+001 2.2430E+001
2.2440E+001 2.2450E+001 2.2460E+001 2.2470E+001 2.2480E+001 2.2490E+001
2.2500E+001 2.2510E+001 2.2520E+001 2.2530E+001 2.2540E+001 2.2550E+001
2.2560E+001 2.2570E+001 2.2580E+001 2.2590E+001 2.2600E+001 2.2610E+001
2.2620E+001 2.2630E+001 2.2640E+001 2.2650E+001 2.2660E+001 2.2670E+001
);
LT1 = LT1 ET (PROG 2.2680E+001 2.2690E+001 2.2700E+001 2.2710E+001
2.2720E+001 2.2730E+001 2.2740E+001 2.2750E+001 2.2760E+001 2.2770E+001
2.2780E+001 2.2790E+001 2.2800E+001 2.2810E+001 2.2820E+001 2.2830E+001
2.2840E+001 2.2850E+001 2.2860E+001 2.2870E+001 2.2880E+001 2.2890E+001
2.2900E+001 2.2910E+001 2.2920E+001 2.2930E+001 2.2940E+001 2.2950E+001
);
LT1 = LT1 ET (PROG 2.2960E+001 2.2970E+001 2.2980E+001 2.2990E+001
2.3000E+001 2.3010E+001 2.3020E+001 2.3030E+001 2.3040E+001 2.3050E+001
2.3060E+001 2.3070E+001 2.3080E+001 2.3090E+001 2.3100E+001 2.3110E+001
2.3120E+001 2.3130E+001 2.3140E+001 2.3150E+001 2.3160E+001 2.3170E+001
2.3180E+001 2.3190E+001 2.3200E+001 2.3210E+001 2.3220E+001 2.3230E+001
);
LT1 = LT1 ET (PROG 2.3240E+001 2.3250E+001 2.3260E+001 2.3270E+001
2.3280E+001 2.3290E+001 2.3300E+001 2.3310E+001 2.3320E+001 2.3330E+001
2.3340E+001 2.3350E+001 2.3360E+001 2.3370E+001 2.3380E+001 2.3390E+001
2.3400E+001 2.3410E+001 2.3420E+001 2.3430E+001 2.3440E+001 2.3450E+001
2.3460E+001 2.3470E+001 2.3480E+001 2.3490E+001 2.3500E+001 2.3510E+001
);
LT1 = LT1 ET (PROG 2.3520E+001 2.3530E+001 2.3540E+001 2.3550E+001
2.3560E+001 2.3570E+001 2.3580E+001 2.3590E+001 2.3600E+001 2.3610E+001
2.3620E+001 2.3630E+001 2.3640E+001 2.3650E+001 2.3660E+001 2.3670E+001
2.3680E+001 2.3690E+001 2.3700E+001 2.3710E+001 2.3720E+001 2.3730E+001
2.3740E+001 2.3750E+001 2.3760E+001 2.3770E+001 2.3780E+001 2.3790E+001
);
LT1 = LT1 ET (PROG 2.3800E+001 2.3810E+001 2.3820E+001 2.3830E+001
2.3840E+001 2.3850E+001 2.3860E+001 2.3870E+001 2.3880E+001 2.3890E+001
2.3900E+001 2.3910E+001 2.3920E+001 2.3930E+001 2.3940E+001 2.3950E+001
2.3960E+001 2.3970E+001 2.3980E+001 2.3990E+001 2.4000E+001 2.4010E+001
2.4020E+001 2.4030E+001 2.4040E+001 2.4050E+001 2.4060E+001 2.4070E+001
);
LT1 = LT1 ET (PROG 2.4080E+001 2.4090E+001 2.4100E+001 2.4110E+001
2.4120E+001 2.4130E+001 2.4140E+001 2.4150E+001 2.4160E+001 2.4170E+001
2.4180E+001 2.4190E+001 2.4200E+001 2.4210E+001 2.4220E+001 2.4230E+001
2.4240E+001 2.4250E+001 2.4260E+001 2.4270E+001 2.4280E+001 2.4290E+001
2.4300E+001 2.4310E+001 2.4320E+001 2.4330E+001 2.4340E+001 2.4350E+001
);
LT1 = LT1 ET (PROG 2.4360E+001 2.4370E+001 2.4380E+001 2.4390E+001
2.4400E+001 2.4410E+001 2.4420E+001 2.4430E+001 2.4440E+001 2.4450E+001
2.4460E+001 2.4470E+001 2.4480E+001 2.4490E+001 2.4500E+001 2.4510E+001
2.4520E+001 2.4530E+001 2.4540E+001 2.4550E+001 2.4560E+001 2.4570E+001
2.4580E+001 2.4590E+001 2.4600E+001 2.4610E+001 2.4620E+001 2.4630E+001
);
LT1 = LT1 ET (PROG 2.4640E+001 2.4650E+001 2.4660E+001 2.4670E+001
2.4680E+001 2.4690E+001 2.4700E+001 2.4710E+001 2.4720E+001 2.4730E+001
2.4740E+001 2.4750E+001 2.4760E+001 2.4770E+001 2.4780E+001 2.4790E+001
2.4800E+001 2.4810E+001 2.4820E+001 2.4830E+001 2.4840E+001 2.4850E+001
2.4860E+001 2.4870E+001 2.4880E+001 2.4890E+001 2.4900E+001 2.4910E+001
);
LT1 = LT1 ET (PROG 2.4920E+001 2.4930E+001 2.4940E+001 2.4950E+001
2.4960E+001 2.4970E+001 2.4980E+001 2.4990E+001 2.5000E+001 2.5010E+001
2.5020E+001 2.5030E+001 2.5040E+001 2.5050E+001 2.5060E+001 2.5070E+001
2.5080E+001 2.5090E+001 2.5100E+001 2.5110E+001 2.5120E+001 2.5130E+001
2.5140E+001 2.5150E+001 2.5160E+001 2.5170E+001 2.5180E+001 2.5190E+001
);
LT1 = LT1 ET (PROG 2.5200E+001 2.5210E+001 2.5220E+001 2.5230E+001
2.5240E+001 2.5250E+001 2.5260E+001 2.5270E+001 2.5280E+001 2.5290E+001
2.5300E+001 2.5310E+001 2.5320E+001 2.5330E+001 2.5340E+001 2.5350E+001
2.5360E+001 2.5370E+001 2.5380E+001 2.5390E+001 2.5400E+001 2.5410E+001
2.5420E+001 2.5430E+001 2.5440E+001 2.5450E+001 2.5460E+001 2.5470E+001
);
LT1 = LT1 ET (PROG 2.5480E+001 2.5490E+001 2.5500E+001 2.5510E+001
2.5520E+001 2.5530E+001 2.5540E+001 2.5550E+001 2.5560E+001 2.5570E+001
2.5580E+001 2.5590E+001 2.5600E+001 2.5610E+001 2.5620E+001 2.5630E+001
2.5640E+001 2.5650E+001 2.5660E+001 2.5670E+001 2.5680E+001 2.5690E+001
2.5700E+001 2.5710E+001 2.5720E+001 2.5730E+001 2.5740E+001 2.5750E+001
);
LT1 = LT1 ET (PROG 2.5760E+001 2.5770E+001 2.5780E+001 2.5790E+001
2.5800E+001 2.5810E+001 2.5820E+001 2.5830E+001 2.5840E+001 2.5850E+001
2.5860E+001 2.5870E+001 2.5880E+001 2.5890E+001 2.5900E+001
);
*
*
LA1 = LA1 ET (PROG 0.0000E+000 -1.4529E-002 -1.4519E-002 -1.4303E-002
-1.4087E-002 -1.3970E-002 -1.4303E-002 -1.5402E-002 -1.6933E-002
-1.8031E-002 -1.7698E-002 -1.6168E-002 -1.5069E-002 -1.7041E-002
-2.3074E-002 -3.1737E-002 -4.0183E-002 -4.5559E-002 -4.6442E-002
-4.3372E-002 -3.8545E-002 -3.4376E-002 -3.3169E-002 -3.4592E-002
);
LA1 = LA1 ET (PROG -3.4818E-002 -2.9873E-002 -1.8249E-002 -2.6214E-003
1.1917E-002 2.1570E-002 2.4974E-002 1.9706E-002 6.2661E-003
-6.3104E-003 -2.3570E-003 2.5082E-002 5.7651E-002 6.0397E-002
2.1246E-002 -2.3831E-002 -2.1095E-002 4.1856E-002 1.1175E-001
1.2163E-001 7.2787E-002 3.3419E-002 4.8880E-002 8.0684E-002
);
LA1 = LA1 ET (PROG 5.6561E-002 -2.1537E-002 -6.0247E-002 7.6184E-003
1.2053E-001 1.4905E-001 5.4481E-002 -6.1778E-002 -8.9736E-002
-4.7406E-002 -3.4467E-002 -6.3416E-002 -2.9857E-002 1.1175E-001
2.2034E-001 1.1505E-001 -1.5147E-001 -2.7869E-001 -6.7262E-002
2.8723E-001 3.6182E-001 3.3007E-003 -4.5198E-001 -5.5069E-001
);
LA1 = LA1 ET (PROG -2.3592E-001 1.1833E-001 1.8304E-001 1.3571E-002
-1.1857E-001 -1.4269E-001 -2.5018E-001 -5.4082E-001 -8.0295E-001
-7.7663E-001 -5.4631E-001 -4.6405E-001 -6.7462E-001 -8.5230E-001
-5.9018E-001 6.2934E-002 6.0749E-001 6.9851E-001 5.7349E-001
7.4787E-001 1.3271E+000 1.8096E+000 1.6013E+000 6.8426E-001
);
LA1 = LA1 ET (PROG -3.8837E-001 -9.6636E-001 -8.0075E-001 -1.3063E-001
5.8555E-001 9.3103E-001 7.5335E-001 1.8414E-001 -4.2457E-001
-7.0972E-001 -5.3643E-001 -4.3339E-002 4.8246E-001 7.8077E-001
7.2593E-001 3.7607E-001 -2.0845E-002 -1.4928E-001 9.6836E-002
4.5723E-001 5.3071E-001 2.3679E-001 -5.2875E-002 5.6801E-002
);
LA1 = LA1 ET (PROG 4.8356E-001 7.3581E-001 4.9781E-001 -2.5672E-002
-3.9934E-001 -5.3204E-001 -7.1849E-001 -1.1187E+000 -1.4148E+000
-1.1955E+000 -5.3424E-001 -1.5039E-002 -9.5314E-002 -5.9237E-001
-9.6856E-001 -9.7075E-001 -8.0075E-001 -6.8889E-001 -5.6166E-001
-2.5895E-001 1.0222E-001 2.1375E-001 4.3550E-003 -2.4909E-001
);
LA1 = LA1 ET (PROG -3.3244E-001 -4.2237E-001 -7.9308E-001 -1.2832E+000
-1.3271E+000 -6.5489E-001 3.4755E-001 1.0561E+000 1.3600E+000
1.6561E+000 2.1825E+000 2.4787E+000 2.0290E+000 9.7270E-001
2.0168E-001 3.3439E-001 1.0243E+000 1.4038E+000 1.0944E+000
5.9432E-001 5.1646E-001 8.2574E-001 9.6173E-001 5.7896E-001
);
LA1 = LA1 ET (PROG -1.0573E-001 -6.9876E-001 -1.0968E+000 -1.3929E+000
-1.5026E+000 -1.1406E+000 -2.6664E-001 7.0071E-001 1.2722E+000
1.4038E+000 1.4696E+000 1.6890E+000 1.8425E+000 1.5903E+000
9.1238E-001 2.1155E-001 -1.8767E-001 -3.4890E-001 -5.7263E-001
-1.0124E+000 -1.5355E+000 -1.9193E+000 -1.9852E+000 -1.6781E+000
);
LA1 = LA1 ET (PROG -9.9159E-001 -1.0330E-001 6.0528E-001 7.4238E-001
2.0497E-001 -7.2508E-001 -1.6123E+000 -2.1497E+000 -2.2813E+000
-2.0839E+000 -1.6890E+000 -1.2503E+000 -8.2050E-001 -3.5108E-001
2.0168E-001 7.1606E-001 9.3212E-001 7.4896E-001 4.0678E-001
2.9600E-001 4.9671E-001 6.6780E-001 4.5722E-001 -4.9006E-002
);
LA1 = LA1 ET (PROG -4.7063E-001 -6.8560E-001 -1.0289E+000 -1.7877E+000
-2.6213E+000 -2.7529E+000 -1.8426E+000 -4.2457E-001 5.7568E-001
7.3471E-001 4.7148E-001 4.4406E-001 8.2573E-001 1.2942E+000
1.5903E+000 1.8096E+000 2.1167E+000 2.4019E+000 2.4019E+000
2.0400E+000 1.5464E+000 1.1296E+000 7.4786E-001 2.4226E-001
);
LA1 = LA1 ET (PROG -3.4780E-001 -7.6018E-001 -8.3696E-001 -7.1192E-001
-6.2199E-001 -6.0224E-001 -5.1780E-001 -3.4560E-001 -2.6335E-001
-3.9606E-001 -5.4741E-001 -3.4670E-001 3.2890E-001 1.1626E+000
1.7000E+000 1.7000E+000 1.3380E+000 8.8825E-001 4.6490E-001
3.1179E-002 -4.5089E-001 -9.4553E-001 -1.3819E+000 -1.6671E+000
);
LA1 = LA1 ET (PROG -1.7329E+000 -1.4697E+000 -8.7095E-001 -9.7146E-002
6.3490E-001 1.1735E+000 1.4806E+000 1.5464E+000 1.3600E+000
9.7269E-001 5.3191E-001 2.3786E-001 1.2929E-001 3.4690E-002
-2.6104E-001 -7.6567E-001 -1.2174E+000 -1.2613E+000 -7.4373E-001
1.6439E-001 1.0253E+000 1.3929E+000 1.1077E+000 3.9141E-001
);
LA1 = LA1 ET (PROG -2.5348E-001 -4.0044E-001 -4.2083E-002 4.3419E-001
6.0540E-001 3.6959E-001 -2.4641E-002 -2.7969E-001 -3.3673E-001
-3.6316E-001 -4.9685E-001 -6.8560E-001 -7.6665E-001 -6.6257E-001
-4.5407E-001 -2.6445E-001 -1.2187E-001 3.3816E-002 2.4017E-001
4.4186E-001 5.1097E-001 3.5194E-001 -2.9782E-002 -5.2756E-001
);
LA1 = LA1 ET (PROG -9.9149E-001 -1.3052E+000 -1.4477E+000 -1.4258E+000
-1.2723E+000 -1.0035E+000 -5.8020E-001 -4.0750E-002 4.8804E-001
8.3900E-001 9.0371E-001 6.9971E-001 3.5863E-001 4.6334E-002
-1.1956E-001 -1.1956E-001 -1.9806E-002 9.8317E-002 2.1275E-001
3.9810E-001 7.6003E-001 1.3051E+000 1.8645E+000 2.1935E+000
);
LA1 = LA1 ET (PROG 2.1167E+000 1.7109E+000 1.2832E+000 1.0792E+000
1.1735E+000 1.3709E+000 1.3709E+000 1.0046E+000 3.2024E-001
-4.4201E-001 -1.0277E+000 -1.2942E+000 -1.2723E+000 -1.0968E+000
-9.3885E-001 -8.7743E-001 -9.1581E-001 -1.0310E+000 -1.2613E+000
-1.7110E+000 -2.3910E+000 -3.0929E+000 -3.4438E+000 -3.1696E+000
);
LA1 = LA1 ET (PROG -2.3251E+000 -1.3490E+000 -6.6575E-001 -3.8717E-001
-2.6104E-001 1.3214E-002 5.1874E-001 1.1077E+000 1.6122E+000
1.9742E+000 2.1716E+000 2.1606E+000 1.8645E+000 1.3380E+000
7.5565E-001 2.5333E-001 -2.1389E-001 -7.6007E-001 -1.3490E+000
-1.7439E+000 -1.7110E+000 -1.3052E+000 -8.0065E-001 -4.5627E-001
);
LA1 = LA1 ET (PROG -3.6743E-001 -4.6724E-001 -6.5259E-001 -8.2697E-001
-8.7084E-001 -6.9536E-001 -3.7182E-001 -1.3711E-001 -1.6892E-001
-3.6963E-001 -4.4092E-001 -2.1827E-001 1.1953E-001 2.3030E-001
-1.6167E-002 -4.0143E-001 -6.0982E-001 -5.6705E-001 -4.5846E-001
-4.5408E-001 -5.0124E-001 -4.2556E-001 -1.6453E-001 1.6449E-001
);
LA1 = LA1 ET (PROG 4.2113E-001 5.9223E-001 7.6333E-001 9.8158E-001
1.2174E+000 1.4477E+000 1.6780E+000 1.8864E+000 1.9412E+000
1.6890E+000 1.1296E+000 4.6062E-001 -9.8090E-002 -4.7382E-001
-7.3046E-001 -9.1033E-001 -9.4762E-001 -7.6446E-001 -4.4092E-001
-1.8208E-001 -1.1298E-001 -1.3273E-001 -1.3096E-002 3.4326E-001
);
LA1 = LA1 ET (PROG 7.8965E-001 1.0792E+000 1.1187E+000 1.0167E+000
9.5416E-001 9.4319E-001 8.2035E-001 4.3759E-001 -1.6453E-001
-7.7323E-001 -1.1845E+000 -1.3271E+000 -1.2832E+000 -1.1077E+000
-8.4124E-001 -4.9904E-001 -1.5576E-001 9.4294E-002 2.1933E-001
2.9172E-001 4.1895E-001 6.3172E-001 8.6532E-001 1.0309E+000
);
LA1 = LA1 ET (PROG 1.0945E+000 1.0869E+000 1.0375E+000 9.4539E-001
7.8306E-001 5.2971E-001 1.8863E-001 -2.1169E-001 -6.0543E-001
-8.7743E-001 -9.1581E-001 -6.9646E-001 -3.4660E-001 -6.5618E-002
1.3019E-002 -7.0003E-002 -1.4698E-001 -6.7041E-002 1.7875E-001
4.7379E-001 6.7777E-001 7.2164E-001 6.2733E-001 4.5952E-001
);
LA1 = LA1 ET (PROG 2.6979E-001 7.9482E-002 -1.1518E-001 -3.1369E-001
-4.9466E-001 -6.1859E-001 -6.5259E-001 -6.0323E-001 -5.1988E-001
-4.5627E-001 -4.3544E-001 -4.3982E-001 -4.3762E-001 -4.1569E-001
-3.6633E-001 -2.6872E-001 -8.8318E-002 1.7546E-001 4.4855E-001
5.9991E-001 5.2533E-001 2.3688E-001 -1.4260E-001 -4.6724E-001
);
LA1 = LA1 ET (PROG -6.6904E-001 -7.7213E-001 -8.2039E-001 -8.0942E-001
-6.8549E-001 -4.2117E-001 -7.5476E-002 2.3030E-001 4.0030E-001
4.2882E-001 3.9372E-001 3.8165E-001 4.2662E-001 4.9024E-001
5.0778E-001 4.5294E-001 3.7178E-001 3.4546E-001 4.1346E-001
5.1546E-001 5.1875E-001 3.3669E-001 1.8406E-002 -2.6324E-001
);
LA1 = LA1 ET (PROG -3.5536E-001 -2.5447E-001 -9.2251E-002 -7.1782E-003
-2.6013E-002 -6.5822E-002 -4.4103E-002 3.2994E-002 9.5513E-002
9.8358E-002 7.4677E-002 9.8476E-002 2.0508E-001 3.5314E-001
4.5404E-001 4.3869E-001 3.0708E-001 1.3488E-001 2.0163E-002
2.1262E-002 1.2391E-001 2.6649E-001 3.9810E-001 5.0998E-001
);
LA1 = LA1 ET (PROG 6.0540E-001 6.5365E-001 6.0210E-001 4.4197E-001
2.5662E-001 1.7437E-001 2.5224E-001 4.2443E-001 5.5823E-001
5.6591E-001 4.4966E-001 2.6649E-001 6.4691E-002 -1.2943E-001
-2.8517E-001 -3.5756E-001 -3.2136E-001 -2.0072E-001 -4.3013E-002
1.1076E-001 2.4237E-001 3.3888E-001 3.8165E-001 3.7068E-001
);
LA1 = LA1 ET (PROG 3.2901E-001 2.8624E-001 2.4127E-001 1.6121E-001
3.6076E-002 -9.1032E-002 -1.5576E-001 -1.4588E-001 -1.2834E-001
-1.8866E-001 -3.4878E-001 -5.4949E-001 -6.9646E-001 -7.4252E-001
-7.1291E-001 -6.6794E-001 -6.5258E-001 -6.7562E-001 -7.1291E-001
-7.3156E-001 -7.1401E-001 -6.7672E-001 -6.4930E-001 -6.6027E-001
);
LA1 = LA1 ET (PROG -7.0522E-001 -7.5239E-001 -7.8639E-001 -8.0065E-001
-7.9188E-001 -7.5458E-001 -6.8659E-001 -6.0652E-001 -5.4839E-001
-5.3962E-001 -5.6594E-001 -5.8349E-001 -5.5059E-001 -4.5517E-001
-3.2246E-001 -1.9085E-001 -9.3335E-002 -3.6084E-002 1.3704E-003
5.2422E-002 1.3489E-001 2.3141E-001 2.9831E-001 3.0160E-001
);
LA1 = LA1 ET (PROG 2.4566E-001 1.7108E-001 1.1076E-001 8.1813E-002
8.1705E-002 1.1625E-001 1.9631E-001 3.2025E-001 4.5843E-001
5.7250E-001 6.4049E-001 6.6681E-001 6.6681E-001 6.4598E-001
6.0211E-001 5.3740E-001 4.5624E-001 3.6302E-001 2.6211E-001
1.5682E-001 6.6461E-002 9.7596E-003 -1.0488E-002 -1.6237E-002
);
LA1 = LA1 ET (PROG -3.5425E-002 -7.6225E-002 -1.1737E-001 -1.2614E-001
-8.4230E-002 -5.6416E-003 7.8312E-002 1.4037E-001 1.7437E-001
1.9631E-001 2.1714E-001 2.3469E-001 2.3031E-001 1.9521E-001
1.4367E-001 1.0025E-001 7.9294E-002 6.7120E-002 4.3213E-002
6.1312E-003 -2.3691E-002 -2.9724E-002 -2.0621E-002 -1.8099E-002
);
LA1 = LA1 ET (PROG -2.8841E-002 -3.5865E-002 -2.2926E-002 1.9669E-004
5.2881E-003 -2.3691E-002 -7.4801E-002 -1.2723E-001 -1.7549E-001
-2.2704E-001 -2.7200E-001 -2.7968E-001 -2.2484E-001 -1.2614E-001
-3.6835E-002 3.9645E-003 5.1810E-003 8.2810E-003 3.7191E-002
7.4047E-002 8.4907E-002 6.0333E-002 2.4252E-002 4.9068E-003
);
LA1 = LA1 ET (PROG 5.4170E-003 7.4183E-003 -3.3138E-003 -2.2031E-002
-3.4647E-002 -3.4313E-002 -2.4444E-002 -1.0867E-002 2.4353E-003
8.6745E-003 -1.8025E-003 -3.2341E-002 -7.0512E-002 -9.3869E-002
-8.8827E-002 -6.2830E-002 -3.7275E-002 -2.8613E-002 -3.5960E-002
-4.6379E-002 -4.6820E-002 -3.4204E-002 -1.3142E-002 9.4897E-003
);
LA1 = LA1 ET (PROG 2.8865E-002 4.3334E-002 5.3753E-002 6.1218E-002
6.3847E-002 5.5842E-002 3.0287E-002 -1.3259E-002 -6.4036E-002
-1.0308E-001 -1.1517E-001 -9.7154E-002 -6.4251E-002 -3.4203E-002
-1.7310E-002 -1.0012E-002 -7.4099E-004 1.7349E-002 4.0049E-002
5.6285E-002 5.8149E-002 4.6406E-002 2.8317E-002 1.1208E-002
);
LA1 = LA1 ET (PROG -1.1132E-003 -7.2150E-003 -6.5674E-003 2.8001E-004
1.1091E-002 2.2833E-002 3.4017E-002 4.4877E-002 5.5079E-002
6.2309E-002 6.4615E-002 6.2535E-002 5.9357E-002 5.7375E-002
5.5737E-002 5.2117E-002 4.6084E-002 3.9717E-002 3.5440E-002
3.3360E-002 3.1820E-002 3.0182E-002 2.8534E-002 2.6886E-002
);
LA1 = LA1 ET (PROG 2.4257E-002 2.0088E-002 1.5369E-002 1.1975E-002
1.0121E-002 8.1691E-003 5.2948E-003 2.7933E-003 2.4206E-003
4.0099E-003 5.8739E-003 7.4435E-003 1.0504E-002 1.6802E-002
2.4592E-002 2.9193E-002 2.7437E-002 2.0423E-002 1.2634E-002
7.1890E-003 3.6379E-003 -7.1769E-004 -7.6435E-003 -1.6757E-002
);
LA1 = LA1 ET (PROG -2.6410E-002 -3.4199E-002 -3.7711E-002 -3.5513E-002
-2.8166E-002 -1.9278E-002 -1.3362E-002 -1.1822E-002 -1.2155E-002
-1.0301E-002 -4.0816E-003 4.5709E-003 1.1428E-002 1.2959E-002
8.6030E-003 8.9239E-004 -6.4160E-003 -9.9475E-003 -8.4269E-003
-3.1687E-003 2.8057E-003 6.4453E-003 5.9450E-003 1.5502E-003
);
LA1 = LA1 ET (PROG -4.7772E-003 -1.0408E-002 -1.2919E-002 -1.1379E-002
-6.1503E-003 7.6582E-004 7.1424E-003 1.0988E-002 1.1645E-002
1.0037E-002 8.6141E-003 1.0252E-002 1.5923E-002 2.3271E-002
2.8539E-002 2.9088E-002 2.5576E-002 2.0426E-002 1.5492E-002
1.0420E-002 4.9067E-003 1.6848E-004 -1.6071E-003 4.1085E-005
);
LA1 = LA1 ET (PROG 2.9155E-003 3.9946E-003 2.6998E-003 1.3068E-003
2.2192E-003 5.3977E-003 8.7234E-003 1.0067E-002 9.0865E-003
6.8401E-003 4.8291E-003 4.2406E-003 5.7121E-003 8.7140E-003
1.1098E-002 1.0333E-002 5.6928E-003 -5.6595E-004 -4.9117E-003
-5.2746E-003 -2.6062E-003 4.6436E-004 2.2106E-003 2.7208E-003
);
LA1 = LA1 ET (PROG 2.9367E-003 3.2506E-003 3.3390E-003 2.8584E-003
2.1227E-003 2.0345E-003 3.3883E-003 6.2431E-003 9.3333E-003
1.0687E-002 8.9018E-003 4.7817E-003 1.2403E-003 1.1324E-003
4.6151E-003 8.7746E-003 1.0226E-002 8.0193E-003 4.2033E-003
1.6527E-003 1.6136E-003 3.4285E-003 5.6750E-003 7.4115E-003
);
LA1 = LA1 ET (PROG 8.0688E-003 7.3429E-003 5.5870E-003 4.1842E-003
4.8514E-003 8.0299E-003 1.2091E-002 1.4720E-002 1.4613E-002
1.2749E-002 1.1218E-002 1.1101E-002 1.2092E-002 1.2749E-002
1.1876E-002 9.1782E-003 5.4113E-003 1.7031E-003 -7.2970E-004
-1.4065E-003 -7.7863E-004 1.6039E-005 1.9268E-004 4.5585E-005
);
LA1 = LA1 ET (PROG 5.6557E-004 2.4197E-003 5.1862E-003 7.7074E-003
9.0122E-003 9.0515E-003 8.3943E-003 7.5899E-003 6.7071E-003
5.6477E-003 4.4313E-003 3.3326E-003 2.6165E-003 2.3027E-003
2.1163E-003 1.7436E-003 9.8830E-004 -1.0056E-004 -1.2287E-003
-2.0134E-003 -2.1016E-003 -1.4835E-003 -4.2402E-004 6.7476E-004
);
LA1 = LA1 ET (PROG 1.5773E-003 2.4112E-003 3.3432E-003 4.4420E-003
5.5702E-003 6.5709E-003 7.4048E-003 7.9346E-003 7.9346E-003
7.1695E-003 5.7864E-003 4.4326E-003 3.7165E-003 3.6185E-003
3.4714E-003 2.6866E-003 1.4212E-003 5.0892E-004 5.9726E-004
1.6077E-003 2.8635E-003 3.8445E-003 4.5509E-003 5.1493E-003
);
LA1 = LA1 ET (PROG 5.6007E-003 5.6498E-003 5.2280E-003 4.6689E-003
4.2863E-003 4.0411E-003 3.6880E-003 3.1583E-003 2.7856E-003
2.8641E-003 3.1683E-003 3.2370E-003 2.8642E-003 2.4425E-003
2.5798E-003 3.4235E-003 4.5517E-003 5.3954E-003 5.8369E-003
6.0920E-003 6.3962E-003 6.6317E-003 6.6121E-003 6.2688E-003
);
LA1 = LA1 ET (PROG 5.8274E-003 5.4841E-003 5.2781E-003 5.1408E-003
5.0624E-003 5.0821E-003 5.1802E-003 5.2293E-003 5.0920E-003
4.7291E-003 4.3563E-003 4.0915E-003 3.9836E-003 3.9346E-003
3.9445E-003 4.0720E-003 4.3271E-003 4.7294E-003 5.1807E-003
5.5829E-003 5.9754E-003 6.3384E-003 6.6131E-003 6.7210E-003
);
LA1 = LA1 ET (PROG 6.6230E-003 6.3974E-003 6.1227E-003 5.8285E-003
5.4754E-003 5.0830E-003 4.7397E-003 4.5533E-003 4.6024E-003
4.8183E-003 5.0341E-003 5.1126E-003 5.0342E-003 4.8969E-003
4.8577E-003 5.0441E-003 5.4562E-003 5.9467E-003 6.2999E-003
6.2999E-003 5.9468E-003 5.4171E-003 4.9659E-003 4.7501E-003
);
LA1 = LA1 ET (PROG 4.6913E-003 4.6913E-003 4.6325E-003 4.4657E-003
4.2107E-003 3.9557E-003 3.7497E-003 3.6712E-003 3.7203E-003
3.7890E-003 3.7890E-003 3.6615E-003 3.5242E-003 3.4458E-003
3.4360E-003 3.4262E-003 3.3576E-003 3.2595E-003 3.1810E-003
3.0928E-003 2.9849E-003 2.8574E-003 2.8182E-003 2.9850E-003
);
LA1 = LA1 ET (PROG 3.3284E-003 3.6521E-003 3.7993E-003 3.7208E-003
3.5148E-003 3.2893E-003 3.1617E-003 3.1421E-003 3.2403E-003
3.4267E-003 3.6327E-003 3.7505E-003 3.7407E-003 3.6720E-003
3.6328E-003 3.6426E-003 3.6721E-003 3.6721E-003 3.6721E-003
3.7310E-003 3.8782E-003 4.0254E-003 4.0941E-003 4.0352E-003
);
LA1 = LA1 ET (PROG 3.9273E-003 3.8391E-003 3.8096E-003 3.8096E-003
3.8293E-003 3.8489E-003 3.8588E-003 3.8294E-003 3.7509E-003
3.7019E-003 3.7019E-003 3.7313E-003 3.7509E-003 3.7117E-003
3.6333E-003 3.5744E-003 3.5842E-003 3.6529E-003 3.6922E-003
3.6628E-003 3.6235E-003 3.5647E-003 3.5255E-003 3.4666E-003
);
LA1 = LA1 ET (PROG 3.3784E-003 3.3293E-003 3.2803E-003 3.2705E-003
3.2705E-003 3.2901E-003 3.3490E-003 3.4667E-003 3.6041E-003
3.6924E-003 3.7218E-003 3.7120E-003 3.6924E-003 3.6630E-003
3.6532E-003 3.6238E-003 3.5649E-003 3.5159E-003 3.4472E-003
3.3884E-003 3.3197E-003 3.2706E-003 3.2609E-003 3.2805E-003
);
LA1 = LA1 ET (PROG 3.2903E-003 3.3001E-003 3.3001E-003 3.3296E-003
3.3492E-003 3.3296E-003 3.2805E-003 3.1922E-003 3.1432E-003
3.1039E-003 3.0941E-003 3.0745E-003 3.0255E-003 2.9764E-003
2.9078E-003 2.8587E-003 2.7901E-003 2.7214E-003 2.6821E-003
2.6331E-003 2.5939E-003 2.5448E-003 2.4958E-003 2.4173E-003
);
LA1 = LA1 ET (PROG 2.3388E-003 2.2799E-003 2.2505E-003 2.2603E-003
2.2996E-003 2.3388E-003 2.3388E-003 2.3192E-003 2.2701E-003
2.2309E-003 2.2113E-003 2.1818E-003 2.1916E-003 2.2211E-003
2.2210E-003 2.1916E-003 2.1720E-003 2.1524E-003 2.1524E-003
2.1818E-003 2.2210E-003 2.2308E-003 2.2210E-003 2.1916E-003
);
LA1 = LA1 ET (PROG 2.1719E-003 2.1719E-003 2.1719E-003 2.1621E-003
2.1523E-003 2.1228E-003 2.0836E-003 2.0738E-003 2.0836E-003
2.1130E-003 2.1424E-003 2.1620E-003 2.1718E-003 2.1816E-003
2.1816E-003 2.1620E-003 2.1326E-003 2.1129E-003 2.1129E-003
2.1129E-003 2.1325E-003 2.1423E-003 2.1325E-003 2.1128E-003
);
LA1 = LA1 ET (PROG 2.0736E-003 2.0245E-003 1.9755E-003 1.9460E-003
1.9068E-003 1.8871E-003 1.8577E-003 1.8086E-003 1.7596E-003
1.7105E-003 1.6712E-003 1.6320E-003 1.6124E-003 1.5927E-003
1.5829E-003 1.5829E-003 1.5730E-003 1.5632E-003 1.5534E-003
1.5338E-003 1.5141E-003 1.4945E-003 1.4454E-003 1.4061E-003
);
LA1 = LA1 ET (PROG 1.3375E-003 1.2884E-003 1.2393E-003 1.2197E-003
1.2098E-003 1.2098E-003 1.2000E-003 1.1902E-003 1.1509E-003
1.1313E-003 1.1116E-003 1.1018E-003 1.0920E-003 1.0723E-003
1.0527E-003 1.0330E-003 1.0134E-003 9.9373E-004 9.6428E-004
9.5444E-004 9.3480E-004 9.2497E-004 9.1513E-004 8.8567E-004
);
LA1 = LA1 ET (PROG 8.7584E-004 8.6600E-004 8.5617E-004 8.4633E-004
8.2668E-004 7.9723E-004 7.6777E-004 7.4812E-004 7.1867E-004
6.8921E-004 6.6956E-004 6.5972E-004 6.4007E-004 6.3024E-004
6.0078E-004 5.7132E-004 5.3205E-004 4.9278E-004 4.6332E-004
4.2405E-004 4.0440E-004 3.7494E-004 3.5529E-004 3.2583E-004
);
LA1 = LA1 ET (PROG 3.0617E-004 2.8652E-004 2.6687E-004 2.3741E-004
2.1776E-004 2.0791E-004 1.8826E-004 1.6861E-004 1.2934E-004
1.0968E-004 8.0218E-005 5.0754E-005 3.1100E-005 1.6363E-006
-2.7828E-005 -5.7293E-005 -7.6948E-005 -9.6603E-005 -1.1626E-004
-1.3591E-004 -1.4576E-004 -1.6542E-004 -1.8507E-004 -2.1454E-004
);
LA1 = LA1 ET (PROG -2.5382E-004 -2.8328E-004 -3.0294E-004 -3.4222E-004
-3.5206E-004 -3.6191E-004 -3.7176E-004 -3.9142E-004 -4.0127E-004
-4.3073E-004 -4.5039E-004 -4.6024E-004 -4.7990E-004 -5.0937E-004
-5.3884E-004 -5.5850E-004 -5.8797E-004 -6.2725E-004 -6.5672E-004
-6.7638E-004 -7.1566E-004 -7.3532E-004 -7.6479E-004 -7.9427E-004
);
LA1 = LA1 ET (PROG -8.2374E-004 -8.5321E-004 -8.8268E-004 -9.0234E-004
-9.2201E-004 -9.5148E-004 -9.8095E-004 -1.0104E-003 -1.0301E-003
-1.0694E-003 -1.0890E-003 -1.1185E-003 -1.1284E-003 -1.1676E-003
-1.1873E-003 -1.2070E-003 -1.2266E-003 -1.2561E-003 -1.2856E-003
-1.3151E-003 -1.3544E-003 -1.3740E-003 -1.4035E-003 -1.4428E-003
);
LA1 = LA1 ET (PROG -1.4624E-003 -1.4919E-003 -1.5312E-003 -1.5509E-003
-1.5705E-003 -1.6000E-003 -1.6295E-003 -1.6492E-003 -1.6688E-003
-1.6885E-003 -1.7278E-003 -1.7475E-003 -1.7769E-003 -1.7966E-003
-1.8359E-003 -1.8654E-003 -1.8850E-003 -1.9243E-003 -1.9538E-003
-1.9833E-003 -2.0128E-003 -2.0324E-003 -2.0521E-003 -2.0718E-003
);
LA1 = LA1 ET (PROG -2.1012E-003 -2.1209E-003 -2.1504E-003 -2.1897E-003
-2.2094E-003 -2.2388E-003 -2.2781E-003 -2.2978E-003 -2.3371E-003
-2.3568E-003 -2.3961E-003 -2.4255E-003 -2.4452E-003 -2.4845E-003
-2.5140E-003 -2.5435E-003 -2.5730E-003 -2.6024E-003 -2.6319E-003
-2.6614E-003 -2.6909E-003 -2.7105E-003 -2.7498E-003 -2.7695E-003
);
LA1 = LA1 ET (PROG -2.7990E-003 -2.8383E-003 -2.8580E-003 -2.8875E-003
-2.9071E-003 -2.9464E-003 -2.9759E-003 -3.0054E-003 -3.0447E-003
-3.0840E-003 -3.1233E-003 -3.1528E-003 -3.1822E-003 -3.2117E-003
-3.2412E-003 -3.2707E-003 -3.3100E-003 -3.3297E-003 -3.3592E-003
-3.3984E-003 -3.4181E-003 -3.4476E-003 -3.4673E-003 -3.5066E-003
);
LA1 = LA1 ET (PROG -3.5263E-003 -3.5557E-003 -3.5950E-003 -3.6147E-003
-3.6442E-003 -3.6835E-003 -3.7130E-003 -3.7327E-003 -3.7720E-003
-3.8015E-003 -3.8309E-003 -3.8604E-003 -3.8899E-003 -3.9194E-003
-3.9587E-003 -3.9882E-003 -4.0177E-003 -4.0570E-003 -4.0865E-003
-4.1159E-003 -4.1552E-003 -4.1847E-003 -4.2142E-003 -4.2535E-003
);
LA1 = LA1 ET (PROG -4.2830E-003 -4.3125E-003 -4.3518E-003 -4.3813E-003
-4.4010E-003 -4.4501E-003 -4.4697E-003 -4.5189E-003 -4.5483E-003
-4.5778E-003 -4.6171E-003 -4.6466E-003 -4.6663E-003 -4.7154E-003
-4.7351E-003 -4.7646E-003 -4.8039E-003 -4.8334E-003 -4.8629E-003
-4.9022E-003 -4.9317E-003 -4.9611E-003 -5.0004E-003 -5.0299E-003
);
LA1 = LA1 ET (PROG -5.0692E-003 -5.1085E-003 -5.1282E-003 -5.1773E-003
-5.1970E-003 -5.2265E-003 -5.2756E-003 -5.3051E-003 -5.3542E-003
-5.3739E-003 -5.4132E-003 -5.4427E-003 -5.4820E-003 -5.5017E-003
-5.5410E-003 -5.5704E-003 -5.5999E-003 -5.6490E-003 -5.6687E-003
-5.7080E-003 -5.7473E-003 -5.7768E-003 -5.8161E-003 -5.8456E-003
);
LA1 = LA1 ET (PROG -5.8751E-003 -5.9144E-003 -5.9537E-003 -5.9832E-003
-6.0225E-003 -6.0520E-003 -6.0815E-003 -6.1306E-003 -6.1601E-003
-6.1994E-003 -6.2289E-003 -6.2682E-003 -6.3075E-003 -6.3370E-003
-6.3763E-003 -6.4254E-003 -6.4058E-003 0.0000E+000 0.0000E+000
0.0000E+000 0.0000E+000 0.0000E+000 0.0000E+000 0.0000E+000
);
LA1 = LA1 ET (PROG 0.0000E+000 0.0000E+000 0.0000E+000 0.0000E+000
0.0000E+000 0.0000E+000 0.0000E+000 0.0000E+000 0.0000E+000
0.0000E+000 0.0000E+000 0.0000E+000 0.0000E+000 0.0000E+000
0.0000E+000 0.0000E+000 0.0000E+000 0.0000E+000 0.0000E+000
0.0000E+000 0.0000E+000 0.0000E+000 0.0000E+000 0.0000E+000
);
LA1 = LA1 ET (PROG 0.0000E+000 0.0000E+000 0.0000E+000 0.0000E+000
0.0000E+000 0.0000E+000 0.0000E+000 0.0000E+000 0.0000E+000
0.0000E+000 0.0000E+000 0.0000E+000 0.0000E+000 0.0000E+000
0.0000E+000 0.0000E+000 0.0000E+000 0.0000E+000 0.0000E+000
0.0000E+000 0.0000E+000 0.0000E+000 0.0000E+000 0.0000E+000
);
LA1 = LA1 ET (PROG 0.0000E+000 0.0000E+000 0.0000E+000 0.0000E+000
0.0000E+000 0.0000E+000 0.0000E+000 0.0000E+000 0.0000E+000
0.0000E+000 0.0000E+000 0.0000E+000 0.0000E+000 0.0000E+000
0.0000E+000 0.0000E+000 0.0000E+000 0.0000E+000 0.0000E+000
0.0000E+000 0.0000E+000 0.0000E+000 0.0000E+000 0.0000E+000
);
LA1 = LA1 ET (PROG 0.0000E+000 0.0000E+000 0.0000E+000 0.0000E+000
0.0000E+000 0.0000E+000 0.0000E+000 0.0000E+000 0.0000E+000
0.0000E+000 0.0000E+000 0.0000E+000 0.0000E+000 0.0000E+000
0.0000E+000 0.0000E+000 0.0000E+000 0.0000E+000 0.0000E+000
0.0000E+000 0.0000E+000 0.0000E+000 0.0000E+000 0.0000E+000
);
LA1 = LA1 ET (PROG 0.0000E+000 0.0000E+000 0.0000E+000 0.0000E+000
0.0000E+000 0.0000E+000 0.0000E+000 0.0000E+000 0.0000E+000
0.0000E+000 0.0000E+000 0.0000E+000 0.0000E+000 0.0000E+000
0.0000E+000 0.0000E+000 0.0000E+000 0.0000E+000 0.0000E+000
0.0000E+000 0.0000E+000 0.0000E+000 0.0000E+000 0.0000E+000
);
LA1 = LA1 ET (PROG 0.0000E+000 0.0000E+000 0.0000E+000 0.0000E+000
0.0000E+000 0.0000E+000 0.0000E+000 0.0000E+000 0.0000E+000
0.0000E+000 0.0000E+000 0.0000E+000 0.0000E+000 0.0000E+000
0.0000E+000 0.0000E+000 0.0000E+000 0.0000E+000 0.0000E+000
0.0000E+000 0.0000E+000 0.0000E+000 0.0000E+000 0.0000E+000
);
LA1 = LA1 ET (PROG 0.0000E+000 0.0000E+000 0.0000E+000 0.0000E+000
0.0000E+000 0.0000E+000 0.0000E+000 0.0000E+000 0.0000E+000
0.0000E+000 0.0000E+000 0.0000E+000 0.0000E+000 0.0000E+000
0.0000E+000 0.0000E+000 0.0000E+000 0.0000E+000 0.0000E+000
0.0000E+000 0.0000E+000 0.0000E+000 0.0000E+000 0.0000E+000
);
LA1 = LA1 ET (PROG 0.0000E+000 0.0000E+000 0.0000E+000 0.0000E+000
0.0000E+000 0.0000E+000 0.0000E+000 0.0000E+000 0.0000E+000
0.0000E+000 0.0000E+000 0.0000E+000 0.0000E+000 0.0000E+000
0.0000E+000 0.0000E+000 0.0000E+000 0.0000E+000 0.0000E+000
0.0000E+000 0.0000E+000 0.0000E+000 0.0000E+000 0.0000E+000
);
LA1 = LA1 ET (PROG 0.0000E+000 0.0000E+000 0.0000E+000 0.0000E+000
0.0000E+000 0.0000E+000 0.0000E+000 0.0000E+000 0.0000E+000
0.0000E+000 0.0000E+000 0.0000E+000 0.0000E+000 0.0000E+000
0.0000E+000 0.0000E+000 0.0000E+000 0.0000E+000 0.0000E+000
0.0000E+000 0.0000E+000 0.0000E+000 0.0000E+000 0.0000E+000
);
LA1 = LA1 ET (PROG 0.0000E+000 0.0000E+000 0.0000E+000 0.0000E+000
0.0000E+000 0.0000E+000 0.0000E+000 0.0000E+000 0.0000E+000
0.0000E+000 0.0000E+000 0.0000E+000 0.0000E+000 0.0000E+000
0.0000E+000 0.0000E+000 0.0000E+000 0.0000E+000 0.0000E+000
0.0000E+000 0.0000E+000 0.0000E+000 0.0000E+000 0.0000E+000
);
LA1 = LA1 ET (PROG 0.0000E+000 0.0000E+000 0.0000E+000 0.0000E+000
0.0000E+000 0.0000E+000 0.0000E+000 0.0000E+000 0.0000E+000
0.0000E+000 0.0000E+000 0.0000E+000 0.0000E+000 0.0000E+000
0.0000E+000 0.0000E+000 0.0000E+000 0.0000E+000 0.0000E+000
0.0000E+000 0.0000E+000 0.0000E+000 0.0000E+000 0.0000E+000
);
LA1 = LA1 ET (PROG 0.0000E+000 0.0000E+000 0.0000E+000 0.0000E+000
0.0000E+000 0.0000E+000 0.0000E+000 0.0000E+000 0.0000E+000
0.0000E+000 0.0000E+000 0.0000E+000 0.0000E+000 0.0000E+000
0.0000E+000 0.0000E+000 0.0000E+000 0.0000E+000 0.0000E+000
0.0000E+000 0.0000E+000 0.0000E+000 0.0000E+000 0.0000E+000
);
LA1 = LA1 ET (PROG 0.0000E+000 0.0000E+000 0.0000E+000 0.0000E+000
0.0000E+000 0.0000E+000 0.0000E+000 0.0000E+000 0.0000E+000
0.0000E+000 0.0000E+000 0.0000E+000 0.0000E+000 0.0000E+000
0.0000E+000 0.0000E+000 0.0000E+000 0.0000E+000 0.0000E+000
0.0000E+000 0.0000E+000 0.0000E+000 0.0000E+000 0.0000E+000
);
LA1 = LA1 ET (PROG 0.0000E+000 0.0000E+000 0.0000E+000 0.0000E+000
0.0000E+000 0.0000E+000 0.0000E+000 0.0000E+000 0.0000E+000
0.0000E+000 0.0000E+000 0.0000E+000 0.0000E+000 0.0000E+000
0.0000E+000 0.0000E+000 0.0000E+000 0.0000E+000 0.0000E+000
0.0000E+000 0.0000E+000 0.0000E+000 0.0000E+000 0.0000E+000
);
LA1 = LA1 ET (PROG 0.0000E+000 0.0000E+000 0.0000E+000 0.0000E+000
0.0000E+000 0.0000E+000 0.0000E+000 0.0000E+000 0.0000E+000
0.0000E+000 0.0000E+000 0.0000E+000 0.0000E+000 0.0000E+000
0.0000E+000 0.0000E+000 0.0000E+000 0.0000E+000 0.0000E+000
0.0000E+000 0.0000E+000 0.0000E+000 0.0000E+000 0.0000E+000
);
LA1 = LA1 ET (PROG 0.0000E+000 0.0000E+000 0.0000E+000 0.0000E+000
0.0000E+000 0.0000E+000 0.0000E+000 0.0000E+000 0.0000E+000
0.0000E+000 0.0000E+000 0.0000E+000 0.0000E+000 0.0000E+000
0.0000E+000 0.0000E+000 0.0000E+000 0.0000E+000 0.0000E+000
0.0000E+000 0.0000E+000 0.0000E+000 0.0000E+000 0.0000E+000
);
LA1 = LA1 ET (PROG 0.0000E+000 0.0000E+000 0.0000E+000 0.0000E+000
0.0000E+000 0.0000E+000 0.0000E+000 0.0000E+000 0.0000E+000
0.0000E+000 0.0000E+000 0.0000E+000 0.0000E+000 0.0000E+000
0.0000E+000 0.0000E+000 0.0000E+000 0.0000E+000 0.0000E+000
0.0000E+000 0.0000E+000 0.0000E+000 0.0000E+000 0.0000E+000
);
LA1 = LA1 ET (PROG 0.0000E+000 0.0000E+000 0.0000E+000 0.0000E+000
0.0000E+000 0.0000E+000 0.0000E+000 0.0000E+000 0.0000E+000
0.0000E+000 0.0000E+000 0.0000E+000 0.0000E+000 0.0000E+000
0.0000E+000 0.0000E+000 0.0000E+000 0.0000E+000 0.0000E+000
0.0000E+000 0.0000E+000 0.0000E+000 0.0000E+000 0.0000E+000
);
LA1 = LA1 ET (PROG 0.0000E+000 0.0000E+000 0.0000E+000 0.0000E+000
0.0000E+000 0.0000E+000 0.0000E+000 0.0000E+000 0.0000E+000
0.0000E+000 0.0000E+000 0.0000E+000 0.0000E+000 0.0000E+000
0.0000E+000 0.0000E+000 0.0000E+000 0.0000E+000 0.0000E+000
0.0000E+000 0.0000E+000 0.0000E+000 0.0000E+000 0.0000E+000
);
LA1 = LA1 ET (PROG 0.0000E+000 0.0000E+000 0.0000E+000 0.0000E+000
0.0000E+000 0.0000E+000 0.0000E+000 0.0000E+000 0.0000E+000
0.0000E+000 0.0000E+000 0.0000E+000 0.0000E+000 0.0000E+000
0.0000E+000 0.0000E+000 0.0000E+000 0.0000E+000 0.0000E+000
0.0000E+000 0.0000E+000 0.0000E+000 0.0000E+000 0.0000E+000
);
LA1 = LA1 ET (PROG 0.0000E+000 0.0000E+000 0.0000E+000 0.0000E+000
0.0000E+000 0.0000E+000 0.0000E+000 0.0000E+000 0.0000E+000
0.0000E+000 0.0000E+000 0.0000E+000 0.0000E+000 0.0000E+000
0.0000E+000 0.0000E+000 0.0000E+000 0.0000E+000 0.0000E+000
0.0000E+000 0.0000E+000 0.0000E+000 0.0000E+000 0.0000E+000
);
LA1 = LA1 ET (PROG 0.0000E+000 0.0000E+000 0.0000E+000 0.0000E+000
0.0000E+000 0.0000E+000 0.0000E+000 0.0000E+000 0.0000E+000
0.0000E+000 0.0000E+000 0.0000E+000 0.0000E+000 0.0000E+000
0.0000E+000 0.0000E+000 0.0000E+000 0.0000E+000 0.0000E+000
0.0000E+000 0.0000E+000 0.0000E+000 0.0000E+000 0.0000E+000
);
LA1 = LA1 ET (PROG 0.0000E+000 0.0000E+000 0.0000E+000 0.0000E+000
0.0000E+000 0.0000E+000 0.0000E+000 0.0000E+000 0.0000E+000
0.0000E+000 0.0000E+000 0.0000E+000 0.0000E+000 0.0000E+000
0.0000E+000 0.0000E+000 0.0000E+000 0.0000E+000 0.0000E+000
0.0000E+000 0.0000E+000 0.0000E+000 0.0000E+000 0.0000E+000
);
LA1 = LA1 ET (PROG 0.0000E+000 0.0000E+000 0.0000E+000 0.0000E+000
0.0000E+000 0.0000E+000 0.0000E+000 0.0000E+000 0.0000E+000
0.0000E+000 0.0000E+000 0.0000E+000 0.0000E+000 0.0000E+000
0.0000E+000 0.0000E+000 0.0000E+000 0.0000E+000 0.0000E+000
0.0000E+000 0.0000E+000 0.0000E+000 0.0000E+000 0.0000E+000
);
LA1 = LA1 ET (PROG 0.0000E+000 0.0000E+000 0.0000E+000 0.0000E+000
0.0000E+000 0.0000E+000 0.0000E+000 0.0000E+000 0.0000E+000
0.0000E+000 0.0000E+000 0.0000E+000 0.0000E+000 0.0000E+000
0.0000E+000 0.0000E+000 0.0000E+000 0.0000E+000 0.0000E+000
0.0000E+000 0.0000E+000 0.0000E+000 0.0000E+000 0.0000E+000
);
LA1 = LA1 ET (PROG 0.0000E+000 0.0000E+000 0.0000E+000 0.0000E+000
0.0000E+000 0.0000E+000 0.0000E+000 0.0000E+000 0.0000E+000
0.0000E+000 0.0000E+000 0.0000E+000 0.0000E+000 0.0000E+000
0.0000E+000 0.0000E+000 0.0000E+000 0.0000E+000 0.0000E+000
0.0000E+000 0.0000E+000 0.0000E+000 0.0000E+000 0.0000E+000
);
LA1 = LA1 ET (PROG 0.0000E+000 0.0000E+000 0.0000E+000 0.0000E+000
0.0000E+000 0.0000E+000 0.0000E+000 0.0000E+000 0.0000E+000
0.0000E+000 0.0000E+000 0.0000E+000 0.0000E+000 0.0000E+000
0.0000E+000 0.0000E+000 0.0000E+000 0.0000E+000 0.0000E+000
0.0000E+000 0.0000E+000 0.0000E+000 0.0000E+000 0.0000E+000
);
LA1 = LA1 ET (PROG 0.0000E+000 0.0000E+000 0.0000E+000 0.0000E+000
0.0000E+000 0.0000E+000 0.0000E+000 0.0000E+000 0.0000E+000
0.0000E+000 0.0000E+000 0.0000E+000 0.0000E+000 0.0000E+000
0.0000E+000 0.0000E+000 0.0000E+000 0.0000E+000 0.0000E+000
0.0000E+000 0.0000E+000 0.0000E+000 0.0000E+000 0.0000E+000
);
LA1 = LA1 ET (PROG 0.0000E+000 0.0000E+000 0.0000E+000 0.0000E+000
0.0000E+000 0.0000E+000 0.0000E+000 0.0000E+000 0.0000E+000
0.0000E+000 0.0000E+000 0.0000E+000 0.0000E+000 0.0000E+000
0.0000E+000 0.0000E+000 0.0000E+000 0.0000E+000 0.0000E+000
0.0000E+000 0.0000E+000 0.0000E+000 0.0000E+000 0.0000E+000
);
LA1 = LA1 ET (PROG 0.0000E+000 0.0000E+000 0.0000E+000 0.0000E+000
0.0000E+000 0.0000E+000 0.0000E+000 0.0000E+000 0.0000E+000
0.0000E+000 0.0000E+000 0.0000E+000 0.0000E+000 0.0000E+000
0.0000E+000 0.0000E+000 0.0000E+000 0.0000E+000 0.0000E+000
0.0000E+000 0.0000E+000 0.0000E+000 0.0000E+000 0.0000E+000
);
LA1 = LA1 ET (PROG 0.0000E+000 0.0000E+000 0.0000E+000 0.0000E+000
0.0000E+000 0.0000E+000 0.0000E+000 0.0000E+000 0.0000E+000
0.0000E+000 0.0000E+000 0.0000E+000 0.0000E+000 0.0000E+000
0.0000E+000 0.0000E+000 0.0000E+000 0.0000E+000 0.0000E+000
0.0000E+000 0.0000E+000 0.0000E+000 0.0000E+000 0.0000E+000
);
LA1 = LA1 ET (PROG 0.0000E+000 0.0000E+000 0.0000E+000 0.0000E+000
0.0000E+000 0.0000E+000 0.0000E+000 0.0000E+000 0.0000E+000
0.0000E+000 0.0000E+000 0.0000E+000 0.0000E+000 0.0000E+000
0.0000E+000 0.0000E+000 0.0000E+000 0.0000E+000 0.0000E+000
0.0000E+000 0.0000E+000 0.0000E+000 0.0000E+000 0.0000E+000
);
LA1 = LA1 ET (PROG 0.0000E+000 0.0000E+000 0.0000E+000 0.0000E+000
0.0000E+000 0.0000E+000 0.0000E+000 0.0000E+000 0.0000E+000
0.0000E+000 0.0000E+000 0.0000E+000 0.0000E+000 0.0000E+000
0.0000E+000 0.0000E+000 0.0000E+000 0.0000E+000 0.0000E+000
0.0000E+000 0.0000E+000 0.0000E+000 0.0000E+000 0.0000E+000
);
LA1 = LA1 ET (PROG 0.0000E+000 0.0000E+000 0.0000E+000 0.0000E+000
0.0000E+000 0.0000E+000 0.0000E+000 0.0000E+000 0.0000E+000
0.0000E+000 0.0000E+000 0.0000E+000 0.0000E+000 0.0000E+000
0.0000E+000 0.0000E+000 0.0000E+000 0.0000E+000 0.0000E+000
0.0000E+000 0.0000E+000 0.0000E+000 0.0000E+000 0.0000E+000
);
LA1 = LA1 ET (PROG 0.0000E+000 0.0000E+000 0.0000E+000 0.0000E+000
0.0000E+000 0.0000E+000 0.0000E+000 0.0000E+000 0.0000E+000
0.0000E+000 0.0000E+000 0.0000E+000 0.0000E+000 0.0000E+000
0.0000E+000 0.0000E+000 0.0000E+000 0.0000E+000 0.0000E+000
0.0000E+000 0.0000E+000 0.0000E+000 0.0000E+000 0.0000E+000
);
LA1 = LA1 ET (PROG 0.0000E+000 0.0000E+000 0.0000E+000 0.0000E+000
0.0000E+000 0.0000E+000 0.0000E+000 0.0000E+000 0.0000E+000
0.0000E+000 0.0000E+000 0.0000E+000 0.0000E+000 0.0000E+000
0.0000E+000 0.0000E+000 0.0000E+000 0.0000E+000 0.0000E+000
0.0000E+000 0.0000E+000 0.0000E+000 0.0000E+000 0.0000E+000
);
LA1 = LA1 ET (PROG 0.0000E+000 0.0000E+000 0.0000E+000 0.0000E+000
0.0000E+000 0.0000E+000 0.0000E+000 0.0000E+000 0.0000E+000
0.0000E+000 0.0000E+000 0.0000E+000 0.0000E+000 0.0000E+000
0.0000E+000 0.0000E+000 0.0000E+000 0.0000E+000 0.0000E+000
0.0000E+000 0.0000E+000 0.0000E+000 0.0000E+000 0.0000E+000
);
LA1 = LA1 ET (PROG 0.0000E+000 0.0000E+000 0.0000E+000 0.0000E+000
0.0000E+000 0.0000E+000 0.0000E+000 0.0000E+000 0.0000E+000
0.0000E+000 0.0000E+000 0.0000E+000 0.0000E+000 0.0000E+000
0.0000E+000 0.0000E+000 0.0000E+000 0.0000E+000 0.0000E+000
0.0000E+000 0.0000E+000 0.0000E+000 0.0000E+000 0.0000E+000
);
LA1 = LA1 ET (PROG 0.0000E+000 0.0000E+000 0.0000E+000 0.0000E+000
0.0000E+000 0.0000E+000 0.0000E+000 0.0000E+000 0.0000E+000
0.0000E+000 0.0000E+000 0.0000E+000 0.0000E+000 0.0000E+000
0.0000E+000 0.0000E+000 0.0000E+000 0.0000E+000 0.0000E+000
0.0000E+000 0.0000E+000 0.0000E+000 0.0000E+000 0.0000E+000
);
LA1 = LA1 ET (PROG 0.0000E+000 0.0000E+000 0.0000E+000 0.0000E+000
0.0000E+000 0.0000E+000 0.0000E+000 0.0000E+000 0.0000E+000
0.0000E+000 0.0000E+000 0.0000E+000 0.0000E+000 0.0000E+000
0.0000E+000 0.0000E+000 0.0000E+000 0.0000E+000 0.0000E+000
0.0000E+000 0.0000E+000 0.0000E+000 0.0000E+000 0.0000E+000
);
LA1 = LA1 ET (PROG 0.0000E+000 0.0000E+000 0.0000E+000 0.0000E+000
0.0000E+000 0.0000E+000 0.0000E+000 0.0000E+000 0.0000E+000
0.0000E+000 0.0000E+000 0.0000E+000 0.0000E+000 0.0000E+000
0.0000E+000 0.0000E+000 0.0000E+000 0.0000E+000 0.0000E+000
0.0000E+000 0.0000E+000 0.0000E+000 0.0000E+000 0.0000E+000
);
LA1 = LA1 ET (PROG 0.0000E+000 0.0000E+000 0.0000E+000 0.0000E+000
0.0000E+000 0.0000E+000 0.0000E+000 0.0000E+000 0.0000E+000
0.0000E+000 0.0000E+000 0.0000E+000 0.0000E+000 0.0000E+000
0.0000E+000 0.0000E+000 0.0000E+000 0.0000E+000 0.0000E+000
0.0000E+000 0.0000E+000 0.0000E+000 0.0000E+000 0.0000E+000
);
LA1 = LA1 ET (PROG 0.0000E+000 0.0000E+000 0.0000E+000 0.0000E+000
0.0000E+000 0.0000E+000 0.0000E+000 0.0000E+000 0.0000E+000
0.0000E+000 0.0000E+000 0.0000E+000 0.0000E+000 0.0000E+000
0.0000E+000 0.0000E+000 0.0000E+000 0.0000E+000 0.0000E+000
0.0000E+000 0.0000E+000 0.0000E+000 0.0000E+000 0.0000E+000
);
LA1 = LA1 ET (PROG 0.0000E+000 0.0000E+000 0.0000E+000 0.0000E+000
0.0000E+000 0.0000E+000 0.0000E+000 0.0000E+000 0.0000E+000
0.0000E+000 0.0000E+000 0.0000E+000 0.0000E+000 0.0000E+000
0.0000E+000 0.0000E+000 0.0000E+000 0.0000E+000 0.0000E+000
0.0000E+000 0.0000E+000 0.0000E+000 0.0000E+000 0.0000E+000
);
LA1 = LA1 ET (PROG 0.0000E+000 0.0000E+000 0.0000E+000 0.0000E+000
0.0000E+000 0.0000E+000 0.0000E+000 0.0000E+000 0.0000E+000
0.0000E+000 0.0000E+000 0.0000E+000 0.0000E+000 0.0000E+000
0.0000E+000 0.0000E+000 0.0000E+000 0.0000E+000 0.0000E+000
0.0000E+000 0.0000E+000 0.0000E+000 0.0000E+000
);
*
*
DT1 = EXTR LT1 2;
LT1 = (PROG 0. PAS DT1 NPAS 101)
   ET (LT1 + (PROG (DIME LT1) * (102*DT1)));
LA1 = (PROG 102 * 0.) ET (LA1);
*
REPE IND1 (2000);
  VAL1 = EXTR LT1 (DIME LT1);
  SI (VAL1 > 12.);
    LT1 = ENLE LT1 (DIME LT1);
    LA1 = ENLE LA1 (DIME LA1);
  FINSI;
FIN IND1;
*
*   chargement sismique
ACCEX = EVOL MANU 'Temps [s]' LT1 'Accel [m/s2]' (LA1);
S_ACCE = SPO ACCEX AMOR (PROG 0.05) COUL DEFA ACCE;
*
SI (GRAP1 EGA 1);
  DESS ACCEX TITR 'Seisme';
  DESS S_ACCE LOGX TITR 'Spectre Seisme';
FINSI;
*
********************************************************
*       SOLUTION DE REFERENCE
********************************************************
*
LT1 = PROG;
LA1 = PROG;
*
LT1 = LT1 ET (PROG 0.0000E+000 1.0000E-002 2.0000E-002 3.0000E-002
4.0000E-002 5.0000E-002 6.0000E-002 7.0000E-002 8.0000E-002 9.0000E-002
1.0000E-001 1.1000E-001 1.2000E-001 1.3000E-001 1.4000E-001 1.5000E-001
1.6000E-001 1.7000E-001 1.8000E-001 1.9000E-001 2.0000E-001 2.1000E-001
2.2000E-001 2.3000E-001 2.4000E-001 2.5000E-001 2.6000E-001 2.7000E-001
);
LT1 = LT1 ET (PROG 2.8000E-001 2.9000E-001 3.0000E-001 3.1000E-001
3.2000E-001 3.3000E-001 3.4000E-001 3.5000E-001 3.6000E-001 3.7000E-001
3.8000E-001 3.9000E-001 4.0000E-001 4.1000E-001 4.2000E-001 4.3000E-001
4.4000E-001 4.5000E-001 4.6000E-001 4.7000E-001 4.8000E-001 4.9000E-001
5.0000E-001 5.1000E-001 5.2000E-001 5.3000E-001 5.4000E-001 5.5000E-001
);
LT1 = LT1 ET (PROG 5.6000E-001 5.7000E-001 5.8000E-001 5.9000E-001
6.0000E-001 6.1000E-001 6.2000E-001 6.3000E-001 6.4000E-001 6.5000E-001
6.6000E-001 6.7000E-001 6.8000E-001 6.9000E-001 7.0000E-001 7.1000E-001
7.2000E-001 7.3000E-001 7.4000E-001 7.5000E-001 7.6000E-001 7.7000E-001
7.8000E-001 7.9000E-001 8.0000E-001 8.1000E-001 8.2000E-001 8.3000E-001
);
LT1 = LT1 ET (PROG 8.4000E-001 8.5000E-001 8.6000E-001 8.7000E-001
8.8000E-001 8.9000E-001 9.0000E-001 9.1000E-001 9.2000E-001 9.3000E-001
9.4000E-001 9.5000E-001 9.6000E-001 9.7000E-001 9.8000E-001 9.9000E-001
1.0000E+000 1.0100E+000 1.0200E+000 1.0300E+000 1.0400E+000 1.0500E+000
1.0600E+000 1.0700E+000 1.0800E+000 1.0900E+000 1.1000E+000 1.1100E+000
);
LT1 = LT1 ET (PROG 1.1200E+000 1.1300E+000 1.1400E+000 1.1500E+000
1.1600E+000 1.1700E+000 1.1800E+000 1.1900E+000 1.2000E+000 1.2100E+000
1.2200E+000 1.2300E+000 1.2400E+000 1.2500E+000 1.2600E+000 1.2700E+000
1.2800E+000 1.2900E+000 1.3000E+000 1.3100E+000 1.3200E+000 1.3300E+000
1.3400E+000 1.3500E+000 1.3600E+000 1.3700E+000 1.3800E+000 1.3900E+000
);
LT1 = LT1 ET (PROG 1.4000E+000 1.4100E+000 1.4200E+000 1.4300E+000
1.4400E+000 1.4500E+000 1.4600E+000 1.4700E+000 1.4800E+000 1.4900E+000
1.5000E+000 1.5100E+000 1.5200E+000 1.5300E+000 1.5400E+000 1.5500E+000
1.5600E+000 1.5700E+000 1.5800E+000 1.5900E+000 1.6000E+000 1.6100E+000
1.6200E+000 1.6300E+000 1.6400E+000 1.6500E+000 1.6600E+000 1.6700E+000
);
LT1 = LT1 ET (PROG 1.6800E+000 1.6900E+000 1.7000E+000 1.7100E+000
1.7200E+000 1.7300E+000 1.7400E+000 1.7500E+000 1.7600E+000 1.7700E+000
1.7800E+000 1.7900E+000 1.8000E+000 1.8100E+000 1.8200E+000 1.8300E+000
1.8400E+000 1.8500E+000 1.8600E+000 1.8700E+000 1.8800E+000 1.8900E+000
1.9000E+000 1.9100E+000 1.9200E+000 1.9300E+000 1.9400E+000 1.9500E+000
);
LT1 = LT1 ET (PROG 1.9600E+000 1.9700E+000 1.9800E+000 1.9900E+000
2.0000E+000 2.0100E+000 2.0200E+000 2.0300E+000 2.0400E+000 2.0500E+000
2.0600E+000 2.0700E+000 2.0800E+000 2.0900E+000 2.1000E+000 2.1100E+000
2.1200E+000 2.1300E+000 2.1400E+000 2.1500E+000 2.1600E+000 2.1700E+000
2.1800E+000 2.1900E+000 2.2000E+000 2.2100E+000 2.2200E+000 2.2300E+000
);
LT1 = LT1 ET (PROG 2.2400E+000 2.2500E+000 2.2600E+000 2.2700E+000
2.2800E+000 2.2900E+000 2.3000E+000 2.3100E+000 2.3200E+000 2.3300E+000
2.3400E+000 2.3500E+000 2.3600E+000 2.3700E+000 2.3800E+000 2.3900E+000
2.4000E+000 2.4100E+000 2.4200E+000 2.4300E+000 2.4400E+000 2.4500E+000
2.4600E+000 2.4700E+000 2.4800E+000 2.4900E+000 2.5000E+000 2.5100E+000
);
LT1 = LT1 ET (PROG 2.5200E+000 2.5300E+000 2.5400E+000 2.5500E+000
2.5600E+000 2.5700E+000 2.5800E+000 2.5900E+000 2.6000E+000 2.6100E+000
2.6200E+000 2.6300E+000 2.6400E+000 2.6500E+000 2.6600E+000 2.6700E+000
2.6800E+000 2.6900E+000 2.7000E+000 2.7100E+000 2.7200E+000 2.7300E+000
2.7400E+000 2.7500E+000 2.7600E+000 2.7700E+000 2.7800E+000 2.7900E+000
);
LT1 = LT1 ET (PROG 2.8000E+000 2.8100E+000 2.8200E+000 2.8300E+000
2.8400E+000 2.8500E+000 2.8600E+000 2.8700E+000 2.8800E+000 2.8900E+000
2.9000E+000 2.9100E+000 2.9200E+000 2.9300E+000 2.9400E+000 2.9500E+000
2.9600E+000 2.9700E+000 2.9800E+000 2.9900E+000 3.0000E+000 3.0100E+000
3.0200E+000 3.0300E+000 3.0400E+000 3.0500E+000 3.0600E+000 3.0700E+000
);
LT1 = LT1 ET (PROG 3.0800E+000 3.0900E+000 3.1000E+000 3.1100E+000
3.1200E+000 3.1300E+000 3.1400E+000 3.1500E+000 3.1600E+000 3.1700E+000
3.1800E+000 3.1900E+000 3.2000E+000 3.2100E+000 3.2200E+000 3.2300E+000
3.2400E+000 3.2500E+000 3.2600E+000 3.2700E+000 3.2800E+000 3.2900E+000
3.3000E+000 3.3100E+000 3.3200E+000 3.3300E+000 3.3400E+000 3.3500E+000
);
LT1 = LT1 ET (PROG 3.3600E+000 3.3700E+000 3.3800E+000 3.3900E+000
3.4000E+000 3.4100E+000 3.4200E+000 3.4300E+000 3.4400E+000 3.4500E+000
3.4600E+000 3.4700E+000 3.4800E+000 3.4900E+000 3.5000E+000 3.5100E+000
3.5200E+000 3.5300E+000 3.5400E+000 3.5500E+000 3.5600E+000 3.5700E+000
3.5800E+000 3.5900E+000 3.6000E+000 3.6100E+000 3.6200E+000 3.6300E+000
);
LT1 = LT1 ET (PROG 3.6400E+000 3.6500E+000 3.6600E+000 3.6700E+000
3.6800E+000 3.6900E+000 3.7000E+000 3.7100E+000 3.7200E+000 3.7300E+000
3.7400E+000 3.7500E+000 3.7600E+000 3.7700E+000 3.7800E+000 3.7900E+000
3.8000E+000 3.8100E+000 3.8200E+000 3.8300E+000 3.8400E+000 3.8500E+000
3.8600E+000 3.8700E+000 3.8800E+000 3.8900E+000 3.9000E+000 3.9100E+000
);
LT1 = LT1 ET (PROG 3.9200E+000 3.9300E+000 3.9400E+000 3.9500E+000
3.9600E+000 3.9700E+000 3.9800E+000 3.9900E+000 4.0000E+000 4.0100E+000
4.0200E+000 4.0300E+000 4.0400E+000 4.0500E+000 4.0600E+000 4.0700E+000
4.0800E+000 4.0900E+000 4.1000E+000 4.1100E+000 4.1200E+000 4.1300E+000
4.1400E+000 4.1500E+000 4.1600E+000 4.1700E+000 4.1800E+000 4.1900E+000
);
LT1 = LT1 ET (PROG 4.2000E+000 4.2100E+000 4.2200E+000 4.2300E+000
4.2400E+000 4.2500E+000 4.2600E+000 4.2700E+000 4.2800E+000 4.2900E+000
4.3000E+000 4.3100E+000 4.3200E+000 4.3300E+000 4.3400E+000 4.3500E+000
4.3600E+000 4.3700E+000 4.3800E+000 4.3900E+000 4.4000E+000 4.4100E+000
4.4200E+000 4.4300E+000 4.4400E+000 4.4500E+000 4.4600E+000 4.4700E+000
);
LT1 = LT1 ET (PROG 4.4800E+000 4.4900E+000 4.5000E+000 4.5100E+000
4.5200E+000 4.5300E+000 4.5400E+000 4.5500E+000 4.5600E+000 4.5700E+000
4.5800E+000 4.5900E+000 4.6000E+000 4.6100E+000 4.6200E+000 4.6300E+000
4.6400E+000 4.6500E+000 4.6600E+000 4.6700E+000 4.6800E+000 4.6900E+000
4.7000E+000 4.7100E+000 4.7200E+000 4.7300E+000 4.7400E+000 4.7500E+000
);
LT1 = LT1 ET (PROG 4.7600E+000 4.7700E+000 4.7800E+000 4.7900E+000
4.8000E+000 4.8100E+000 4.8200E+000 4.8300E+000 4.8400E+000 4.8500E+000
4.8600E+000 4.8700E+000 4.8800E+000 4.8900E+000 4.9000E+000 4.9100E+000
4.9200E+000 4.9300E+000 4.9400E+000 4.9500E+000 4.9600E+000 4.9700E+000
4.9800E+000 4.9900E+000 5.0000E+000 5.0100E+000 5.0200E+000 5.0300E+000
);
LT1 = LT1 ET (PROG 5.0400E+000 5.0500E+000 5.0600E+000 5.0700E+000
5.0800E+000 5.0900E+000 5.1000E+000 5.1100E+000 5.1200E+000 5.1300E+000
5.1400E+000 5.1500E+000 5.1600E+000 5.1700E+000 5.1800E+000 5.1900E+000
5.2000E+000 5.2100E+000 5.2200E+000 5.2300E+000 5.2400E+000 5.2500E+000
5.2600E+000 5.2700E+000 5.2800E+000 5.2900E+000 5.3000E+000 5.3100E+000
);
LT1 = LT1 ET (PROG 5.3200E+000 5.3300E+000 5.3400E+000 5.3500E+000
5.3600E+000 5.3700E+000 5.3800E+000 5.3900E+000 5.4000E+000 5.4100E+000
5.4200E+000 5.4300E+000 5.4400E+000 5.4500E+000 5.4600E+000 5.4700E+000
5.4800E+000 5.4900E+000 5.5000E+000 5.5100E+000 5.5200E+000 5.5300E+000
5.5400E+000 5.5500E+000 5.5600E+000 5.5700E+000 5.5800E+000 5.5900E+000
);
LT1 = LT1 ET (PROG 5.6000E+000 5.6100E+000 5.6200E+000 5.6300E+000
5.6400E+000 5.6500E+000 5.6600E+000 5.6700E+000 5.6800E+000 5.6900E+000
5.7000E+000 5.7100E+000 5.7200E+000 5.7300E+000 5.7400E+000 5.7500E+000
5.7600E+000 5.7700E+000 5.7800E+000 5.7900E+000 5.8000E+000 5.8100E+000
5.8200E+000 5.8300E+000 5.8400E+000 5.8500E+000 5.8600E+000 5.8700E+000
);
LT1 = LT1 ET (PROG 5.8800E+000 5.8900E+000 5.9000E+000 5.9100E+000
5.9200E+000 5.9300E+000 5.9400E+000 5.9500E+000 5.9600E+000 5.9700E+000
5.9800E+000 5.9900E+000 6.0000E+000 6.0100E+000 6.0200E+000 6.0300E+000
6.0400E+000 6.0500E+000 6.0600E+000 6.0700E+000 6.0800E+000 6.0900E+000
6.1000E+000 6.1100E+000 6.1200E+000 6.1300E+000 6.1400E+000 6.1500E+000
);
LT1 = LT1 ET (PROG 6.1600E+000 6.1700E+000 6.1800E+000 6.1900E+000
6.2000E+000 6.2100E+000 6.2200E+000 6.2300E+000 6.2400E+000 6.2500E+000
6.2600E+000 6.2700E+000 6.2800E+000 6.2900E+000 6.3000E+000 6.3100E+000
6.3200E+000 6.3300E+000 6.3400E+000 6.3500E+000 6.3600E+000 6.3700E+000
6.3800E+000 6.3900E+000 6.4000E+000 6.4100E+000 6.4200E+000 6.4300E+000
);
LT1 = LT1 ET (PROG 6.4400E+000 6.4500E+000 6.4600E+000 6.4700E+000
6.4800E+000 6.4900E+000 6.5000E+000 6.5100E+000 6.5200E+000 6.5300E+000
6.5400E+000 6.5500E+000 6.5600E+000 6.5700E+000 6.5800E+000 6.5900E+000
6.6000E+000 6.6100E+000 6.6200E+000 6.6300E+000 6.6400E+000 6.6500E+000
6.6600E+000 6.6700E+000 6.6800E+000 6.6900E+000 6.7000E+000 6.7100E+000
);
LT1 = LT1 ET (PROG 6.7200E+000 6.7300E+000 6.7400E+000 6.7500E+000
6.7600E+000 6.7700E+000 6.7800E+000 6.7900E+000 6.8000E+000 6.8100E+000
6.8200E+000 6.8300E+000 6.8400E+000 6.8500E+000 6.8600E+000 6.8700E+000
6.8800E+000 6.8900E+000 6.9000E+000 6.9100E+000 6.9200E+000 6.9300E+000
6.9400E+000 6.9500E+000 6.9600E+000 6.9700E+000 6.9800E+000 6.9900E+000
);
LT1 = LT1 ET (PROG 7.0000E+000 7.0100E+000 7.0200E+000 7.0300E+000
7.0400E+000 7.0500E+000 7.0600E+000 7.0700E+000 7.0800E+000 7.0900E+000
7.1000E+000 7.1100E+000 7.1200E+000 7.1300E+000 7.1400E+000 7.1500E+000
7.1600E+000 7.1700E+000 7.1800E+000 7.1900E+000 7.2000E+000 7.2100E+000
7.2200E+000 7.2300E+000 7.2400E+000 7.2500E+000 7.2600E+000 7.2700E+000
);
LT1 = LT1 ET (PROG 7.2800E+000 7.2900E+000 7.3000E+000 7.3100E+000
7.3200E+000 7.3300E+000 7.3400E+000 7.3500E+000 7.3600E+000 7.3700E+000
7.3800E+000 7.3900E+000 7.4000E+000 7.4100E+000 7.4200E+000 7.4300E+000
7.4400E+000 7.4500E+000 7.4600E+000 7.4700E+000 7.4800E+000 7.4900E+000
7.5000E+000 7.5100E+000 7.5200E+000 7.5300E+000 7.5400E+000 7.5500E+000
);
LT1 = LT1 ET (PROG 7.5600E+000 7.5700E+000 7.5800E+000 7.5900E+000
7.6000E+000 7.6100E+000 7.6200E+000 7.6300E+000 7.6400E+000 7.6500E+000
7.6600E+000 7.6700E+000 7.6800E+000 7.6900E+000 7.7000E+000 7.7100E+000
7.7200E+000 7.7300E+000 7.7400E+000 7.7500E+000 7.7600E+000 7.7700E+000
7.7800E+000 7.7900E+000 7.8000E+000 7.8100E+000 7.8200E+000 7.8300E+000
);
LT1 = LT1 ET (PROG 7.8400E+000 7.8500E+000 7.8600E+000 7.8700E+000
7.8800E+000 7.8900E+000 7.9000E+000 7.9100E+000 7.9200E+000 7.9300E+000
7.9400E+000 7.9500E+000 7.9600E+000 7.9700E+000 7.9800E+000 7.9900E+000
8.0000E+000 8.0100E+000 8.0200E+000 8.0300E+000 8.0400E+000 8.0500E+000
8.0600E+000 8.0700E+000 8.0800E+000 8.0900E+000 8.1000E+000 8.1100E+000
);
LT1 = LT1 ET (PROG 8.1200E+000 8.1300E+000 8.1400E+000 8.1500E+000
8.1600E+000 8.1700E+000 8.1800E+000 8.1900E+000 8.2000E+000 8.2100E+000
8.2200E+000 8.2300E+000 8.2400E+000 8.2500E+000 8.2600E+000 8.2700E+000
8.2800E+000 8.2900E+000 8.3000E+000 8.3100E+000 8.3200E+000 8.3300E+000
8.3400E+000 8.3500E+000 8.3600E+000 8.3700E+000 8.3800E+000 8.3900E+000
);
LT1 = LT1 ET (PROG 8.4000E+000 8.4100E+000 8.4200E+000 8.4300E+000
8.4400E+000 8.4500E+000 8.4600E+000 8.4700E+000 8.4800E+000 8.4900E+000
8.5000E+000 8.5100E+000 8.5200E+000 8.5300E+000 8.5400E+000 8.5500E+000
8.5600E+000 8.5700E+000 8.5800E+000 8.5900E+000 8.6000E+000 8.6100E+000
8.6200E+000 8.6300E+000 8.6400E+000 8.6500E+000 8.6600E+000 8.6700E+000
);
LT1 = LT1 ET (PROG 8.6800E+000 8.6900E+000 8.7000E+000 8.7100E+000
8.7200E+000 8.7300E+000 8.7400E+000 8.7500E+000 8.7600E+000 8.7700E+000
8.7800E+000 8.7900E+000 8.8000E+000 8.8100E+000 8.8200E+000 8.8300E+000
8.8400E+000 8.8500E+000 8.8600E+000 8.8700E+000 8.8800E+000 8.8900E+000
8.9000E+000 8.9100E+000 8.9200E+000 8.9300E+000 8.9400E+000 8.9500E+000
);
LT1 = LT1 ET (PROG 8.9600E+000 8.9700E+000 8.9800E+000 8.9900E+000
9.0000E+000 9.0100E+000 9.0200E+000 9.0300E+000 9.0400E+000 9.0500E+000
9.0600E+000 9.0700E+000 9.0800E+000 9.0900E+000 9.1000E+000 9.1100E+000
9.1200E+000 9.1300E+000 9.1400E+000 9.1500E+000 9.1600E+000 9.1700E+000
9.1800E+000 9.1900E+000 9.2000E+000 9.2100E+000 9.2200E+000 9.2300E+000
);
LT1 = LT1 ET (PROG 9.2400E+000 9.2500E+000 9.2600E+000 9.2700E+000
9.2800E+000 9.2900E+000 9.3000E+000 9.3100E+000 9.3200E+000 9.3300E+000
9.3400E+000 9.3500E+000 9.3600E+000 9.3700E+000 9.3800E+000 9.3900E+000
9.4000E+000 9.4100E+000 9.4200E+000 9.4300E+000 9.4400E+000 9.4500E+000
9.4600E+000 9.4700E+000 9.4800E+000 9.4900E+000 9.5000E+000 9.5100E+000
);
LT1 = LT1 ET (PROG 9.5200E+000 9.5300E+000 9.5400E+000 9.5500E+000
9.5600E+000 9.5700E+000 9.5800E+000 9.5900E+000 9.6000E+000 9.6100E+000
9.6200E+000 9.6300E+000 9.6400E+000 9.6500E+000 9.6600E+000 9.6700E+000
9.6800E+000 9.6900E+000 9.7000E+000 9.7100E+000 9.7200E+000 9.7300E+000
9.7400E+000 9.7500E+000 9.7600E+000 9.7700E+000 9.7800E+000 9.7900E+000
);
LT1 = LT1 ET (PROG 9.8000E+000 9.8100E+000 9.8200E+000 9.8300E+000
9.8400E+000 9.8500E+000 9.8600E+000 9.8700E+000 9.8800E+000 9.8900E+000
9.9000E+000 9.9100E+000 9.9200E+000 9.9300E+000 9.9400E+000 9.9500E+000
9.9600E+000 9.9700E+000 9.9800E+000 9.9900E+000 1.0000E+001 1.0010E+001
1.0020E+001 1.0030E+001 1.0040E+001 1.0050E+001 1.0060E+001 1.0070E+001
);
LT1 = LT1 ET (PROG 1.0080E+001 1.0090E+001 1.0100E+001 1.0110E+001
1.0120E+001 1.0130E+001 1.0140E+001 1.0150E+001 1.0160E+001 1.0170E+001
1.0180E+001 1.0190E+001 1.0200E+001 1.0210E+001 1.0220E+001 1.0230E+001
1.0240E+001 1.0250E+001 1.0260E+001 1.0270E+001 1.0280E+001 1.0290E+001
1.0300E+001 1.0310E+001 1.0320E+001 1.0330E+001 1.0340E+001 1.0350E+001
);
LT1 = LT1 ET (PROG 1.0360E+001 1.0370E+001 1.0380E+001 1.0390E+001
1.0400E+001 1.0410E+001 1.0420E+001 1.0430E+001 1.0440E+001 1.0450E+001
1.0460E+001 1.0470E+001 1.0480E+001 1.0490E+001 1.0500E+001 1.0510E+001
1.0520E+001 1.0530E+001 1.0540E+001 1.0550E+001 1.0560E+001 1.0570E+001
1.0580E+001 1.0590E+001 1.0600E+001 1.0610E+001 1.0620E+001 1.0630E+001
);
LT1 = LT1 ET (PROG 1.0640E+001 1.0650E+001 1.0660E+001 1.0670E+001
1.0680E+001 1.0690E+001 1.0700E+001 1.0710E+001 1.0720E+001 1.0730E+001
1.0740E+001 1.0750E+001 1.0760E+001 1.0770E+001 1.0780E+001 1.0790E+001
1.0800E+001 1.0810E+001 1.0820E+001 1.0830E+001 1.0840E+001 1.0850E+001
1.0860E+001 1.0870E+001 1.0880E+001 1.0890E+001 1.0900E+001 1.0910E+001
);
LT1 = LT1 ET (PROG 1.0920E+001 1.0930E+001 1.0940E+001 1.0950E+001
1.0960E+001 1.0970E+001 1.0980E+001 1.0990E+001 1.1000E+001 1.1010E+001
1.1020E+001 1.1030E+001 1.1040E+001 1.1050E+001 1.1060E+001 1.1070E+001
1.1080E+001 1.1090E+001 1.1100E+001 1.1110E+001 1.1120E+001 1.1130E+001
1.1140E+001 1.1150E+001 1.1160E+001 1.1170E+001 1.1180E+001 1.1190E+001
);
LT1 = LT1 ET (PROG 1.1200E+001 1.1210E+001 1.1220E+001 1.1230E+001
1.1240E+001 1.1250E+001 1.1260E+001 1.1270E+001 1.1280E+001 1.1290E+001
1.1300E+001 1.1310E+001 1.1320E+001 1.1330E+001 1.1340E+001 1.1350E+001
1.1360E+001 1.1370E+001 1.1380E+001 1.1390E+001 1.1400E+001 1.1410E+001
1.1420E+001 1.1430E+001 1.1440E+001 1.1450E+001 1.1460E+001 1.1470E+001
);
LT1 = LT1 ET (PROG 1.1480E+001 1.1490E+001 1.1500E+001 1.1510E+001
1.1520E+001 1.1530E+001 1.1540E+001 1.1550E+001 1.1560E+001 1.1570E+001
1.1580E+001 1.1590E+001 1.1600E+001 1.1610E+001 1.1620E+001 1.1630E+001
1.1640E+001 1.1650E+001 1.1660E+001 1.1670E+001 1.1680E+001 1.1690E+001
1.1700E+001 1.1710E+001 1.1720E+001 1.1730E+001 1.1740E+001 1.1750E+001
);
LT1 = LT1 ET (PROG 1.1760E+001 1.1770E+001 1.1780E+001 1.1790E+001
1.1800E+001 1.1810E+001 1.1820E+001 1.1830E+001 1.1840E+001 1.1850E+001
1.1860E+001 1.1870E+001 1.1880E+001 1.1890E+001 1.1900E+001 1.1910E+001
1.1920E+001 1.1930E+001 1.1940E+001 1.1950E+001 1.1960E+001 1.1970E+001
1.1980E+001 1.1990E+001 1.2000E+001
);
*
*
LA1 = LA1 ET (PROG -2.5399E-006 -5.4818E-008 3.4992E-006 5.6645E-006
8.4693E-006 1.0080E-005 1.1091E-005 9.2185E-006 7.9143E-006
4.7052E-006 2.4211E-006 -7.4917E-007 -2.7774E-006 -6.1030E-006
-7.5648E-006 -9.3555E-006 -9.4560E-006 -9.5702E-006 -6.8705E-006
-4.9701E-006 -1.7633E-006 7.7658E-008 2.6861E-006 3.9103E-006
);
LA1 = LA1 ET (PROG 6.1030E-006 6.6055E-006 7.7681E-006 6.3040E-006
5.5183E-006 2.5764E-006 1.0507E-006 -1.5349E-006 -2.3275E-006
-5.0295E-006 -5.7559E-006 -7.2679E-006 -6.2218E-006 -6.4502E-006
-4.2758E-006 -3.5631E-006 -1.4709E-006 -4.6595E-007 2.1836E-006
3.0378E-006 5.2808E-006 4.9895E-006 5.5731E-006 3.7459E-006
);
LA1 = LA1 ET (PROG 3.8372E-006 1.4892E-006 1.4070E-006 -9.6616E-007
-1.5623E-006 -4.3671E-006 -4.6321E-006 -6.6649E-006 -5.4909E-006
-5.9294E-006 -3.9195E-006 -4.4311E-006 -2.3389E-006 -2.9442E-006
-5.8472E-007 -9.9585E-007 1.4253E-006 6.5781E-007 2.0374E-006
1.8273E-008 7.9486E-007 -1.4801E-006 -2.3297E-007 -2.9145E-006
);
LA1 = LA1 ET (PROG -1.7450E-006 -4.8102E-006 -4.0702E-006 -7.3136E-006
-5.9751E-006 -8.3780E-006 -6.5530E-006 -8.8530E-006 -6.8568E-006
-9.3727E-006 -7.3364E-006 -1.0362E-005 -7.5488E-006 -1.1082E-005
-8.3026E-006 -1.3275E-005 -1.1326E-005 -1.7880E-005 -1.5778E-005
-2.3862E-005 -2.0890E-005 -3.1465E-005 -2.9083E-005 -4.3580E-005
);
LA1 = LA1 ET (PROG -4.1990E-005 -6.1647E-005 -5.9655E-005 -8.8905E-005
-8.8832E-005 -1.3988E-004 -1.4662E-004 -2.5297E-004 -2.8074E-004
-5.8830E-004 -7.5611E-004 -3.5241E-003 -2.5072E-002 -2.7610E-002
-2.7464E-002 -2.7306E-002 -2.7178E-002 -2.7774E-002 -2.9562E-002
-3.1636E-002 -3.2521E-002 -2.7351E-002 -1.2086E-002 -6.4586E-003
);
LA1 = LA1 ET (PROG -9.8216E-003 -2.0603E-002 -3.5991E-002 -5.0438E-002
-5.8818E-002 -5.9327E-002 -5.4312E-002 -5.0691E-002 -5.3018E-002
-5.4675E-002 -5.3141E-002 -4.3300E-002 -2.0931E-002 1.2114E-002
4.7434E-002 7.4996E-002 8.9899E-002 9.3639E-002 8.5081E-002
6.2834E-002 4.0110E-002 3.8651E-002 6.5252E-002 9.0076E-002
);
LA1 = LA1 ET (PROG 6.3602E-002 -2.3684E-002 -1.0805E-001 -1.0330E-001
8.6115E-003 1.3950E-001 1.7331E-001 9.8409E-002 1.9562E-002
2.8730E-002 9.6237E-002 1.1377E-001 4.4205E-002 -2.0971E-002
1.1833E-002 1.0163E-001 1.1783E-001 7.7172E-003 -1.3427E-001
-1.9191E-001 -1.7170E-001 -1.5787E-001 -1.4635E-001 -3.6449E-002
);
LA1 = LA1 ET (PROG 1.7484E-001 2.8622E-001 1.0250E-001 -2.4555E-001
-3.3743E-001 5.7841E-002 6.1373E-001 7.0097E-001 8.2053E-002
-7.5204E-001 -1.0620E+000 -6.2305E-001 8.3044E-002 4.2311E-001
1.9949E-001 -3.0258E-001 -7.3939E-001 -9.8726E-001 -1.0459E+000
-9.0791E-001 -6.5963E-001 -5.9000E-001 -9.3643E-001 -1.4846E+000
);
LA1 = LA1 ET (PROG -1.5639E+000 -7.0852E-001 7.5311E-001 1.9122E+000
2.2033E+000 2.0070E+000 2.2081E+000 3.1470E+000 4.1356E+000
4.0488E+000 2.4182E+000 -1.2014E-001 -2.2389E+000 -2.9027E+000
-2.1278E+000 -9.3565E-001 -5.9189E-001 -1.5587E+000 -3.1318E+000
-3.9657E+000 -3.1488E+000 -9.1453E-001 1.5692E+000 3.0851E+000
);
LA1 = LA1 ET (PROG 3.1887E+000 2.3736E+000 1.6117E+000 1.6406E+000
2.4825E+000 3.3702E+000 3.2494E+000 1.6493E+000 -7.2490E-001
-2.4092E+000 -2.4454E+000 -1.3027E+000 -4.4174E-001 -8.8778E-001
-2.3242E+000 -3.5220E+000 -3.6065E+000 -2.7303E+000 -1.6339E+000
-8.1218E-001 -2.6820E-001 1.7217E-001 5.3483E-001 7.7552E-001
);
LA1 = LA1 ET (PROG 9.7785E-001 1.1895E+000 1.2307E+000 8.7554E-001
2.4692E-001 -1.9679E-001 -1.8081E-001 9.1016E-003 -1.3338E-001
-7.0469E-001 -1.3208E+000 -1.6643E+000 -1.8806E+000 -2.2405E+000
-2.5518E+000 -2.2134E+000 -9.7363E-001 7.2165E-001 2.1925E+000
3.2974E+000 4.3928E+000 5.6019E+000 6.2679E+000 5.7200E+000
);
LA1 = LA1 ET (PROG 4.0817E+000 2.4074E+000 1.5413E+000 1.2348E+000
5.5168E-001 -9.8576E-001 -2.7791E+000 -3.8721E+000 -3.8838E+000
-3.2759E+000 -2.7306E+000 -2.6137E+000 -2.8511E+000 -3.0987E+000
-2.8752E+000 -1.7383E+000 3.5491E-001 2.7945E+000 4.6206E+000
5.3229E+000 5.2832E+000 5.3435E+000 5.8040E+000 6.0635E+000
);
LA1 = LA1 ET (PROG 5.2301E+000 2.9926E+000 6.1695E-003 -2.7372E+000
-4.6535E+000 -5.8558E+000 -6.8245E+000 -7.8728E+000 -8.7982E+000
-8.8917E+000 -7.4590E+000 -4.3369E+000 -3.1444E-001 3.2398E+000
5.2248E+000 5.5003E+000 4.8292E+000 4.1366E+000 3.7872E+000
3.4087E+000 2.4093E+000 5.0942E-001 -1.9364E+000 -4.0190E+000
);
LA1 = LA1 ET (PROG -4.8674E+000 -4.3032E+000 -3.0458E+000 -2.1506E+000
-2.0373E+000 -2.0883E+000 -1.2998E+000 6.0872E-001 2.8016E+000
4.0633E+000 3.9112E+000 2.8174E+000 1.4664E+000 6.0533E-002
-1.5226E+000 -3.0894E+000 -4.0266E+000 -3.9578E+000 -3.1863E+000
-2.3969E+000 -1.9326E+000 -1.4188E+000 -2.5637E-001 1.6637E+000
);
LA1 = LA1 ET (PROG 3.8465E+000 5.6869E+000 6.8921E+000 7.4501E+000
7.3807E+000 6.7139E+000 5.5571E+000 4.0423E+000 2.1370E+000
-2.6275E-001 -3.0386E+000 -5.6683E+000 -7.4801E+000 -8.1648E+000
-7.9342E+000 -7.1927E+000 -6.0913E+000 -4.5273E+000 -2.4775E+000
-1.9514E-001 2.0005E+000 4.0330E+000 6.0082E+000 7.8687E+000
);
LA1 = LA1 ET (PROG 9.2067E+000 9.5217E+000 8.5384E+000 6.4929E+000
3.8583E+000 1.0336E+000 -1.7873E+000 -4.5652E+000 -7.2518E+000
-9.6215E+000 -1.1201E+001 -1.1490E+001 -1.0133E+001 -7.2928E+000
-3.5963E+000 2.6015E-001 3.8169E+000 6.9012E+000 9.3943E+000
1.1069E+001 1.1654E+001 1.1023E+001 9.2687E+000 6.5920E+000
);
LA1 = LA1 ET (PROG 3.1873E+000 -7.3720E-001 -4.7805E+000 -8.2906E+000
-1.0529E+001 -1.1050E+001 -9.9527E+000 -7.8946E+000 -5.6963E+000
-3.7882E+000 -1.9720E+000 3.6960E-001 3.5749E+000 7.1227E+000
9.8109E+000 1.0606E+001 9.4131E+000 7.1064E+000 4.7645E+000
2.8219E+000 9.1530E-001 -1.5425E+000 -4.6273E+000 -7.6551E+000
);
LA1 = LA1 ET (PROG -9.6321E+000 -9.9520E+000 -8.7399E+000 -6.6484E+000
-4.3473E+000 -2.1278E+000 9.7810E-002 2.4536E+000 4.7748E+000
6.5615E+000 7.2813E+000 6.7487E+000 5.2380E+000 3.2610E+000
1.3057E+000 -4.2396E-001 -1.9480E+000 -3.2476E+000 -4.2361E+000
-4.7622E+000 -4.7301E+000 -4.1920E+000 -3.3141E+000 -2.2566E+000
);
LA1 = LA1 ET (PROG -1.1058E+000 1.5298E-001 1.5205E+000 2.8550E+000
3.9449E+000 4.6473E+000 5.0181E+000 5.2603E+000 5.4878E+000
5.5334E+000 5.0548E+000 3.7825E+000 1.8822E+000 -2.7119E-002
-1.3658E+000 -1.9154E+000 -2.0328E+000 -2.3427E+000 -3.1909E+000
-4.3689E+000 -5.2356E+000 -5.1939E+000 -4.1432E+000 -2.5672E+000
);
LA1 = LA1 ET (PROG -1.1229E+000 -2.5036E-001 1.4195E-001 4.5467E-001
9.4172E-001 1.3765E+000 1.1523E+000 -1.3523E-001 -2.1745E+000
-3.9960E+000 -4.6666E+000 -3.9784E+000 -2.6889E+000 -1.7581E+000
-1.5267E+000 -1.4269E+000 -5.6753E-001 1.4331E+000 4.0823E+000
6.4026E+000 7.6138E+000 7.5243E+000 6.5518E+000 5.2378E+000
);
LA1 = LA1 ET (PROG 3.9129E+000 2.4972E+000 6.2765E-001 -1.9901E+000
-5.1560E+000 -8.0841E+000 -9.7955E+000 -9.7573E+000 -8.3237E+000
-6.3370E+000 -4.4832E+000 -2.9015E+000 -1.2713E+000 7.3807E-001
3.1047E+000 5.4346E+000 7.1516E+000 7.7506E+000 7.0750E+000
5.4352E+000 3.5012E+000 1.8903E+000 6.8335E-001 -6.0531E-001
);
LA1 = LA1 ET (PROG -2.4829E+000 -4.8480E+000 -6.9072E+000 -7.7755E+000
-7.2138E+000 -5.7463E+000 -4.1296E+000 -2.7233E+000 -1.3285E+000
4.5002E-001 2.7241E+000 5.1527E+000 7.1381E+000 8.1943E+000
8.2205E+000 7.5235E+000 6.5860E+000 5.6787E+000 4.6491E+000
3.0425E+000 5.6860E-001 -2.4964E+000 -5.3795E+000 -7.3481E+000
);
LA1 = LA1 ET (PROG -8.1813E+000 -8.1726E+000 -7.7124E+000 -6.8880E+000
-5.4927E+000 -3.3821E+000 -7.3412E-001 2.0171E+000 4.4691E+000
6.4455E+000 7.9069E+000 8.7769E+000 8.9057E+000 8.2067E+000
6.7452E+000 4.7405E+000 2.3649E+000 -3.1307E-001 -3.2092E+000
-6.0733E+000 -8.4742E+000 -9.9813E+000 -1.0359E+001 -9.6641E+000
);
LA1 = LA1 ET (PROG -8.0560E+000 -5.7672E+000 -2.9888E+000 5.5048E-002
3.0918E+000 5.8401E+000 8.0721E+000 9.6233E+000 1.0356E+001
1.0182E+001 9.0809E+000 7.1782E+000 4.7009E+000 1.9034E+000
-9.7529E-001 -3.7351E+000 -6.2040E+000 -8.2166E+000 -9.5952E+000
-1.0142E+001 -9.6535E+000 -8.0467E+000 -5.4796E+000 -2.3887E+000
);
LA1 = LA1 ET (PROG 6.7673E-001 3.3077E+000 5.4038E+000 7.0835E+000
8.4336E+000 9.3032E+000 9.3499E+000 8.2951E+000 6.1653E+000
3.3407E+000 3.5776E-001 -2.3640E+000 -4.6675E+000 -6.5909E+000
-8.1510E+000 -9.1807E+000 -9.3690E+000 -8.4769E+000 -6.5576E+000
-3.9896E+000 -1.2778E+000 1.1979E+000 3.3045E+000 5.0711E+000
);
LA1 = LA1 ET (PROG 6.4948E+000 7.4509E+000 7.7520E+000 7.2929E+000
6.1231E+000 4.4021E+000 2.2964E+000 -5.6518E-002 -2.4939E+000
-4.7833E+000 -6.6453E+000 -7.8540E+000 -8.3012E+000 -7.9769E+000
-6.9099E+000 -5.1404E+000 -2.7754E+000 -5.6936E-002 2.6503E+000
4.9782E+000 6.6843E+000 7.7071E+000 8.0910E+000 7.8726E+000
);
LA1 = LA1 ET (PROG 7.0134E+000 5.4597E+000 3.2843E+000 7.7905E-001
-1.6243E+000 -3.5665E+000 -4.9464E+000 -5.9073E+000 -6.5972E+000
-6.9439E+000 -6.6406E+000 -5.4222E+000 -3.3687E+000 -9.3775E-001
1.3059E+000 3.0334E+000 4.2752E+000 5.2304E+000 5.9672E+000
6.3090E+000 5.9781E+000 4.8664E+000 3.1759E+000 1.3086E+000
);
LA1 = LA1 ET (PROG -3.8387E-001 -1.7863E+000 -2.9954E+000 -4.1123E+000
-5.0364E+000 -5.4746E+000 -5.1441E+000 -4.0065E+000 -2.3207E+000
-4.7419E-001 1.2407E+000 2.7095E+000 3.9114E+000 4.8014E+000
5.2829E+000 5.2870E+000 4.8309E+000 3.9900E+000 2.8487E+000
1.4793E+000 -3.0414E-002 -1.5632E+000 -2.9788E+000 -4.1400E+000
);
LA1 = LA1 ET (PROG -4.9193E+000 -5.2076E+000 -4.9392E+000 -4.1312E+000
-2.8950E+000 -1.3837E+000 2.4535E-001 1.8477E+000 3.2742E+000
4.3726E+000 5.0319E+000 5.2000E+000 4.8746E+000 4.0722E+000
2.8336E+000 1.2762E+000 -3.8941E-001 -1.9267E+000 -3.1847E+000
-4.1449E+000 -4.8504E+000 -5.2875E+000 -5.3490E+000 -4.8965E+000
);
LA1 = LA1 ET (PROG -3.8977E+000 -2.5000E+000 -9.7618E-001 4.0901E-001
1.5122E+000 2.3364E+000 2.9451E+000 3.3430E+000 3.4242E+000
3.0480E+000 2.1598E+000 8.8755E-001 -5.0683E-001 -1.7855E+000
-2.8119E+000 -3.5585E+000 -4.0416E+000 -4.2510E+000 -4.1428E+000
-3.6808E+000 -2.8835E+000 -1.8316E+000 -6.5036E-001 5.3961E-001
);
LA1 = LA1 ET (PROG 1.6385E+000 2.5632E+000 3.2430E+000 3.6080E+000
3.6160E+000 3.2808E+000 2.6779E+000 1.9045E+000 1.0329E+000
9.4720E-002 -8.7512E-001 -1.7917E+000 -2.5228E+000 -2.9526E+000
-3.0182E+000 -2.7310E+000 -2.1392E+000 -1.3032E+000 -2.9247E-001
8.0169E-001 1.8697E+000 2.7959E+000 3.4795E+000 3.8504E+000
);
LA1 = LA1 ET (PROG 3.8672E+000 3.5318E+000 2.8854E+000 1.9895E+000
9.1823E-001 -2.3749E-001 -1.3715E+000 -2.3517E+000 -3.0594E+000
-3.4289E+000 -3.4616E+000 -3.2038E+000 -2.7018E+000 -1.9741E+000
-1.0346E+000 6.3232E-002 1.1995E+000 2.2105E+000 2.9523E+000
3.3571E+000 3.4432E+000 3.2589E+000 2.8350E+000 2.1653E+000
);
LA1 = LA1 ET (PROG 1.2618E+000 2.0412E-001 -8.6383E-001 -1.7873E+000
-2.4714E+000 -2.8891E+000 -3.0452E+000 -2.9382E+000 -2.5658E+000
-1.9491E+000 -1.1460E+000 -2.3911E-001 6.8053E-001 1.5143E+000
2.1627E+000 2.5475E+000 2.6374E+000 2.4489E+000 2.0191E+000
1.3818E+000 5.8069E-001 -2.9321E-001 -1.1077E+000 -1.7376E+000
);
LA1 = LA1 ET (PROG -2.1316E+000 -2.3128E+000 -2.3177E+000 -2.1422E+000
-1.7492E+000 -1.1341E+000 -3.7216E-001 4.0270E-001 1.0683E+000
1.5651E+000 1.8921E+000 2.0618E+000 2.0652E+000 1.8776E+000
1.4883E+000 9.2764E-001 2.7078E-001 -3.8299E-001 -9.4644E-001
-1.3736E+000 -1.6651E+000 -1.8383E+000 -1.8896E+000 -1.7822E+000
);
LA1 = LA1 ET (PROG -1.4767E+000 -9.7991E-001 -3.6672E-001 2.4745E-001
7.6395E-001 1.1425E+000 1.3967E+000 1.5539E+000 1.6136E+000
1.5435E+000 1.3090E+000 9.1366E-001 4.1503E-001 -9.6410E-002
-5.4139E-001 -8.8637E-001 -1.1429E+000 -1.3355E+000 -1.4611E+000
-1.4788E+000 -1.3355E+000 -1.0132E+000 -5.5388E-001 -5.2875E-002
);
LA1 = LA1 ET (PROG 3.9690E-001 7.4726E-001 1.0048E+000 1.1992E+000
1.3355E+000 1.3766E+000 1.2690E+000 9.9043E-001 5.7795E-001
1.1600E-001 -3.1038E-001 -6.5303E-001 -9.0639E-001 -1.0836E+000
-1.1853E+000 -1.1883E+000 -1.0619E+000 -7.9681E-001 -4.2401E-001
-9.1037E-003 3.7744E-001 6.9098E-001 9.2137E-001 1.0773E+000
);
LA1 = LA1 ET (PROG 1.1597E+000 1.1502E+000 1.0253E+000 7.8155E-001
4.4895E-001 8.3169E-002 -2.5987E-001 -5.4481E-001 -7.5954E-001
-9.0491E-001 -9.7861E-001 -9.6894E-001 -8.6202E-001 -6.5685E-001
-3.7593E-001 -6.2877E-002 2.3489E-001 4.8523E-001 6.7641E-001
8.0756E-001 8.7436E-001 8.6542E-001 7.7143E-001 5.9725E-001
);
LA1 = LA1 ET (PROG 3.6512E-001 1.0696E-001 -1.4692E-001 -3.7413E-001
-5.5980E-001 -6.9212E-001 -7.6073E-001 -7.5795E-001 -6.8269E-001
-5.4333E-001 -3.5771E-001 -1.4893E-001 6.1609E-002 2.5785E-001
4.2759E-001 5.5825E-001 6.3446E-001 6.4274E-001 5.8049E-001
4.5938E-001 3.0111E-001 1.2843E-001 -4.3399E-002 -2.0649E-001
);
LA1 = LA1 ET (PROG -3.5462E-001 -4.7681E-001 -5.5604E-001 -5.7576E-001
-5.2871E-001 -4.2214E-001 -2.7552E-001 -1.1250E-001 4.7812E-002
1.9350E-001 3.1748E-001 4.1280E-001 4.7035E-001 4.8179E-001
4.4378E-001 3.6165E-001 2.4750E-001 1.1639E-001 -1.8678E-002
-1.4746E-001 -2.6057E-001 -3.4675E-001 -3.9355E-001 -3.9307E-001
);
LA1 = LA1 ET (PROG -3.4718E-001 -2.6672E-001 -1.6603E-001 -5.6654E-002
5.3821E-002 1.5869E-001 2.4861E-001 3.1344E-001 3.4545E-001
3.4227E-001 3.0607E-001 2.4160E-001 1.5537E-001 5.6449E-002
-4.3946E-002 -1.3503E-001 -2.0863E-001 -2.5978E-001 -2.8573E-001
-2.8491E-001 -2.5713E-001 -2.0389E-001 -1.2907E-001 -3.9717E-002
);
LA1 = LA1 ET (PROG 5.3564E-002 1.3786E-001 2.0172E-001 2.3931E-001
2.5165E-001 2.4322E-001 2.1744E-001 1.7445E-001 1.1377E-001
3.8890E-002 -4.1030E-002 -1.1391E-001 -1.6980E-001 -2.0412E-001
-2.1737E-001 -2.1180E-001 -1.8844E-001 -1.4675E-001 -8.7528E-002
-1.6645E-002 5.4911E-002 1.1526E-001 1.5776E-001 1.8308E-001
);
LA1 = LA1 ET (PROG 1.9553E-001 1.9653E-001 1.8212E-001 1.4699E-001
9.1199E-002 2.3376E-002 -4.2885E-002 -9.6149E-002 -1.3188E-001
-1.5205E-001 -1.6063E-001 -1.5932E-001 -1.4603E-001 -1.1698E-001
-7.0718E-002 -1.1386E-002 5.1189E-002 1.0527E-001 1.4283E-001
1.6234E-001 1.6771E-001 1.6338E-001 1.4986E-001 1.2438E-001
);
LA1 = LA1 ET (PROG 8.4234E-002 3.1184E-002 -2.7383E-002 -8.1075E-002
-1.2143E-001 -1.4466E-001 -1.5217E-001 -1.4754E-001 -1.3317E-001
-1.0877E-001 -7.2623E-002 -2.5142E-002 2.8683E-002 8.0012E-002
1.2008E-001 1.4397E-001 1.5199E-001 1.4735E-001 1.3270E-001
1.0833E-001 7.3521E-002 2.9431E-002 -1.9131E-002 -6.4727E-002
);
LA1 = LA1 ET (PROG -1.0043E-001 -1.2261E-001 -1.3151E-001 -1.2946E-001
-1.1824E-001 -9.7922E-002 -6.7951E-002 -2.9282E-002 1.3981E-002
5.5448E-002 8.8922E-002 1.1089E-001 1.2127E-001 1.2173E-001
1.1365E-001 9.7130E-002 7.1997E-002 3.9446E-002 2.7585E-003
-3.3320E-002 -6.4187E-002 -8.6568E-002 -9.8891E-002 -1.0111E-001
);
LA1 = LA1 ET (PROG -9.4215E-002 -7.9610E-002 -5.8500E-002 -3.1925E-002
-1.3778E-003 3.0310E-002 5.9186E-002 8.1330E-002 9.4389E-002
9.8086E-002 9.3343E-002 8.1186E-002 6.2346E-002 3.7874E-002
9.8829E-003 -1.8590E-002 -4.4304E-002 -6.4461E-002 -7.7145E-002
-8.1376E-002 -7.7261E-002 -6.5976E-002 -4.9060E-002 -2.7962E-002
);
LA1 = LA1 ET (PROG -3.9504E-003 2.1356E-002 4.5441E-002 6.5207E-002
7.8034E-002 8.2818E-002 7.9942E-002 7.0649E-002 5.6051E-002
3.7158E-002 1.5179E-002 -7.9286E-003 -2.9625E-002 -4.7288E-002
-5.8897E-002 -6.3482E-002 -6.1172E-002 -5.2903E-002 -3.9872E-002
-2.3311E-002 -4.4940E-003 1.5149E-002 3.3663E-002 4.8933E-002
);
LA1 = LA1 ET (PROG 5.9124E-002 6.3371E-002 6.1791E-002 5.5116E-002
4.4368E-002 3.0506E-002 1.4577E-002 -2.0090E-003 -1.7591E-002
-3.0483E-002 -3.9316E-002 -4.3382E-002 -4.2572E-002 -3.7315E-002
-2.8399E-002 -1.6766E-002 -3.3908E-003 1.0614E-002 2.3984E-002
3.5403E-002 4.3596E-002 4.7639E-002 4.7176E-002 4.2508E-002
);
LA1 = LA1 ET (PROG 3.4459E-002 2.4126E-002 1.2626E-002 9.7416E-004
-9.9545E-003 -1.9379E-002 -2.6577E-002 -3.0777E-002 -3.1379E-002
-2.8187E-002 -2.1615E-002 -1.2688E-002 -2.5572E-003 7.6674E-003
1.7081E-002 2.4989E-002 3.0858E-002 3.4141E-002 3.4484E-002
3.1762E-002 2.6169E-002 1.8369E-002 9.2613E-003 -1.6930E-005
);
LA1 = LA1 ET (PROG -8.5272E-003 -1.5604E-002 -2.0831E-002 -2.3840E-002
-2.4290E-002 -2.2023E-002 -1.7283E-002 -1.0646E-002 -2.8836E-003
5.2475E-003 1.3106E-002 2.0018E-002 2.5237E-002 2.8149E-002
2.8397E-002 2.6044E-002 2.1497E-002 1.5439E-002 8.5563E-003
1.5273E-003 -5.0935E-003 -1.0811E-002 -1.5170E-002 -1.7719E-002
);
LA1 = LA1 ET (PROG -1.8065E-002 -1.6108E-002 -1.2154E-002 -6.7997E-003
-7.2415E-004 5.5268E-003 1.1527E-002 1.6854E-002 2.0945E-002
2.3274E-002 2.3468E-002 2.1586E-002 1.7996E-002 1.3252E-002
7.8753E-003 2.3455E-003 -2.9595E-003 -7.6386E-003 -1.1273E-002
-1.3422E-002 -1.3704E-002 -1.2101E-002 -8.9607E-003 -4.7758E-003
);
LA1 = LA1 ET (PROG -1.1707E-004
);
*
EV_EERA2 = EVOL VERT MANU LT1 LA1;
*
********************************************************
*       CONTRUCTION MAILLAGE
********************************************************
*
P0 = 0. 0.;
P1 = 1. 0.;
*
L1 = D 1 P0 P1;
*
SOL1 = (L1 TRANS NH1 (0. ((-1)*(HTOT1))));
*
F_LAT1 = P1 LIGNE TRANS NH1 (0. ((-1)*(HTOT1)));
F_FON1 = ((L1) PLUS (0. ((-1)*(HTOT1))));
*
SOL1 = SOL1 COUL VERT;
F_LAT1 = F_LAT1 COUL ROUG;
F_FON1 = F_FON1 COUL ROUG;
*
ELIM 0.001 (SOL1 ET F_LAT1 ET F_FON1);
*
GEOTOT1 = SOL1 ET F_LAT1 ET F_FON1;
*
SI (GRAP1 EGA 1);
TRAC GEOTOT1 'TITR' 'Geometrie';
FINSI;
*
********************************************************
*       CONTRUCTION MAILLAGE
********************************************************
*
MOD_SOL = MODE SOL1 MECANIQUE ELASTIQUE ISOTROPE QUA8;
MAT_SOL = MATE MOD_SOL YOUN ESOL1 NU NUSOL1 RHO RHOSOL1;
*
********************************************************
*       CONTRUCTION MATRICES K, M, C
********************************************************
*
RIG_SOL1 = RIGI MOD_SOL MAT_SOL;
*
MAS_SOL1 = MASS MOD_SOL MAT_SOL;
*
ALPHA = (((4*PI)*(F1))*(F2))/(F1 + F2);
BETA = 1./(PI * (F2 + F1));
*
AMO_SOL1 = (BET_SOL1)*(((ALPHA)*(MAS_SOL1)) ET ((BETA)*(RIG_SOL1)));
*
********************************************************
*       DECONVOLUTION
********************************************************
*
TAB_COU = TABLE;
TAB_COU. 1 = TABLE;
TAB_COU. 1 .'FRONTIERE' = F_LAT1;
TAB_COU. 1 .'MASSE_VOLUMIQUE' = RHOSOL1;
TAB_COU. 1 .'POISSON' = NUSOL1;
TAB_COU. 1 .'YOUNG' = ESOL1;
TAB_COU. 1 .'AMORTISSEMENT' = 0.05;
*
T_ACCE = TABLE;
T_ACCE.'ENTREE' = TABLE;
T_ACCE.'ENTREE'.'NATURE' = CHAINE 'INSIDE';
T_ACCE.'ENTREE'.'CONTROLE' = F_LAT1 POIN PROC (0. -1000.);
T_ACCE. 1 = F_LAT1 POIN PROC (0. 0.);
T_ACCE. 2 = F_LAT1 POIN PROC (0. -1000.);
*
TAB_DEC = DECONV TAB_COU F_FON1 MOD_SOL 'HORI' ACCEX F1 F2
          50. 'LYSMER' T_ACCE;
*
********************************************************
*       DECONVOLUTION
********************************************************
*
SI (GRAP1 ega 1);
  DESS ((TAB_DEC.ACCE. 1) ET (EV_EERA2));
FINSI;
*
VAL1 = MAXI (ABS (EXTR TAB_DEC.ACCE.1 ORDO));
VAL2 = MAXI (ABS (EXTR EV_EERA2 ORDO));
*
ERR1 = (ABS(VAL1 - VAL2))/(VAL1);
*
ERR1 = (ABS(VAL1 - VAL2))/(VAL1);
SI (ERR1 > 0.05);
  MESS 'Errore';
  ERRE 5;
FINSI;

FIN;
