* fichier : trac_anno.dgibi
*
OPTI 'DIME' 2 'ELEM' 'QUA4' ;

GRAPH = FAUX ;


*********************************************************
* DESCRIPTION DES PARTIES D'UN MAILLAGE VIA UNE LEGENDE *
*********************************************************

LCLR = MOTS 'ROUG' 'BLEU' 'CYAN' 'INDI' 'JAUN' 'CARA' 'ROSE' 'ORAN' 'BOUT' 'VERT'
            'BRIQ' 'AZUR' 'VIOL' 'OR'   'CORA' 'BRUN' 'MARI' 'BLAN' 'NOIR' 'TURQ' ;
NCLR = DIME LCLR ;

MSH2 = (0. 0.) DROI 5 (5. 0.) TRAN 5 (0. 5.) ;

MSH1 = VIDE 'MAILLAGE'/'QUA4' ;
REPE K (NBEL MSH2) ;
    ELK = ELEM MSH2 &K ;
    CLR = EXTR LCLR ((@MOD (&K - 1) NCLR) + 1) ;
    MSH1 = MSH1 ET (COUL CLR ELK) ;
FIN K ;

ANN = VIDE 'ANNOTATI' ;
MSG = 'Je suis %' ;
REPE K NCLR ;
    CLR = EXTR LCLR &K ;
    ANN = ANN ET (ANNO 'CATE' CLR (REMP MSG '%' CLR)) ;

    SI ((&K EGA 3) OU (&K EGA 10) OU (&K EGA NCLR)) ;
        OPTI 'TRAC' 'PSC' 'FTRA' (CHAI 'cate_x' &K '.ps') ;
        TRAC MSH1 'FACE' ANN 'NCLK' ;

        SI GRAPH ;
            OPTI 'TRAC' 'X' ;
            TRAC MSH1 'FACE' ANN ;

            OPTI 'TRAC' 'OPEN' ;
            TRAC MSH1 'FACE' ANN ;
        FINS ;
    FINS ;
FIN K ;

LIST ANN ;


***************************************************
* AJOUT D'ETIQUETTES EN CERTAINS POINTS D'INTERET *
***************************************************

DISTA = 0.3 ;

ANN_DEB = ANNO 'ETIQ' (0.5 0.5) DISTA 'SO' 'JE SUIS AU DEBUT' 'ROUG' ;
ANN_CP1 = ANNO 'ETIQ' (2.5 0.5) DISTA 'S'  'CHECKPOINT 1' ;
ANN_CP2 = ANNO 'ETIQ' (4.5 0.5) DISTA 'SE' 'CHECKPOINT 2' ;
ANN_CP3 = ANNO 'ETIQ' (0.5 2.5) DISTA 'O'  'CHECKPOINT 5' ;
ANN_CP4 = ANNO 'ETIQ' (2.5 2.5) DISTA 'C'  'CHECKPOINT 4' ;
ANN_CP5 = ANNO 'ETIQ' (4.5 2.5) DISTA 'E'  'CHECKPOINT 3' ;
ANN_CP6 = ANNO 'ETIQ' (0.5 4.5) DISTA 'NO' 'CHECKPOINT 6' ;
ANN_CP7 = ANNO 'ETIQ' (2.5 4.5) DISTA 'N'  'CHECKPOINT 7' ;
ANN_FIN = ANNO 'ETIQ' (4.5 4.5) DISTA 'NE' 'JE SUIS A LA FIN' 'VERT' ;

ANN2 = ANN_DEB ET ANN_CP1 ET ANN_CP2 ET ANN_CP3 ET ANN_CP4 ET
       ANN_CP5 ET ANN_CP6 ET ANN_CP7 ET ANN_FIN ;

BOIT1 = BOITE (MSH2 HOMO (BARY MSH2) 1.5) ;
*  pour tester le menage
menage oblig;

OPTI 'TRAC' 'PSC' 'FTRA' 'etiq.ps' ;
TRAC MSH2 ANN2 'BOIT' BOIT1 ;

SI GRAPH ;
    OPTI 'TRAC' 'X' ;
    TRAC MSH2 ANN2 ;

    OPTI 'TRAC' 'OPEN' ;
    TRAC MSH2 ANN2 ;
FINS ;

LIST ANN2 ;


*******************************************************************
* REMPLACEMENT DES ISOVALEURS CONTINUES PAR UNE COLORMAP DISCRETE *
*******************************************************************

CHPO1 = BRUI 'BLAN' 'UNIF' 0. 1. MSH1 ;

ANN3 = (ANNO 'CATE' 'BLEU' 'Froid') ET (ANNO 'CATE' 'ROUG' 'Chaud') ;

OPTI 'TRAC' 'PSC' 'FTRA' 'discr.ps' ;
TRAC MSH1 CHPO1 2 ANN3 ;

SI GRAPH ;
    OPTI 'TRAC' 'X' ;
    TRAC MSH1 CHPO1 2 ANN3 ;

    OPTI 'TRAC' 'OPEN' ;
    TRAC MSH1 CHPO1 2 ANN3 ;
FINS ;


FIN ;
