$$$$ @RSTH
* @RSTH     PROCEDUR  CB215821  19/11/18    21:15:02     10383
*----------------------------------------------------------------------
*      CETTE METHODE A ETE MISE GRACIEUSEMENT
*      A DISPOSITION DE  LA COMMUNAUTE CAST3M
*      PAR TAMASKOVICS N.
*     (Freiberg Institut für Geotechnik )
*----------------------------------------------------------------------
'DEBM' @RSTH  ;
*----------------------------------------------------------------------
* La methode @RSTH cree un objet OBJ1 pour calculer avec la theorie
*    des Random Sets (constructeur d'objet)
*----------------------------------------------------------------------
 %'RT'   = 0            ;
 %'NX'   = 0            ;
 %'CX'   = 0            ;
 %'RX'   = 0            ;
 %'PX'   = 0            ;
 %'IR'   = 0            ;
 %'IX'   = 0            ;
 %'SN'   = 0            ;
 %'PN'   = 0.0          ;
 %'MIN'  = 0.0          ;
 %'CPN'  = 0.0          ;
 %'MAX'  = 0.0          ;
 %'CPX'  = 0.0          ;
 %'MINS' = 0.0          ;
 %'CPNS' = 0.0          ;
 %'MAXS' = 0.0          ;
 %'CPXS' = 0.0          ;
 %METHODE  'RST'  @RRST ;
 %METHODE  'RSV'  @RRSV ;
 %METHODE  'RSR'  @RRSR ;
 %METHODE  'SCV'  @RSCV ;
 %METHODE  'SCS'  @RSCS ;
'FINM' ;
