$$$$ BIBLIO
* BIBLIO    PROCEDUR  PASCAL    22/12/07    21:15:02     11514
DEBP BIBLIO mot1*'MOT' mot2/'MOT' ;

*------------------------- Lecture arguments -------------------------*

* Lecture indice reference biblio associee a mot1 :
si (exis mot2) ;
  si (ega mot2 'REFE') ;
    argu ent1*'ENTIER' ;
  sino ;
    erre '***** ERREUR : le 2e argument doit etre le mot-cle REFE' ;
    quit biblio ;
  fins ;
sino ;
  argu mot2/'ENTIER' ;
  si (exis mot2) ;
    erre '***** ERREUR : le 2e argument doit etre le mot-cle REFE' ;
    quit biblio ;
  fins ;
  ent1     = 0 ;
fins ;

* imot1  : indice du mot dans la base biblio, 0 si pas dans la base.
imot1    = 0 ;

*----------------------------------------------------------------------*
*                            MOT-CLE : 316L                            *
*----------------------------------------------------------------------*

si (ega mot1 '316L') ;
  imot1    = 1 ;

* Initialisation table de sortie :
  TBIB1    = table ;

*------------------------------ 316L [1] ------------------------------*

* Proprietes thermomecaniques du 316L :
* Lionel Depradeux.
* "Simulation numerique du soudage - Acier 316L : validation sur cas
* tests de complexite croissante".
* These de doctorat.
* Institut National des Sciences Appliquees de Lyon.
* 2004.

* Reference par defaut :
  si (ent1 ega 0) ; ent1 = 1 ; fins ;

  si (ent1 ega 1) ;

*---- THERMIQUE ---- :

*   K1     : Conductivite thermique (W/m/K) :
    lt1      = prog 20. 100. pas 100. 1000. 1200. 1500. ;
    lk1      = prog 14. 15.2 16.6 17.9 19. 20.6 21.8 23.1 24.3 26. 27.3 29.9 60. ;
    K1       = evol manu 'T' lt1 'K' lk1 ;
    TBIB1 . 'K' = K1 ;

*   Rho1   : Masse volumique (kg/m^3)
    lt1      = prog 20. 100. pas 100. 1000. 1200. 1500. ;
    lrho1    = prog 8000. 7970. 7940. 7890. 7850. 7800. 7750. 7700. 7660. 7610. 7570. 7450. 7200. ;
    Rho1     = evol manu 'T' lt1 'RHO' lrho1 ;
    TBIB1 . 'RHO' = Rho1 ;

*   Cp1    : Capacite calorifique massique (J/K/kg)
    lt1      = prog 20. 100. pas 100. 1000. 1200. ;
    lcp1     = prog 450. 490. 525. 545. 560. 570. 580. 595. 625. 650. 660. 677. ;
    Cp1      = evol manu 'T' lt1 'C' lcp1 ;
    TBIB1 . 'C' = Cp1 ;

*   Tfus1  : Temperaure de fusion (degC) :
    Tfus1    = 1450. ;
    TBIB1 . 'TFUS' = Tfus1 ;

*   Qlat1  : Chaleur latente massique de fusion (J/kg)
    Qlat1    = 2.5e5 ;
    TBIB1 . 'QLAT' = Qlat1 ;

*---- MECANIQUE ---- :

*   Nu1    : coefficient de Poisson
    TBIB1 . 'NU' = 0.3 ;

*   Ym1    : module de Young (Pa) :
    lt1      = prog 20. 100. pas 100. 1200. ;
    lym1     = prog 197000. 191500. 184000. 176500. 168000. 160000. 151500. 142500. 130000. 108000. 81500. 32000. 7400. ;
    lym1     = 1.e6 * lym1 ;
    ym1      = evol manu T lt1 youn lym1 ;
    TBIB1 . 'YOUN' = ym1 ;

*   Alph1  : dilatation thermique (/K)
    lt1      = prog 20. 100. 300. 400. 600. 700. 800. 1000. 1400. ;
    lalph1   = prog 15.5 16.0 17.1 17.5 18.4 18.7 19.0 19.4 19.6 ;
    lalph1   = 1.e-6 * lalph1 ;
    alph1    = evol manu T lt1 ALPH lalph1 ;
    TBIB1 . 'ALPH' = alph1 ;

*   Sy1    : limite d'elasticite (Pa)
    lt1      = prog 20. 100. pas 100. 1400. ;
    lsy1     = prog 287. 237. 198. 172. 157. 151. 145. 136. 127. 115. 79. 38. 24. 18. 2. ;
    lsy1     = 1.e6 * lsy1 ;
    sy1      = evol manu T lt1 SIGY lsy1 ;
    TBIB1 . 'SIGY' = sy1 ;

*   Trac1  : Courbes de traction (Pa)
*   Ecro1  : Courbes d'ecrouissage (Pa)
    Trac1    = vide nuage ;
    Ecro1    = vide nuage ;
*   A 20 degC :
    T1       = 20. ;
    lept1    = prog 0.3459 1.1599 5.2129 20.2847 ;
    lept1    = 1.e-2 * lept1 ;
    lsig1    = prog 287.33 314.94 419.42 560.97 ;
    lsig1    = 1.e6 * lsig1 ;
    trac20   = (evol manu 'EPST' lept1 'SIG' lsig1) coul 1 ;
    Trac1    = Trac1 et (nuag comp 'T' T1 comp 'TRAC' trac20) ;
    ymT1     = ipol ym1 T1 ;
    lepp2    = lept1 - (lsig1 / ymT1) ;
    Ecro20   = (evol manu 'EPSP' lepp2 'SIG' lsig1) coul 1 ;
    Ecro20   = prol line Ecro20 0. ;
    Ecro1    = Ecro1 et (nuag comp 'T' T1 comp 'ECRO' Ecro20) ;
*   A 200 degC :
    T1       = 200. ;
    lept1    = prog 0.3077 1.1257 5.1816 20.2556 ;
    lept1    = 1.e-2 * lept1 ;
    lsig1    = prog 198.16 231.36 334.1 470.24 ;
    lsig1    = 1.e6 * lsig1 ;
    trac200  = (evol manu 'EPST' lept1 'SIG' lsig1) coul 2 ;
    Trac1    = Trac1 et (nuag comp 'T' T1 comp 'TRAC' trac200) ;
    ymT1     = ipol ym1 T1 ;
    lepp2    = lept1 - (lsig1 / ymT1) ;
    Ecro200  = (evol manu 'EPSP' lepp2 'SIG' lsig1) coul 2 ;
    Ecro200  = prol line Ecro200 0. ;
    Ecro1    = Ecro1 et (nuag comp 'T' T1 comp 'ECRO' Ecro200) ;
*   A 300 degC :
    T1       = 300. ;
    lept1    = prog 0.2977 1.1137 5.1740 20.2558 ;
    lept1    = 1.e-2 * lept1 ;
    lsig1    = prog 172.47 200.62 307.12 451.42 ;
    lsig1    = 1.e6 * lsig1 ;
    trac300  = (evol manu 'EPST' lept1 'SIG' lsig1) coul 3 ;
    Trac1    = Trac1 et (nuag comp 'T' T1 comp 'TRAC' trac300) ;
    ymT1     = ipol ym1 T1 ;
    lepp2    = lept1 - (lsig1 / ymT1) ;
    Ecro300  = (evol manu 'EPSP' lepp2 'SIG' lsig1) coul 3 ;
    Ecro300  = prol line Ecro300 0. ;
    Ecro1    = Ecro1 et (nuag comp 'T' T1 comp 'ECRO' Ecro300) ;
*   A 400 degC :
    T1       = 400. ;
    lept1    = prog 0.2939 1.1115 5.1755 20.2593 ;
    lept1    = 1.e-2 * lept1 ;
    lsig1    = prog 157.83 187.32 294.89 435.66 ;
    lsig1    = 1.e6 * lsig1 ;
    trac400  = (evol manu 'EPST' lept1 'SIG' lsig1) coul 4 ;
    Trac1    = Trac1 et (nuag comp 'T' T1 comp 'TRAC' trac400) ;
    ymT1     = ipol ym1 T1 ;
    lepp2    = lept1 - (lsig1 / ymT1) ;
    Ecro400  = (evol manu 'EPSP' lepp2 'SIG' lsig1) coul 4 ;
    Ecro400  = prol line Ecro400 0. ;
    Ecro1    = Ecro1 et (nuag comp 'T' T1 comp 'ECRO' Ecro400) ;
*   A 500 degC :
    T1       = 500. ;
    lept1    = prog 0.2948 1.1120 5.1765 20.2620 ;
    lept1    = 1.e-2 * lept1 ;
    lsig1    = prog 151.65 179.12 282.34 419.14 ;
    lsig1    = 1.e6 * lsig1 ;
    trac500  = (evol manu 'EPST' lept1 'SIG' lsig1) coul 5 ;
    Trac1    = Trac1 et (nuag comp 'T' T1 comp 'TRAC' trac500) ;
    ymT1     = ipol ym1 T1 ;
    lepp2    = lept1 - (lsig1 / ymT1) ;
    Ecro500  = (evol manu 'EPSP' lepp2 'SIG' lsig1) coul 5 ;
    Ecro500  = prol line Ecro500 0. ;
    Ecro1    = Ecro1 et (nuag comp 'T' T1 comp 'ECRO' Ecro500) ;
*   A 600 degC :
    T1       = 600. ;
    lept1    = prog 0.2960 1.1121 5.1730 20.2556 ;
    lept1    = 1.e-2 * lept1 ;
    lsig1    = prog 145.47 169.87 262.17 387.23 ;
    lsig1    = 1.e6 * lsig1 ;
    trac600  = (evol manu 'EPST' lept1 'SIG' lsig1) coul 6 ;
    Trac1    = Trac1 et (nuag comp 'T' T1 comp 'TRAC' trac600) ;
    ymT1     = ipol ym1 T1 ;
    lepp2    = lept1 - (lsig1 / ymT1) ;
    Ecro600  = (evol manu 'EPSP' lepp2 'SIG' lsig1) coul 6 ;
    Ecro600  = prol line Ecro600 0. ;
    Ecro1    = Ecro1 et (nuag comp 'T' T1 comp 'ECRO' Ecro600) ;
*   A 700 degC :
    T1       = 700. ;
    lept1    = prog 0.2956 1.1128 5.1485 20.2389 ;
    lept1    = 1.e-2 * lept1 ;
    lsig1    = prog 136.2 160.7 211.65 340.49 ;
    lsig1    = 1.e6 * lsig1 ;
    trac700  = (evol manu 'EPST' lept1 'SIG' lsig1) coul 7 ;
    Trac1    = Trac1 et (nuag comp 'T' T1 comp 'TRAC' trac700) ;
    ymT1     = ipol ym1 T1 ;
    lepp2    = lept1 - (lsig1 / ymT1) ;
    Ecro700  = (evol manu 'EPSP' lepp2 'SIG' lsig1) coul 7 ;
    Ecro700  = prol line Ecro700 0. ;
    Ecro1    = Ecro1 et (nuag comp 'T' T1 comp 'ECRO' Ecro700) ;
*   A 800 degC :
    T1       = 800. ;
    lept1    = prog 0.2980 1.1167 5.1529 20.2260 ;
    lept1    = 1.e-2 * lept1 ;
    lsig1    = prog 127. 151.75 198.75 293.75 ;
    lsig1    = 1.e6 * lsig1 ;
    trac800  = (evol manu 'EPST' lept1 'SIG' lsig1) coul 8 ;
    Trac1    = Trac1 et (nuag comp 'T' T1 comp 'TRAC' trac800) ;
    ymT1     = ipol ym1 T1 ;
    lepp2    = lept1 - (lsig1 / ymT1) ;
    Ecro800  = (evol manu 'EPSP' lepp2 'SIG' lsig1) coul 8 ;
    Ecro800  = prol line Ecro800 0. ;
    Ecro1    = Ecro1 et (nuag comp 'T' T1 comp 'ECRO' Ecro800) ;
*   A 900 degC :
    T1       = 900. ;
    lept1    = prog 0.3068 1.1273 5.1493 20.1566 ;
    lept1    = 1.e-2 * lept1 ;
    lsig1    = prog 115.37 137.5 161.25 169.12 ;
    lsig1    = 1.e6 * lsig1 ;
    trac900  = (evol manu 'EPST' lept1 'SIG' lsig1) coul 11 ;
    Trac1    = Trac1 et (nuag comp 'T' T1 comp 'TRAC' trac900) ;
    ymT1     = ipol ym1 T1 ;
    lepp2    = lept1 - (lsig1 / ymT1) ;
    Ecro900  = (evol manu 'EPSP' lepp2 'SIG' lsig1) coul 11 ;
    Ecro900  = prol line Ecro900 0. ;
    Ecro1    = Ecro1 et (nuag comp 'T' T1 comp 'ECRO' Ecro900) ;
*   A 1000 degC :
    T1       = 1000. ;
    lept1    = prog 0.2966 1.1009 5.1184 20.1227 ;
    lept1    = 1.e-2 * lept1 ;
    lsig1    = prog 78.75 82.25 96.5 100. ;
    lsig1    = 1.e6 * lsig1 ;
    trac1000 = (evol manu 'EPST' lept1 'SIG' lsig1) coul 10 ;
    Trac1    = Trac1 et (nuag comp 'T' T1 comp 'TRAC' trac1000) ;
    ymT1     = ipol ym1 T1 ;
    lepp2    = lept1 - (lsig1 / ymT1) ;
    Ecro1000 = (evol manu 'EPSP' lepp2 'SIG' lsig1) coul 10 ;
    Ecro1000 = prol line Ecro1000 0. ;
    Ecro1    = Ecro1 et (nuag comp 'T' T1 comp 'ECRO' Ecro1000) ;
    TBIB1 . 'TRAC' = Trac1 ;
    TBIB1 . 'ECRO' = Ecro1 ;

*trac0 = trac20 et trac200 et trac300 et trac400 et trac500 et trac600 et trac700 et trac800 et trac900 et trac1000 ;
*ecro0 = ecro20 et ecro200 et ecro300 et ecro400 et ecro500 et ecro600 et ecro700 et ecro800 et ecro900 et ecro1000 ;
*dess (trac0 et ecro0) ;
    TBIB1 . 'CREATEUR' = mot 'BIBLIO' ;
    TBIB1 . 'REFERENCE' = chai mot1 '_' ent1 ;

    resp TBIB1 ;
    quit biblio ;

  fins ;
* Fin [1], "316L"

*------------------------------ 316L [2] ------------------------------*

* Proprietes thermomecaniques du 316L :
* Camille Cambon, Issam Bendaoud, Sebastien Rouquette, Fabien Soulie.
* "Influence of the first weld bead on strain and stress states in wire+arc additive manufacturing”.
* The 12th International Seminar ”Numerical Analysis of Weldability",
* Institute for Materials Science, Joining and Forming (IMAT),Sep 2018, Seggau, Austria.
* hal-01954354 https://hal.archives-ouvertes.fr/hal-01954354

  si (ent1 ega 2) ;

*---- THERMIQUE ---- :

*   K1     : Conductivite thermique (W/m/K) :
    lt1      = prog 20. 100. pas 100. 1000. 1200. 1400. ;
    lk1      = prog 14. 15.2 16.6 17.9 19. 20.6 21.8 23.1 24.3 26. 27.3 29.9 60. ;
    K1       = evol manu 'T' lt1 'K' lk1 ;
    TBIB1 . 'K' = K1 ;

*   Enth1  : Enthalpie volumique (J/m^3)
    lt1      = prog 0. pas 100. 1500. ;
    lenth1   = prog 0.983 1.36 1.76 2.19 2.62 3.06 3.51 3.96 4.43 4.92 5.42 5.92 6.44 6.97 9.51 10.1 ;
    lenth1   = 1.e9 * lenth1 ;
    Enth1    = evol manu 'T' lt1 'ENTH' lenth1 ;
    TBIB1 . 'ENTH' = Enth1 ;

*   Tfus1  : Temperature de fusion (degC) :
    Tfus1    = 1450. ;
    TBIB1 . 'TFUS' = Tfus1 ;

*   Qlat1  : Chaleur latente volumique de fusion (J/m^3)
    Qlat1    = 2.e9 ;
    TBIB1 . 'QLAT' = Qlat1 ;

*---- MECANIQUE ---- :

*   Ym1    : module de Young (Pa) :
    lt1      = prog 20. 100. pas 100. 1200. ;
    lym1     = prog 197000. 191500. 184000. 176500. 168000. 160000. 151500. 142500. 130000. 108000. 81500. 32000. 7400. ;
    lym1     = 1.e6 * lym1 ;
    ym1      = evol manu T lt1 youn lym1 ;
    TBIB1 . 'YOUN' = ym1 ;

*   Sy1    : limite d'elasticite (Pa)
    lt1      = prog 20. 100. pas 100. 1400. ;
    lsy1     = prog 287. 237. 198. 172. 157. 151. 145. 136. 127. 115. 79. 38. 24. 18. 2. ;
    lsy1     = 1.e6 * lsy1 ;
    sy1      = evol manu T lt1 SIGY lsy1 ;
    TBIB1 . 'SIGY' = sy1 ;
    ltsy1    = lt1 ;

*   Alph1  : dilatation thermique (/K)
    lt1      = prog 20. 100. 300. 400. 600. 700. 800. 1000. 1400. ;
    lalph1   = prog 15.5 16.0 17.1 17.5 18.4 18.7 19.0 19.4 19.6 ;
    lalph1   = 1.e-6 * lalph1 ;
    alph1    = evol manu T lt1 ALPH lalph1 ;
    TBIB1 . 'ALPH' = alph1 ;

*   H1     : module tangent d'elasticite (Pa)
    lt1      = prog 20. 700. pas 100. 1300. ;
    lh1      = prog 2400. 2400. 2350. 1500. 800. 725. 150. 10. ;
    lh1      = 1.e6 * lh1 ;
    H1       = evol manu T lt1 H lh1 ;
    TBIB1 . 'H' = H1 ;

*   Ecro1  : Courbes d'ecrouissage :
    lt1      = ((lt1 et ltsy1) uniq) ordo ;
    nb1      = dime lt1 ;
    lep1     = prog 0. 1. ;
    ecro1    = vide nuage ;
    ic1      = 0 ;
    repe b1 nb1 ;
      ic1      = ic1 + 1 ;
      si (ic1 ega 9) ; ic1 = ic1 + 1 ; fins ;
      ti1      = extr lt1 &b1 ;
      syi1     = ipol sy1 ti1 ;
      hi1      = ipol H1  ti1 ;
      lmsi1    = prog syi1 (syi1+hi1) ;
      ecroi1   = evol manu epeq lep1 smeq lmsi1 ;
      ecroi1   = ecroi1 coul ic1 ;
      ecro1    = ecro1 et (nuag comp T ti1 comp ECRO ecroi1) ;
    fin b1 ;
    TBIB1 . 'ECRO' = ecro1 ;

    TBIB1 . 'CREATEUR' = mot 'BIBLIO' ;
    TBIB1 . 'REFERENCE' = chai mot1 '_' ent1 ;

    resp TBIB1 ;
    quit biblio ;

  fins ;
* Fin [2], "316L"

*------------------------------ 316L [4] ------------------------------*

  si (ent1 ega 4) ;

*--- Conductivite thermique  [w/mm.K] :
  LT1      = prog 20 100 200 300 400 500 600 700 800 900 1000 1100 1200 1300 1400 ;
  LK1      = prog 0.0141 0.0152 0.0167 0.0181 0.0195 0.0209 0.0224 0.0238 0.0252 0.0267 0.0281 0.0295 0.0309 0.0324 0.0338 ;
  EVK1     = EVOL MANU 'T' LT1 'K' LK1 ;
  comm /!\  conversion [w/mm.K] -> [w/m.K] ;
  K_316L   = 1.e3 * EVK1 ;
  TBIB1 . 'K' = K_316L ;


*--- Capacite calorifique massique [J/Kg.K] :
  LT1      = prog 20 100 200 300 400 500 600 700 800 900 1000 1100 ;
  LCP1     = prog 492 502 514 526 538 550 562 575 587 599 611 623  ;
  EVCP1    = evol manu 'T' LT1 'C' LCP1 ;
  C_316L   = EVCP1 ;
  TBIB1 . 'C' = C_316L ;


*--- Module d'Young (GPa) :
  LT1      = prog 20 100 200 300 400 500 600 700 800 900 1000 1100 1200 1300 1400 4000 ;
  LYM1     = prog 195.6 191.2 185.7 179.6 172.6 164.5 155.0 144.1 131.4 116.8 100.0 80.00 57.00 30.00 2.000 2.000 ;
  YM_316L = evol manu 'T' LT1 'YOUN' LYM1 ;
  comm /!\ conversion [MPa] -> [Pa] ;
  TBIB1 . 'YOUN' = 1.e9 * YM_316L ;


*--- Coefficient de Poisson :
  TBIB1 . 'NU'   = 0.29 ;


*--- Coeficient de dilatation thermique [1/K] :
  LT1      = prog 20 100 200 300 400 500 600 700 800 900 1000 1100 1200 1300 1400 4000 ;
  LALPHA1  = prog 1.46E-05 1.54E-05 1.62E-05 1.69E-05 1.74E-05 1.78E-05 1.81E-05 1.84E-05 1.87E-05 1.90E-05 1.93E-05 1.95E-05 1.98E-05 2.00E-05 2.02E-05 2.02E-05 ;
  AL_316L = evol manu 'T' LT1 'ALPH' LALPHA1 ;
  TBIB1 . 'ALPH' = AL_316L ;


*--- limite élastique [MPa]
  LT1      = prog 20 275 550 750 900 1000 1100 1400 ;
  LSY1     = prog 125.6 97.60 90.90 71.40 66.20 31.82 19.73 2.100 ;
  EVSY1    = evol manu 'T' LT1 'SIGY' LSY1 ;
  comm /!\ conversion [MPa] -> [Pa] ;
  SY_316L = 1.e6 * EVSY1 ;
  TBIB1 . 'SIGY' = SY_316L ;


*--- Coefficients ecrouissage cinematique modele EP Chaboche :
*    LCiMur : coefficient Ci article Muransky
*    LGiMur : coefficient Gammai article Muransky
*    LCiC3M : coefficient Ci loi EP Chaboche Cast3M
*    LAiC3M : coefficient Ai loi EP Chaboche Cast3M
  LT1      = prog 20 275 550 750 900 1000 1100 1400 ;
  LC1Mur   = prog 156435.0 100631.0 64341.00 56232.00 0.050000 0 0 0 ;
  LG1Mur   = 1410.9 ;
  LC2Mur   = prog 6134.0 5568.0 5227.0 4108.0 292.00 0 0 0 ;
  LG2Mur   = 47.19 ;
  comm /!\ conversion [MPa] -> [Pa] ;
  LC1Mur   = 1.e6 * LC1Mur ;
  LC2Mur   = 1.e6 * LC2Mur ;
  LC1C3M   = LG1Mur ;
  LC2C3M   = LG2Mur ;
  LA1C3M   = LC1Mur / LG1Mur ;
  LA2C3M   = LC2Mur / LG2Mur ;
  EVA1     = evol manu 'T' LT1 'A1' LA1C3M ;
  EVA2     = evol manu 'T' LT1 'A2' LA2C3M ;
  R0_316L = evol manu 'T' (extr SY_316L absc) 'R0' (extr SY_316L ordo) ;
  TBIB1 . 'R0' = R0_316L ;
  TBIB1 . 'A1' = EVA1 ;
  TBIB1 . 'C1' = LC1C3M ;
  TBIB1 . 'A2' = EVA2 ;
  TBIB1 . 'C2' = LC2C3M ;


*--- Coefficients ecrouissage isotrope modele EP Chaboche :
  LT1      = prog 20 275 550 750 900 1000 1100 1400 ;
  LRM1     = prog 153.4 154.7 150.6 57.90 0 0 0 0 ;
  EVRM1    = evol manu 'T' LT1 'RM' LRM1 ;
  comm /!\ conversion [MPa] -> [Pa] ;
  EVRM1    = 1.e6 * EVRM1 ;
  TBIB1 . 'RM' = EVRM1 + (evol manu 'T' (extr SY_316L absc) 'RM' (extr SY_316L ordo)) ;
  TBIB1 . 'B'  = 6.9 ;


    TBIB1 . 'CREATEUR' = mot 'BIBLIO' ;
    TBIB1 . 'REFERENCE' = chai mot1 '_' ent1 ;

    resp TBIB1 ;
    quit biblio ;

  fins ;
* Fin [4], "316L"

* Reference ent1 n'existe pas pour mot1
  erre (chai '*****  La reference' ' ' ent1 ' ne concerne pas' ' ' mot1) ;
  quit biblio ;

* Fin mot-cle "316L"
fins ;

*----------------------------------------------------------------------*
*                           MOT-CLE : 9Cr ODS                          *
*----------------------------------------------------------------------*

si (ega mot1 '9Cr ODS') ;
  imot1    = 2 ;

* Initialisation table de sortie :
  TBIB1    = table ;

*----------------------------- 9Cr ODS [3] ----------------------------*

* Brendan Le Gloannec.
* "Modifications microstructurales sous sollicitations thermomécaniques sévères :
* application au soudage par résistance des gaines de combustibles en aciers ODS".
* Thèse de doctorat.
* Université de Bordeaux.
* 2016.

* Numero reference bib. par defaut :
  si (ent1 ega 0) ; ent1 = 3 ; fins ;

  si (ent1 ega 3) ;


*--- Masse volumique [Kg/m3] :
  RHO_9ODS =      7760. ;
  TBIB1 . 'RHO' = RHO_9ODS ;


*--- Conductivite thermique  [w/mm.K] :
  CONDTH_9ODS1  = EVOL MANU 'T' (PROG  2.5e+01  5e+01     1e+02    1.5e+02
                                       2e+02    2.5e+02   3e+02    3.5e+02
                                       4e+02    4.5e+02   5e+02    5.5e+02)
                            'K' (PROG  2.3e-02  2.27e-02  2.23e-02
                                       2.36e-02 2.49e-02  2.54e-02  2.63e-02
                                       2.6e-02  2.65e-02  2.71e-02  2.74e-02
                                       2.72e-02) ;
  CONDTH_9ODS2  = EVOL MANU 'T' (PROG 6e+02     6.5e+02   7e+02    7.5e+02
                                      8e+02     8.5e+02   9e+02    9.5e+02
                                      1e+03     1.05e+03  1.1e+03  1.15e+03
                                      1.18e+03  1.45e+03)
                            'K' (PROG 2.73e-02  2.65e-02    2.57e-02
                                        2.14e-02  2.53e-02  4.44e-02  2.9e-02
                                        2.65e-02  2.65e-02  2.65e-02  2.73e-02
                                        2.82e-02  2.88e-02  3.28e-02) ;
  comm /!\  conversion [w/mm.K] -> [w/m.K] ;
  CONDTH_9ODS   = 1.e3 * (CONDTH_9ODS1 + CONDTH_9ODS2) ;
  TBIB1 . 'K' = CONDTH_9ODS ;


*--- Capacite calorifique massique [J/Kg.K] :
  CAPAC_9ODS1 = EVOL MANU 'T' (PROG 2.5e+01  5.0e+01  1.0e+02  1.5e+02  2.0e+02
                                    2.5e+02  3.0e+02  3.5e+02  4.0e+02
                                    4.5e+02  5.0e+02  5.5e+02  7.0e+02
                                    7.5e+02  8.0e+02  8.5e+02  9.0e+02)
                          'C' (PROG 4.4e+02  4.4e+02  4.4e+02  4.75e+02 5.1e+02
                                    5.3e+02  5.6e+02  5.7e+02  6.0e+02
                                    6.4e+02  6.8e+02  7.2e+02  9.5e+02
                                    9.6e+02  7.8e+02  1.14e+03 6.8e+02) ;
  CAPAC_9ODS2 = EVOL MANU 'T' (PROG 9.5e+02   1.0e+03   1.05e+03  1.10e+03
                                    1.15e+03  1.45e+03  1.46e+03  1.47e+03
                                    1.48e+03  1.5e+03)
                          'C' (PROG 6.2e+02   6.2e+02   6.2e+02   6.4e+02
                                    6.6e+02   7.95e+02  9.94e+03  9.942e+03
                                    8.38e+02  8.38e+02) ;
  CAPAC_9ODS  = (CAPAC_9ODS1 + CAPAC_9ODS2) ;
  TBIB1 . 'C' = CAPAC_9ODS ;


*--- Conductivite electrique 9Cr ODS [Ohm.mm]^-1 :
  CONDEL_9ODS  = EVOL MANU 'T'  (PROG  2.2e+01   6.7e+02  1.5e+03   1.6e+03)
                           'KD' (PROG  0.2e+04   1.0e+03  0.606e+03 0.606e+03) ;
  comm /!\ conversion [Ohm.mm]^-1 -> [Ohm.m]^-1 ;
  TBIB1 . 'KE' = 1.e3*CONDEL_9ODS ;


*--- Module d'Young (MPa) :
  YONG_9CrODS = EVOL MANU 'T' (PROG 2.e+01    1.2e+02  2.2e+02  4.0e+02   4.7e+02   6.15e+02  6.6e+02  7.6e+02
                                    8.3e+02   9.6e+02  1.e+03   1.5e+03)

                       'YOUN' (PROG  2.16e+5  2.1e+5   2.05e+5  1.9e+5    1.8e+5    1.6e+5    1.5e+5   1.2e+5
                                     1.15e+5  1.15e+5  1.14e+5  1.     ) ;
  comm /!\ conversion [MPa] -> [Pa] ;
  TBIB1 . 'YOUN' = 1.e6 * YONG_9CrODS ;


*--- Coefficient de Poisson :
  NU_9CrODS = EVOL MANU 'T' (PROG 2.e+01   1.45e+03  1.5e+03 )
                       'NU' (PROG 2.9e-01  2.9e-01   0.49e-01) ;
  comm /!\ : on prend une valeur constante car le choix de modelisation du comportement en phase liquide ;
*       n'est pas du ressort des donnees :
  TBIB1 . 'NU'   = 0.29 ;


*--- Coeficient de dilatation thermique [1/K] :
  ALPH_9CrODS1 = EVOL MANU 'T'(PROG  2.e+01  1.e+02    1.5e+02  2.e+02  2.5e+02  3.e+02   3.5e+02  4.e+02  4.5e+02
                                     5.e+02  5.5e+02 )
                      'ALPH' (PROG 1.01e-05  1.07e-05  1.1e-05   1.13e-05  1.17e-05  1.21e-05  1.24e-05 1.28e-05
                                   1.31e-05  1.36e-05  1.39e-05  );
  ALPH_9CrODS2 = EVOL MANU 'T'(PROG  6.e+02   6.5e+02  7.e+02   7.5e+02  8.e+02   8.5e+02 9.5e+02
                                     1.e+03  1.05e+03  1.1e+03  1.5e+03)
                      'ALPH' (PROG 1.42e-05  1.46e-05  1.5e-05  1.53e-05 1.57e-05
                                   1.6e-05   -3.e-06   2.4e-05  2.4e-05   2.4e-05   2.91e-05) ;
  ALPH_9CrODS =   ALPH_9CrODS1+ALPH_9CrODS2;
  TBIB1 . 'ALPH' = ALPH_9CrODS ;


*--- limite élastique [MPa]
  KK_9CrODS = EVOL MANU 'T'  (PROG   2.e+01     4.e+02    5.e+02   6.e+02   6.5e+02   7.5e+02  9.5e+02  1.25e+03 1.45e+03 1.5e+03)
                        'KK' (PROG   1.083e+03  8.87e+02  7.03e+02 4.32e+02 1.96e+02  1.65e+02  1.e+02  2.2e+01  1.        1.);
  comm /!\ conversion [MPa] -> [Pa] ;
  KK_9CrODS = 1.e6 * KK_9CrODS ;
  TBIB1 . 'KK' = KK_9CrODS ;


*--- Coefficient d'ecrouissage isotrope a saturation Rmin & Rmax (Rmax = KK + Rmin) [MPa] lisse :
  RMIN_9CrODS =  EVOL MANU 'T'    (PROG  2.0e+01  4.e+02   5.e+02   6.e+02   7.5e+02   9.5e+02  1.45e+03)
                           'RMAX' (PROG  1.33e+02 6.6e+01  4.7e+01  4.3e+01  3.8e+01   1.       0.) ;
  comm /!\ conversion [MPa] -> [Pa] ;
  RMIN_9CrODS = 1.e6 * RMIN_9CrODS ;
  TBIB1 . 'RMIN' = RMIN_9CrODS ;
  KK_9CrODS      = EVOL MANU 'T' (EXTR KK_9CrODS ABSC) 'RMAX' (EXTR KK_9CrODS ORDO) ;
  TBIB1 . 'RMAX' = KK_9CrODS + RMIN_9CrODS ;


*--- Coefficient d'ecrouissage isotrope BR [MPa]
  BR_9CrODS =  EVOL MANU 'T'  (PROG  2.e+01    4.e+02   5.e+2    6.e+02    6.5e+02  7.5e+2    9.5e+02  1.50e+03)
                         'BR' (PROG  1.24e+02  1.6e+02  2.53e+02  1.26e+02 6.7e+01  1.08e+02  0.       0.      ) ;
  comm /!\ conversion [MPa] -> [Pa] ;
  BR_9CrODS = 1.e6 * BR_9CrODS ;
  TBIB1 . 'BR' = BR_9CrODS ;


*--- Exposant viscosite N :
  N_9CrODS = EVOL MANU 'T' (PROG  2.e+01    5.e+02   6.5e+02   7.5e+02  9.5e+02   1.25e+03  1.45e+03  )
                       'N' (PROG  6.43e+00  6.43e+00 4.32e+00  2.77e+00 1.81e+01  1.136e+01 1.1360e+01) ;
  TBIB1 . 'N'    = N_9CrODS ;


*--- Parametre viscosite K0 [MPa.s]
  K0_9CrODS = EVOL MANU 'T'  (PROG   2.e+01    5.e+02    6.5e+02   7.5e+02   9.5e+02    1.25e+03  1.50e+03)
                        'K0' (PROG   3.11e+02  3.11e+02  3.03e+02  4.61e+02  1.412e+02  1.02e+02  1.02e+02 ) ;
  comm /!\ conversion [MPa] -> [Pa] ;
  K0_9CrODS = 1.e6 * K0_9CrODS ;
  TBIB1 . 'K0' = K0_9CrODS ;


    TBIB1 . 'CREATEUR' = mot 'BIBLIO' ;
    TBIB1 . 'REFERENCE' = chai mot1 '_' ent1 ;

    resp TBIB1 ;
    quit biblio ;

  fins ;
*--- Fin [3], "9Cr ODS"


* Numero reference bib. ent1 n'existe pas pour mot1
  erre (chai '*****  La reference' ' ' ent1 ' ne concerne pas' ' ' mot1) ;
  quit biblio ;

* Fin mot-cle "9Cr ODS"
fins ;

*----------------------------------------------------------------------*
*                           MOT-CLE : Inconel 82                       *
*----------------------------------------------------------------------*

si (ega mot1 'Inconel 82') ;
  imot1    = 3 ;

* Initialisation table de sortie :
  TBIB1    = table ;

*---------------------------- Inconel 82 [4] --------------------------*
* Reference : voir notice BIBLIO

* Numero reference bib. par defaut :
  si (ent1 ega 0) ; ent1 = 4 ; fins ;

  si (ent1 ega 4) ;


*--- Masse volumique [Kg/m3] :
*  RHO1     =      'XX' ;
*  TBIB1 . 'RHO' = RHO1 ;


*--- Conductivite thermique  [w/mm.K] :
  LT1      = prog 27. 77. 127. 177. 227. PAS 100. 1327. ;
  LK1      = prog 0.0142 0.0151 0.0160 0.0168 0.0177 0.0195 0.0213 0.0230 0.0248 0.0265 0.0283 0.0301 0.0318 0.0336 0.0353 0.0371 ;
  EVK1     = EVOL MANU 'T' LT1 'K' LK1 ;
  comm /!\  conversion [w/mm.K] -> [w/m.K] ;
  K_INCO82   = 1.e3 * EVK1 ;
  TBIB1 . 'K' = K_INCO82 ;


*--- Capacite calorifique massique [J/Kg.K] :
  LT1      = prog 20. 100. PAS 100. 900. 1204. 1316. ;
  LCP1     = prog 444 465 486 502 519 536 578 595 611 628 733 766 ;
  EVCP1    = evol manu 'T' LT1 'C' LCP1 ;
  C_INCO82 = EVCP1 ;
  TBIB1 . 'C' = C_INCO82 ;


*--- Module d'Young (GPa) :
  LT1      = prog 21 93 149 204 260 316 371 427 482 538 600 PAS 100. 1000. 1150 1260 1316 1371 ;
  LYM1     = prog 213.7 208.2 206.2 203.4 200.0 197.9 194.4 190.3 186.2 182.0 180.0 172.0 164.0 154.0 143.0 115.0 78.30 39.30 2.000 ;
  YM_INCO82 = evol manu 'T' LT1 'YOUN' LYM1 ;
  comm /!\ conversion [MPa] -> [Pa] ;
  TBIB1 . 'YOUN' = 1.e9 * YM_INCO82 ;


*--- Coefficient de Poisson :
  TBIB1 . 'NU'   = 0.31 ;


*--- Coeficient de dilatation thermique [1/K] :
  LT1      = prog 38 66 93 121 149 178 204 232 260 288 316 343 371 399 428 500 PAS 100. 900. 1093 1371 ;
  LALPHA1  = prog 1.24E-05 1.27E-05 1.30E-05 1.32E-05 1.33E-05 1.35E-05 1.36E-05 1.38E-05 1.39E-05 1.40E-05 1.41E-05 1.42E-05 1.43E-05 1.44E-05 1.45E-05 1.49E-05 1.53E-05 1.58E-05 1.61E-05 1.64E-05 1.70E-05 1.78E-05 ;
  AL_INCO82 = evol manu 'T' LT1 'ALPH' LALPHA1 ;
  TBIB1 . 'ALPH' = AL_INCO82 ;


*--- limite élastique [MPa]
  LT1      = prog 22 316 538 760 982 1200 1400 ;
  LSY1     = prog 206.8 161.0 171.0 144.7 34.80 21.00 2.000 ;
  EVSY1    = evol manu 'T' LT1 'SIGY' LSY1 ;
  comm /!\ conversion [MPa] -> [Pa] ;
  SY_INCO82 = 1.e6 * EVSY1 ;
  TBIB1 . 'SIGY' = SY_INCO82 ;


*--- Coefficients ecrouissage cinematique modele EP Chaboche :
*    LCiMur : coefficient Ci article Muransky
*    LGiMur : coefficient Gammai article Muransky
*    LCiC3M : coefficient Ci loi EP Chaboche Cast3M
*    LAiC3M : coefficient Ai loi EP Chaboche Cast3M
  LT1      = prog 22.000 316.00 538.00 760.00 982.00 1200.0 1400.0 ;
  LC1Mur   = prog 2.54865E+05 1.92628E+05 1.04132E+05 1.31679E+05 1.79993E+05 0.0000 0.0000 ;
  LG1Mur   = 2496.2 ;
  LC2Mur   = prog 1731.0 2304.6 2571.2 2668.4 623.60 0.0000 0.0000 ;
  LG2Mur   = 3.9560 ;
  comm /!\ conversion [MPa] -> [Pa] ;
  LC1Mur   = 1.e6 * LC1Mur ;
  LC2Mur   = 1.e6 * LC2Mur ;
  LC1C3M   = LG1Mur ;
  LC2C3M   = LG2Mur ;
  LA1C3M   = LC1Mur / LG1Mur ;
  LA2C3M   = LC2Mur / LG2Mur ;
  EVA1     = evol manu 'T' LT1 'A1' LA1C3M ;
  EVA2     = evol manu 'T' LT1 'A2' LA2C3M ;
  R0_INCO82 = evol manu 'T' (extr SY_INCO82 absc) 'R0' (extr SY_INCO82 ordo) ;
  TBIB1 . 'R0' = R0_INCO82 ;
  TBIB1 . 'A1' = EVA1 ;
  TBIB1 . 'C1' = LC1C3M ;
  TBIB1 . 'A2' = EVA2 ;
  TBIB1 . 'C2' = LC2C3M ;


*--- Coefficients ecrouissage isotrope modele EP Chaboche :
  LT1      = prog 22.000 316.00 538.00 760.00 982.00 1200.0 1400.0 ;
  LRM1     = prog 83.5    75.3   83.2    0.     0.      0.     0. ;
  EVRM1    = evol manu 'T' LT1 'RM' LRM1 ;
  comm /!\ conversion [MPa] -> [Pa] ;
  EVRM1    = 1.e6 * EVRM1 ;
  TBIB1 . 'RM' = EVRM1 + (evol manu 'T' (extr SY_INCO82 absc) 'RM' (extr SY_INCO82 ordo)) ;
  TBIB1 . 'B'  = 20. ;


    TBIB1 . 'CREATEUR' = mot 'BIBLIO' ;
    TBIB1 . 'REFERENCE' = chai mot1 '_' ent1 ;

    resp TBIB1 ;
    quit biblio ;

  fins ;
*--- Fin [4], "Inconel 82"


* Numero reference bib. ent1 n'existe pas pour mot1
  erre (chai '*****  La reference' ' ' ent1 ' ne concerne pas' ' ' mot1) ;
  quit biblio ;

* Fin mot-cle "Inconel 82"
fins ;

*----------------------------------------------------------------------*
*                            MOT-CLE : A508                            *
*----------------------------------------------------------------------*

si ((ega mot1 'A508') ou (ega mot1 '16MND5')) ;
  imot1    = 4 ;

* Initialisation table de sortie :
  TBIB1    = table ;

* Numero reference bib. par defaut :
  si (ent1 ega 0) ; ent1 = 4 ; fins ;

*------------------------------ A508 [4] ------------------------------*
* Reference : voir notice BIBLIO

  si (ent1 ega 4) ;


*--- Masse volumique [Kg/m3] :
*  RHO1     =      'XX' ;
*  TBIB1 . 'RHO' = RHO1 ;


*--- Conductivite thermique  [w/mm.K] :
  LT1      = prog 25.000 50.000 100.00 150.00 200.00 250.00 300.00 350.00 400.00 450.00 500.00 550.00 600.00 650.00 700.00 750.00 800.00 850.00 900.00 950.00 1000.0 1100.0 1200.0 1300.0 1400.0 ;
  LK1      = prog 3.84000E-02 3.94000E-02 4.11000E-02 4.12000E-02 4.09000E-02 4.04000E-02 3.95000E-02 3.91000E-02 3.83000E-02 3.74000E-02 3.64000E-02 3.58000E-02 3.48000E-02 3.42000E-02 3.42000E-02 5.90000E-02 3.67000E-02 2.69000E-02 2.84000E-02 2.78000E-02 2.83000E-02 2.95000E-02 3.09000E-02 3.24000E-02 3.38000E-02 ;
  EVK1     = EVOL MANU 'T' LT1 'K' LK1 ;
  comm /!\  conversion [w/mm.K] -> [w/m.K] ;
  K_A508   = 1.e3 * EVK1 ;
  TBIB1 . 'K' = K_A508 ;


*--- Capacite calorifique massique [J/Kg.K] :
  LT1      = prog 25.000 50.000 100.00 150.00 200.00 250.00 300.00 350.00 400.00 450.00 500.00 550.00 600.00 650.00 700.00 750.00 800.00 850.00 900.00 950.00 1000.0 1327.0 1527.0 ;
  LCP1     = prog 430.00 450.00 487.00 508.00 526.00 542.00 560.00 581.00 605.00 630.00 659.00 696.00 746.00 823.00 946.00 1510.0 873.00 619.00 633.00 611.00 615.00 735.00 835.00 ;
  EVCP1    = evol manu 'T' LT1 'C' LCP1 ;
  C_A508   = EVCP1 ;
  TBIB1 . 'C' = C_A508 ;


*--- Module d'Young (GPa) :
  LT1      = prog 20.000 100.00 200.00 300.00 400.00 500.00 600.00 700.00 800.00 900.00 1000.0 1100.0 1200.0 1300.0 1400.0 5000.0 ;
  LYM1     = prog 212.00 207.20 201.30 194.70 187.10 178.30 167.90 156.20 142.40 126.60 108.40 86.700 61.800 32.500 2.2000 2.2000 ;
  YM_A508 = evol manu 'T' LT1 'YOUN' LYM1 ;
  comm /!\ conversion [GPa] -> [Pa] ;
  TBIB1 . 'YOUN' = 1.e9 * YM_A508 ;


*--- Coefficient de Poisson :
  TBIB1 . 'NU'   = 0.294 ;


*--- Coeficient de dilatation thermique [1/K] :
  LT1      = prog 25.000 50.000 100.00 150.00 200.00 250.00 300.00 350.00 400.00 450.00 500.00 550.00 600.00 650.00 700.00 750.00 800.00 850.00 900.00 950.00 1000.0 1100.0 1200.0 1300.0 1400.0 ;
  LALPHA1  = prog 7.83000E-06 7.82000E-06 7.81000E-06 7.80000E-06 7.78000E-06 7.77000E-06 7.75000E-06 7.73000E-06 7.72000E-06 7.70000E-06 7.68000E-06 7.67000E-06 7.65000E-06 7.70000E-06 7.68000E-06 7.66000E-06 7.64000E-06 7.62000E-06 7.59000E-06 7.57000E-06 7.55000E-06 7.55000E-06 7.55000E-06 7.55000E-06 7.55000E-06 ;
  AL_A508 = evol manu 'T' LT1 'ALPH' LALPHA1 ;
  TBIB1 . 'ALPH' = AL_A508 ;


*--- limite élastique [MPa]
  LT1      = prog 20.000 316.00 538.00 760.00 982.00 1200.0 1400.0 ;
  LSY1     = prog 529.00 471.30 395.70 62.400 30.800 16.400 2.0000 ;
  EVSY1    = evol manu 'T' LT1 'SIGY' LSY1 ;
  comm /!\ conversion [MPa] -> [Pa] ;
  SY_A508 = 1.e6 * EVSY1 ;
  TBIB1 . 'SIGY' = SY_A508 ;


*--- Coefficients ecrouissage cinematique modele EP Chaboche :
*    LCiMur : coefficient Ci article Muransky
*    LGiMur : coefficient Gammai article Muransky
*    LCiC3M : coefficient Ci loi EP Chaboche Cast3M
*    LAiC3M : coefficient Ai loi EP Chaboche Cast3M
  LT1      = prog 20.000 316.00 538.00 760.00 982.00 1200.0 1400.0 ;
  LC1Mur   = prog 1.36102E+05 2.55002E+05 5.08928E+05 2.15895E+05 14497. 0.0000  0.0000 ;
  LG1Mur   = 5130.9 ;
  LC2Mur   = prog 7308.9 10672. 5589.7 2053.8 1034.3 0.0000 0.0000 ;
  LG2Mur   = 53.220 ;
  comm /!\ conversion [MPa] -> [Pa] ;
  LC1Mur   = 1.e6 * LC1Mur ;
  LC2Mur   = 1.e6 * LC2Mur ;
  LC1C3M   = LG1Mur ;
  LC2C3M   = LG2Mur ;
  LA1C3M   = LC1Mur / LG1Mur ;
  LA2C3M   = LC2Mur / LG2Mur ;
  EVA1     = evol manu 'T' LT1 'A1' LA1C3M ;
  EVA2     = evol manu 'T' LT1 'A2' LA2C3M ;
  R0_A508  = evol manu 'T' (extr SY_A508 absc) 'R0' (extr SY_A508 ordo) ;
  TBIB1 . 'R0' = R0_A508 ;
  TBIB1 . 'A1' = EVA1 ;
  TBIB1 . 'C1' = LC1C3M ;
  TBIB1 . 'A2' = EVA2 ;
  TBIB1 . 'C2' = LC2C3M ;


*--- Coefficients ecrouissage isotrope modele EP Chaboche :
  TBIB1 . 'RM' = 0. + (evol manu 'T' (extr SY_A508 absc) 'RM' (extr SY_A508 ordo)) ;
  TBIB1 . 'B'  = 20. ;


    TBIB1 . 'CREATEUR' = mot 'BIBLIO' ;
    TBIB1 . 'REFERENCE' = chai mot1 '_' ent1 ;

    resp TBIB1 ;
    quit biblio ;

  fins ;
*--- Fin [4], "A508"

*------------------------------ A508 [5] ------------------------------*
* Reference : voir notice BIBLIO

  si (ent1 ega 5) ;

*--- Module d'Young (GPa) :
  ltc1     = prog 20. 50. PAS 50. 900. 1000. 1050. 1250. 1500. ;
  ltYm1    = prog 204. 203. 201. 199. 196. 192. 187. 182. 176. 171. 166. 158. 142. 105. 82. 64. 52. 42. 33. 15. 9.3 2.5 1.5 ;
  comm /!\ conversion [GPa] -> [Pa] ;
  ltYm1    = 1.e9 * ltYm1 ;
  YM_A508  = evol manu 'T' ltc1 'YOUN' ltYm1 ;
  TBIB1 . 'YOUN' = YM_A508 ;


*--- Coefficient de Poisson :
  TBIB1 . 'NU'   = 0.3 ;

    TBIB1 . 'CREATEUR' = mot 'BIBLIO' ;
    TBIB1 . 'REFERENCE' = chai mot1 '_' ent1 ;

    resp TBIB1 ;
    quit biblio ;

  fins ;
*--- Fin [5], "A508"

* Numero reference bib. ent1 n'existe pas pour mot1
  erre (chai '*****  La reference' ' ' ent1 ' ne concerne pas' ' ' mot1) ;
  quit biblio ;

* Fin mot-cle "A508"
fins ;

*----------------------------------------------------------------------*
*                          MOT-CLE : Austenite                         *
*----------------------------------------------------------------------*

si (ega mot1 'Austenite') ;
  imot1    = 5 ;

* Initialisation table de sortie :
  TBIB1    = table ;

* Numero reference bib. par defaut :
  si (ent1 ega 0) ; ent1 = 5 ; fins ;

*---------------------------- Austenite [5] ---------------------------*
* Reference : voir notice BIBLIO

  si (ent1 ega 5) ;

*   Appel a BIBLIO pour proprietes elastiques :
    t16MND5  = biblio 16MND5 refe 5 ;

*--- Module d'Young :
    TBIB1 . 'YOUN' = t16MND5 . 'YOUN' ;

*--- Coefficient de Poisson :
    TBIB1 . 'NU'   = t16MND5 . 'NU' ;

*--- Dilatation thermique :
    TBIB1 . 'TALP' = 25. ;
    ltc1     = prog 25. 1500. ;
    lAlph1   = (2.52e-9 * ltc1) + 22.6e-6 ;
    evCaAus1 = evol manu 'T' ltc1 'ALPH' lAlph1 ;
    TBIB1 . 'ALPH' = evCaAus1 ;

*--- Difference de compacite avec la ferrite :
    TBIB1 . 'DCOM' = -0.01 ;

*--- Limite d'elasticite :
    ltc1     = prog 20. 200. 400. 500. 600. PAS 50. 850. 1000. 1100. 1250. 1500. ;
    lSyAus1  = prog 250. 200. 150. 120. 95. 85. 75. 67. 60. 52. 30. 18. 5. 5. ;
    lSyAus1  = 1.e6 * lSyAus1 ;
    evCSyAu1 = evol manu 'T' ltc1 'SIGY' lSyAus1 ;
    TBIB1 . 'SIGY' = evCSyAu1 ;

*--- Courbes d'ecrouissage :
    lep1     = prog 0. 0.05 0.1 0.15 0.2 ;
    T1       = 20. ;
    lsm1     = prog 0. 345. 490. 570. 630. ;
    lsm1     = 1.e6 * lsm1 ;
    sigyT1   = ipol evCSyAu1 T1 ;
    lsm1     = lsm1 + sigyT1 ;
    evecAus1 = evol manu 'EPSP' lep1 'SIG' lsm1 ;
    evecAus1 = evecAus1 coul 1 ;
    nuagAus1 = nuag comp 'T' T1 comp 'ECRO' evecAus1 ;
    T1       = 200. ;
    lsm1     = prog 0. 345. 490. 570. 630. ;
    lsm1     = 1.e6 * lsm1 ;
    sigyT1   = ipol evCSyAu1 T1 ;
    lsm1     = lsm1 + sigyT1 ;
    evecAus1 = evol manu 'EPSP' lep1 'SIG' lsm1 ;
    evecAus1 = evecAus1 coul 2 ;
    nuagAus1 = nuagAus1 et (nuag comp 'T' T1 comp 'ECRO' evecAus1) ;
    T1       = 500. ;
    lsm1     = prog 0. 145. 250. 345. 440. ;
    lsm1     = 1.e6 * lsm1 ;
    sigyT1   = ipol evCSyAu1 T1 ;
    lsm1     = lsm1 + sigyT1 ;
    evecAus1 = evol manu 'EPSP' lep1 'SIG' lsm1 ;
    evecAus1 = evecAus1 coul 3 ;
    nuagAus1 = nuagAus1 et (nuag comp 'T' T1 comp 'ECRO' evecAus1) ;
    T1       = 700. ;
    lsm1     = prog 0. 120. 215. 310. 405. ;
    lsm1     = 1.e6 * lsm1 ;
    sigyT1   = ipol evCSyAu1 T1 ;
    lsm1     = lsm1 + sigyT1 ;
    evecAus1 = evol manu 'EPSP' lep1 'SIG' lsm1 ;
    evecAus1 = evecAus1 coul 4 ;
    nuagAus1 = nuagAus1 et (nuag comp 'T' T1 comp 'ECRO' evecAus1) ;
    T1       = 800. ;
    lsm1     = prog 0. 95. 165. 230. 295. ;
    lsm1     = 1.e6 * lsm1 ;
    sigyT1   = ipol evCSyAu1 T1 ;
    lsm1     = lsm1 + sigyT1 ;
    evecAus1 = evol manu 'EPSP' lep1 'SIG' lsm1 ;
    evecAus1 = evecAus1 coul 5 ;
    nuagAus1 = nuagAus1 et (nuag comp 'T' T1 comp 'ECRO' evecAus1) ;
    T1       = 900. ;
    lsm1     = prog 0. 36. 66. 96. 126. ;
    lsm1     = 1.e6 * lsm1 ;
    sigyT1   = ipol evCSyAu1 T1 ;
    lsm1     = lsm1 + sigyT1 ;
    evecAus1 = evol manu 'EPSP' lep1 'SIG' lsm1 ;
    evecAus1 = evecAus1 coul 6 ;
    nuagAus1 = nuagAus1 et (nuag comp 'T' T1 comp 'ECRO' evecAus1) ;
    T1       = 1000. ;
    lsm1     = prog 0. 20. 40. 60. 80. ;
    lsm1     = 1.e6 * lsm1 ;
    sigyT1   = ipol evCSyAu1 T1 ;
    lsm1     = lsm1 + sigyT1 ;
    evecAus1 = evol manu 'EPSP' lep1 'SIG' lsm1 ;
    evecAus1 = evecAus1 coul 7 ;
    nuagAus1 = nuagAus1 et (nuag comp 'T' T1 comp 'ECRO' evecAus1) ;
    T1       = 1100. ;
    lsm1     = prog 0. 5. 10. 15. 20. ;
    lsm1     = 1.e6 * lsm1 ;
    sigyT1   = ipol evCSyAu1 T1 ;
    lsm1     = lsm1 + sigyT1 ;
    evecAus1 = evol manu 'EPSP' lep1 'SIG' lsm1 ;
    evecAus1 = evecAus1 coul 8 ;
    nuagAus1 = nuagAus1 et (nuag comp 'T' T1 comp 'ECRO' evecAus1) ;
    T1       = 1250. ;
    lsm1     = prog 0. 2.5 5. 7.5 10. ;
    lsm1     = 1.e6 * lsm1 ;
    sigyT1   = ipol evCSyAu1 T1 ;
    lsm1     = lsm1 + sigyT1 ;
    evecAus1 = evol manu 'EPSP' lep1 'SIG' lsm1 ;
    evecAus1 = evecAus1 coul 10 ;
    nuagAus1 = nuagAus1 et (nuag comp 'T' T1 comp 'ECRO' evecAus1) ;
    TBIB1 . 'ECRO' = nuagAus1 ;


    TBIB1 . 'CREATEUR' = mot 'BIBLIO' ;
    TBIB1 . 'REFERENCE' = chai mot1 '_' ent1 ;

    resp TBIB1 ;
    quit biblio ;

  fins ;
*--- Fin [5], "Austenite"

* Numero reference bib. ent1 n'existe pas pour mot1
  erre (chai '*****  La reference' ' ' ent1 ' ne concerne pas' ' ' mot1) ;
  quit biblio ;

* Fin mot-cle "Austenite"
fins ;

*----------------------------------------------------------------------*
*                          MOT-CLE : Ferrite                           *
*----------------------------------------------------------------------*

si (ega mot1 'Ferrite') ;
  imot1    = 5 ;

* Initialisation table de sortie :
  TBIB1    = table ;

* Numero reference bib. par defaut :
  si (ent1 ega 0) ; ent1 = 5 ; fins ;

*----------------------------- Ferrite [5] ----------------------------*
* Reference : voir notice BIBLIO

  si (ent1 ega 5) ;

*   Appel a BIBLIO pour proprietes elastiques :
    t16MND5  = biblio 16MND5 refe 5 ;

*--- Module d'Young :
    TBIB1 . 'YOUN' = t16MND5 . 'YOUN' ;

*--- Coefficient de Poisson :
    TBIB1 . 'NU'   = t16MND5 . 'NU' ;

*--- Dilatation thermique :
    TBIB1 . 'TALP' = 25. ;
    ltc1     = prog 25. 350. ;
    lalpFer1 = 7.7e-9 * ltc1 + 12.35e-6 ;
    ltc1     = ltc1     et 1500.  ;
    lalpFer1 = lalpFer1 et 15.e-6 ;
    evCaFer1 = evol manu 'T' ltc1 'ALPH' lalpFer1 ;
    TBIB1 . 'ALPH' = evCaFer1 ;

*--- Limite d'elasticite :
    ltc1     = prog 20. 200. 400. 500. 600. PAS 50. 850. 1000. 1100. 1250. 1500. ;
    lSyMB1   = prog 600. 530. 453. 398. 294. 208. 150. 105. 66. 50. 30. 18. 5. 5. ;
    lSyMB1   = 1.e6 * lSyMB1 ;
    evCSyMB1 = evol manu 'T' ltc1 'SIGY' lSyMB1 ;
    TBIB1 . 'SIGY' = evCSyMB1 ;

*--- Courbes d'ecrouissage :
    lep1     = prog 0. PAS 0.005 0.055 0.1 0.15 0.2 ;
    T1       = 20. ;
    lsm1     = prog 0. 52. 71. 85. 100. 111. 125. 138. 148. 159. 169. 177. 243. 284. 322. ;
    lsm1     = 1.e6 * lsm1 ;
    sigyT1   = ipol evCSyMB1 T1 ;
    lsm1     = lsm1 + sigyT1 ;
    evecFer1 = evol manu 'EPSP' lep1 'SIG' lsm1 ;
    evecFer1 = evecFer1 coul 1 ;
    nuagFer1 = nuag comp 'T' T1 comp 'ECRO' evecFer1 ;
    T1       = 100. ;
    lsm1     = prog 0. 22. 48. 68. 84. 96. 107. 119. 126. 133. 140. 148. 200. 235. 260. ;
    lsm1     = 1.e6 * lsm1 ;
    sigyT1   = ipol evCSyMB1 T1 ;
    lsm1     = lsm1 + sigyT1 ;
    evecFer1 = evol manu 'EPSP' lep1 'SIG' lsm1 ;
    evecFer1 = evecFer1 coul 2 ;
    nuagFer1 = nuagFer1 et (nuag comp 'T' T1 comp 'ECRO' evecFer1) ;
    T1       = 200. ;
    lsm1     = prog 0. 22. 41. 55. 70. 83. 95. 109. 121. 129. 138. 145. 195. 230. 255. ;
    lsm1     = 1.e6 * lsm1 ;
    sigyT1   = ipol evCSyMB1 T1 ;
    lsm1     = lsm1 + sigyT1 ;
    evecFer1 = evol manu 'EPSP' lep1 'SIG' lsm1 ;
    evecFer1 = evecFer1 coul 3 ;
    nuagFer1 = nuagFer1 et (nuag comp 'T' T1 comp 'ECRO' evecFer1) ;
    T1       = 300. ;
    lsm1     = prog 0. 10. 30. 50. 75. 95. 111. 125. 138. 148. 160. 169. 210. 230. 235. ;
    lsm1     = 1.e6 * lsm1 ;
    sigyT1   = ipol evCSyMB1 T1 ;
    lsm1     = lsm1 + sigyT1 ;
    evecFer1 = evol manu 'EPSP' lep1 'SIG' lsm1 ;
    evecFer1 = evecFer1 coul 4 ;
    nuagFer1 = nuagFer1 et (nuag comp 'T' T1 comp 'ECRO' evecFer1) ;
    T1       = 400. ;
    lsm1     = prog 0. 30. 57. 73. 83. 92. 99. 105. 112. 117. 123. 127. 156. 175. 183. ;
    lsm1     = 1.e6 * lsm1 ;
    sigyT1   = ipol evCSyMB1 T1 ;
    lsm1     = lsm1 + sigyT1 ;
    evecFer1 = evol manu 'EPSP' lep1 'SIG' lsm1 ;
    evecFer1 = evecFer1 coul 5 ;
    nuagFer1 = nuagFer1 et (nuag comp 'T' T1 comp 'ECRO' evecFer1) ;
    T1       = 500. ;
    lsm1     = prog 0. 33. 49. 60. 66. 71. 75. 79. 82. 84. 86. 87. 100. 115. 130. ;
    lsm1     = 1.e6 * lsm1 ;
    sigyT1   = ipol evCSyMB1 T1 ;
    lsm1     = lsm1 + sigyT1 ;
    evecFer1 = evol manu 'EPSP' lep1 'SIG' lsm1 ;
    evecFer1 = evecFer1 coul 6 ;
    nuagFer1 = nuagFer1 et (nuag comp 'T' T1 comp 'ECRO' evecFer1) ;
    T1       = 600. ;
    lsm1     = prog 0. 17. 24. 27. 30. 32. 34. 35. 36. 36.4 36.8 37.2 39. 41. 43. ;
    lsm1     = 1.e6 * lsm1 ;
    sigyT1   = ipol evCSyMB1 T1 ;
    lsm1     = lsm1 + sigyT1 ;
    evecFer1 = evol manu 'EPSP' lep1 'SIG' lsm1 ;
    evecFer1 = evecFer1 coul 7 ;
    nuagFer1 = nuagFer1 et (nuag comp 'T' T1 comp 'ECRO' evecFer1) ;
    T1       = 650. ;
    lsm1     = prog 0. 0.25 0.5 0.75 1. 1.25 1.5 1.75 2. 2.25 2.5 2.7 4.4 5.6 6.5 ;
    lsm1     = 1.e6 * lsm1 ;
    sigyT1   = ipol evCSyMB1 T1 ;
    lsm1     = lsm1 + sigyT1 ;
    evecFer1 = evol manu 'EPSP' lep1 'SIG' lsm1 ;
    evecFer1 = evecFer1 coul 8 ;
    nuagFer1 = nuagFer1 et (nuag comp 'T' T1 comp 'ECRO' evecFer1) ;
    T1       = 700. ;
    lsm1     = prog 0. 0.25 0.5 0.75 1. 1.25 1.5 1.75 2. 2.25 2.5 2.78 4.2 5.3 6.2 ;
    lsm1     = 1.e6 * lsm1 ;
    sigyT1   = ipol evCSyMB1 T1 ;
    lsm1     = lsm1 + sigyT1 ;
    evecFer1 = evol manu 'EPSP' lep1 'SIG' lsm1 ;
    evecFer1 = evecFer1 coul 10 ;
    nuagFer1 = nuagFer1 et (nuag comp 'T' T1 comp 'ECRO' evecFer1) ;
    T1       = 750. ;
    lsm1     = prog 15 * 1.e-3 ;
    lsm1     = 1.e6 * lsm1 ;
    sigyT1   = ipol evCSyMB1 T1 ;
    lsm1     = lsm1 + sigyT1 ;
    evecFer1 = evol manu 'EPSP' lep1 'SIG' lsm1 ;
    evecFer1 = evecFer1 coul 11 ;
    nuagFer1 = nuagFer1 et (nuag comp 'T' T1 comp 'ECRO' evecFer1) ;
    TBIB1 . 'ECRO' = nuagFer1 ;


    TBIB1 . 'CREATEUR' = mot 'BIBLIO' ;
    TBIB1 . 'REFERENCE' = chai mot1 '_' ent1 ;

    resp TBIB1 ;
    quit biblio ;

  fins ;
*--- Fin [5], "Ferrite"

* Numero reference bib. ent1 n'existe pas pour mot1
  erre (chai '*****  La reference' ' ' ent1 ' ne concerne pas' ' ' mot1) ;
  quit biblio ;

* Fin mot-cle "Ferrite"
fins ;

*------------------------- Mot-cle non trouve -------------------------*

si (imot1 ega 0) ;
  erreur (chai '*****  Pas de donnee disponible pour' ' ' mot1) ;
  quit biblio ;
fins ;

FINP ;
