$$$$ CHANVSOS
* CHANVSOS  PROCEDUR  AURI      97/12/24    21:15:27     3025
 DEBMETH CHANVSOS NUNU*ENTIER TATA*OBJET ;
 MOBID = TATA.'CLASSE' ;
*'SI' ( 'NEG' TATA. 'CLASSE'  'LIRSOSO ' ) ;
 'SI' ( 'NEG' MOBID  'LIRSOSO ' ) ;
    ERREUR 21 ;
 'QUITTER' CHANVSOS ;
 'FINSI';
 'SI' ( 'EXIS' %NVSOSO ) ;
       %NVSOSO%GINDIOBJ NUNU TATA ;
 'SINON' ;
       %NVSOSO= OBJET INDIOBJE ;
       %NVSOSO%GINDIOBJ NUNU TATA ;
 'FINSI';
 FINMETH ;
