$$$$ LIESPECE
* LIESPECE  PROCEDUR  AURI      98/04/09    21:19:36     3150
 DEBMETH LIESPECE ;
 %IDEN= FAUX ;
 %LOGK= FAUX ;
*%ITYP= FAUX ;
*%COMP=  FAUX ;
*%STOECH=   FAUX ;
 %METHODE ESP_IDEN LINBIDEN ;
 %METHODE ESP_LOGK LESPLOGK ;
 %METHODE ESP_ITYP LESPITYP ;
 %METHODE ESP_COMP LESPCOMP ;
 %METHODE ESP_STOE LESPSTOE ;
 FINMETH ;
