$$$$ LINVCOMP
* LINVCOMP  PROCEDUR  AURI      97/12/24    21:27:01     3025
 DEBMETH LINVCOMP ;
 %IDEN= FAUX ;
 %NOM = FAUX ;
 %CHARGE= FAUX ;
 %METHODE COM_IDEN LINBIDEN;
 %METHODE COM_NOM LICOMNOM;
 %METHODE COM_CHAR LICOCHAR;
 FINMETH ;
