$$$$ MDRECOMB
* MDRECOMB  PROCEDUR  FD144363  24/03/27    21:15:04     11877
'DEBPROC' MDRECOMB RXT*'TABLE   ' ;
*
*
* Couplage du modèle 0D du PAR avec le modèle fluide CFD
*--------------------------------------------------------------------------
* E/    : rxt    : Table contenant tous les data pour les fluides
*  /S   : Qo_i   : Différence de débit entre la sortie et l'entrée des PARs
*                  pour l'espèce i (en kg/s)
*  /S   : drhpar : Différence de débit enthalpique entre la sortie et
*                  l'entrée des PARs (en W)
*
*  /S : Sauvegarde pour post-traitement local dans tic . 'RECOMB' . &BCLREC
*  /S : Sauvegarde pour C.L. de l'inconnue 'XXX' dans tic . 'RECOMB' . 'XXX'
*--------------------------------------------------------------------------
*
*
'MESS' '$$$$ RECOMBINEUR $$$$' ;
tbt = RXT . 'TBT' ;
tic = RXT . 'TIC' ;
geo = RXT . 'GEO' ;
*
idim = 'VALE' 'DIME' ;
'SI' ('EGA' idim 2) ;
     LMOT1 = 'MOTS' '1UN' '2UN' ;
'SINO' ;
     LMOT1 = 'MOTS' '1UN' '2UN' '3UN' ;
'FINS' ;
Dt  = tic . 'DT' ;
Tps = tic . 'Tps' ;
Pe = 'EXTR' tic . 'PT' ('DIME' tic . 'PT') ;
*
* Initialisation pour les bilans de masse et d'energie 0D
*
* Décomposition Air en entree PAR en N2 et O2
QIN_O2a  = 0. ;
QIN_N2a  = 0. ;
QIN_AIR  = 0. ;
*
* Entree du modele PAR
QIN_H2   = 0. ;
QIN_H2O  = 0. ;
QIN_O2   = 0. ;
QIN_N2   = 0. ;
QIN_HE   = 0. ;
QIN_CO2  = 0. ;
QIN_CO   = 0. ;
*
* Sortie du modele PAR
QOUT_H2  = 0. ;
QOUT_H2O = 0. ;
QOUT_O2  = 0. ;
QOUT_N2  = 0. ;
QOUT_HE  = 0. ;
QOUT_CO2 = 0. ;
QOUT_CO  = 0. ;
*
* Recomposition Air en sortie PAR à partir N2 et O2
QOUT_O2a = 0. ;
QOUT_N2a = 0. ;
QOUT_AIR = 0. ;
*
drhpar   = 0. ;
*
* Initialisation des conditions aux limites scalaire CFD à la sortie des PARs
cltf mat1 = 'KOPS' 'MATRIK' ;
clrvp  = 'COPI' cltf ;
clrh2  = 'COPI' cltf ;
clro2  = 'COPI' cltf ;
clrn2  = 'COPI' cltf ;
clrhe  = 'COPI' cltf ;
clrco  = 'COPI' cltf ;
clrco2 = 'COPI' cltf ;
clrair = 'COPI' cltf ;
*
* Initialisation des CL vectorielles CFD à l'entrée et à la sortie des PARs
clupar = 'COPI' cltf ;
*
*
*- Boucle principale sur les PARs
*
*
NBREC = 'DIME' rxt . 'RECOMB' ;
'REPE' BCLREC NBREC ;
   RECI = rxt . 'RECOMB' . &BCLREC ;
   RTRI = tic . 'RECOMB' . &BCLREC ;
   TYPR     = RECI . 'TYPR' ;
   NSECTION = RECI . 'NSECTION' ;
*
** Modèle, surface, facteur géométrique et normale à l'entrée et à la sortie du PAR
   NAME = 'CHAI' '$REC'  'ent' &BCLREC ; $ENTREE = GEO . NAME ;
   NAME = 'CHAI' 'SREC'  'ent' &BCLREC ; SENTREE = GEO . NAME ;
   NAME = 'CHAI' 'fgREC' 'ent' &BCLREC ; FG_ENT  = GEO . NAME ;
   NAME = 'CHAI' 'DREC'  'ent' &BCLREC ; dire    = GEO . NAME ;
   NAME = 'CHAI' 'REC'  'entI' &BCLREC ; ENTREI  = GEO . NAME ;
*
   NAME = 'CHAI' '$REC'  'sor' &BCLREC ; $SORTIE = GEO . NAME ;
   NAME = 'CHAI' 'SREC'  'sor' &BCLREC ; SSORTIE = GEO . NAME ;
   NAME = 'CHAI' 'fgREC' 'sor' &BCLREC ; FG_SOR  = GEO . NAME ;
   NAME = 'CHAI' 'DREC'  'sor' &BCLREC ; dirs    = GEO . NAME ;
   NAME = 'CHAI' 'REC'  'sorI' &BCLREC ; SORTII  = GEO . NAME ;
*
** Surfaces des mailles duales
   Sduae = 'DOMA' $ENTREE 'XXDIAGSI' ;
   Sduas = 'DOMA' $SORTIE 'XXDIAGSI' ;
*
** Fractions massiques moyennes à l'entrée du modèle PAR
** (décomposition de l'air en N2 et O2 avec redéfinition de Rair pour que Yo2+Yn2=Yair)
   Rgo2  = tbt . 'Rgo2' ;
   Rgn2  = tbt . 'Rgn2' ;
   Rgair = (0.21 '/' Rgo2) '+' (0.79 '/' Rgn2) '**' -1. ;
   YO2ea = 0.21 '*' Rgair '/' Rgo2 '*' tic . 'YAIR' ;
   YN2ea = 0.79 '*' Rgair '/' Rgn2 '*' tic . 'YAIR' ;
*
   YO2ea = 'KCHT' $ENTREE 'SCAL' 'SOMMET' YO2ea ;
   YO2ea = ('SOMT' (YO2ea '*' Sduae)) '/' SENTREE ;
   YN2ea = 'KCHT' $ENTREE 'SCAL' 'SOMMET' YN2ea ;
   YN2ea = ('SOMT' (YN2ea '*' Sduae)) '/' SENTREE ;
   YAIRe = 'KCHT' $ENTREE 'SCAL' 'SOMMET' tic . 'YAIR' ;
   YAIRe = ('SOMT' (YAIRe '*' Sduae)) '/' SENTREE ;
*
* O2, N2 et H2O sont obligatoires (voir execrxt), donc tests inutils
* mais le heater pourrait fonctionner un jour sans O2, N2 et H2O -> on les laisse
   'SI' TBT . 'TO2' ;
      YO2e  = 'KCHT' $ENTREE 'SCAL' 'SOMMET' tic . 'YO2' ;
      YO2e  = ('SOMT' (YO2e  '*' Sduae)) '/' SENTREE ;
   'SINO' ;
      YO2e  = 0.D0 ;
   'FINSI' ;
   YO2e = YO2e '+' YO2ea ;
*
   'SI' TBT . 'TN2' ;
      YN2e  = 'KCHT' $ENTREE 'SCAL' 'SOMMET' tic . 'YN2' ;
      YN2e  = ('SOMT' (YN2e  '*' Sduae)) '/' SENTREE ;
   'SINO' ;
      YN2e  = 0.D0 ;
   'FINSI' ;
   YN2e = YN2e '+' YN2ea ;
*
   'SI' TBT . 'TH2' ;
      YH2e  = 'KCHT' $ENTREE 'SCAL' 'SOMMET' tic . 'YH2' ;
      YH2e  = ('SOMT' (YH2e  '*' Sduae)) '/' SENTREE ;
   'SINO' ;
      YH2e  = 0. ;
   'FINSI' ;
   'SI' TBT . 'VAPEUR' ;
      YH2Oe = 'KCHT' $ENTREE 'SCAL' 'SOMMET' tic . 'YVAP' ;
      YH2Oe = ('SOMT' (YH2Oe '*' Sduae)) '/' SENTREE ;
   'SINO' ;
      YH2Oe = 0. ;
   'FINSI' ;
   'SI' TBT . 'THE' ;
      YHEe  = 'KCHT' $ENTREE 'SCAL' 'SOMMET' tic . 'YHE' ;
      YHEe  = ('SOMT' (YHEe  '*' Sduae)) '/' SENTREE ;
   'SINO' ;
      YHEe  = 0. ;
   'FINSI' ;
   'SI' TBT . 'TCO' ;
      YCOe  = 'KCHT' $ENTREE 'SCAL' 'SOMMET' tic . 'YCO' ;
      YCOe  = ('SOMT' (YCOe  '*' Sduae)) '/' SENTREE ;
   'SINO' ;
      YCOe  = 0. ;
   'FINSI' ;
   'SI' TBT . 'TCO2' ;
      YCO2e = 'KCHT' $ENTREE 'SCAL' 'SOMMET' tic . 'YCO2' ;
      YCO2e = ('SOMT' (YCO2e '*' Sduae)) '/' SENTREE ;
   'SINO' ;
      YCO2e = 0. ;
   'FINSI' ;
*
** Tgaz, Tplaque à l'entrée du PAR
   Te = 'KCHT' $ENTREE 'SCAL' 'SOMMET' tic . 'TF' ;
   TIN = ('SOMT' (Te '*' Sduae)) '/' SENTREE ;
   TINK = TIN '+' 273.15 ;
   TP = 'EXTR' rtri . 'Tpla' ('DIME' rtri . 'Tpla') ;
   TPK = TP '+' 273.15 ;
*
*----------------------------
* Recombineur de type SIEMENS
*----------------------------
*
   'SI' ('EGA' typr 'SIEMENS') ;
     AA1    = RECI . 'A' ;
     BB1    = RECI . 'B' ;
     XH2ONI = RECI . 'XH2ON' ;
     XH2OFI = RECI . 'XH2OFF' ;
     BETAI  = RECI . 'BETA' ;
     YH2s YO2s YN2s YH2Os YHEs YCO2s YCOs TsK TPK DEB EFF XH2ONF
     = 'FLAM' 'RECOMBIN'
     YH2e YO2e YN2e YH2Oe YHEe YCO2e YCOe
     TINK TPK Pe Dt 0 typr AA1 BB1 XH2ONI XH2OFI BETAI ;
     RECI . 'XH2ON' = XH2ONF ;
*
*---------------------------
* Recombineur de type HEATER
*---------------------------
*
   'SINO' ;
     PUI0 = 'IPOL' Tps RECI . 'PUISSANCE' ;
     PUI1 = 'IPOL' (Tps '-' Dt) RECI . 'PUISSANCE' ;
     A1 = PUI0 '-' PUI1 '/' DT ;
     FUITE = RECI . 'QHOUSING' ;
     HRAPP = RECI . 'HRAPP' ;
     CRAPP = RECI . 'CRAPP' ;
     YH2s YO2s YN2s YH2Os YHEs YCO2s YCOs TsK TPK DEB
     = 'FLAM' 'RECOMBIN'
     YH2e YO2e YN2e YH2Oe YHEe YCO2e YCOe
     TINK TPK Pe Dt 0 typr A1 fuite hrapp crapp ;
     EFF = 0.D0 ;
   'FINSI' ;
*
   TS = TSK '-' 273.15 ;
   TP = TPK '-' 273.15 ;
   NDEB = DEB '*' NSECTION ;
*
** Recomposition de l'air à la sortie du PAR à partir de N2 et O2
* (dépend si O2 est en excès ou en défaut sauf heater où on reconstitue l'air de l'entrée)
   'SI' (TBT . 'TO2' 'ET' TBT . 'TN2') ;
     alfa  = (0.21 '*' Rgn2) '/' (0.79 '*' Rgo2) ;
     'SI' (YO2s '<' (alfa '*' YN2s)) ;
        YO2sa = YO2s ;
        YN2sa = YO2s '/' alfa ;
     'SINO' ;
        YO2sa = alfa '*' YN2s ;
        YN2sa = YN2s ;
     'FINS' ;
   'SINO' ;
        YO2sa = YO2ea ;
        YN2sa = YN2ea ;
   'FINS' ;
   YAIRs = YN2sa '+' YO2sa ;
*
* Vitesses débitantes à l'entrée et à la sortie du PAR (en m/s)
* avec prise en compte du facteur géométrique et du nombre de sections
   RG_IN  = (TBT . 'Rgvap' '*' YH2Oe)
        '+' (TBT . 'Rgh2'  '*' YH2e)
        '+' (TBT . 'Rgair' '*' YAIRe)
        '+' (TBT . 'Rgo2'  '*' (YO2e-YO2ea))
        '+' (TBT . 'Rgn2'  '*' (YN2e-YN2ea))
        '+' (TBT . 'Rghe'  '*' YHEe)
        '+' (TBT . 'Rgco'  '*' YCOe)
        '+' (TBT . 'Rgco2' '*' YCO2e) ;
   RG_IN  = ('SOMT' (RG_IN '*' Sduae)) '/' SENTREE ;
   RO_IN  = Pe '/' (RG_IN '*' TINK) ;
   UN_IN  = ndeb '*' FG_ENT '/' (SENTREE '*' RO_IN) ;
*
   RG_OUT = (TBT . 'Rgvap' '*' YH2Os)
        '+' (TBT . 'Rgh2'  '*' YH2s)
        '+' (TBT . 'Rgair' '*' YAIRs)
        '+' (TBT . 'Rgo2'  '*' (YO2s-YO2sa))
        '+' (TBT . 'Rgn2'  '*' (YN2s-YN2sa))
        '+' (TBT . 'Rghe'  '*' YHEs)
        '+' (TBT . 'Rgco'  '*' YCOs)
        '+' (TBT . 'Rgco2' '*' YCO2s) ;
   RG_OUT = ('SOMT' (RG_OUT '*' Sduas)) '/' SSORTIE ;
   RO_OUT = Pe '/' (RG_OUT '*' TSK) ;
   UN_OUT = ndeb '*' FG_SOR '/' (SSORTIE '*' RO_OUT) ;
*
** Enthalpie massique à l'entrée et à la sortie du PAR (en J/kg)
   Cph2_e Cphe_e Cpo2_e Cpn2_e Cpco2_e Cpco_e Cpair_e
   = CALCP TIN ;
   Cph2_s Cphe_s Cpo2_s Cpn2_s Cpco2_s Cpco_s Cpair_s
   = CALCP TS ;
   Cpvap = TBT . 'Cpvap' ;
   CP_IN  = Cpvap '*' YH2Oe
     '+' (Cph2_e  '*' YH2e)
     '+' (Cpair_e '*' YAIRe)
     '+' (Cpo2_e  '*' (YO2e-YO2ea))
     '+' (Cpn2_e  '*' (YN2e-YN2ea))
     '+' (Cphe_e  '*' YHEe)
     '+' (Cpco2_e '*' YCO2e)
     '+' (Cpco_e  '*' YCOe)  ;
   H_IN  = CP_IN '*' TINK ;
*
   CP_OUT = Cpvap '*' YH2Os
     '+' (Cph2_s  '*' YH2s)
     '+' (Cpair_s '*' YAIRs)
     '+' (Cpo2_s  '*' (YO2s-YO2sa))
     '+' (Cpn2_s  '*' (YN2s-YN2sa))
     '+' (Cphe_s  '*' YHEs)
     '+' (Cpco2_s '*' YCO2s)
     '+' (Cpco_s  '*' YCOs)  ;
   H_OUT = CP_OUT '*' TSK ;
*
** Contribution du PAR aux bilans massiques 0D (Q en kg/s)
   QIN_H2   = ndeb '*' YH2e  '+' QIN_H2   ;
   QIN_H2O  = ndeb '*' YH2Oe '+' QIN_H2O  ;
   QIN_AIR  = ndeb '*' YAIRe '+' QIN_AIR  ;
   QIN_O2   = ndeb '*' (YO2e-YO2ea) '+' QIN_O2   ;
   QIN_N2   = ndeb '*' (YN2e-YN2ea) '+' QIN_N2   ;
   QIN_HE   = ndeb '*' YHEe  '+' QIN_HE   ;
   QIN_CO2  = ndeb '*' YCO2e '+' QIN_CO2  ;
   QIN_CO   = ndeb '*' YCOe  '+' QIN_CO   ;
*
   QIN_O2a  = ndeb '*' YO2ea '+' QIN_O2a  ;
   QIN_N2a  = ndeb '*' YN2ea '+' QIN_N2a  ;
*
   QOUT_H2  = ndeb '*' YH2S  '+' QOUT_H2  ;
   QOUT_H2O = ndeb '*' YH2OS '+' QOUT_H2O ;
   QOUT_AIR = ndeb '*' YAIRs '+' QOUT_AIR  ;
   QOUT_O2  = ndeb '*' (YO2s-YO2sa) '+' QOUT_O2  ;
   QOUT_N2  = ndeb '*' (YN2s-YN2sa) '+' QOUT_N2  ;
   QOUT_HE  = ndeb '*' YHES  '+' QOUT_HE  ;
   QOUT_CO2 = ndeb '*' YCO2S '+' QOUT_CO2 ;
   QOUT_CO  = ndeb '*' YCOS  '+' QOUT_CO  ;
*
   QOUT_O2a = ndeb '*' YO2sa '+' QOUT_O2a  ;
   QOUT_N2a = ndeb '*' YN2sa '+' QOUT_N2a  ;
*
** Contribution des PARs au bilan d'energie 0D (drhpar en W)
   drhpar = H_OUT '-' H_IN '*' ndeb '+' drhpar ;
*
** Conditions aux limites en vitesse (en m/s)
   toto1 = 'KCHT' $ENTREE 'VECT' 'SOMMET' 'COMP' LMOT1 (dire * UN_IN) ;
   tutu1 = 'KCHT' $SORTIE 'VECT' 'SOMMET' 'COMP' LMOT1 (dirs * UN_OUT) ;
   'SI' tbt . 'FPAROI' ;
     NAME = 'CHAI' 'REC'  'ent' &BCLREC ; ENTREE  = GEO . NAME ;
     NAME = 'CHAI' 'REC'  'sor' &BCLREC ; SORTIE  = GEO . NAME ;
     toto1 = 'REDU' toto1 ENTREE ;
     tutu1 = 'REDU' tutu1 SORTIE ;
   'SINO' ;
     toto1 = 'REDU' toto1 ENTREI ;
     tutu1 = 'REDU' tutu1 SORTII ;
   'FINS' ;
   toto1 = 'KCHT' $ENTREE 'VECT' 'SOMMET' 'COMP' LMOT1 toto1 ;
   tutu1 = 'KCHT' $SORTIE 'VECT' 'SOMMET' 'COMP' LMOT1 tutu1 ;
   clupar = clupar 'ET' toto1 'ET' tutu1 ;
*
** Conditions aux limites en température (en C)
   cltf   = cltf 'ET'
   ('MANU' 'CHPO' SORTII 1 'TF' TS 'NATURE' 'DISCRET') ;
*
** Conditions aux limites en densités partielles (en kg/m3)
   clrvp  = clrvp  'ET'
   ('MANU' 'CHPO' SORTII 1 'RVP'  (RO_OUT '*' YH2Os) 'NATURE' 'DISCRET') ;
   clrh2  = clrh2  'ET'
   ('MANU' 'CHPO' SORTII 1 'RH2'  (RO_OUT '*' YH2s)  'NATURE' 'DISCRET') ;
   clro2  = clro2  'ET'
   ('MANU' 'CHPO' SORTII 1 'RO2'  (RO_OUT '*' (YO2s-YO2sa)) 'NATURE' 'DISCRET') ;
   clrn2  = clrn2  'ET'
   ('MANU' 'CHPO' SORTII 1 'RN2'  (RO_OUT '*' (YN2s-YN2sa)) 'NATURE' 'DISCRET') ;
   clrhe  = clrhe  'ET'
   ('MANU' 'CHPO' SORTII 1 'RHE'  (RO_OUT '*' YHEs)  'NATURE' 'DISCRET') ;
   clrco  = clrco  'ET'
   ('MANU' 'CHPO' SORTII 1 'RCO'  (RO_OUT '*' YCOs)  'NATURE' 'DISCRET') ;
   clrco2 = clrco2 'ET'
   ('MANU' 'CHPO' SORTII 1 'RCO2' (RO_OUT '*' YCO2s) 'NATURE' 'DISCRET') ;
   clrair = clrair 'ET'
   ('MANU' 'CHPO' SORTII 1 'RAIR' (RO_OUT '*' YAIRs) 'NATURE' 'DISCRET') ;
*
* Sauvegarde dans TIC des data pour post-traitement local
* (T en C, DEB en kg/s, Efficiency et Y sans unité, U en m/s)
   rtri . 'Tpla'  = rtri . 'Tpla'  'ET' ('PROG' TP)  ;
   rtri . 'Tin'   = rtri . 'Tin'   'ET' ('PROG' TIN) ;
   rtri . 'Tout'  = rtri . 'Tout'  'ET' ('PROG' TS)  ;
*
   rtri . 'DEB'   = rtri . 'DEB'   'ET' ('PROG' ndeb)  ;
   rtri . 'EFF'   = rtri . 'EFF'   'ET' ('PROG' EFF)   ;
*
   rtri . 'YH2E'  = rtri . 'YH2E'  'ET' ('PROG' YH2e)  ;
   rtri . 'YH2OE' = rtri . 'YH2OE' 'ET' ('PROG' YH2Oe) ;
   rtri . 'YO2E'  = rtri . 'YO2E'  'ET' ('PROG' YO2e)  ;
   rtri . 'YN2E'  = rtri . 'YN2E'  'ET' ('PROG' YN2e)  ;
   rtri . 'YHEE'  = rtri . 'YHEE'  'ET' ('PROG' YHEe)  ;
   rtri . 'YCO2E' = rtri . 'YCO2E' 'ET' ('PROG' YCO2e) ;
   rtri . 'YCOE'  = rtri . 'YCOE'  'ET' ('PROG' YCOe)  ;
*
   rtri . 'YH2S'  = rtri . 'YH2S'  'ET' ('PROG' YH2s)  ;
   rtri . 'YH2OS' = rtri . 'YH2OS' 'ET' ('PROG' YH2Os) ;
   rtri . 'YO2S'  = rtri . 'YO2S'  'ET' ('PROG' YO2s)  ;
   rtri . 'YN2S'  = rtri . 'YN2S'  'ET' ('PROG' YN2s)  ;
   rtri . 'YHES'  = rtri . 'YHES'  'ET' ('PROG' YHEs)  ;
   rtri . 'YCO2S' = rtri . 'YCO2S' 'ET' ('PROG' YCO2s) ;
   rtri . 'YCOS'  = rtri . 'YCOS'  'ET' ('PROG' YCOs)  ;
*
   rtri . 'Uin'   = rtri . 'Uin'   'ET' ('PROG' UN_IN)  ;
   rtri . 'Uout'  = rtri . 'Uout'  'ET' ('PROG' UN_OUT) ;
*
   rtri . 'Hin'   = rtri . 'Hin'   'ET' ('PROG' H_IN)  ;
   rtri . 'Hout'  = rtri . 'Hout'  'ET' ('PROG' H_OUT) ;
'FIN' BCLREC ;
*
** Sauvegarde des conditions aux limites
tic . 'RECOMB' . 'UN'   = clupar ;
tic . 'RECOMB' . 'TF'   = cltf   ;
tic . 'RECOMB' . 'RVP'  = clrvp  ;
tic . 'RECOMB' . 'RH2'  = clrh2  ;
tic . 'RECOMB' . 'RO2'  = clro2  ;
tic . 'RECOMB' . 'RN2'  = clrn2  ;
tic . 'RECOMB' . 'RHE'  = clrhe  ;
tic . 'RECOMB' . 'RCO'  = clrco  ;
tic . 'RECOMB' . 'RCO2' = clrco2 ;
tic . 'RECOMB' . 'RAIR' = clrair ;
*
** Contribution des PARs aux bilans de masse 0D (Qo_beta en kg/s)
** (la masse totale étant inchangée, l'air fait tampon dans execrxt)
QO_H2  = QOUT_H2  '-' QIN_H2  ;
QO_O2  = QOUT_O2  '-' QIN_O2  ;
QO_H2O = QOUT_H2O '-' QIN_H2O ;
QO_N2  = QOUT_N2  '-' QIN_N2  ;
*
* Affichage pour vérification
QO_AIR = QOUT_AIR '-' QIN_AIR ;
QO_OUT = QOUT_H2  '+' QOUT_O2 '+' QOUT_H2O '+' QOUT_N2 '+' QOUT_HE '+'
         QOUT_CO2 '+' QOUT_CO '+' QOUT_AIR ;
QO_IN  = QIN_H2   '+' QIN_O2  '+' QIN_H2O  '+' QIN_N2  '+' QIN_HE  '+'
         QIN_CO2  '+' QIN_CO  '+' QIN_AIR ;
'MESS' 'DQ / Qin / Qout (kg/s)' ;
'MESS' '-------------------------------------------------------------' ;
'MESS' 'Balance :' ' ' (QO_OUT '-' QO_IN) ' ' QO_OUT ' ' QO_IN ;
'MESS' '-------------------------------------------------------------' ;
'MESS' 'H2      :' ' ' QO_H2  ' ' QIN_H2  ' ' QOUT_H2  ;
'MESS' 'H2O     :' ' ' QO_H2O ' ' QIN_H2O ' ' QOUT_H2O ;
'MESS' 'O2      :' ' ' QO_O2  ' ' QIN_O2  ' ' QOUT_O2  ;
'MESS' 'N2      :' ' ' QO_N2  ' ' QIN_N2  ' ' QOUT_N2  ;
'MESS' 'AIR     :' ' ' QO_AIR ' ' QIN_AIR ' ' QOUT_AIR ;
'MESS' ' ' ;
'SI' TBT . 'THE' ;
'MESS' 'HE      :' ' ' (QIN_HE  '-' QOUT_HE)  ' ' QIN_HE  ' ' QOUT_HE  ;
'FINS' ;
'SI' TBT . 'TCO2' ;
'MESS' 'CO2     :' ' ' (QIN_CO2 '-' QOUT_CO2) ' ' QIN_CO2 ' ' QOUT_CO2 ;
'FINS' ;
'SI' TBT . 'TCO' ;
'MESS' 'CO      :' ' ' (QIN_CO  '-' QOUT_CO)  ' ' QIN_CO  ' ' QOUT_CO  ;
'FINS' ;
'MESS' '-------------------------------------------------------------' ;
*
'RESP' QO_H2 QO_O2 QO_H2O QO_N2 drhpar ;
'FINP' ;
