* fichier :  Henc2d.dgibi
*
*  Enceinte 2D Axisymetrique
*  Relachement d'un melange d'hydrogene et d'helium
*
'OPTI' 'DIME' 2 'ELEM' 'CU20' ;
 'OPTI' 'MODE' 'AXIS' ;

 COMPLET= VRAI                                          ;
 COMPLET= FAUX                                          ;
 GRAPH  = VRAI                                          ;
 GRAPH  = FAUX                                          ;

 'SI' COMPLET ;
  nbit=100    ;
  nbit=20     ;
  DT0 = 1.    ;
  n1=5 ;
  n2=10;
  n3=20;
 'SINON'      ;
  nbit=20     ;
  DT0 = 1.    ;
  n1=5 ;
  n2=10;
  n3=20;
 'FINSI'      ;


p1=0 0 ;
p11=0.4 0 ;
p2=0.1 0. ;
p3=1 0 ;
p4=1 2;
p5=0 2 ;


breche = p1  'DROI' n1 p2 ;
bas= p2 'DROI' n2 p3 ;
paroid=p3 'DROI' n3 p4 ;
plaf=p4 'DROI' (n1 + n2) p5 ;
axe = p5 'DROI' n3 p1 ;
vtp = bas 'ET' paroid 'ET' plaf ;
mt= 'DALLER' (breche 'ET' bas) paroid plaf axe ;
*
* Mise en place de la procedure
rxt = 'TABLE' ;
rxt . 'VERSION' = 'V0' ;
rxt . 'vtf'     = mt ;
rxt . 'axe'     = axe ;
rxt . 'epsi'    = 1.e-4 ;
*
rxt . 'pi' = 0.5 0.5 ;
*
rxt . 'DISCR'   = 'LINE' ;
rxt . 'KPRE'    = 'MSOMMET' ;
rxt . 'MODTURB' = 'LMEL' ;
rxt . 'LMEL'    = 0.05 ;
*
rxt . 'HE'    = VRAI ;
rxt . 'H2'    = VRAI ;
rxt . 'CO2'   = VRAI ;
rxt . 'Yhe0'  = 0.0 ;
rxt . 'Yh20'  = 0.0 ;
rxt . 'Yco20' = 0.0 ;
*
rxt . 'TF0' = 20.0 ;
rxt . 'PT0' = 1.0e5 ;
*
rxt . 'Breches' = 'TABLE' ;
rxt . 'Breches' . 'A' = 'TABLE' ;
rxt . 'Breches' . 'A' . 'Maillage' = breche ;
rxt . 'Breches' . 'A' . 'diru'  = (0. 1.) ;
rxt . 'Breches' . 'A' . 'scenario'          = 'TABLE' ;
rxt . 'Breches' . 'A' . 'scenario' . 't'    = 'PROG' 0.0     10000.0 ;
rxt . 'Breches' . 'A' . 'scenario' . 'qair' = 'PROG' 0.      0.      ;
rxt . 'Breches' . 'A' . 'scenario' . 'qhe'  = 'PROG' 0.0011  0.0011  ;
rxt . 'Breches' . 'A' . 'scenario' . 'qh2'  = 'PROG' 0.0011  0.0011  ;
rxt . 'Breches' . 'A' . 'scenario' . 'qco2' = 'PROG' 0.0011  0.0011  ;
rxt . 'Breches' . 'A' . 'scenario' . 'tinj' = 'PROG' 20.0    20.0    ;
*
rxt . 'DT0'    = DT0 ;
rxt . 'DETMAT' = VRAI ;
rxt . 'RENU'   = 'RIEN' ;
rxt . 'GRAPH'  = GRAPH ;
*
EXECRXT nbit rxt ;


un=rxt.'TIC'.'UN';
mess ' Max U ' (maxi un) ' Min U ' (mini un) ;
test = abs ((maxi un) - 1.9    );
mess ' Test =' test;
 Si (test '>' 0.1  ) ; erreur 5 ; Finsi ;

tf =rxt.'TIC'.'TF' ;
mess ' Max Tf' (maxi tf) ' Min Tf' (mini tf) ;
test = abs ((maxi tf) - 27.    );
mess ' Test =' test;
 Si (test '>' 0.5  ) ; erreur 5 ; Finsi ;


$vtf=rxt.'GEO'.'$vtf' ;
vtf=doma $vtf maillage;
rho=rxt.'TIC'.'RHO' ;
rhe=rxt.'TIC'.'RHE';
rh2=rxt.'TIC'.'RH2';
rco2=rxt.'TIC'.'RCO2';
un =rxt.'TIC'.'UN';

ixe=inve axe ;
evauz = evol chpo (exco un 'UY') ixe ;
evarh = evol chpo rho ixe ;
evatf = evol chpo tf  ixe ;
evahe = evol chpo rhe ixe ;
evah2 = evol chpo rh2 ixe ;


Si GRAPH ;

 dess evauz 'TITRE' 'Vitesse sur l axe';
 dess evarh 'TITRE' 'Densite melange sur l axe';
 dess evatf 'TITRE' 'Temperature sur l axe';
 dess evahe 'TITRE' 'Densite Helium sur l axe';
 dess evah2 'TITRE' 'Densite Hydrogene l axe';

ung= vect un 0.1 ux uy jaune;
trace ung vtf;
opti isov suli ;
trace rho vtf 'TITRE' ' Rho' ;
trace rhe vtf 'TITRE' ' Rhe' ;
*trace rh2 vtf 'TITRE' ' Rh2' ;
*trace rco2 vtf 'TITRE' ' Rco2' ;
*trace tf  vtf 'TITRE' ' Tf ' ;
Finsi ;

 FIN ;
