* fichier : acqulata.dgibi

************************************************************************
* Section : Entree-Sortie Entree-Sortie
************************************************************************

'OPTION' 'ECHO' 0 ;
************************************************************************
* NOM         : ACQULATA
* DESCRIPTION : Lecture de fichiers au format LATA v2.1 (Trio_U) en GIBI
*               On utilise ACQU BRUT et d'autres évolutions
*               (fiches 7922-7928)
*
*
*
* LANGAGE     : GIBIANE-CAST3M
* AUTEUR      : Stéphane GOUNAND (CEA/DEN/DM2S/SFME/LTMF)
*               mél : stephane.gounand@cea.fr
**********************************************************************
* VERSION    : v1, 13/01/2014, version initiale
* HISTORIQUE : v1, 13/01/2014, création
* HISTORIQUE :
* HISTORIQUE :
************************************************************************
*
*
interact = FAUX ;
graph    = FAUX ;
******************************************************************
*                    P R O C E D U R E S
*
*                       SPLITLIG
*
* On a une chaine de caractères LALIG comprenant des mots séparés
* par des espaces. On crée une table indexée par des entiers
* contenant chaque mot de la ligne :
*        tab . I = Ieme mot de LALIG
*
'DEBPROC' SPLITLIG ;
'ARGUMENT' lalig*'MOT' ;
*'LISTE' ('DIME' lalig) ;
*'LISTE' ('TYPE' lalig) ;
* Splitte la ligne dans une table
lesp = posi ' ' 'DANS' lalig 'TOUS' 'NOCA' ;
lesp = ('LECT' 0) 'ET' lesp 'ET' ('LECT' ('+' ('DIME' lalig) 1)) ;
tmot = 'TABLE' ;
itab = 0 ;
'REPETER' idx ('-' ('DIME' lesp) 1) ;
   ii = &idx ;
   ideb = 'EXTRAIRE' lesp ii ;
   ifin = 'EXTRAIRE' lesp ('+' ii 1) ;
   'SI' ('>' ifin ('+' ideb 1)) ;
      itab = '+' itab 1 ;
      tmot . itab = 'EXTRAIRE' lalig ('+' ideb 1) ('-' ifin 1) ;
   'FINSI' ;
'FIN' idx ;
'RESPRO' tmot ;
'FINPROC' ;
*
*                       VALARG
*
* On a une table crée par SPLITLIG. Elle peut contenir des chaines
* telles que : 'toto=30'. En entrée, on a la table, le mot 'toto' et
* le type de la donnée cherchée (ici ENTIER).
* En sortie, on a la valeur 30
*
*
'DEBPROC' VALARG ;
'ARGUMENT' tlig*'TABLE' ;
'ARGUMENT' motcher*'MOT' ;
'ARGUMENT' typcher*'MOT' ;
mot2 = 'CHAINE' motcher '=' ;
lon2 = 'DIME' mot2 ;
nlig = 'DIME' tlig ;
ok = faux ;
'REPETER' ilig nlig ;
* Sinon pb si l'indice de la table est un nom d'operateur
   ind = 'CHAINE' tlig . &ilig ;
*dbg   'MESSAGE' 'ind=' ind ;
   fi  = posi mot2 'DANS' ind 'NOCA' ;
*dbg   'MESSAGE' 'fi=' fi ;
   ok = 'EGA' fi 1 ;
   'SI' ok ;
      ideb = '+' lon2 1 ;
      ifin = 'DIME' ind ;
      valcher = 'EXTRAIRE' ind ideb ifin ;
      'QUITTER' ilig ;
   'FINSI' ;
'FIN' ilig ;
'SI' ('NON' ok) ;
   'ERREUR' ('CHAINE' motcher ' not found') ;
'FINSI' ;
*'MESSAGE' ('CHAINE' 'valcher=' valcher) ;
'SI' ('EGA' typcher 'ENTIER') ;
   valcher = 'ENTIER' valcher ;
'FINSI' ;
'SI' ('EGA' typcher 'FLOTTANT') ;
   valcher = 'FLOTTANT' valcher ;
'FINSI' ;
'SI' ('EGA' typcher 'MOT') ;
   valcher = 'CHAN' 'MINU' valcher ;
'FINSI' ;
'RESPRO' valcher ;
'FINPROC' ;
*
*                       MAKELEM
*
* Cette procédure génère les noeuds et les éléments en lisant un fichier
* fic est le nom de fichier
* nelem est le nombre d'éléments à lire
* nnoe  est le nombre de noeuds par élément
* Si nnoe=1, on génère la table des noeuds à partir des coordonnées
* données dans le fichier
* Si nnoe>1, on génère la table des simplexes à partir de leurs
* numéros de noeuds, il faut alors donner la table des noeuds
* tabnode comme argument supplémentaire à la procédure
*
'DEBPROC' MAKELEM ;
'ARGUMENT' fic*'MOT' ;
'ARGUMENT' nelem*'ENTIER' ;
'ARGUMENT' nnoe*'ENTIER' ;
*
dim = 'VALEUR' 'DIME' ;
'SI' ('OU' ('<' nnoe 1) ('>' nnoe ('+' dim 1))) ;
   'ERREUR' ('CHAINE' 'nnoe=' nnoe ' incorrect') ;
'FINSI' ;
'SI' ('NEG' nnoe 1) ;
   'ARGUMENT' tabnode*'TABLE' ;
'FINSI' ;
*
tab = 'TABLE' 'ESCLAVE' ;
'MESSAGE' ('CHAINE' 'Reading ' fic ) ;
*'OPTI' 'ACQU' fic ;
MONACQU globfic tfic fic ;
'ACQU' bid*'ENTIER' ;
*
'SI' ('EGA' nnoe 1) ;
   'REPETER' bcl nelem ;
      i = &bcl ;
      'ACQU' lcoor*'LISTREEL' dim ;
      tab . i = 'POIN' (EXTR lcoor 1) (EXTR lcoor 2) ;
   'FIN' bcl ;
'SINON' ;
   lmot = 'MOTS' 'SEG2' 'TRI3' 'TET4' ;
   'REPETER' bcl nelem ;
      i = &bcl ;
      acqu lnode*'LISTENTI' nnoe ;
      mpo = 'VIDE' 'MAILLAGE'/'POI1' ;
      'REPETER' inoe nnoe ;
         po = 'EXTRAIRE' lnode &inoe ;
         mpo = 'ET' mpo
                    ('MANU' 'POI1' (tabnode . po)) ;
      'FIN' inoe ;
      tyel = 'EXTRAIRE' lmot ('-' nnoe 1) ;
      tab . i = 'MANU' tyel mpo ;
   'FIN' bcl ;
'FINSI' ;
'RESPRO' tab ;
'FINPROC' ;
*
*                       MAKCHAM
*
* Génère les champs en lisant les fichiers correspondant
* Il faut donner en entrée une table contenant les temps à lire,
* les différents champs et les noms de fichiers.
* Celle-ci est modifiée en sortie et contient les valeurs des champs.
* Ce sont des champoints pour les champs définis aux noeuds
* et des champs par éléments pour les champs définis aux faces ou
* aux éléments.
*
*
'DEBPROC' MAKCHAM ;
'ARGUMENT' tabcham*'TABLE' ;
*
* Les champs
*
'SI' ('>' ntemp 0) ;
   'REPETER' itemp ntemp ;
      i = &itemp ;
      tabi = tabcham . i ;
      itabi = 'INDEX' tabi ;
      'REPETER' ntabi ('DIME' itabi) ;
         idx = itabi . &ntabi ;
         'SI' ('EGA' ('TYPE' (tabi . idx)) 'TABLE') ;
            tabin = tabi . idx ;
            fic = tabin . 'fic' ;
            'MESSAGE' ('CHAINE' 'Reading ' fic) ;
*            'OPTI' 'ACQU' fic ;
            MONACQU globfic tfic fic ;
            'ACQU' bid*'ENTIER' ;
            nat = tabin . 'nat' ;
            'SI' ('EGA' nat 'vector') ;
               ncomp = dim ;
            'SINON' ;
               ncomp = 1 ;
            'FINSI' ;
            tvcomp = 'TABLE' ;
            'REPETER' icomp ncomp ;
               tvcomp . &icomp = 'PROG' ;
            'FIN' icomp ;
            loc = tabin . 'loc' ;
            mod = tabcham . loc ;
            mmod = mod ;
            'SI' ('NEG' ('TYPE' mmod) 'MAILLAGE') ;
               mmod = 'EXTRAIRE' mmod 'MAIL' ;
            'FINSI' ;
*
            'REPETER' bcl ('NBEL' mmod) ;
               'ACQU' lcom*'LISTREEL' ncomp ;
               'REPETER' icomp ncomp ;
                  tvcomp . &icomp = 'ET' (tvcomp . &icomp)
                     ('PROG' ('EXTRAIRE' lcom &icomp)) ;
               'FIN' icomp ;
            'FIN' bcl ;
            'SI' ('EGA' loc 'som') ;
               'SI' ('EGA' ncomp 1) ;
                  chp = 'MANU' 'CHPO' mmod ncomp 'SCAL' (tvcomp . 1) ;
               'FINSI' ;
               'SI' ('EGA' ncomp 2) ;
                  chp = 'MANU' 'CHPO' mmod ncomp 'UX' (tvcomp . 1)
                                                 'UY' (tvcomp . 2) ;
               'FINSI' ;
               'SI' ('EGA' ncomp 3) ;
                  chp = 'MANU' 'CHPO' mmod ncomp 'UX' (tvcomp . 1)
                                                 'UY' (tvcomp . 2)
                                                 'UZ' (tvcomp . 3) ;
               'FINSI' ;
               tabin . 'chpoint' = chp ;
*               'LISTE' chp;
            'SINON' ;
               'SI' ('EGA' ncomp 1) ;
                  cha = 'MANU' 'CHML' mod 'REPA' 'SCAL' (tvcomp . 1)
                     'GRAVITE' ;
               'FINSI' ;
               'SI' ('EGA' ncomp 2) ;
                  cha = 'MANU' 'CHML' mod 'REPA' 'UX' (tvcomp . 1)
                                                 'UY' (tvcomp . 2)
                     'GRAVITE' ;
               'FINSI' ;
               'SI' ('EGA' ncomp 3) ;
                  cha = 'MANU' 'CHML' mod 'REPA' 'UX' (tvcomp . 1)
                                                 'UY' (tvcomp . 2)
                                                 'UZ' (tvcomp . 3)
                     'GRAVITE' ;
               'FINSI' ;
               tabin . 'chamelem' = cha ;
               tabin . 'chpoint' = 'KCHA' mod cha 'CHPO' 'QUAF' ;
*               'LISTE' cha ;
            'FINSI' ;
         'FINSI' ;
      'FIN' ntabi ;
   'FIN' itemp ;
'FINSI' ;
*
'RESPRO' tabcham ;
'FINPROC' ;
*
*                       SAUTLIG
*
* Saute n lignes dans un fichier en cours de lecture avec ACQU
*
'DEBPROC' SAUTLIG ;
'ARGUMENT' ilig*'ENTIER' ;
'ARGUMENT' jlig*'ENTIER' ;
'REPETER' bcl ;
   ilig = ilig '+' 1 ;
   'SI' ('<' ilig jlig) ;
      acqu bid*'MOT' ;
   'SINON' ;
      ilig = '-' ilig 1 ;
      'QUITTER' bcl ;
   'FINSI' ;
'FIN' bcl ;
'RESPRO' ilig ;
'FINPROC' ;
*
*                       MONACQU
*
*
* On se positionne dans le fichier fic juste après la ligne
* FICHIER fic2
* dont le numéro est dans tfic . fic2
* si multific = vrai (variable globale), MONACQU est equivalent a 'OPTI
* 'ACQU' ;
*
'DEBPROC' MONACQU ;
'ARGUMENT' fic*'MOT' ;
'ARGUMENT' tfic*'TABLE' ;
'ARGUMENT' fic2*'MOT' ;
*
'SI' multific ;
   'OPTI' 'ACQU' fic2 ;
'SINON' ;
*'MESSAGE' ('CHAINE' 'Reading ' fic) ;
   'OPTI' 'ACQU' fic ;
   nlig = tfic . fic2 ;
*'MESSAGE' 'nlig=' nlig ;
   'SI' ('>' nlig 0) ;
      'REPETER' bcl nlig ;
         bid = 'ACQU' 'BRUT' ;
      'FIN' bcl ;
   'FINSI' ;
'FINSI' ;
'FINPROC' ;
*
*
*                    Fin des P R O C E D U R E S
******************************************************************
*
* Début du jeu de données
*
* multific est un logique global qui dit si les fichiers .lata sont mis
* sequentiellement dans un seul fichier globfic (typiquement le .dgibi
* courant) ou si ils sont en fichiers separes dans le repertoire courant
*
multific = faux ;
*
* 1ere passe pour localiser les débuts de fichier dans globfic
* si multific = faux ;
* On fait une table tfic . 'nomfic' = i avec i ligne début
tfic = 'TABLE' ;
divers = 'VENV' 'CASTEM_DIVERS';
globfic = 'CHAINE' divers '/../dgibi/acqulata.dgibi' ;
'SI' ('NON' multific) ;
   'OPTI' 'ACQU' globfic ;
*
   ilig = 0 ;
   'REPETER' bcl ;
      lalig = ACQU 'BRUT' ; ilig = '+' ilig 1 ;
*      'SI' ('NEG' tlig . 1 '*') ;
*       prem = 'CHAINE' IEME lalig 1 ;
*       mcle = 'CHANGER' 'MINU' (IEME lalig 1) ;
      tlig = SPLITLIG lalig ;
      'SI' ('>' ('DIME' tlig) 0) ;
* Eviter l'interprétation de tlig . 1
         'SI' ('NEG' tlig . 1 '*') ;
            mcle = 'CHANGER' 'MINU' tlig . 1 ;
            'SI' ('EGA' mcle 'fichier') ;
               tfic . (tlig . 2) = ilig ;
            'FINSI' ;
            'SI' ('EGA' mcle 'stop') ;
               'QUITTER' bcl ;
            'FINSI' ;
         'FINSI' ;
      'FINSI' ;
   'FIN' bcl ;
*
   'LISTE' tfic ;
'FINSI' ;
*
nomcas = 'stokes_2d' ;
*
* Traitement du fichier stokes_2d.lata
*
* 1 Lecture du nombre d'entrees CHAMP GEOM et TEMP. On s'arrete à
*   l'entrée FIN
*
fic = 'CHAINE' nomcas '.lata' ;
'MESSAGE' ('CHAINE' 'Reading ' fic ' pass 1') ;
*'OPTI' 'ACQU' fic ;
MONACQU globfic tfic fic ;
lkas = 'LECT' ;
ilig = 0 ;
tmot = 'TABLE' ;
tmot . 'CHAMP' = 1 ;
tmot . 'GEOM'  = 2 ;
tmot . 'TEMPS' = 3 ;
tmot . 'FIN'   = 4 ;
*
'REPETER' bcl ;
   acqu mot1*'MOT' ;
*   'LISTE' mot1 ;
   ilig = '+' ilig 1 ;
   'SI' ('EXISTE' tmot mot1) ;
      ikas = tmot . ('CHAINE' mot1) ;
   'SINON' ;
      ikas = 0 ;
   'FINSI' ;
   lkas = 'ET' lkas ('LECT' ikas) ;
   'SI' ('EGA' ikas 4) ;
         'QUITTER' bcl ;
   'FINSI' ;
'FIN' bcl ;
*
lgeom = posi 2 'DANS' lkas 'TOUS' ;
ltemp = posi 3 'DANS' lkas 'TOUS' ;
ifin  = posi 4 'DANS' lkas ;
ngeom = 'DIME' lgeom ;
ntemp = 'DIME' ltemp ;
'MESSAGE' ('CHAINE' 'Nombre de geometries              : ' ngeom) ;
'MESSAGE' ('CHAINE' 'Nombre de temps sauves            : ' ntemp) ;
'SI' ('>' ntemp 0) ;
   'SI' ('>' ntemp 1) ;
      ncham = '-' ('-' ('EXTRAIRE' ltemp 2) ('EXTRAIRE' ltemp 1)) 1 ;
   'SINON' ;
      ncham = '-' ('-' ifin ('EXTRAIRE' ltemp 1)) 1 ;
   'FINSI' ;
'FINSI' ;
'MESSAGE' ('CHAINE' 'Nombre de champs par temps sauves : ' ncham) ;
*
* On lit uniquement la première géométrie
*
'MESSAGE' ('CHAINE' 'Reading ' fic ' pass 2') ;
*'OPTI' 'ACQU' fic ;
MONACQU globfic tfic fic ;
ilig = 0 ;
igeom = 'EXTRAIRE' lgeom 1 ;
ilig = SAUTLIG ilig ('+' igeom 1) ;
* Les noeuds
lalig = ACQU 'BRUT' ; ilig = '+' ilig 1 ;
tlig = SPLITLIG lalig ;
ficnode = 'CHAINE' tlig . 3 ;
nnode   = VALARG tlig 'size' 'ENTIER' ;
dim     = VALARG tlig 'composantes' 'ENTIER' ;
'MESSAGE' ('CHAINE' 'Nom du fichier des noeuds : ' ficnode) ;
'MESSAGE' ('CHAINE' 'Nombre de noeuds          : ' nnode) ;
'MESSAGE' ('CHAINE' 'Dimension du probleme     : ' dim  ) ;
* Les éléments
lalig = ACQU 'BRUT' ; ilig = '+' ilig 1 ;
tlig = SPLITLIG lalig ;
ficelem = 'CHAINE' tlig . 3 ;
nelem   = VALARG tlig 'size' 'ENTIER' ;
nnoe    = VALARG tlig 'composantes' 'ENTIER' ;
'MESSAGE' ('CHAINE' 'Nom du fichier des éléments : ' ficelem) ;
'MESSAGE' ('CHAINE' 'Nombre déléments            : ' nelem) ;
'MESSAGE' ('CHAINE' 'Nombre de noeuds/elem       : ' nnoe) ;
* Les faces
igeom = 'EXTRAIRE' lgeom ngeom ;
ilig = SAUTLIG ilig ('+' igeom 3) ;
lalig = ACQU 'BRUT' ; ilig = '+' ilig 1 ;
tlig = SPLITLIG lalig ;
ficface = 'CHAINE' tlig . 3 ;
nface   = VALARG tlig 'size' 'ENTIER' ;
nnof    = VALARG tlig 'composantes' 'ENTIER' ;
'MESSAGE' ('CHAINE' 'Nom du fichier des faces : ' ficface) ;
'MESSAGE' ('CHAINE' 'Nombre de faces          : ' nface) ;
'MESSAGE' ('CHAINE' 'Nombre de noeuds/face    : ' nnof) ;
* Les champs aux différents instants
tabcham = 'TABLE' ;
ltem    = 'PROG' ;
'SI' ('>' ntemp 0) ;
   'REPETER' itemp ntemp ;
      i = &itemp ;
      ilig = SAUTLIG ilig ('EXTRAIRE' ltemp i) ;
      tabcham . i = 'TABLE' ; tabi = tabcham . i ;
      lalig = ACQU 'BRUT' ; ilig = '+' ilig 1 ;
      tlig = SPLITLIG lalig ;
      tem  = 'FLOTTANT' tlig . 2 ;
      tabi . 'INSTANT' = tem ;
      ltem = 'ET' ltem ('PROG' tem) ;
      'REPETER' icham ncham ;
         lalig = ACQU 'BRUT' ; ilig = '+' ilig 1 ;
         tlig = SPLITLIG lalig ;
         quoi = 'CHANGER' 'MINU' ('CHAINE' tlig  . 2) ;
         loc  = VALARG tlig 'localisation' 'MOT' ;
         nat  = VALARG tlig 'nature' 'MOT' ;
         nomcham = 'CHAINE' quoi loc ;
         tabi . nomcham = 'TABLE' ; tabin = tabi . nomcham ;
         tabin . 'quoi' = 'MOT' quoi ;
         tabin . 'loc' = 'MOT' loc ;
         tabin . 'nat' = 'MOT' nat ;
         tabin . 'fic' = 'CHAINE' tlig . 3 ;
*         'LISTE' tabin ;
      'FIN' icham ;
   'FIN' itemp ;
'FINSI' ;
*
* On a lu tous les noms de fichiers, maintenant, on peut créer les objets
*
'OPTI' 'DIME' dim ;
* les noeuds
tabnode = MAKELEM ficnode nnode 1 ;
pmt = 'ET' tabnode ;
* Les éléments
tabelem = MAKELEM ficelem nelem nnoe tabnode ;
mt = 'ET' tabelem ;
* Les faces
tabface = MAKELEM ficface nface nnof tabnode ;
fac = 'ET' tabface ;
*'TRACER' fac 'TITR' 'fac' ;
*
_mt  = 'CHANGER' mt 'QUAF' ;
_fac = 'CHANGER' fac 'QUAF' ;
'ELIMINATION' ('ET' _mt _fac) 1.D-6 ;
*
tabcham . 'ltemps' = ltem ;
tabcham . 'som' = pmt ;
tabcham . 'elem' = 'MODE' _mt 'NAVIER_STOKES' 'QUAF' ;
tabcham . 'faces' = 'MODE' _fac 'NAVIER_STOKES' 'QUAF' ;
* Lire les champs
tabcham = MAKCHAM tabcham ;
*fic = 'CHAINE' nomdir nomcas '.sauv' ;
*'MESSAGE' ('CHAINE' 'Saving ' fic) ;
*'OPTI' 'SAUVER' fic ;
*'SAUVER' tabcham ;
*
ntemps = 'DIME' (tabcham . 'ltemps') ;
tt = tabcham . ntemps ;
vit = tt . 'vitessefaces' . 'chpoint' ;
mvit = 'MAXIMUM' vit 'ABS' ;
prep1 = tt . 'pressionsom' . 'chpoint' ;
prep0 = tt . 'pressionelem' . 'chamelem' ;
mpre1 = 'MAXIMUM' prep1 'ABS' ;
mpre0 = 'MAXIMUM' prep0 'ABS' ;
'MESSAGE' ('CHAINE' 'mvit=' mvit) ;
'MESSAGE' ('CHAINE' 'mpre1=' mpre1) ;
'MESSAGE' ('CHAINE' 'mpre0=' mpre0) ;
*
'SI' graph ;
   vvit = 'VECT' vit 'DEPL' 'JAUN' ;
   tit = 'CHAINE' 'Vitesse ; mvit=' mvit ;
   'TRACER' vvit mt 'TITR' tit ;
   tit = 'CHAINE' 'Pression P1 ; mpre1=' mpre1 ;
   'TRACER' prep1 mt 'TITR' tit ;
   tit = 'CHAINE' 'Pression P0 ; mpre0=' mpre0 ;
   'TRACER' prep0 (tabcham . 'elem') 'TITR' tit ;
'FINSI' ;
* On fait quelques tests bateaux sur les résultats obtenus
y47 = coor 2 (tabnode . 47) ;
t1 = 'EGA' nnode 86 ;
t2 = 'EGA' nelem 138 ;
t3 = 'EGA' nface 223 ;
t4 = 'EGA' mvit 1.18928E-4 1.E-8 ;
t5 = 'EGA' mpre0 6.04218E-1 1.E-5 ;
t6 = 'EGA' mpre1 6.64172E-1 1.E-4 ;
t7 = 'EGA' y47 1.83565006e-1 1.e-9 ;
*
ok = t1 'ET' t2 'ET' t3 'ET' t4 'ET' t5 'ET' t6 'ET' t7 ;
*
'SI' ('NON' ok) ;
   'MESSAGE' ('CHAINE' 'Il y a eu des erreurs') ;
   'ERREUR' 5 ;
'SINON' ;
   'MESSAGE' ('CHAINE' 'Tout sest bien passe !') ;
'FINSI' ;
*
'SI' interact ;
   'OPTION' 'ECHO' 1 ;
   'OPTION' 'DONN' 5 ;
'FINSI' ;
*
* End of dgibi file ACQULATA
*
'FIN' ;
'COMM' fichier : acqulatb.dgibi
'COMM' Jeu de données contenant les données à lire pour le test ;
'COMM' acqulata.dgibi ;
'FIN' ;
FICHIER stokes_2d.lata
LATA_V2.1 Trio_U Version1.6 or later
stokes_2d
Trio_U verbosity=0
Format ASCII,INT32,F_INDEXING,C_ORDERING,F_MARKERS_SINGLE,REAL32
GEOM mt type_elem=TRIANGLE
CHAMP SOMMETS stokes_2d.lata.mt.0.0 geometrie=mt size=86 composantes=2
CHAMP ELEMENTS stokes_2d.lata.mt.0.0.elem geometrie=mt size=138 composantes=3 format=INT32
GEOM mt_boundaries_bas type_elem=SEGMENT
CHAMP SOMMETS stokes_2d.lata.mt_boundaries_bas.0.0 geometrie=mt_boundaries_bas size=9 composantes=2
CHAMP ELEMENTS stokes_2d.lata.mt_boundaries_bas.0.0.elem geometrie=mt_boundaries_bas size=8 composantes=2 format=INT32
GEOM mt_boundaries_dro type_elem=SEGMENT
CHAMP SOMMETS stokes_2d.lata.mt_boundaries_dro.0.0 geometrie=mt_boundaries_dro size=9 composantes=2
CHAMP ELEMENTS stokes_2d.lata.mt_boundaries_dro.0.0.elem geometrie=mt_boundaries_dro size=8 composantes=2 format=INT32
GEOM mt_boundaries_hau type_elem=SEGMENT
CHAMP SOMMETS stokes_2d.lata.mt_boundaries_hau.0.0 geometrie=mt_boundaries_hau size=9 composantes=2
CHAMP ELEMENTS stokes_2d.lata.mt_boundaries_hau.0.0.elem geometrie=mt_boundaries_hau size=8 composantes=2 format=INT32
GEOM mt_boundaries_gau type_elem=SEGMENT
CHAMP SOMMETS stokes_2d.lata.mt_boundaries_gau.0.0 geometrie=mt_boundaries_gau size=9 composantes=2
CHAMP ELEMENTS stokes_2d.lata.mt_boundaries_gau.0.0.elem geometrie=mt_boundaries_gau size=8 composantes=2 format=INT32
Champ FACES stokes_2d.lata.FACES.FACES.mt.-1.000000 geometrie=mt localisation=FACES size=223 composantes=2 reference=SOMMETS format=int32
Champ ELEM_FACES stokes_2d.lata.ELEM_FACES.ELEMENTS.mt.-1.000000 geometrie=mt localisation=ELEMENTS size=138 composantes=3 reference=FACES format=int32
TEMPS 9.34173851e+02
Champ VITESSE stokes_2d.lata.VITESSE.FACES.mt.934.1738514257 geometrie=mt localisation=FACES size=223 nature=vector noms_compo=VITESSE_FACES_mt0,VITESSE_FACES_mt1 composantes=2
Champ PRESSION stokes_2d.lata.PRESSION.ELEM.mt.934.1738514257 geometrie=mt localisation=ELEM size=138 nature=scalar noms_compo=PRESSION_ELEM_mt0 composantes=1
Champ PRESSION stokes_2d.lata.PRESSION.SOM.mt.934.1738514257 geometrie=mt localisation=SOM size=86 nature=scalar noms_compo=PRESSION_SOM_mt0 composantes=1
FIN
FICHIER stokes_2d.lata.mt.0.0
688
-3.36569995e-01 -3.99607986e-01
-2.09496006e-01 -3.93750012e-01
-8.44961032e-02 -3.93750012e-01
4.05039005e-02 -3.93750012e-01
1.65503994e-01 -3.93750012e-01
2.90511012e-01 -3.97635013e-01
3.99673015e-01 -3.36504996e-01
3.93750012e-01 -2.11587995e-01
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688
FICHIER stokes_2d.lata.mt.0.0.elem
1656
1 55 59
2 1 59
2 59 60
3 2 60
3 60 61
4 3 61
4 61 62
5 4 62
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1656
FICHIER stokes_2d.lata.FACES.FACES.mt.-1.000000
1784
83 55
55 59
59 60
60 61
61 62
62 63
63 80
80 84
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1784
FICHIER stokes_2d.lata.VITESSE.FACES.mt.934.1738514257
1784
0.00000000e+00 0.00000000e+00
0.00000000e+00 0.00000000e+00
0.00000000e+00 0.00000000e+00
0.00000000e+00 0.00000000e+00
0.00000000e+00 0.00000000e+00
0.00000000e+00 0.00000000e+00
0.00000000e+00 0.00000000e+00
0.00000000e+00 0.00000000e+00
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1784
FICHIER stokes_2d.lata.PRESSION.ELEM.mt.934.1738514257
552
-5.99139631e-01
-5.47004104e-01
-6.03572369e-01
-5.45936227e-01
-6.04081035e-01
-5.45986116e-01
-6.04211092e-01
-5.46260536e-01
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552
FICHIER stokes_2d.lata.PRESSION.SOM.mt.934.1738514257
344
-4.92454946e-01
-4.83753651e-01
-4.84730214e-01
-4.84833777e-01
-4.85233456e-01
-4.92019176e-01
-3.70071083e-01
-1.42778039e-01
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344
STOP
