* fichier : adve_07.dgibi
************************************************************************
* Section : Thermique Advection
* Section : Thermique Conduction
* Section : Diffusion Advection
* Section : Diffusion Fick
************************************************************************

************************************************************************
*           Test adve_07.dgibi: Jeux de données                        *
*           -----------------------------------                        *
************************************************************************
*__________________________________________________________________
*   TEST ADVE_07                                                   *
*                                                                  *
*   COMPARAISON NUMERIQUE ENTRE LES MODELES                        *
*   THERMIQUE ADVECTION ET DIFFUSION ADVECTION                     *
*                                                                  *
*     - Maillage 2D rectangulaire                                  *
*     - Les inconnues ('T' et 'CO') sont bloquees a gauche         *
*     - Un flux generalise est injecte au milieu du domaine        *
*     - Le milieu est animé d'une vitesse de transport {Vx;Vy}     *
*     - Le calcul est stationnaire                                 *
*                                                                  *
*   On s'interesse a la solution donnee par RESO pour la THERMIQUE *
*   et pour la DIFFUSION                                           *
*                                                                  *
*       L'ecart entre les valeurs donnes par les deux solutions    *
*   doit etre de l'ordre de 'VALE' 'PREC' (XZPREC).                *
*                                                                  *
*__________________________________________________________________*
*
OPTI DIME 2 'ELEM' 'TRI3';
OPTI TRAC 'PSC';


* PARAMETRAGE *
Lx         = 1.  ;
Ly         = 0.5 ;
Nx         = 40  ;
Ny         = 20  ;

Vx         = 10. ;
Vy         = 2.  ;
Val_Gauche = 0.  ;
Val_Flux   = 1.  ;
Alpha      = 0.1 ;


* MAILLAGE *
P1       = POIN 0. 0. ;
P2       = P1 'PLUS' (Lx 0.);

L1       ='DROI' Nx P1 P2 ;
L2       = L1 'PLUS' (0. Ly);

S1       ='REGL' Ny L1 L2 ;
L_GAUCHE = POIN S1 DROI P1 (P1 PLUS (0. 1.)) 1.D-6 ;
P_Mil    = POIN S1 PROC (P1 PLUS ((Lx/2.) (Ly/2.)));


* Creation d'un MODELE 'THERMIQUE' 'ADVECTION' comme calcul de ref.
MOD1 = MODE S1 'THERMIQUE' 'ADVECTION';
MAT1 = MATE MOD1 'K' Alpha 'RHO' 1. 'C' 1. 'VITX' Vx 'VITY' Vy ;
ADV1 = ADVE MOD1 MAT1 ;
CON1 = COND MOD1 MAT1 ;
BLO1 = BLOQ 'T' L_GAUCHE ;
IMP1 = DEPI BLO1 Val_Gauche ;
CHA1 = MANU 'CHPO' P_Mil 1 'Q' Val_Flux 'NATURE' 'DISCRET';
RIG1 = ADV1 ET CON1 ET BLO1 ;
SEC1 = CHA1 ET IMP1 ;


* Creation d'un MODELE 'DIFFUSION' 'ADVECTION' (nouveau modele en 2022)
MOD2 = MODE S1 'DIFFUSION' 'ADVECTION';
MAT2 = MATE MOD2 'KD' Alpha 'CDIF' 1. 'VITX' Vx 'VITY' Vy ;
ADV2 = ADVE MOD2 MAT2 ;
CON2 = COND MOD2 MAT2 ;
BLO2 = BLOQ 'CO' L_GAUCHE;
IMP2 = DEPI BLO2 Val_Gauche ;
CHA2 = MANU 'CHPO' P_Mil 1 'QCO' Val_Flux 'NATURE' 'DISCRET';
RIG2 = ADV2 ET CON2 ET BLO2 ;
SEC2 = CHA2 ET IMP2 ;


* Creation d'un MODELE sans ADVECTION (pour tester ADVE avec un MODELE COMPLEXE)
MOD0   = MODE  S1 'THERMIQUE' ;
MAT0   = MATE  MOD0 'K' 1. 'RHO' 1. 'C' 1. ;
MODTOT = MOD0 et MOD1 et MOD2 ;
MATTOT = MAT0 et MAT1 et MAT2 ;
RIGTOT = ADVE MODTOT MATTOT   ;


* RESOLUTION *
SOLa = RESO (RIG1 ET RIG2) (SEC1 ET SEC2) ;
SolT ='EXCO' SOLa 'T'  ;
SolC ='EXCO' SOLa 'CO' ;

TRAC S1 ('BORN' SOLa 'T' 'MAXI' (('MAXI' SolT) / 2.)) (CONT S1);


* Comparaison des solutions *
DIF1 ='MAXI' 'ABS' (SolT - SolC) / ('MAXI' 'ABS' SolT) ;

'MESS' 'Ecart relatif MAXI entre les solutions THERMIQUE et DIFFUSION :' DIF1 ;
'SI' (DIF1 '>'('VALE' 'PREC'));
   CHAI1 = CHAI 'Erreur dans le MODELE ADVECTION entre la THERMIQUE et la DIFFUSION';
   ERRE CHAI1 ;
'FINS';

FIN;
