* fichier :  diffusion_sous_contraintes_01.dgibi
************************************************************************
* Section : Diffusion Fick
* Section : Diffusion Contraintes
************************************************************************

************************************************************************
*             CAS TEST diffusion_sous_contraintes_01.dgibi             *
************************************************************************
*   NOTA : Ce cas-test ne valide aucun resultat analytique
*          Il permet d'enrichir la base des cas-tests pour les utilisateurs
*          Il incombe aux utilisateurs de valider et qualifier leur
*          domaine de simulation.
*
*   DESCRIPTION :
*   Ce cas-test simule la diffusion d'une espece chimique dans un gradient
*   de potentiel elastique (calcul mecanique couple a la diffusion)
*   La piece est une eprouvette entaillee afin de generer un fort champ
*   de contrainte en pointe d'entaille.
*
*   - 2D PLAN
*   - ELEMENTS FINIS TESTES : 'QUA4'
*   - Regime transitoire pour la diffusion
*
*   - Utilisation de la procedure CHARTHER pour appliquer le flux du au
*     gradient de potentiel elastique
*   - Utilisation de l'operateur SORET pour calculer le flux lui-meme
*   - Convergence DIFFUSION-MECANIQUE activee car la diffusion est
*     influencee par la mecanique.
************************************************************************
'OPTI' 'DIME' 2 'ELEM' 'QUA4';
'OPTI' 'DEBU' 1;
'OPTI' 'TRAC' 'PSC';


'DEBP' CHARTHER PRECED TPS1;
************************************************************************
* Dans la procedure CHARTHER (appel dans TRANSNON a chaque iterations)
* permet d'ajouter une flux de diffusion du a un gradient d'energie
* potetielle elastique dans le materiau
*   - Le flux vaut JH=-CH.KD.grad(EPS(elas):SIG)
*   - Le flux nodal integre QH est renvoye comme second membre dans
*     l'indice 'ADDI_SECOND'
************************************************************************

  SIG    = PRECED.'ESTIMATION'.'CONTRAINTES';
  EPS    ='ELAS' MOD1 SIG MAT1;

  ENECHM ='ENER' MOD1 EPS SIG ;
  ENE    ='CHAN' 'CHPO' MOD1 ENECHM ;

* Pour les besoins de SORE, on met 'T' comme nom de composante
  ENE    ='NOMC' 'T' ENE;
  CH     ='EXCO' TH_COUR 'CH' 'CH';

  RIGDM ='SORE'  MOD2  MATLOC COEF ENE  ;

  TAA='TABL';
  TAA.'ADDI_SECOND'=RIGDM * CH;
'FINP' TAA ;
************************************************************************

* MAILLAGE
 LX = 1. ;
 LY = 1. ;
 A0 = 0.2;

 NBEX = 50;
 NBEY = 50;
 NBA0 ='ENTI' 'SUPE' (NBEY*A0/LY) ;

 P1 = 0. 0. ;
 P2 = P1 'PLUS' (LX 0.);
 P3 = P2 'PLUS' (0. A0);

 P4 = P3 'PLUS' (0. (LY-A0));

 P5 = P1 'PLUS' (0. LY);
 P6 = P1 'PLUS' (0. A0);


 L1 ='DROI' P1 NBEX P2;
 L2 ='DROI' P6 NBEX P3;
 L3 ='DROI' P5 NBEX P4;

 S1 ='REGL' L1  NBA0         L2 'COUL' BLEU;
 S2 ='REGL' L2 (NBEY - NBA0) L3 'COUL' VERT;
 PIECE=S1 'ET' S2 ;

 LSUP= 'COTE' 2 S2                     'COUL' 'JAUN' ;
 LDRO=('COTE' 2 S1) 'ET'   LSUP        'COUL' 'CYAN' ;
 LGAU=('COTE' 4 S1) 'ET' ('COTE' 4 S2) 'COUL' 'TURQ' ;

*TRAC 'QUAL' (S1 ET S2 ET LSUP ET LGAU);


* MODELE & MATERIAU
 MOD1  ='MODE' PIECE 'MECANIQUE' 'ELASTIQUE' 'CONS' 'MEC1';
 MOD2  ='MODE' PIECE 'DIFFUSION' 'INCO' 'CH' 'QH' 'CONS' 'DIF1';
 MODTOT= MOD1 'ET' MOD2;

 MAT1  ='MATE' MOD1 'YOUN' 90.E9 'NU' 0.3 ;
 MAT2  ='MATE' MOD2 'KD' 5.D-3 'CDIF' 1. ;
 MATTOT= MAT1 'ET' MAT2 ;

* Pour une utilisation dans CHARTHER avec SORET
 DM    = 2.D-13 ;
 MATLOC='MATE'  MOD2 'KD' DM           ;
 COEF  ='MANU' 'CHML' MOD2 'SCAL' 1.D0 ;

* BLOCAGES
 BLO1  ='BLOQ' 'UX'   LGAU ;
 BLO2  ='BLOQ' 'UY'   LGAU ;
 BLO3  ='BLOQ' 'UX'   LSUP ;
 BLOTOT= BLO1 'ET' BLO2 'ET' BLO3;

* CHARGEMENT
 DEPI1='DEPI' BLO1 (-1*LX/10);

 EVO1   ='EVOL' 'MANU' 'TEMP' ('PROG' 0. 0.5 1.) 'AMPL' ('PROG' 0. 1. 1.);
 CHADEP1='CHAR' 'DIMP' DEPI1 EVO1;
 CHATOT = CHADEP1;

* CONDITIONS INITIALES
 CHPCH0 ='MANU' 'CHPO' PIECE 1 'CH' 1. 'NATU' 'DIFFUS';

 LTPS1  ='PROG' 0. 'PAS' 0.05 1. ;

* PASAPAS
 TA1='TABL';
 TA1.MODELE             = MODTOT ;
 TA1.CARACTERISTIQUES   = MATTOT ;
 TA1.BLOCAGES_MECANIQUES= BLOTOT ;
 TA1.CHARGEMENT         = CHATOT ;
 TA1.TEMPS_CALCULES     = LTPS1  ;

 TA1.PROCEDURE_CHARTHER = VRAI   ;
 TA1.CONVERGENCE_MEC_THE= VRAI   ;

 TA1.CONCENTRATIONS     ='TABL' ;
 TA1.CONCENTRATIONS. 0  = CHPCH0 ;

 PASAPAS TA1 ;

 DIM1 ='DIME' TA1.'TEMPS' - 1;

'TRAC' ('LOG' TA1.CONCENTRATIONS. DIM1) PIECE ;
 EVO1 ='EVOL' 'BLEU' 'TEMP' TA1 'CONCENTRATIONS' P3;
'DESS' EVO1;
'FIN';
