* fichier : enc2d_therm1.dgibi
*
* 2D axisymetric air containment with convective heat transfer and heat losses
* Same as enc2D-therco but without implicit wall coupling
*
'OPTI' 'DIME' 2 'ELEM' 'CU20' 'MODE' 'AXIS' 'TRAC' 'PSC' 'DENS' 1. ;
*
COMPLET = FAUX ;
GRAPH   = FAUX ;
'SI' COMPLET ;
  nbit = 200 ;
  DT0  = 2.  ;
  n3 = 10   ;
  ds1= 0.02 ;
  ds2= 0.2  ;
'SINO' ;
  nbit = 20 ;
  DT0  = 2. ;
  n3 = 10   ;
  ds1= 0.02 ;
  ds2= 0.2  ;
'FINSI' ;
*
* Mesh
*
p1 = 5.D-4  0. ;
p2 = 0.5    0. ;
p3 = 1.     0. ;
p4 = 1.     2. ;
p41= 0.5    2. ;
p5 = 5.D-4  2. ;
*
bas    = p1 'DROI' 'DINI' ds1 'DFIN' ds2 p2
            'DROI' 'DINI' ds2 'DFIN' ds1 p3 ;
paroid = p3 'DROI' n3 p4 ;
plaf   = p4 'DROI' 'DINI' ds1 'DFIN' ds2 p41
            'DROI' 'DINI' ds2 'DFIN' ds1 p5 ;
axe    = p5 'DROI' n3 p1 ;
vtp    = (paroid 'TRAN' 2 (0.1  0.)) 'COUL' 'BLEU' ;
parext = ('COTE' 3 vtp) 'COUL' 'ROUG' ;
mt     = 'DALLER' bas paroid plaf axe ;
*
*- Data for execrxt.procedur
*
rxt = 'TABLE' ;
rxt . 'VERSION' = 'V0' ;
rxt . 'vtf'     = mt ;
rxt . 'axe'     = axe ;
rxt . 'vtp'     = vtp ;
rxt . 'epsi'    = 1.e-4 ;
*
rxt . 'pi'     = 0.5 0.5 ;
*
rxt . 'DISCR' = 'QUAF'    ;
rxt . 'KPRE'  = 'MSOMMET' ;
rxt . 'DT0'   = DT0 ;
*
rxt . 'THERMP'  = VRAI ;
rxt . 'THERCO'  = FAUX ;
rxt . 'ROCP'    = 1.e4 ;
rxt . 'LAMBDA'  = 40.  ;
rxt . 'Tp0'     = 30.  ;
rxt . 'ECHAN'   = 50.  ;
*
rxt . 'ECHEXT'  = VRAI   ;
rxt . 'HEXT'    = 50.    ;
rxt . 'TPEXT'   = 20.    ;
rxt . 'parext'  = parext ;
*
rxt . 'MODTURB'  = 'NUTURB' ;
rxt . 'NUT'      = 0.005    ;
*
rxt . 'TF0'  = 100.0 ;
rxt . 'PT0'  = 1.0e5 ;
*
rxt . 'GRAPH'   = GRAPH ;
rxt . 'DETMAT'  = VRAI ;
rxt . 'RENU'    = 'RIEN' ;
*
*- Transient
*
EXECRXT  nbit rxt ;
*
*- Tests
*
'SI' ('NON' COMPLET) ;
  ERR1 = 0 ;
  tic  = rxt . 'TIC' ;
*
  'LIST' tic . 'Tfm'   ;
  'LIST' tic . 'PT'    ;
  'LIST' tic . 'LMAXU' ;
  ltfm = 'PROG'
   100.00       79.731       77.454       71.786       67.833
   64.355       61.029       57.925       55.136       52.636
   50.398       48.391       46.573       44.903       43.359
   41.927       40.602       39.376       38.240       37.187
   36.207 ;
   lPT = 'PROG'
   1.00000E+05  98068.       92332.       91994.       91665.
   90512.       89494.       88730.       88003.       87312.
   86707.       86175.       85692.       85248.       84837.
   84455.       84099.       83770.       83464.       83182.
   82918. ;
   Lmaxu = 'PROG'
   0.0000       0.0000      0.29154      0.46506      0.52465
   0.48430      0.42198     0.35131      0.28534      0.22824
   0.19253      0.17409     0.16273      0.15506      0.14841
   0.14168      0.13494     0.12844      0.12257      0.11747
   0.11309 ;
*
  evauz = 'EVOL' 'CHPO' ('EXCO' tic . 'UN' 'UY') ('INVE' axe) ;
  evuz  = 'EXTR' evauz 'ORDO' ;
  'LIST'  evuz ;
  lrr = 'PROG'
  4.88090E-38  1.63432E-02  5.27145E-02  8.21404E-02  0.10017
  0.11203      0.11314      0.10972      9.63041E-02  8.71612E-02
  6.94869E-02  6.24003E-02  4.82692E-02  4.89579E-02  3.89615E-02
  4.48514E-02  3.37560E-02  3.37986E-02  2.10628E-02  2.61349E-03
 -1.42428E-37 ;
*
  ERtf = 'SOMM' ('ABS' (ltfm   - tic . 'Tfm'  )) / 80.  ;
  ERPT = 'SOMM' ('ABS' (lPT    - tic . 'PT'   )) / 1.e5 ;
  ERum = 'SOMM' ('ABS' (Lmaxu  - tic . 'LMAXU'))        ;
  ER   = 'SOMM' ((evuz '-' lrr) '*' (evuz '-' lrr)) '*' 0.05 ;
  'MESS' ' ERtf=' ERtf ' ERPT=' ERPT ' ERum=' ERum ;
  'MESS' ' Ecart :' er ;
  'SI' (ERtf '>' 2.e-4) ; ERR1 = ERR1 '+' 1 ; 'FINS' ;
  'SI' (ERPT '>' 2.e-4) ; ERR1 = ERR1 '+' 1 ; 'FINS' ;
  'SI' (ERum '>' 2.e-3) ; ERR1 = ERR1 '+' 1 ; 'FINS' ;
  'SI' (er   '>' 2.e-4) ; ERR1 = ERR1 '+' 1 ; 'FINS' ;
  'SI' ('NEG' ERR1 0) ;
    'ERRE' 5 ;
  'FINS' ;
'FINS' ;
*
*- Plots devoted to enc2d... cases
*
'SI' rxt . 'GRAPH' ;
  tbt = rxt . 'TBT' ;
  tic = rxt . 'TIC' ;
*
  $vtf = rxt . 'GEO' . '$vtf' ;
  vtf  = 'DOMA'  $vtf 'MAILLAGE' ;
  'SI' ('EXIS' tic 'TP') ;
    $vtp = rxt . 'GEO' . '$vtp' ;
    vtp  = 'DOMA'  $vtp 'MAILLAGE' ;
  'FINS' ;
*
  un   = tic . 'UN';
  ung  = 'VECT' un 0.1 'UX' 'UY' 'JAUN' ;
  tf   = tic . 'TF' ;
  rho  = tic . 'RHO' ;
  rair = tic . 'RAIR' ;
  'SI' tbt . 'THE'    ; rhe  = tic . 'RHE'  ; 'FINS' ;
  'SI' tbt . 'TH2'    ; rh2  = tic . 'RH2'  ; 'FINS' ;
  'SI' tbt . 'TCO'    ; rco  = tic . 'RCO'  ; 'FINS' ;
  'SI' tbt . 'TCO2'   ; rco2 = tic . 'RCO2' ; 'FINS' ;
  'SI' tbt . 'VAPEUR' ; rvap = tic . 'RVAP' ; 'FINS' ;
*
  axe = 'CHAN' rxt . 'DISCR' axe ;
  ixe = 'INVE' axe ;
*
  evauz = 'EVOL' 'CHPO' ('EXCO' un 'UY') ixe ;
  'DESS' evauz
  'TITR' 'Velocity with the z axis' 'MIMA'
  'GRIL' 'POIN' 'GRIS' 'TITX' 'z' 'TITY' ' m/s' ;
*
  evatf = 'EVOL' 'CHPO' tf  ixe ;
  'DESS' evatf
  'TITR' 'Gas temperature with the z axis' 'MIMA'
  'GRIL' 'POIN' 'GRIS' 'TITX' 'z' 'TITY' ' C' ;
  'TRAC' tf vtf vtp 'TITR' ' Temperature' ;
  evarh = 'EVOL' 'CHPO' rho ixe ;
  'DESS' evarh
  'TITR' 'Gas density with the z axis' 'MIMA'
  'GRIL' 'POIN' 'GRIS' 'TITX' 'z' 'TITY' ' kg/m3' ;
  'TRAC' rho vtf ('CONT' vtf) ung
  'TITR' ' Density & velocity' ;
*
  'SI' tbt . 'THE'     ;
    evahe  = 'EVOL' 'CHPO' rhe  ixe ;
    'DESS' evahe
    'TITRE' 'Helium density with the z axis' 'MIMA'
    'GRIL' 'POIN' 'GRIS' 'TITX' 'z' 'TITY' ' kg/m3' ;
    'TRAC' rhe vtf vtp 'TITR' ' He density' ;
  'FINS' ;
  'SI' tbt . 'TH2'     ;
    evah2  = 'EVOL' 'CHPO' rh2  ixe ;
    'DESS' evah2
    'TITR' 'Hydrogen density with the z axis' 'MIMA'
    'GRIL' 'POIN' 'GRIS' 'TITX' 'z' 'TITY' ' kg/m3' ;
    'TRAC' rh2 vtf vtp 'TITR' ' H2 density' ;
  'FINS' ;
  'SI' tbt . 'TCO'     ;
    evaco  = 'EVOL' 'CHPO' rco  ixe ;
    'DESS' evaco
    'TITR' 'CO density with the z axis' 'MIMA'
    'GRIL' 'POIN' 'GRIS' 'TITX' 'z' 'TITY' ' kg/m3' ;
    'TRAC' rco vtf vtp 'TITR' ' CO density' ;
  'FINS' ;
  'SI' tbt . 'TCO2'    ;
    evaco2 = 'EVOL' 'CHPO' rco2 ixe ;
    'DESS' evaco2
    'TITR' 'CO2 density with the z axis' 'MIMA'
    'GRIL' 'POIN' 'GRIS' 'TITX' 'z' 'TITY' ' kg/m3' ;
    'TRAC' rco2 vtf vtp 'TITR' ' CO2 density' ;
  'FINS' ;
  'SI' tbt . 'VAPEUR' ;
    evavap = 'EVOL' 'CHPO' rvap ixe ;
    'DESS' evavap
    'TITR' 'Steam density with the z axis' 'MIMA'
    'GRIL' 'POIN' 'GRIS' 'TITX' 'z' 'TITY' ' kg/m3' ;
    'TRAC' rvap vtf vtp 'TITR' ' Steam density' ;
  'FINS' ;
*
* Wall temperature or air density (in cases enc2d with wall temperature
* only air is involved ; hence rair=rho and rho is plotted above))
  'SI' ('EXIS' tic 'TP') ;
    'TRAC' tic . 'TP' vtp 'TITR' ' Wall temperature' ;
  'SINO' ;
    evarair = 'EVOL' 'CHPO' rair ixe ;
    'DESS' evarair
    'TITR' 'Air density with the z axis' 'MIMA'
    'GRIL' 'POIN' 'GRIS' 'TITX' 'z' 'TITY' ' kg/m3' ;
    'TRAC' rair vtf vtp 'TITR' ' Air density' ;
  'FINS' ;
*
  'SI' ('EXIS' tic 'KN') ;
    'TRAC' tic . 'KN' vtf vtp 'TITR' ' KN' ;
    'TRAC' tic . 'EN' vtf vtp 'TITR' ' EN' ;
  'FINS' ;
*
'FINS' ;
*
FIN ;
