* fichier :  exis_01.dgibi
************************************************************************
* Section : Entree-Sortie Entree-Sortie
* Section : Langage Objets
************************************************************************

*******************************************************
*           Test exis_01.dgibi: Jeux de données       *
*           ---------------------------------         *
*******************************************************
*                                                     *
*                                                     *
* Presentation : Test de la 1ere syntaxe de EXIS :    *
*                LOG1 ='EXIS' Nom(*'TYPE')            *
*                LOG1 ='EXIS' Nom(*'FICHIER')         *
*                                                     *
*   Verification & Validation                         *
*     Les resultats attendus sont testes et une erreur*
*     est emise s'ils ne sont pas corrects            *
*                                                     *
* Creation : 15/12/2021                               *
* Createur : C. BERTHINIER                            *
*******************************************************


* MAILLAGE
'OPTI' 'DIME' 2 'ELEM' 'QUA4' ;

 P1 = 0. 0. ;
 P2 = 1. 0. ;
 L1 ='DROI' 10 P1 P2 ;


* Test 1 de l'operateur EXIS
 LOG11 ='EXIS' P1            ; 'COMM' 'Doit etre VRAI';
 LOG12 ='EXIS' P1*'POINT'    ; 'COMM' 'Doit etre VRAI';
 LOG13 ='EXIS' L1*'MAILLAGE' ; 'COMM' 'Doit etre VRAI';
 LOG14 ='EXIS' P1*'MAILLAGE' ; 'COMM' 'Doit etre FAUX';
 LOG15 ='EXIS' P1*'FICHIER'  ; 'COMM' 'Doit etre FAUX';

 LOG1  = LOG11 'ET' LOG12 'ET' LOG13 'ET' ('NON' LOG14) 'ET' ('NON' LOG15) ;


* Creation d'un fichier bidon : Nom du fichier de calcul sans extension suivi de '.sauv'
 Nom_Fic   ='VENV' 'CASTEM_PROJET';
'SI' ('EGA' Nom_fic ' ');
   Nom_fic = 'CHAI' '_bidon.dgibi';
'FINSI';
 Nom_SE    ='EXTR'  Nom_Fic ('LECT' 1 'PAS' 1 (('DIME' Nom_Fic) - 6)) ;
 Fic_Sauv  ='CHAI' Nom_SE '.sauv' ;
'OPTI' 'SAUV' Fic_Sauv;
'SAUV' ;


* Test 2 de l'operateur EXIS
 LOG2 ='EXIS' Fic_Sauv*'FICHIER';


* Validation generale et FIN
 LOG_TOT = LOG1 'ET' LOG2 ;
'SI' ('NON' LOG_TOT);
  CHAI_ERR ='CHAI' 'Erreur dans le test de l''operateur EXIS (syntaxe 1)';
  'ERRE' CHAI_ERR ;
'FINS';
'FIN';
