opti dime 3 elem cub8 echo 1 ;
*
* operateur FATIGUE
* exemples critere DANG VAN : JL FAYART
*
*
LGRAPH = FAUX ;

p_ori = 0. 0. 0. ;
e_x = 1. 0. 0. ; e_y = 0. 1. 0. ; e_z = 0. 0. 1. ;

p_A = p_ori plus p_ori ; p_B = p_A plus e_x ;
l1 = d 1 p_A p_B ;
s1 = l1 trans 1 e_y ;
p_C = p_B plus e_y ; p_D = p_C moins e_x ;
p_C = point s1 proc p_C ; p_D = point s1 proc p_D ;
V1 = s1 volu trans 1 e_z ;
p_E p_F p_G p_H = p_A p_B p_C p_D plus e_z ;
p_E = point v1 proc p_E ;
p_F = point v1 proc p_F ;
 p_G = point v1 proc p_G ;
p_H = point v1 proc p_H ;

mo1 = mode v1 mecanique elastique ;
ca1 = mate mo1 youn 2.e11 nu 0.3 ;

bl_A = bloq depla p_A ;
bl_B = bloq uy uz p_B ;
bl_C = bloq uz p_C ;
bl_D = bloq ux uz p_D ;
bl_t = bloq uz (p_E et p_F et p_G et p_H) ;
bl_cis1 = bloq depla(p_A et p_B et p_E et p_F) ;
bl_cis2 = bloq ux (p_C et p_D et p_G et p_H) ;
bl_cis3 = bloq uy uz (p_C et p_D et p_G et p_H) ;

***
* traction
***
ch_t = depi bl_t 6.5e-4 ;
abs1 = prog 0. 1. 2. 3.;
ev_t = evol manu abs1 (prog 0. -1. 0. 1.) ;
ctrasi = char meca ev_t ch_t ;

trasi = table 'PASAPAS' ;
trasi . modele = mo1 ;
trasi . caracteristiques = ca1 ;
trasi . blocages_mecaniques = bl_A et bl_B et bl_C et bl_D et bl_t ;
trasi . chargement = ctrasi ;
trasi . temps_calcules = abs1 ;

pasapas trasi ;
*explorer trasi ;

* kich : coefficients arbitraires
cafatp = manu chml trasi . modele  'ADVK' -0.33 'BDVK' 8.e7
  'APAP' -0.34 'BPAP' 8.1e7 'ASIN' -0.35 'BSIN' 8.2e7
  'ACRO' -0.36 'BCRO' 8.3e7 'A_DC' -0.37 'B_DC' 8.4e7
    type 'CARACTERISTIQUES' stresses ;
chasi1 = char  trasi . temps trasi . contraintes ;
chfa1 = FATI mo1 chasi1 cafatp ;
*list chfa1 ;
 xtrasi = extr chfa1 dvkp 1 1 5 ;
 xtrasi0 = -8.75000E-03 ;
 er1 = abs((xtrasi - xtrasi0)/xtrasi0) ;
SI (LGRAPH) ;
  trac chfa1 mo1 ;
FINSI ;
chfa1 = FATI mo1 chasi1 cafatp 'DVKP' ;
rits16 = extr chfa1 dvkp 1 1 6 ;
ets16 = extr chfa1 'PTAU' 1 1 6 ;
SI (LGRAPH) ;
 dess ets16 ;
FINSI ;
chfa1 = FATI mo1 chasi1 cafatp 'PAPA' 'SEUI' 'TOUS' ;
rits16 = extr chfa1 papa 1 1 6 ;
ets16 = extr chfa1 'PTAU' 1 1 6 ;
SI (LGRAPH) ;
 dess ets16 ;
FINSI ;
***
* traction repetee
***
abs2 = prog 0. pas 1. 3. ;
ev_r = evol manu abs2 (prog 0. 0.5 1. 0.5) ;
ctrare = char meca ev_r ch_t ;

trare = table 'PASAPAS' ;
trare . modele = mo1 ;
trare . caracteristiques = ca1 ;
trare . blocages_mecaniques = bl_A et bl_B et bl_C et bl_D et bl_t ;
trare . chargement = ctrare ;
trare . temps_calcules = abs2 ;

pasapas trare ;
*explorer trare ;
chasi2 = char  trare . temps trare . contraintes ;
chfa2 = FATI mo1 chasi2 cafatp 'DVKP' ;
 xtrare = extr chfa2 dvkp 1 1 5 ;
 xtrare0 = -0.41500 ;
 er2 = abs((xtrare - xtrare0)/xtrare0) ;
SI (LGRAPH) ;
  trac chfa2 mo1 ;
FINSI ;
ritr16 = extr chfa2 dvkp 1 1 6 ;
si (ritr16 > -0.2) ;
  etr16 = extr chfa2 ptau 1 1 6 ;
finsi ;


***
* cisaillement
***
ch_cis = depi bl_cis2 1.e-3;
ccisa = char meca ev_t ch_cis ;

tcisa =  table 'PASAPAS' ;
tcisa . modele = mo1 ;
tcisa . caracteristiques = ca1 ;
tcisa . blocages_mecaniques = bl_cis1 et bl_cis2 et bl_cis3 ;
tcisa . chargement = ccisa ;
tcisa . temps_calcules = abs1 ;

pasapas tcisa ;
*explorer tcisa ;
chasi3 = char  tcisa . temps tcisa . contraintes ;
chfa3 = FATI mo1 chasi3 cafatp 'DVKP' ;
rici16 = extr chfa3 dvkp 1 1 6 ;
eci16 = extr chfa3 'PTAU' 1 1 6 ;
 xtcisa = extr chfa3 dvkp 1 1 5 ;
 xtcisa0 = -3.84615E-02 ;
 er3 = abs((xtcisa - xtcisa0)/xtcisa0) ;
SI (LGRAPH) ;
  dess eci16 ;
FINSI ;

si ((er1 < 0.05 ) et (er2 < 0.05) et (er3 < 0.05)) ;
     erre 0 ;
sinon ;
    erre 5 ;
finsi ;
fin ;
