* fichier : formation_debutant_2_thermique.dgibi
*
************************************************************************
*      FORMATION DEBUTER AVEC CAST3M - CALCULS THERMO-MECANIQUES       *
*                                                                      *
* Modelisation du comportement thermo-mecanique d'une structure avec   *
* une cavite                                                           *
*                                                                      *
* Ce fichier est la partie 2 sur 3 de la formation debutant a Cast3M   *
*                                                                      *
* Partie 2 : calculs thermiques                                        *
*            restitution des objets                                    *
*            conduction, convection, rayonnement                       *
*            regimes stationnaires et transitoires                     *
*            creation d'une procedure Gibiane                          *
*            instructions conditionelles, gestion des erreurs          *
*            sauvegarde des objets                                     *
*                                                                      *
************************************************************************


* RESTITUTION DES OBJETS CREES
* ----------------------------
OPTI 'REST' 'formation_debutant_1_maillage.sauv' ;
REST ;


* OBJET LOGIQUE POUR INDIQUER SI L'ON FAIT LES TRACES OU NON
* ----------------------------------------------------------
ITRAC    = FAUX ;


* CARACTERISTIQUES DU MATERIAU
* ----------------------------
CONDUMAT = 210. ;
CAPAMAT  = 900. ;
RHOMAT   = 2700. ;


* TEMPERATURE INITIALE ET DE REFERENCE
* ------------------------------------
T0       = 25. ;


************************************************************************
* CHAPITRE 2 : THERMIQUE LINEAIRE STATIONNAIRE                         *
************************************************************************


* MODELE THERMIQUE (CONDUCTION) A MATERIAU UNIFORME ET CONSTANT
* -------------------------------------------------------------
MOT      = MODE SU 'THERMIQUE' 'CONDUCTION' ;
MAT      = MATE MOT 'K' CONDUMAT 'C' CAPAMAT 'RHO' RHOMAT 'TINI' T0 ;


* CALCUL DE LA MATRICE DE CONDUCTIVITE
* ------------------------------------
CON      = COND MOT MAT ;


* MATRICE DE BLOCAGE : TEMPERATURE IMPOSEE SUR LE TROU
* ----------------------------------------------------
BLT      = BLOQ CE   'T' ;


* FLUX NODAUX ASSOCIES AU BLOCAGE
* -------------------------------
TMAX     = 250. ;
FLT1     = DEPI BLT TMAX ;


* FLUX IMPOSE SUR LA LIGNE GAUCHE
* -------------------------------
FLT2     = FLUX MOT LIGA -3.5E4 ;


* CALCUL DU CHAMP DE TEMPERATURES PAR APPEL AU SOLVEUR
* ----------------------------------------------------
TCON1    = RESO (CON ET BLT) (FLT1 ET FLT2) ;


* AFFICHAGE DU CHAMP DE TEMPERATURE
* ---------------------------------
LISO1    = PROG 0. 'PAS' (TMAX / 15.) TMAX ;
SI ITRAC ;
  TRAC TCON1 SU ;
  TRAC TCON1 SU CSU ;
  TRAC TCON1 SU CSU LISO1 ;
  TRAC TCON1 SU CSU LISO1 'TITR' '[2] Temperature' ;
FINSI ;


************************************************************************
* CHAPITRE 2.1 : THERMIQUE LINEAIRE STATIONNAIRE                       *
*                AJOUT DE CONVECTION + SOURCE VOLUMIQUE                *
************************************************************************


* MODELE DE CONVECTION
* --------------------
MOC      = MODE LHAUT 'THERMIQUE' 'CONVECTION' ;
MAC      = MATE MOC 'H' 100. ;


* PREMIER MEMBRE POUR LA CONVECTION
* ---------------------------------
CONH     = COND MOC MAC ;


* SECOND MEMBRE POUR LA CONVECTION
* --------------------------------
CHTC     = MANU 'CHPO' LHAUT 'T' T0 ;
FLH      = CONV MOC MAC CHTC ;


* SECOND MEMBRE POUR LA SOURCE
* ----------------------------
X Y      = COOR SU ;
PT1      = X POIN 'SUPERIEUR' 20.E-1 ;
PT2      = (REDU Y PT1) POIN 'INFERIEUR' 5.E-1 ;
ELSOU    = SU ELEM 'APPUYE' 'STRICTEMENT' PT2 ;
FLS      = SOUR (REDU MOT ELSOU) 1.E5 ELSOU ;


* CALCUL DU CHAMP DE TEMPERATURES PAR APPEL AU SOLVEUR
* ----------------------------------------------------
TCON2    = RESO (CON ET CONH ET BLT) (FLT1 ET FLT2 ET FLH ET FLS) ;


* AFFICHAGE DU CHAMP DE TEMPERATURE
* ---------------------------------
SI ITRAC ;
  TRAC TCON2 SU CSU LISO1 'TITR' '[2.1] Temperature' ;
FINSI ;


************************************************************************
* CHAPITRE 3 : THERMIQUE LINEAIRE TRANSITOIRE                          *
*              UTILISATION DE PASAPAS                                  *
************************************************************************


* INSTANT FINAL DU CALCUL THERMIQUE
* ---------------------------------
TPSFIN   = 5.E4 ;


* CHARGEMENT TEMPERATURE IMPOSEE
* ------------------------------
LIST1    = PROG 0. (0.1 * TPSFIN) TPSFIN ;
LIST2    = PROG (T0 / TMAX) 1. 1. ;
EVT1     = EVOL 'MANU' LIST1 LIST2 ;
CHATIMP  = CHAR 'TIMP' FLT1 EVT1 ;


* CHARGEMENT FLUX IMPOSE
* ----------------------
LIST3    = PROG 0. (0.2 * TPSFIN) (0.4 * TPSFIN) TPSFIN ;
LIST4    = PROG 0. 0. 1. 1. ;
EVT2     = EVOL 'MANU' LIST3 LIST4 ;
CHAFIMP  = CHAR 'Q'    FLT2 EVT2 ;


* CHARGEMENT CONVECTION
* ---------------------
LIST5    = PROG 0. TPSFIN ;
LIST6    = PROG 1. 1. ;
EVCTE    = EVOL 'MANU' LIST5 LIST6 ;
CHACONV  = CHAR 'TECO' CHTC EVCTE ;


* CHARGEMENT SOURCE VOLUMIQUE
* ---------------------------
CHASOUR  = CHAR 'Q'    FLS EVT2 ;


* RASSEMBLEMENT DES CHARGEMENTS
* -----------------------------
CHAT      = CHATIMP ET CHAFIMP ET CHACONV ET CHASOUR ;


* DEFINITION DE LA TABLE D'ARGUMENTS A FOURNIR EN DONNEE D'ENTREE A LA
* PROCEDURE PASAPAS
* --------------------------------------------------------------------
TAB1                         = TABL ;
TAB1 . 'MODELE'              = MOT ET MOC ;
TAB1 . 'CARACTERISTIQUES'    = MAT ET MAC ;
TAB1 . 'BLOCAGES_THERMIQUES' = BLT ;
TAB1 . 'CHARGEMENT'          = CHAT ;
TAB1 . 'TEMPS_CALCULES'      = PROG 0. 'PAS' (0.02 * TPSFIN) TPSFIN ;


* APPEL A PASAPAS
* ---------------
PASAPAS TAB1 ;


* POST TRAITEMENT
* ---------------
* EVOLUTION TEMPORELLE DE LE TEMPERATURE EN DEUX POINTS POUR VERIFIER
* QUE L'ON A ATTEINT L'ETAT STATIONNAIRE
PMIL     = SU POIN 'PROC' ((0.5 * LONG) (0.5 * HAUT)) ;
EV1      = EVOL 'ROUG' 'TEMP' TAB1 'TEMPERATURES' 'T' PMIL ;
EV2      = EVOL 'BLEU' 'TEMP' TAB1 'TEMPERATURES' 'T' PG ;
SI ITRAC ;
  DESS (EV1 ET EV2) 'TITR' '[3] Temperature vs Temps' ;
FINSI ;

* BOUCLE SUR TOUS LES PAS DE TEMPS ET TRACE DU CHAMP DE TEMPERATURES
N1       = DIME (TAB1 . 'TEMPERATURES') ;
SI ITRAC ;
  REPE B1 N1 ;
    T_I      = TAB1 . 'TEMPERATURES' . (&B1 - 1) ;
    TPS_I    = TAB1 . 'TEMPS' . (&B1 - 1) ;
    PRC_I    = ENTI (100. * TPS_I / TPSFIN) ;
    MOT_I    = CHAI '[3] Temperature au temps ' TPS_I '  (' PRC_I ' %)' ;
    TRAC T_I SU CSU 'TITR' MOT_I LISO1 ;
  FIN B1 ;
FINSI ;

* VECTEUR FLUX DE CHALEUR ==> CREATION D'UNE PROCEDURE
DEBP VECFLU  CHP1*'CHPOINT'  MOD1*'MMODEL'  MAT1*'MCHAML' ;
* CALCUL DU GRADIENT DE T ET CHANGEMENT DU TYPE
  G1       = GRAD CHP1 MOD1 ;
  G2       = CHAN 'TYPE' G1 'CARACTERISTIQUES' ;
* MULTIPLICATION DES CHAMPS ENTRE EUX
  Q        = MAT1 * G2 (MOTS 'K' 'K') (MOTS 'T,X' 'T,Y') (MOTS 'QX' 'QY') ;
  Q        = -1. * Q ;
* CREATION D'UN OBJET VECTEUR
  VEC1     = VECT Q MOD1 (MOTS 'QX' 'QY') 2.E-6 ;
FINP VEC1 ;

* BOUCLE SUR TOUS LES PAS DE TEMPS ET TRACE VECTEUR FLUX DE CHALEUR
SI ITRAC ;
  REPE B1 N1 ;
    T_I      = TAB1 . 'TEMPERATURES' . (&B1 - 1) ;
    VF_I     = VECFLU T_I MOT MAT ;
    TPS_I    = TAB1 . 'TEMPS' . (&B1 - 1) ;
    PRC_I    = ENTI (100. * TPS_I / TPSFIN) ;
    MOT_I    = CHAI '[3] Vecteur flux de chaleur au temps ' TPS_I '  (' PRC_I ' %)' ;
    TRAC VF_I CSU 'TITR' MOT_I ;
  FIN B1 ;
FINSI ;

* VECTEUR FLUX ET CHAMP DE TEMPRATURE SOUS FORME DE LIGNES D'ISOVALEURS
OPTI 'ISOV' 'LIGN' ;
SI ITRAC ;
  TRAC VF_I T_I SU CSU 15 'TITR' MOT_I ;
FINSI ;
OPTI 'ISOV' 'SURF' ;


************************************************************************
* CHAPITRE 4 : THERMIQUE NON LINEAIRE TRANSITOIRE                      *
*              AJOUT DU RAYONNEMENT                                    *
************************************************************************


* MODELE DE RAYONNEMENT SUR LA LIGNE DU HAUT
* ET MATERIAU REPRESENTANT L'EMISSIVITE
* ------------------------------------------
MOR      = MODE LHAUT 'THERMIQUE' 'RAYONNEMENT' 'INFINI' ;
MAR      = MATE MOR 'EMIS' 0.8 ;


* CHARGEMENT DE RAYONNEMENT REPRESENTANT LA TEMPERATURE
* EXTERIEURE (MAINTENUE)
* -----------------------------------------------------
CHTR     = MANU 'CHPO' LHAUT 1 'T' T0 ;
CHARAY   = CHAR 'TERA' CHTR EVCTE ;
CHAT     = CHAT ET CHARAY ;


* REDEFINITION DE LA TABLE TAB1 POUR PASAPAS
* ------------------------------------------
TAB1                         = TABL ;
TAB1 . 'MODELE'              = MOT ET MOC ET MOR ;
TAB1 . 'CARACTERISTIQUES'    = MAT ET MAC ET MAR ;
TAB1 . 'BLOCAGES_THERMIQUES' = BLT ;
TAB1 . 'CHARGEMENT'          = CHAT ;
TAB1 . 'TEMPS_CALCULES'      = PROG 0. 'PAS' (0.02 * TPSFIN) TPSFIN ;
TAB1 . 'CELSIUS'             = VRAI ;


* APPEL A PASAPAS
* ---------------
PASAPAS TAB1 ;


* POST TRAITEMENT
* ---------------
* EVOLUTION TEMPORELLE DE LA TEMPERATURE
EV11     = EVOL 'ROUG' 'TEMP' TAB1 'TEMPERATURES' 'T' PMIL ;
EV22     = EVOL 'BLEU' 'TEMP' TAB1 'TEMPERATURES' 'T' PG ;
TL       = TABL ;
TL . 1   = 'TIRR' ;
TL . 2   = 'TIRR' ;
TL . 'TITRE' = TABL ;
TL . 'TITRE' . 1 = 'PMIL cond seule' ;
TL . 'TITRE' . 2 = 'PG   cond seule' ;
TL . 'TITRE' . 3 = 'PMIL cond+conv+ray' ;
TL . 'TITRE' . 4 = 'PG   cond+conv+ray' ;
SI ITRAC ;
  DESS (EV1 ET EV2 ET EV11 ET EV22) 'LEGE' TL 'TITR' '[4] Temperature vs Temps' ;
FINSI ;

* BOUCLE SUR TOUS LES PAS DE TEMPS ET TRACE DU CHAMP DE TEMPERATURES
N1       = DIME (TAB1 . 'TEMPERATURES') ;
SI ITRAC ;
  REPE B1 N1 ;
    T_I      = TAB1 . 'TEMPERATURES' . (&B1 - 1) ;
    TPS_I    = TAB1 . 'TEMPS' . (&B1 - 1) ;
    PRC_I    = ENTI (100. * TPS_I / TPSFIN) ;
    MOT_I    = CHAI '[4] Temperature au temps ' TPS_I ' (conv. + ray.)' '  (' PRC_I ' %)' ;
    TRAC T_I SU CSU 'TITR' MOT_I LISO1 ;
  FIN B1 ;
FINSI ;

* BOUCLE SUR TOUS LES PAS DE TEMPS ET TRACE VECTEUR FLUX DE CHALEUR
SI ITRAC ;
  REPE B1 N1 ;
    T_I      = TAB1 . 'TEMPERATURES' . (&B1 - 1) ;
    VF_I     = VECFLU T_I MOT MAT ;
    TPS_I    = TAB1 . 'TEMPS' . (&B1 - 1) ;
    PRC_I    = ENTI (100. * TPS_I / TPSFIN) ;
    MOT_I    = CHAI '[4] Vecteur flux de chaleur au temps ' TPS_I '  (' PRC_I ' %)' ;
    TRAC VF_I CSU 'TITR' MOT_I ;
  FIN B1 ;
FINSI ;


* SAUVEGARDE DES OBJETS CREES
* ---------------------------
OPTI 'SAUV' 'formation_debutant_2_thermique.sauv' ;
SAUV ;


FIN ;
