* fichier : g_c_etoile_axis_1.dgibi
****************************************************
* Section : Mecanique Rupture
****************************************************
*                                                  *
*       VALIDATION DE LA PROCEDURE G_THETA         *
*   POUR UN DEFAUT CIRCONFERENTIEL DANS UN TUYAU   *
*  SOLUTION DE REFERENCE : Ductile Fracture        *
*  Handbook, A. Zahoor                             *
*                                                  *
*                                                  *
*  GEOMETRIE : tube                                *
*                                                  *
*  rayon interne du tube     : 500. MM             *
*  epaisseur du tube         : 100. MM             *
*  rayon moyen du tube       : 550. MM             *
*  longueur de la fissure    :  50. MM             *
*                                                  *
*  MATERIAU : loi de Norton                        *
*                                                  *
*  Module d'Young         : 2.E5 MPa               *
*  Coefficient de poisson : 0.3                    *
*  Coefficient N (Norton) : 7                      *
*  Coefficient A (Norton) : 3.E-24 /h/MPa^7        *
*                                                  *
*  CHARGEMENT :                                    *
*                                                  *
*  Traction pure          : 193.15 MPa             *
*                                                  *
*  SOLUTION ANALYTIQUE (APPROCHEE) :               *
*                                                  *
*  Intégrale C*                                    *
*                C* = 0.25316 kJ/m^2/h             *
*                                                  *
****************************************************

* VALIDATION COMPLETE OU JUSTE FONCTIONNEMENT
VALIDATION = vrai ;

* I - REALISATION DU CALCUL
* -------------------------

* OPTIONS
OPTI 'DIME' 2 'ELEM' 'QUA8' 'MODE' 'AXIS' ;

* I.1 - MAILLAGE
* **************

* GEOMETRIE :
* R = RAYON INTERNE
* B = EPAISSEUR
* L = LONGUEUR DU TUBE
* A = LONGUEUR DE LA FISSURE

R = 500. ;
B = 100. ;
A = B/2. ;
L = 4.*R ;


* AUTOUR DU FRONT
DENS1 = A/100. ;
DENS DENS1 ;
PF = A 0. ;
R1 = DENS1 ;
R2 = DENS1 ;
C1 = PF ;
SF = VIDE 'MAILLAGE' ;
REPE ICOUCH 8 ;
        C2 = (CERC (PF MOIN (R2 0.)) PF (PF PLUS (0. R2))) CERC PF (PF PLUS (R2 0.)) ;
        SF = SF ET (COUT C1 C2) ;
        R1 = 1.3*R1 ;
        R2 = R1 + R2 ;
        C1 = C2 ;
        DENS R1 ;
FIN ICOUCH ;
* TRAC SF ;

* PASSAGE DU CERCLE A UN RECTANGLE
DENS (A/3.) ;
P0 = 0. 0. ;
P1 = B 0. ;
P2 P3 = P0 P1 PLUS (0. A) ;
P11 = C2 POIN 1 ;
L1 = P11 DROI P0 ;
N = (NBEL L1)*-1 ;
P12 = C2 POIN 4 ;
L2 = P12 DROI N P2 ;
P13 = C2 POIN 10 ;
L3 = P13 DROI N P3 ;
P14 = C2 POIN 13 ;
L4 = P14 DROI P1 ;
C2 = INVE C2 ;
LIGH = P2 DROI P3 ;
SC1 = DALL L1 (P0 DROI P2) (INVE L2) (C2 ELEM 'COMPRIS' P12 P11) ;
SC2 = DALL L2 LIGH (INVE L3) (C2 ELEM 'COMPRIS' P13 P12) ;
SC3 = DALL L3 (P3 DROI P1) (INVE L4) (C2 ELEM 'COMPRIS' P14 P13) ;
SC = SC1 ET SC2 ET SC3 ;

* EXTENSION VERTICALE
DENS (A/2.) ;
MREST1 = LIGH TRAN (0. (2.*A)) 'DINI' (40*DENS1) 'DFIN' (50*DENS1) ;

* DERAFFINEMENT
L1 = MREST1 COTE 3 ;
YY1 = COOR 2 (POIN L1 'INIT') ;
L2 = DROI 3 (B (YY1 + (0.7*A))) (0. (YY1 + (0.7*A))) ;
S1 = COUT L1 L2 ;

* EXTENSION VERTICALE FINALE
YY1 = COOR 2 (POIN L2 'INIT') ;
MREST2 = L2 TRAN (0. (L-YY1)) 'DINI' (80*DENS1) 'DFIN' (150*DENS1) ;

* ASSEMBLAGE ET TRANSLATION
SUT = SF ET SC ET MREST1 ET S1 ET MREST2 ;
DEPL 'PLUS' SUT (R 0.) ;
* TRAC SUT ;

* EXTRACTION DES LIGNES NECESSAIRES POUR LE CALCUL
CONT1 = CONT SUT ;
L1 = CONT1 ELEM 'APPUYE' (SUT POIN 'DROIT' (R 0.) ((B+R) 0.) 1.E-10) ;
L2 = CONT1 ELEM 'APPUYE' (SUT POIN 'DROIT' ((B+R) 0.) ((B+R) L) 1.E-10) ;
L3 = CONT1 ELEM 'APPUYE' (SUT POIN 'DROIT' ((B+R) L) (R L) 1.E-10) ;
L4 = CONT1 ELEM 'APPUYE' (SUT POIN 'DROIT' (R L) (R 0.) 1.E-10) ;
L5 = CONT1 ELEM 'COMPRIS' P1 PF ;


* I.2 - MODELE ET MATERIAU
* ************************

* PROPRIETES :
* MYOUN = MODULE D'YOUNG
* NU1 = COEFFICIENT DE POISSON
* AF1, AF2, AF3 = COEFFICIENTS DE NORTON

MYOUN = 2.E5 ;
NU1 = 0.3 ;
AF1 = 3.E-23 ;
AF2 = 7. ;
AF3 = 1. ;

* MODELE
MOD1 = MODE SUT 'MECANIQUE' 'ELASTIQUE' 'FLUAGE' 'NORTON' ;
MAT1 = MATE MOD1 'YOUN' MYOUN 'NU' NU1 'AF1' AF1 'AF2' AF2 'AF3' AF3
     'SMAX' 0.;


* I.3 - CONDITIONS AUX LIMITES ET CHARGEMENT
* ******************************************

* CHARGE LIMITE
SIG0 = 320. ;
SIG1 = 2.*(((R+B)**2.) - ((R+A)**2.))*SIG0/(((R+B)**2.) - (R**2.))/(3.**0.5) ;
* CHARGEMENT
FOR1 = PRES 'MASS' MOD1 (0.-SIG1) L3 ;
EVO1 = EVOL 'MANU' (PROG 0. 0.2 1.E20) (PROG 0. 1. 1.) ;
CHA1 = CHAR 'MECA' FOR1 EVO1 ;

* CLS
CL1 = BLOQ 'UZ' L5 ;


* I.4 - APPEL A PASAPAS
* *********************

TAB1 = TABL ;
TAB1.'MODELE' = MOD1 ;
TAB1.'CARACTERISTIQUES' = MAT1 ;
TAB1.'BLOCAGES_MECANIQUES' = CL1 ;
TAB1.'CHARGEMENT' = CHA1 ;
LIS1 = PROG 0. PAS 0.02 0.2 PAS 0.05 1. PAS 0.5 10. PAS 5. 100. PAS 50. 1000
                PAS 20. 1500. ;
SI VALIDATION ;
        TAB1.'TEMPS_CALCULES' = LIS1 ;
SINON ;
        TAB1.'TEMPS_CALCULES' = EXTR LIS1 (LECT 1 PAS 1 20) ;
FINSI ;
MES_SAUV = TABL ;
MES_SAUV.'DEFIN' = VRAI ;
TAB1.'MES_SAUVEGARDES' = MES_SAUV ;
PASAPAS TAB1 ;


* II - APPEL A G_THETA ET COMPARAISON A LA SOLUTION ANALYTIQUE
* ------------------------------------------------------------

* II.1 - APPEL A G_THETA
* **********************

* ON RECUPERE LA FISSURE
LF = CONT1 ELEM 'COMPRIS' PF P0 ;

* ON CREE LA TABLE SUPTAB
SUPTAB = TABL ;
SUPTAB.'SOLUTION_PASAPAS' = TAB1 ;
SUPTAB.'OBJECTIF' = 'C*' ;
SUPTAB.'LEVRE_SUPERIEURE' = LF ;
SUPTAB.'FRONT_FISSURE' = PF ;
SUPTAB.'COUCHE' = 4 ;

* ON APPELLE G_THETA
G_THETA SUPTAB ;
NDER = DIME SUPTAB.'RESULTATS' ;
C_GT = SUPTAB.'RESULTATS'.(NDER-1) ;


* II.2 - SOLUTION ANALYTIQUE
* **************************

SI VALIDATION ;
        H1 = 3.07 ;
        C_AN = SIG0*AF1*(SIG0**AF2)*B*((1-(A/B))**2)*H1 ;
        ERR1 = (ABS (C_AN - C_GT)) / C_AN ;
        MESS  (CHAI 'ERREUR RELATIVE :' ' ' 'FORMAT' '(F4.1)' (100*ERR1) ' %') ;
        SI (ERR1 > 0.13) ;
                ERRE 5 ;
        FINSI ;
FINSI ;

FIN ;
