* fichier : g_decouplage_7.dgibi
****************************************************
* Section : Mecanique Rupture
****************************************************
*                                                  *
*      VERIFICATION DE LA PROCEDURE G_THETA        *
*    POUR LE CALCUL DE KIII POUR UNE FISSURE       *
*         PENNY-SHAPED DANS UN CYLINDRE            *
*                        -                         *
*    COMPARAISON ENTRE LE RESULTAT DE DECOUPLAGE   *
*          EN 3D ET UNE SOLUTION ANALYTIQUE        *
*                (ELEMENTS STANDARDS)              *
*                                                  *
*  SOLUTION ANALYTIQUE TIREE DE :                  *
*  "THE STRESS ANALYSIS OF CRACKS HANDBOOK"        *
*  TADA, PARIS AND IRWIN (2000)                    *
*                                                  *
****************************************************

* I - CALCUL 3D
* -------------

* OPTIONS ET BOOLEEN POUR LES TRACERS
OPTI 'DIME' 3 'ELEM' 'CUB8' ;
BTRAC = FAUX ;

* PROPRIETES MATERIAU
YOUN1 NU1 = 2.E5 0.3 ;

* I.1 - MAILLAGE
* **************

* PARAMETRES GEOMETRIQUES
* LP = RAYON DE LA FISSURE
* L2 = RAYON DU CYLINDRE
* H2 = HAUTEUR DU CYLINDRE
L1 H1 LP = 10. 5. 5. ;
L2 = L1 + 0.8 ;
H2 = H1 + 11. ;
DENS1 = 0.75 ;
DENS DENS1 ;

* RECTANGLE AUTOUR DE LA FISSURE
P1 = DENS1 0. 0. ;
P2 = DENS1 H1 0. ;
P3 = L1 H1 0. ;
P4 = L1 0. 0. ;
D1 = DROI P1 P2 ;
S1 = D1 TRAN ((0.-DENS1) 0. 0.) ;
N1 = ((ENTI ((L1 - DENS1) / DENS1)) / 2) * 2 ;
D2 = DROI N1 P2 P3 ;
D3 = DROI P3 P4 ;

* DERAFFINEMENT
P5 = (LP - DENS1) 0. 0. ;
P6 = (LP - DENS1) DENS1 0. ;
P7 = (LP + DENS1) DENS1 0. ;
P8 = (LP + DENS1) 0. 0. ;
D4 = DROI (NBEL D1) P5 P6 ;
D5 = DROI (NBEL D2) P6 P7 ;
D6 = DROI (NBEL D3) P7 P8 ;
DENS2 = DENS1 / H1 ;
S2 = (D1 ET D2 ET D3) REGL (D4 ET D5 ET D6) 'DINI' DENS1 'DFIN' DENS2 ;

* DERNIERE RANGEE D'ELEMENTS AU NIVEAU DE L'AXE DU CYLINDRE
* (SI ON NE FAIT PAS CA IL Y A DES PROBLEMES LORS DE REGE)
PP = LP 0. 0. ;
D7 = DROI (N1/2) (DROI (N1/2) P8 PP) P5 ;
S3 = DALL D4 D5 D6 D7 'PLAN' ;
SURF1 = S1 ET S2 ET S3 ;

* EXTENSIONS HORIZONTALE ET VERTICALE
PSUP = (COOR 2 SURF1) POIN 'MAXI' ;
ELSUP = (CONT SURF1) ELEM 'APPUYE' PSUP ;
S4 = ELSUP TRAN (0. (H2 - H1) 0.) ;
SURF1 = SURF1 ET S4 ;
PDROI = (COOR 1 SURF1) POIN 'MAXI' ;
ELDROI = (CONT SURF1) ELEM 'APPUYE' PDROI ;
S5 = ELDROI TRAN ((L2 - L1) 0. 0.) ;
SURF1 = SURF1 ET S5 ;

* DEFINITION DU VOLUME AVEC ROTA
NFRON = 8 ;
VOLU1 = SURF1 VOLU NFRON 'ROTA' 360. (0. 1. 0.) (0. 0. 0.) ;
* ON APPELLE ELIM PUIS ON FAIT REGE POUR OBTENIR DES PRISMES SUR L'AXE
ELIM VOLU1 1.E-10 ;
VOLU1 = REGE VOLU1 ;
VOLU2 = VOLU1 SYME 'PLAN' (0. 0. 0.) (1. 0. 0.) (0. 0. 1.) ;
OMEGA1 = VOLU1 ET VOLU2 ;

* DEFINITION DE LA FISSURE ET FUSION DES NOEUDS COINCIDENTS
* PARTIE SUP
ENVE1 = ENVE VOLU1 ;
POIN1 = (COOR 2 ENVE1) POIN 'MINI' ;
ELEM1 = ENVE1 ELEM 'APPUYE' POIN1 ;
R1 = (((COOR 1 ELEM1)**2) + ((COOR 3 ELEM1)**2))**0.5 ;
POIN1 = R1 POIN 'EGINFE' (LP + 0.02) ;
LVSUP = ELEM1 ELEM 'APPUYE' POIN1 ;
LVSUP = ORIE LVSUP 'POIN' (0. 1. 0.) ;
LIGSUP = ELEM1 DIFF LVSUP ;
* PARTIE INF
ENVE2 = ENVE VOLU2 ;
POIN2 = (COOR 2 ENVE2) POIN 'MAXI' ;
ELEM2 = ENVE2 ELEM 'APPUYE' POIN2 ;
R2 = (((COOR 1 ELEM2)**2) + ((COOR 3 ELEM2)**2))**0.5 ;
POIN2 = R2 POIN 'EGINFE' (LP + 0.02) ;
LVINF = ELEM2 ELEM 'APPUYE' POIN2 ;
LVINF = ORIE LVINF 'POIN' (0. (-1.) 0.) ;
LIGINF = ELEM2 DIFF LVINF ;
* ELIMINATION
ELIM LIGSUP LIGINF 1.E-10 ;
* DEFINITION DU FRONT DE FISSURE
FRONFISS = (CONT LIGSUP) INTE (CONT LVSUP) ;
SI BTRAC ;
    TRAC SURF1 ;
    TRAC 'CACH' (VOLU1 ET (LVSUP COUL 'ROUG') ET (LIGSUP COUL 'VERT')) ;
FINSI ;


* I.2 - MODELE, MATERIAU ET CL
* ****************************

* MODELE ET MATERIAU
MOD1 = MODE OMEGA1 'MECANIQUE' 'ELASTIQUE' ;
MAT1 = MATE MOD1 'YOUN' YOUN1 'NU' NU1 ;
RIG1 = RIGI MOD1 MAT1 ;

* CL EN EFFORTS
DOMEGA1 = ENVE OMEGA1 ;
PSUP = (COOR 2 OMEGA1) POIN 'MAXI' ;
SSUP = DOMEGA1 ELEM 'APPUYE' PSUP ;
PINF = (COOR 2 OMEGA1) POIN 'MINI' ;
SINF = DOMEGA1 ELEM 'APPUYE' PINF ;
CHPO1 = PRES 'MASS' MOD1 1. (SSUP ET SINF) ;
X Y Z = COOR (SSUP ET SINF) ;
CHPO2 = (NOMC 'FX' X) + (NOMC 'FY' (0.*Y)) + (NOMC 'FZ' Z) ;
MFOR = MOTS 'FX' 'FY' 'FZ' ;
NCHPO2 = (PSCA CHPO2 CHPO2 MFOR MFOR)**0.5 ;
CHPO2 = CHPO2 / (NCHPO2 + 1.E-30) ;
T1 = PVEC CHPO1 CHPO2 MFOR MFOR MFOR ;
SI BTRAC ;
    VEC1 = VECT T1 'FORC' ;
    TRAC 'CACH' VEC1 OMEGA1 ;
FINSI ;

* CL EN DEPLACEMENTS
P1 = PSUP POIN 'DROIT' (0. 0. 0.) (0. 1. 0.) ;
P2 = PINF POIN 'DROIT' (0. 0. 0.) (0. 1. 0.) ;
PMIL = DOMEGA1 POIN 'PLAN' (0. 0. 0.) (1. 0. 0.) (0. 0. 1.) ;
P3 = (COOR 1 PMIL) POIN 'MAXI' ;
P4 = (COOR 1 PMIL) POIN 'MINI' ;
BLOQ1 = BLOQ (MOTS 'UX' 'UZ') (P1 ET P2) ;
BLOQ3 = BLOQ 'UZ' P3 ;
RELA1 = RELA 'UY' P1 + 'UY' P2 ;
BLOQ0 = BLOQ1 ET BLOQ3 ET RELA1 ;


* I.3 - RESOLUTION PUIS G-THETA
* *****************************

* RESO
U1 = RESO (RIG1 ET BLOQ0) T1 ;

* G_THETA
SUPTAB = TABL ;
SUPTAB.'MODELE' = MOD1 ;
SUPTAB.'CARACTERISTIQUES' = MAT1 ;
SUPTAB.'BLOCAGES_MECANIQUES' = BLOQ0 ;
SUPTAB.'CHARGEMENTS_MECANIQUES' = T1 ;
SUPTAB.'OBJECTIF' = MOT 'DECOUPLAGE' ;
SUPTAB.'LEVRE_SUPERIEURE' = LVSUP ;
SUPTAB.'LEVRE_INFERIEURE' = LVINF ;
SUPTAB.'COUCHE' = 3 ;
SUPTAB.'FRONT_FISSURE' = FRONFISS ;
SUPTAB.'SOLUTION_RESO' = U1 ;

G_THETA SUPTAB ;

K3D = VIDE 'EVOLUTIO' ;
REPE IMOD 3 ;
    MMOD = EXTR 'III' 1 &IMOD ;
    EVO1 = EVOL 'CHPO' SUPTAB.'CHPO_RESULTATS' (CHAI 'K' &IMOD) FRONFISS ;
    K3D = K3D ET (EXTR EVO1 'COUR' 1) ;
FIN IMOD ;


* II - SOLUTION ANALYTIQUE
* ------------------------

SFRO = EXTR (EXTR K3D 'COUR' 1) 'ABSC' ;
* KI ET KII DOIVENT ETRE NULS
KA1 = 0.*SFRO ;
KA2 = 0.*SFRO ;
A B = LP L2 ;
T = 2.*PI*(B**3)/3. ;
TAUN = 2.*T*A / (PI*((B**4) - (A**4))) ;
ASB = A / B ;
GASB = 4 / (3.*PI) * (1. + (0.5*ASB) + (3./8.*(ASB**2)) + (5./16.*(ASB**3))
                            - (93./128.*(ASB**4)) + (0.038*(ASB**5))) ;
F1ASB = GASB * ((1. - ASB)**0.5) ;
KAIII = TAUN * ((PI*A)**0.5) *F1ASB ;
* KIII EST CONSTANT
KA3 = (0.*SFRO) + KAIII ;
KANA = EVOL 'MANU' SFRO KA1 ;
KANA = KANA ET (EVOL 'MANU' SFRO KA2) ;
KANA = KANA ET (EVOL 'MANU' SFRO KA3) ;


* III - COMPARAISON
* -----------------

* PRECISIONS ATTENDUES POUR L'ERREUR RELATIVE EN NORME L2
L_PREC = PROG 0.01 0.01 0.02 ;
TAB1 = TABL ;
* LES RESULTATS NUMERIQUES SONT IDENTIFIES AVEC DES CARRES
TAB1.(1) = CHAI 'MARQ CARR' ;
REPE IMOD 3 ;
* BOUCLE SUR LES MODES
    SAUT 'LIGNE' ;
    MMOD = EXTR 'III' 1 &IMOD ;
    KNUM1 = (EXTR K3D 'COUR' &IMOD) COUL 'BLEU' ;
    KANA1 = (EXTR KANA 'COUR' &IMOD) COUL 'ROUG' ;
    SI BTRAC ;
        DESS (KNUM1 ET KANA1) TAB1 'TITR' (CHAI 'K' &IMOD) ;
    FINSI ;
* ERREUR EN NORME L2
    ERR1 = (INTG ((KNUM1 - KANA1)**2))**0.5 ;
    PRE1 = EXTR L_PREC &IMOD ;
* VALEUR DE COMPARAISON POUR L'ERREUR RELATIVE
    CRI1 = ((INTG (KANA1**2))**0.5) * PRE1 ;
    SI (EGA CRI1 0.) ;
        CRI1 = CRI1 + 1.E-8 ;
    FINSI ;
    MESS 'ERREUR SUR LE CALCUL DE K' MMOD ' :'*30 ERR1 ;
    MESS 'CRITERE' ' :'*30 CRI1 ;
    SI (ERR1 >EG CRI1) ;
        MESS 'ERREUR : L''ERREUR SUR K' MMOD ' DEPASSE LE CRITERE' ;
        ERRE 5 ;
    FINSI ;
FIN IMOD ;

FIN ;
