* fichier : mato-2d3.dgibi
************************************************************************
* Section : Maillage Autres
************************************************************************
'OPTION' 'ECHO' 0 ;
************************************************************************
* NOM         : MATO-2D3
* DESCRIPTION : Test du MAilleur TOpologique pour mailler un carré de
*               avec une métrique anisotrope constante en espace
*               dans le but d'obtenir 10x20 mailles, puis 20x10 mailles
*               en autorisant le mailleur à modifier les noeuds du bord
*               dans ce dernier cas.
*
*               On teste la qualité des éléments obtenus.
*               On améliore un peu la qualité du dernier maillage obtenu
*               avec une boucle entre r-adaptation (DEDU ADAP) et
*               remaillage.
*
*               Issu de 2d_3.dgibi+tests
*
*
* LANGAGE     : GIBIANE-CAST3M
* AUTEUR      : Stéphane GOUNAND (CEA/DEN/DM2S/SEMT/LTA)
*               mél : stephane.gounand@cea.fr
**********************************************************************
* VERSION    : v1, 07/04/2020, version initiale
* HISTORIQUE : v1, 07/04/2020, création
* HISTORIQUE :
* HISTORIQUE :
************************************************************************
*
interact = FAUX ;
graph    = FAUX ;
*
'OPTION' 'DIME' 2 'ELEM' 'TRI3' ;
*
'SI' ('NON' interact) ;
  'OPTION' 'TRAC' 'PSC' ;
'SINON' ;
  'OPTION' 'TRAC' 'X' ;
'FINSI' ;
lqual = 'PROG' 0.5 'PAS' 0.025 1. ;
*
* Création du contour
*
d1 = 0.1 ; d2 = 0.05 ;
pA = 0. 0. ; pB = 1. 0. ; pC = 1. 1. ; pD = 0. 1. ;
lAB = 'DROI' pA pB 'DINI' d1 'DFIN' d1 ;
lBC = 'DROI' pB pC 'DINI' d2 'DFIN' d2 ;
lCD = 'DROI' pC pD 'DINI' d1 'DFIN' d1 ;
lDA = 'DROI' pD pA 'DINI' d2 'DFIN' d2 ;
*
cnt = lAB 'ET' lBC 'ET' lCD 'ET' lDA ;
*
'SI' graph ;
   tit = 'CHAI'  'Contour ' ;
      'TRACER' 'CACH' cnt 'TITR' tit 'NOEU' ;
'FINSI' ;
*
*  Tests divers (consistance...)
*
lok = VRAI ;
*
* TEST 1  Création d'un maillage sans ajouter de noeuds
*
   mail1 = 'TRIA' 'TOPO' cnt 'NOAJ' ;
   'SI' graph ;
      tit = 'CHAI'  'Maillage genere sans noeud supplémentaire' ;
      'TRAC' mail1 'TITR' tit 'NOEU' ;
   'FINSI' ;
* Test 1 : on vérifie que le nombre de noeuds est conservé
nno1 = 'NBNO' cnt ;
nno2 = 'NBNO' mail1 ;
'SI' ('NEG' nno1 nno2) ;
   'MESS' '!!! TEST 1 : nombre de noeuds non conserve' ;
   lok = lok 'ET' faux ;
'FINS' ;
*
* TEST 2  Création d'un maillage en ajoutant des noeuds interieurs
*
   mail2 = 'TRIA' 'TOPO' cnt ;
   'SI' graph ;
      tit = 'CHAI' 'Maillage genere en ajoutant des noeuds interieurs' ;
      'TRAC' mail2 'TITR' tit 'NOEU' ;
   'FINSI' ;
* Test 2 : on vérifie que les qualités mini, moyenne et maxi des éléments sont bonnes
qmail2 = 'INDI' 'TOPO' mail2 ;
miq = 'MINI' qmail2 ; moq = MATOUTIL 'MOYECHAM' qmail2 ;
maq = 'MAXI' qmail2 ;
'MESS'  'FORMAT' '(E9.2)' 'TEST 2 : Qmin=' miq ' Qmoy=' moq ' Qmax=' maq ;
   'SI' graph ;
      momail2 = 'MODE' mail2 'THERMIQUE' ;
      tit = 'CHAI' 'Qualite maillage avec noeuds interieurs' ;
      'TRAC' qmail2 momail2 lqual 'TITR' tit ;
   'FINSI' ;
* Sur mon linux64 au 07/04/2020 :  Qmin= 0.66E+00 Qmoy= 0.87E+00 Qmax= 0.10E+01
miqref = 0.65 ; moqref = 0.86 ; maqref = 0.99 ;
'SI' ('<EG' miq miqref) ;
   'MESS' '!!! TEST 2 : miq=' miq ' < miqref=' miqref ;
   lok = lok 'ET' faux ;
'FINS' ;
'SI' ('<EG' moq moqref) ;
   'MESS' '!!! TEST 2 : moq=' moq ' < moqref=' moqref ;
   lok = lok 'ET' faux ;
'FINS' ;
'SI' ('<EG' maq maqref) ;
   'MESS' '!!! TEST 2 : maq=' maq ' < maqref=' maqref ;
   lok = lok 'ET' faux ;
'FINS' ;
*
* TEST 3  Remaillage du précédent avec une métrique anisotrope constante
*         en espace compatible avec le maillage du bord 10x20
*
   cmet = 'MANU' 'CHPO' mail2 3 'G11' ('**' d1 -2)
                                'G22' ('**' d2 -2)
                                'G21' 0. ;
* Facultatif : mettre tout ça dans la notice de ALGOMAIL
*              ainsi que les valeurs par défaut
*   tparam3 . 'debug' = 2 ;
   mail3 = 'REMA' mail2 ('CONT' mail2) cmet ;
   'SI' graph ;
      tit = 'CHAI' 'Maillage avec metrique 10x20' ;
      'TRAC' mail3 'TITR' tit 'NOEU' ;
   'FINSI' ;
* Test 3 : on vérifie que les qualités des éléments sont bonnes
   cmet = 'MANU' 'CHPO' mail3 3 'G11' ('**' d1 -2)
                                'G22' ('**' d2 -2)
                                'G21' 0. ;
qmail3 = 'INDI' 'TOPO' mail3 cmet ;
miq = 'MINI' qmail3 ; moq = MATOUTIL 'MOYECHAM' qmail3 ;
maq = 'MAXI' qmail3 ;
'MESS'  'FORMAT' '(E9.2)' 'TEST 3 : Qmin=' miq ' Qmoy=' moq ' Qmax=' maq ;
   'SI' graph ;
      momail3 = 'MODE' mail3 'THERMIQUE' ;
      tit = 'CHAI' 'Qualite maillage 10x20' ;
      'TRAC' qmail3 momail3 lqual 'TITR' tit ;
   'FINSI' ;
* Sur mon linux64 au 07/04/2020 : Qmin= 0.66E+00 Qmoy= 0.84E+00 Qmax= 0.10E+01
miqref = 0.65 ; moqref = 0.83 ; maqref = 0.99 ;
'SI' ('<EG' miq miqref) ;
   'MESS' '!!! TEST 3 : miq=' miq ' < miqref=' miqref ;
   lok = lok 'ET' faux ;
'FINS' ;
'SI' ('<EG' moq moqref) ;
   'MESS' '!!! TEST 3 : moq=' moq ' < moqref=' moqref ;
   lok = lok 'ET' faux ;
'FINS' ;
'SI' ('<EG' maq maqref) ;
   'MESS' '!!! TEST 3 : maq=' maq ' < maqref=' maqref ;
   lok = lok 'ET' faux ;
'FINS' ;
*
* TEST 4  Remaillage du précédent avec une métrique anisotrope constante
*         en espace différente visant à obtenir un maillage 20x10
*         On demande au remailleur de modifier les noeuds du bord.
*
   cmet = 'MANU' 'CHPO' mail3 3 'G11' ('**' d2 -2)
                                'G22' ('**' d1 -2)
                                'G21' 0. ;
   mail4 = 'REMA' mail3 cmet ;
   'SI' graph ;
      tit = 'CHAI' 'Maillage avec metrique anisotrope 20x10' ;
      'TRAC' mail4 'TITR' tit 'NOEU' ;
   'FINSI' ;
* Test 4 : on vérifie que les qualités des éléments sont bonnes
   cmet = 'MANU' 'CHPO' mail4 3 'G11' ('**' d2 -2)
                                'G22' ('**' d1 -2)
                                'G21' 0. ;
qmail4 = 'INDI' 'TOPO' mail4 cmet ;
miq = 'MINI' qmail4 ; moq = MATOUTIL 'MOYECHAM' qmail4 ;
maq = 'MAXI' qmail4 ;
'MESS'  'FORMAT' '(E9.2)' 'TEST 4 : Qmin=' miq ' Qmoy=' moq ' Qmax=' maq ;
   'SI' graph ;
      momail4 = 'MODE' mail4 'THERMIQUE' ;
      tit = 'CHAI' 'Qualite maillage 20x10' ;
      'TRAC' qmail4 momail4 lqual 'TITR' tit ;
   'FINSI' ;
* Sur mon linux64 au 07/04/2020 : Qmin= 0.67E+00 Qmoy= 0.85E+00 Qmax= 0.10E+01
miqref = 0.66 ; moqref = 0.84 ; maqref = 0.99 ;
'SI' ('<EG' miq miqref) ;
   'MESS' '!!! TEST 4 : miq=' miq ' < miqref=' miqref ;
   lok = lok 'ET' faux ;
'FINS' ;
'SI' ('<EG' moq moqref) ;
   'MESS' '!!! TEST 4 : moq=' moq ' < moqref=' moqref ;
   lok = lok 'ET' faux ;
'FINS' ;
'SI' ('<EG' maq maqref) ;
   'MESS' '!!! TEST 4 : maq=' maq ' < maqref=' maqref ;
   lok = lok 'ET' faux ;
'FINS' ;
*
* TEST 5  Une petite boucle avec de la r-adaptation (DEDU ADAP) pour voir si on peut
* améliorer la qualité du maillage mail3.
*
* La réponse est oui, on peut effectivement avoir une amélioration mais
* après quelque itérations la qualité oscille sans s'alméliorer entre
* r-adaptation et remaillage car les critères optimisés ne sont pas les
* mêmes aux deux étapes.
*
nopt = 2 ; iopt = 0 ;
* Paramètres de DEDUADAP
thdedu = 0.2 ; rdepa = 1. ; nitm = 1 ;
maili = mail4 ;
ldep = 'PROG' ; lqmin = 'PROG' ; lqmoy = 'PROG' ;
'REPE' bclopt nopt ;
   iopt = iopt '+' 1 ;
   tit = 'CHAI' 'i=' iopt ;
* Partie DEDUADAP
   maili1 = maili ;
   modi1 = 'MODE' maili1 'MECANIQUE' ;
   cmet = 'MANU' 'CHPO' maili1 3 'G11' ('**' d2 -2)
                                 'G22' ('**' d1 -2)
                                 'G21' 0. ;
   ccmet = 'CHAN' 'CHAM' cmet modi1 ;
   depa = 'DEDU' 'ADAP' maili1 'METR' ccmet modi1 'THET' thdedu 'NITM' nitm ;
   depa = '*' depa rdepa ;
   mcdep = 'MAXI' depa 'ABS' ; ldep = ldep 'ET' mcdep ;
   'MESS' tit ' dedu max. dep=' mcdep ;
   'FORM' depa ;
   qmaili1 = 'INDI' 'TOPO' maili1 cmet ;
   miq = 'MINI' qmaili1 ; moq = MATOUTIL 'MOYECHAM' qmaili1 ;
   maq = 'MAXI' qmaili1 ;
   'MESS'  'FORMAT' '(E9.2)' tit ' deduadap : Qmin=' miq ' Qmoy=' moq ' Qmax=' maq ;
   'SI' graph ;
      momaili1 = 'MODE' maili1 'THERMIQUE' ;
      vdep = 'VECT' depa -1. 'UX' 'UY' 'NOIR' ;
      titg = 'CHAI' tit ' deduadap' ;
      'TRAC' qmaili1 momaili1 vdep maili1 lqual 'TITR' titg ;
   'FINS' ;
* Partie MAILTOPO
   maili2 = 'REMA' maili1 cmet ;
* Qualités
   cmet = 'MANU' 'CHPO' maili2 3 'G11' ('**' d2 -2)
                                 'G22' ('**' d1 -2)
                                 'G21' 0. ;
   qmaili2 = 'INDI' 'TOPO' maili2 cmet ;
   miq = 'MINI' qmaili2 ; moq = MATOUTIL 'MOYECHAM' qmaili2 ;
   maq = 'MAXI' qmaili2 ;
   'MESS'  'FORMAT' '(E9.2)' tit ' mailtopo : Qmin=' miq ' Qmoy=' moq ' Qmax=' maq ;
   'SI' graph ;
      momaili2 = 'MODE' maili2 'THERMIQUE' ;
      titg = 'CHAI' tit ' mailtopo' ;
      'TRAC' qmaili2 momaili2 lqual 'TITR' titg ;
   'FINSI' ;
   maili = maili2 ;
'FIN' bclopt ;
* Sur mon linux64 au 07/04/2020 : Qmin= 0.68E+00 Qmoy= 0.89E+00 Qmax= 0.10E+01
miqref = 0.67 ; moqref = 0.88 ; maqref = 0.99 ;
'SI' ('<EG' miq miqref) ;
   'MESS' '!!! TEST 5 : miq=' miq ' < miqref=' miqref ;
   lok = lok 'ET' faux ;
'FINS' ;
'SI' ('<EG' moq moqref) ;
   'MESS' '!!! TEST 5 : moq=' moq ' < moqref=' moqref ;
   lok = lok 'ET' faux ;
'FINS' ;
'SI' ('<EG' maq maqref) ;
   'MESS' '!!! TEST 5 : maq=' maq ' < maqref=' maqref ;
   lok = lok 'ET' faux ;
'FINS' ;
*
* Test final
*
'SI' ('NON' lok) ;
   'ERREUR' 5 ;
'SINON' ;
   'SAUT' 1 'LIGN' ;
   'MESSAGE' ('CHAINE' 'Tout sest bien passe !') ;
'FINSI' ;
*
'SI' interact ;
   'OPTION' 'ECHO' 1 ;
   'OPTION' 'DONN' 5 ;
'FINSI' ;
*
* End of dgibi file MATO-2D3
*
'FIN' ;
