* fichier : ouglova_3D.dgibi
*******************************************************
*******************************************************
*******************************************************
*  Cas test de l'implantation numerique du modele
*  OUGLOVA 3D
*******************************************************
* Developpe par :
*     Romili PAREDES
*     Benjamin RICHARD
* Contact :
*     Romili.Paredes@cea.fr
*     Benjamin.Richard@cea.fr
* Institution :
*     CEA\DEN\DANS\DM2S\SEMT\EMSI
******************************************************

*******************************************************
* Options
*******************************************************

OPTI DIME 3 ELEM CUB8 TRAC PSC;

******************************************************
*** Parametres geometriques
******************************************************

b = 1.0;
h = 1.0;
e = 1.0;

nbe = 3;
nbh = 3;

******************************************************
*** Definition de la geometrie
******************************************************

P1 = 0.  0.  0.;
P2 = h   0.  0.;
P3 = b   h   0.;
P4 = 0.  b   0.;
P5 = 0.  0.  e;

L1  = D  nbe  P1  P2;
L2  = D  nbe  P2  P3;
L3  = D  nbe  P3  P4;
L4  = D  nbe  P4  P1;

CT1 = L1 ET L2  ET L3 ET L4 ;

S1 = SURF CT1 'PLAN';

VT = VOLU S1 nbh TRAN P5;

S2 = FACE VT 2;

******************************************************
*** Définition du modele
******************************************************

MOD1 = MODE VT MECANIQUE ELASTIQUE ISOTROPE PLASTIQUE OUGLOVA;

******************************************************
*** Parametres materiaux
******************************************************

* Module d'Young
ygn = 200.e9;

* Coefficient de Poisson
nun = 0.33;

* Limite elastique
sigym = 500.e6;

* Coefficient d'ecrouissage
km = 500.e6;

* Exposant d'ecrouissage
mm = 2.786;

* Taux de corrosion en percentage
tcm = 15;

* Endommagement critique
dcm = 0.2;


MAT1 = MATE MOD1 'YOUN' ygn 'NU' nun
                 'SIGY' sigym 'K   ' km 'M   ' mm
                 'TC  ' tcm 'DC  ' dcm;

******************************************************
*** Definition des conditions aux limites
*** et des déplacements imposés
******************************************************

CL1 = BLOQ S1 UZ;
CL2 = BLOQ P1 UX UY;
CL2 = CL2 ET (BLOQ P2 UY);

CL11 = BLOQ S2 UZ;

D1   = DEPI CL11 1;

CLTOT = CL1 ET CL2 ET CL11;

******************************************************
*** Definition de chargement
******************************************************

LI1  = PROG 0. 1.;
LI2  = PROG 0. 4.5e-1;
LIS1 = PROG 0. PAS 0.01 1.;

EV   = EVOL MANU LI1 LI2;

CHA1 = CHAR 'DIMP' D1 EV;

CHTOT = CHA1;

******************************************************
*** Resolution
******************************************************

TAB1 = TABLE ;
TAB1.'BLOCAGES_MECANIQUES' = CLTOT;
TAB1.'MODELE' = MOD1;
TAB1.'CHARGEMENT' = CHTOT;
TAB1.'CARACTERISTIQUES' = MAT1;
TAB1.'TEMPS_CALCULES' = LIS1;
TAB1.'MAXITERATION' = 1000;
TAB1.'HYPOTHESE_DEFORMATIONS' = 'LINEAIRE' ;

PASAPAS TAB1;

******************************************************
*** Verification
******************************************************

EV2 = @GLOBAL TAB1 cl1 EV FZ;
liste EV2;

vref = EXTR EV2 'ORDO';
vref = EXTR 16 vref;

err =  abs(vref  + 5.87513e8) / 5.87513e8;
message ' erreur relative ';
list err;

si (err > 1.e-3);
   erreur (5);
finsi;

FIN;
