* fichier :  roliq.dgibi
************************************************************************
* Section : Mathematiques Fonctions
************************************************************************
*****************  CAS TEST : roliq.dgibi   **************************
*
* Test de l'opérateur VARI ROLIQ(P,H)
* Les données sont un FLOTTANT, un LISTREEL ou un CHPO
*
'OPTI' 'DIME' 2 'ELEM' 'QUA4' ;
'OPTI' 'ECHO' 0 ;
*
*------------------------------------------------------> FLOTTANT
*
X1 = 1.0133D5 ;
X2 = 4.1906D5 ;
X3 = VARI ROLIQ X1 X2 ;
XSTO1 = X3 ;
*
X1 = 5.021D5  ;
X2 = 6.4079D5 ;
X3 = VARI ROLIQ X1 X2 ;
XSTO2 = X3 ;
*
X1 = 10.027D5 ;
X2 = 7.6312D5 ;
X3 = VARI ROLIQ x1 x2 ;
XSTO3 = X3 ;
*------------------------------------------------------> LISTREEL
Y1 = 'PROG' 1.0133D5 5.021D5  10.027D5 ;
Y2 = 'PROG' 4.1906D5 6.4079D5 7.6312D5 ;
Y3 = VARI ROLIQ Y1 Y2 ;
YSTO1 = EXTR Y3 1 ;
YSTO2 = EXTR Y3 2 ;
YSTO3 = EXTR Y3 3 ;
*------------------------------------------------------> CHPO
P1   = 1.0133 4.1906 ;
P2   = 5.021 6.4079 ;
P3   = 10.027 7.6312 ;
P1P3 = P1 'DROI' 1 P2 'DROI' 1 P3 ;
Z1   = 1.D5 * ('COOR' 1 P1P3) ;
Z2   = 1.D5 * ('COOR' 2 P1P3) ;
Z3   = VARI ROLIQ Z1 Z2 ;
ZSTO1 = 'EXTR' Z3 'SCAL' P1  ;
ZSTO2 = 'EXTR' Z3 'SCAL' P2  ;
ZSTO3 = 'EXTR' Z3 'SCAL' P3  ;
*-------------------------------------------> Controle
CTRL1 = XSTO1 + YSTO1 + ZSTO1 / 3.d0 - XSTO1 / XSTO1 ;
CTRL2 = XSTO2 + YSTO2 + ZSTO2 / 3.d0 - XSTO2 / XSTO2 ;
CTRL3 = XSTO3 + YSTO3 + ZSTO3 / 3.d0 - XSTO3 / XSTO3 ;
CTRL4 = CTRL1 + CTRL2 + CTRL3 ;
XREF1 = 958.129 ;
XREF2 = 914.9130833 ;
XREF3 = 886.9179601 ;
CTRL5 = XSTO1 + YSTO1 + ZSTO1 / 3.d0 - XREF1 / XREF1 ;
CTRL6 = XSTO2 + YSTO2 + ZSTO2 / 3.d0 - XREF2 / XREF2 ;
CTRL7 = XSTO3 + YSTO3 + ZSTO3 / 3.d0 - XREF3 / XREF3 ;
CTRL8 = CTRL5 + CTRL6 + CTRL7 ;
*-------------------------------------------> Affichage
'MESS' '     ' ;
'MESS' '     ' ;
'MESS' 'Point 1  VARI ROLIQ ----->' XSTO1 YSTO1 ZSTO1 XREF1 ;
'MESS' 'Point 2  VARI ROLIQ ----->' XSTO2 YSTO2 ZSTO2 XREF2 ;
'MESS' 'Point 3  VARI ROLIQ ----->' XSTO3 YSTO3 ZSTO3 XREF3 ;
'MESS' '     ' ;
'MESS' 'Comparaison calculs rel.----->' CTRL4 ;
'MESS' 'Erreur rel. VDI         ----->' CTRL8 ;
'MESS' '     ' ;
'MESS' '     ' ;
'MESS' '     ' ;
'MESS' '     ' ;
'MESS' '     ' ;
*-------------------------------------------> Compte-rendu et sortie
EPS4  = 1.E-14 ;
EPS8  = 1.E-3  ;
CTRL4 = ABS CTRL4 ;
CTRL8 = ABS CTRL8 ;
LOG4 = CTRL4 > EPS4 ;
LOG8 = CTRL8 > EPS8 ;
L0   = LOG4 'OU' LOG8 ;
'SI' L0        ;
   'ERREUR' 5  ;
'SINON'        ;
   'ERREUR' 0  ;
'FINSI'        ;
'FIN' ;
