* fichier :test_@deslis.dgibi
************************************************************************
* Section : Langage Objets
************************************************************************
************************************************************************
* NOM         : test_@deslis
* DESCRIPTION : teste le bon fonctionnement de la procédure @DESLIS
*
*
*
* LANGAGE     : GIBIANE-CAST3M
* AUTEUR      : Pascal Maugis (CEA/DSM/LSCE)
*               mél : pmaugis@cea.fr
**********************************************************************
* VERSION    : v1, 05/07/2006, version initiale
* HISTORIQUE : v1, 05/06/2006, création
* HISTORIQUE :
* HISTORIQUE :
************************************************************************
* Merci de PRENDRE LE TEMPS de compléter les commentaires
* en cas de modification de ce sous-programme afin d'en faciliter
* la maintenance !
************************************************************************
*
*

*======================================================================
*==                                                                  ==
*==                      PROGRAMME PRINCIPAL                         ==
*==                                                                  ==
*======================================================================
'OPTION' 'TRACER' 'PS';

* liste de rééls
a = 'PROG' 1 2 16 3 'PAS' 1. 20.;
@DESLIS a ;

* liste d'entiers
@DESLIS ('ENTIER' a) ;

* diverses options de tracé
@DESLIS a  'LOGX' 'LOGY' 'GRIL' 'CARR' 'DATE' 'LOGO' 'AXES'
     'TITRE' 'Super titre' 'TITX' 'par ici' 'TITY' 'par la' 'NCLK' ;

*
* Conclusion : ménage et sauvegarde.
* ==================================
*

'FIN' ;
