* fichier test_enle.dgibi
************************************************************************
* Section : Mathematiques Fonctions
************************************************************************


*======================================================================*
* Cas test : test_enle.dgibi
* Classe   : Verification et Validation
*======================================================================*
*
* Teste le bon fonctionnement de l'operateur ENLE sur les objets de type
*  - LISTREEL
*  - LISTENTI
*  - LISTMOTS
*  - LISTCHPO
*
* Auteur        : C. BERTHINIER
* Creation      : 29/01/2018
* Modifications :
*======================================================================*


*======================================================================*
* LISTREEL
*======================================================================*
* Verification du Fonctionnement
Lst0 = PROG 10. 15. 20. 25. ;
Lst1a= LECT 2 ;
Lst1b= LECT 2 2 1 1 1 1 ;
Lst1c= LECT ;

Lst2a = ENLE Lst0 Lst1a ;
Lst2b = ENLE Lst0 Lst1b ;
Lst2c = ENLE Lst0 Lst1c ;

* Validation du resultat
* 1ere LISTE *
Lst1U=ORDO (UNIQ Lst1a);
JJJ  = 1;
DIM2 = DIME Lst1U;
SI (JJJ <EG DIM2);
  ENTI2= EXTR Lst1U JJJ;
SINO;
  ENTI2= 0;
FINS;
ENTI2= EXTR Lst1U JJJ;
KKK  = 1;
REPE SURI (DIME Lst0);
  III = &SURI ;
  SI(III EGA ENTI2);
    JJJ  = JJJ + 1;
    SI (JJJ <EG DIM2);
      ENTI2= EXTR Lst1U JJJ;
    SINO;
      ENTI2= 0;
    FINS;
    ITER SURI;
  FINS;

  ENTI1 = EXTR Lst0  &SURI ;
  ENTI3 = EXTR Lst2a KKK   ;
  KKK   = KKK + 1 ;
  SI(NEG ENTI1 ENTI3);
    ERRE 5;
  FINS;
FIN SURI;

* 2eme LISTE *
Lst1U=ORDO (UNIQ Lst1b);
LIST Lst1U;
JJJ  = 1;
DIM2 = DIME Lst1U;
SI (JJJ <EG DIM2);
  ENTI2= EXTR Lst1U JJJ;
SINO;
  ENTI2= 0;
FINS;
ENTI2= EXTR Lst1U JJJ;
KKK  = 1;
REPE SURI (DIME Lst0);
  III = &SURI ;
  SI(III EGA ENTI2);
    JJJ  = JJJ + 1;
    SI (JJJ <EG DIM2);
      ENTI2= EXTR Lst1U JJJ;
    SINO;
      ENTI2= 0;
    FINS;
    ITER SURI;
  FINS;

  ENTI1 = EXTR Lst0  &SURI ;
  ENTI3 = EXTR Lst2b KKK   ;
  KKK   = KKK + 1 ;
  SI(NEG ENTI1 ENTI3);
    ERRE 5;
  FINS;
FIN SURI;


* 3eme LISTE *
Lst1U=ORDO (UNIQ Lst1c);
JJJ  = 1;
DIM2 = DIME Lst1U;
SI (JJJ <EG DIM2);
  ENTI2= EXTR Lst1U JJJ;
SINO;
  ENTI2= 0;
FINS;
KKK  = 1;
REPE SURI (DIME Lst0);
  III = &SURI ;
  SI(III EGA ENTI2);
    JJJ  = JJJ + 1;
    SI (JJJ <EG DIM2);
      ENTI2= EXTR Lst1U JJJ;
    SINO;
      ENTI2= 0;
    FINS;
    ITER SURI;
  FINS;

  ENTI1 = EXTR Lst0  &SURI ;
  ENTI3 = EXTR Lst2c KKK   ;
  KKK   = KKK + 1 ;
  SI(NEG ENTI1 ENTI3);
    ERRE 5;
  FINS;
FIN SURI;


*======================================================================*
* LISTENTI
*======================================================================*
* Verification du Fonctionnement
Lst0 = LECT 10 15 20 25 ;
Lst1a= LECT 2 ;
Lst1b= LECT 2 2 1 1 1 1 ;
Lst1c= LECT ;

Lst2a = ENLE Lst0 Lst1a ;
Lst2b = ENLE Lst0 Lst1b ;
Lst2c = ENLE Lst0 Lst1c ;

* Validation du resultat
* 1ere LISTE *
Lst1U=ORDO (UNIQ Lst1a);
JJJ  = 1;
DIM2 = DIME Lst1U;
SI (JJJ <EG DIM2);
  ENTI2= EXTR Lst1U JJJ;
SINO;
  ENTI2= 0;
FINS;
ENTI2= EXTR Lst1U JJJ;
KKK  = 1;
REPE SURI (DIME Lst0);
  III = &SURI ;
  SI(III EGA ENTI2);
    JJJ  = JJJ + 1;
    SI (JJJ <EG DIM2);
      ENTI2= EXTR Lst1U JJJ;
    SINO;
      ENTI2= 0;
    FINS;
    ITER SURI;
  FINS;

  ENTI1 = EXTR Lst0  &SURI ;
  ENTI3 = EXTR Lst2a KKK   ;
  KKK   = KKK + 1 ;
  SI(NEG ENTI1 ENTI3);
    ERRE 5;
  FINS;
FIN SURI;

* 2eme LISTE *
Lst1U=ORDO (UNIQ Lst1b);
LIST Lst1U;
JJJ  = 1;
DIM2 = DIME Lst1U;
SI (JJJ <EG DIM2);
  ENTI2= EXTR Lst1U JJJ;
SINO;
  ENTI2= 0;
FINS;
ENTI2= EXTR Lst1U JJJ;
KKK  = 1;
REPE SURI (DIME Lst0);
  III = &SURI ;
  SI(III EGA ENTI2);
    JJJ  = JJJ + 1;
    SI (JJJ <EG DIM2);
      ENTI2= EXTR Lst1U JJJ;
    SINO;
      ENTI2= 0;
    FINS;
    ITER SURI;
  FINS;

  ENTI1 = EXTR Lst0  &SURI ;
  ENTI3 = EXTR Lst2b KKK   ;
  KKK   = KKK + 1 ;
  SI(NEG ENTI1 ENTI3);
    ERRE 5;
  FINS;
FIN SURI;


* 3eme LISTE *
Lst1U=ORDO (UNIQ Lst1c);
JJJ  = 1;
DIM2 = DIME Lst1U;
SI (JJJ <EG DIM2);
  ENTI2= EXTR Lst1U JJJ;
SINO;
  ENTI2= 0;
FINS;
KKK  = 1;
REPE SURI (DIME Lst0);
  III = &SURI ;
  SI(III EGA ENTI2);
    JJJ  = JJJ + 1;
    SI (JJJ <EG DIM2);
      ENTI2= EXTR Lst1U JJJ;
    SINO;
      ENTI2= 0;
    FINS;
    ITER SURI;
  FINS;

  ENTI1 = EXTR Lst0  &SURI ;
  ENTI3 = EXTR Lst2c KKK   ;
  KKK   = KKK + 1 ;
  SI(NEG ENTI1 ENTI3);
    ERRE 5;
  FINS;
FIN SURI;


*======================================================================*
* LISTMOTS
*======================================================================*
* Verification du Fonctionnement
Lst0 = MOTS 'MO1' 'MO2' 'MO3' 'MO4' ;
Lst1a= LECT 2 ;
Lst1b= LECT 2 2 1 1 1 1 ;
Lst1c= LECT ;

Lst2a = ENLE Lst0 Lst1a ;
Lst2b = ENLE Lst0 Lst1b ;
Lst2c = ENLE Lst0 Lst1c ;

* Validation du resultat
* 1ere LISTE *
Lst1U=ORDO (UNIQ Lst1a);
JJJ  = 1;
DIM2 = DIME Lst1U;
SI (JJJ <EG DIM2);
  ENTI2= EXTR Lst1U JJJ;
SINO;
  ENTI2= 0;
FINS;
ENTI2= EXTR Lst1U JJJ;
KKK  = 1;
REPE SURI (DIME Lst0);
  III = &SURI ;
  SI(III EGA ENTI2);
    JJJ  = JJJ + 1;
    SI (JJJ <EG DIM2);
      ENTI2= EXTR Lst1U JJJ;
    SINO;
      ENTI2= 0;
    FINS;
    ITER SURI;
  FINS;

  ENTI1 = EXTR Lst0  &SURI ;
  ENTI3 = EXTR Lst2a KKK   ;
  KKK   = KKK + 1 ;
  SI(NEG ENTI1 ENTI3);
    ERRE 5;
  FINS;
FIN SURI;

* 2eme LISTE *
Lst1U=ORDO (UNIQ Lst1b);
LIST Lst1U;
JJJ  = 1;
DIM2 = DIME Lst1U;
SI (JJJ <EG DIM2);
  ENTI2= EXTR Lst1U JJJ;
SINO;
  ENTI2= 0;
FINS;
ENTI2= EXTR Lst1U JJJ;
KKK  = 1;
REPE SURI (DIME Lst0);
  III = &SURI ;
  SI(III EGA ENTI2);
    JJJ  = JJJ + 1;

    SI (JJJ <EG DIM2);
      ENTI2= EXTR Lst1U JJJ;
    SINO;
      ENTI2= 0;
    FINS;
    ITER SURI;
  FINS;

  ENTI1 = EXTR Lst0  &SURI ;
  ENTI3 = EXTR Lst2b KKK   ;
  KKK   = KKK + 1 ;
  SI(NEG ENTI1 ENTI3);
    ERRE 5;
  FINS;
FIN SURI;


* 3eme LISTE *
Lst1U=ORDO (UNIQ Lst1c);
JJJ  = 1;
DIM2 = DIME Lst1U;
SI (JJJ <EG DIM2);
  ENTI2= EXTR Lst1U JJJ;
SINO;
  ENTI2= 0;
FINS;
KKK  = 1;
REPE SURI (DIME Lst0);
  III = &SURI ;
  SI(III EGA ENTI2);
    JJJ  = JJJ + 1;
    SI (JJJ <EG DIM2);
      ENTI2= EXTR Lst1U JJJ;
    SINO;
      ENTI2= 0;
    FINS;
    ITER SURI;
  FINS;

  ENTI1 = EXTR Lst0  &SURI ;
  ENTI3 = EXTR Lst2c KKK   ;
  KKK   = KKK + 1 ;
  SI(NEG ENTI1 ENTI3);
    ERRE 5;
  FINS;
FIN SURI;


*======================================================================*
* LISTCHPO
*======================================================================*
* Verification du Fonctionnement
'OPTI' 'DIME' 2 'ELEM' 'QUA4';
P1 = 0. 0.;
P2 = 1. 0.;
L1 = 'DROI' 11 P1 P2;


CHP1 ='MANU' 'CHPO' L1 1 'C1' 1.;
CHP2 ='MANU' 'CHPO' L1 1 'C2' 1.;
CHP3 ='MANU' 'CHPO' L1 1 'C3' 1.;
CHP4 ='MANU' 'CHPO' L1 1 'C4' 1.;

Lst0 = SUIT CHP1 CHP2 CHP3 CHP4 ;
Lst1a= LECT 2 ;
Lst1b= LECT 2 2 1 1 1 1 ;
Lst1c= LECT ;

Lst2a = ENLE Lst0 Lst1a ;
Lst2b = ENLE Lst0 Lst1b ;
Lst2c = ENLE Lst0 Lst1c ;

* Validation du resultat
* 1ere LISTE *
Lst1U=ORDO (UNIQ Lst1a);
JJJ  = 1;
DIM2 = DIME Lst1U;
SI (JJJ <EG DIM2);
  ENTI2= EXTR Lst1U JJJ;
SINO;
  ENTI2= 0;
FINS;
ENTI2= EXTR Lst1U JJJ;
KKK  = 1;
REPE SURI (DIME Lst0);
  III = &SURI ;
  SI(III EGA ENTI2);
    JJJ  = JJJ + 1;
    SI (JJJ <EG DIM2);
      ENTI2= EXTR Lst1U JJJ;
    SINO;
      ENTI2= 0;
    FINS;
    ITER SURI;
  FINS;

  ENTI1 = EXTR Lst0  &SURI ;
  ENTI3 = EXTR Lst2a KKK   ;
  KKK   = KKK + 1 ;
  SI(NEG ENTI1 ENTI3);
    ERRE 5;
  FINS;
FIN SURI;

* 2eme LISTE *
Lst1U=ORDO (UNIQ Lst1b);
LIST Lst1U;
JJJ  = 1;
DIM2 = DIME Lst1U;
SI (JJJ <EG DIM2);
  ENTI2= EXTR Lst1U JJJ;
SINO;
  ENTI2= 0;
FINS;
ENTI2= EXTR Lst1U JJJ;
KKK  = 1;
REPE SURI (DIME Lst0);
  III = &SURI ;
  SI(III EGA ENTI2);
    JJJ  = JJJ + 1;

    SI (JJJ <EG DIM2);
      ENTI2= EXTR Lst1U JJJ;
    SINO;
      ENTI2= 0;
    FINS;
    ITER SURI;
  FINS;

  ENTI1 = EXTR Lst0  &SURI ;
  ENTI3 = EXTR Lst2b KKK   ;
  KKK   = KKK + 1 ;
  SI(NEG ENTI1 ENTI3);
    ERRE 5;
  FINS;
FIN SURI;


* 3eme LISTE *
Lst1U=ORDO (UNIQ Lst1c);
JJJ  = 1;
DIM2 = DIME Lst1U;
SI (JJJ <EG DIM2);
  ENTI2= EXTR Lst1U JJJ;
SINO;
  ENTI2= 0;
FINS;
KKK  = 1;
REPE SURI (DIME Lst0);
  III = &SURI ;
  SI(III EGA ENTI2);
    JJJ  = JJJ + 1;
    SI (JJJ <EG DIM2);
      ENTI2= EXTR Lst1U JJJ;
    SINO;
      ENTI2= 0;
    FINS;
    ITER SURI;
  FINS;

  ENTI1 = EXTR Lst0  &SURI ;
  ENTI3 = EXTR Lst2c KKK   ;
  KKK   = KKK + 1 ;
  SI(NEG ENTI1 ENTI3);
    ERRE 5;
  FINS;
FIN SURI;

FIN;
