* fichier :  tran15.dgibi

* Calcul avec des elements 'JOI1' (support 'SEG2') et 'POI1'

*******************************************
* Section : Thermique Conduction
* Section : Thermique Transitoire
*******************************************

*******************************************
*    Test tran15.dgibi: jeux de données   *
*    ---------------------------------    *
*                                         *
*   THERMIQUE TRANSITOIRE LINEAIRE EN 2D  *
*     CONDUCTION                          *
*     CONVECTION                          *
*                                         *
*   - Verification de CAPA, COND et CONV  *
*     Pour les elements JOI1 et POI1 en   *
*     formulation THERMIQUE               *
*                                         *
*                                         *
*  Description                            *
*  -----------                            *
*  Les noeuds de la surface S1 echangent  *
*  avec le point POI2 par le bias de JOI1.*
*                                         *
*  Coefficient de CONDUCTION 'KT' sur les *
*       elements 'JOI1'                   *
*  Coefficient de CONVECTION 'H' sur le   *
*       point POI2 avec une temperature   *
*       exterieure 'TC'                   *
*  Température initiale T_ini             *
*                                         *
*******************************************

'OPTI' 'DIME' 2 'ELEM' 'QUA4' ;
'OPTI' 'TRAC' 'PSC' ;

*******************************************
*** Parametrage du jeu de donnees
*******************************************
 Dt    = 100.     ;
 Duree = 30000.   ;

 Val_KT   = 5.    ;
 Val_Mass = 4.    ;
 Val_Cp   = 4200. ;
 Val_H    = 10.   ;
 Temp_EXT = 15.   ;

*******************************************
*** MAILLAGE
*******************************************
 P1 = 0. 0. ;
 P2 = 1. 0. ;
 L1 ='DROI' 1 P1 P2      ;
 L2 = L1 'PLUS' (0. 0.2) ;
 S1 ='REGL' 1 L1 L2      ;

 POI1 ='CHAN' 'POI1' S1 ;
 POI2 = 2. 2. ;

*Creation du MAILLAGE de SEG2 reliant les noeuds de S1 aux noeuds de POI1
 NBPOI   ='NBEL' POI1;
 MAILJOI1='VIDE' 'MAILLAGE';
'REPE' SURPOI1 NBPOI;
   MAILJOI1 = MAILJOI1 'ET' ('DROI' 1  ('POIN' POI1 &SURPOI1) POI2) ;
'FIN' SURPOI1 ;
 MAILJOI1 = MAILJOI1 'COUL' 'BLEU' ;

*******************************************
*** MODELE & CARACTERISTIQUES
*******************************************
 MOD1  ='MODE' MAILJOI1  'THERMIQUE' 'CONDUCTION' 'JOI1' ;
 MOD2  ='MODE' POI1      'THERMIQUE' 'CONVECTION' ;
 MODTOT= MOD1 'ET' MOD2 ;

 MAT1  ='MATE' MOD1 'M' Val_Mass 'C' Val_Cp 'KT' Val_KT ;
 MAT2  ='MATE' MOD2 'H' Val_H 'TC' Temp_EXT ;
 MATTOT= MAT1 'ET' MAT2 ;


*******************************************
*** CONDITIONS INITIALES ***
*******************************************
 T_ini ='MANU' 'CHPO' MAILJOI1 'T' 1.5 ;


***************************************
*** RESOLUTION AVEC PASAPAS         ***
***************************************
 LISTPS   ='PROG' 0. 'PAS' Dt Duree ;

 TAB1                   ='TABL' 'PASAPAS';
 TAB1.'MODELE'          = MODTOT         ;
 TAB1.'CARACTERISTIQUES'= MATTOT         ;
 TAB1.'TEMPS_CALCULES'  = LISTPS         ;
 TAB1.'TEMPERATURES'    ='TABL'          ;
 TAB1.'TEMPERATURES' . 0= T_ini          ;

 PASAPAS TAB1 ;

*******************************************
*** POST TRAITEMENT
*******************************************
 EVO1 ='EVOL' 'TEMP' TAB1 TEMPERATURES 'T' (POI2 'ET' (POIN 1 POI1));
'DESS' EVO1 ;

'FIN';
