$$$$ PAS_MATE
* PAS_MATE  PROCEDUR  KICH      20/01/03    21:15:08     10477
'DEBP' PAS_MATE PRECED*'TABLE'  ETAT*'MCHAML';
WTAB=PRECED.'WTABLE';

'SI' (WTAB.'MATVAR' 'OU' WTAB.'MODAL' 'OU' WTAB.'FREQUENTIEL');

'SI' WTAB.'MEC1';
   MA=WTAB.'MAT_MEC';
   MO=WTAB.'MOD_MEC';
  'SI'  WTAB.'POR1' ;
     MA=MA 'ET' WTAB.'MAT_POR';
     MO=MO 'ET' WTAB.'MOD_POR';
  'FINSI';
'SINON';
   MA=WTAB.'MAT_POR';
   MO=WTAB.'MOD_POR';
'FINSI';

'SI' ('EXISTE' WTAB 'MOD_LIA') ;
   MO = MO 'ET' WTAB.'MOD_LIA' ;
   MA = MA 'ET' WTAB.'MAT_LIA' ;
'FINSI' ;

'SI' ('EXISTE' WTAB 'MOD_CHA') ;
   MO = MO 'ET' WTAB.'MOD_CHA' ;
   MA = MA 'ET' WTAB.'MAT_CHA' ;
'FINSI' ;

*Pour certains materiaux on ne fait aucune instanciation
*pour les passer a l'operateur 'COMP' --------------
ISPE    = FAUX ;
ISTA    = FAUX ;
IBET    = FAUX ;
TABMOD  = 'EXTR' MO 'ZONE' ;
ISTRUB1 = 1 ;
'REPE' STRUB1 ((DIME TABMOD) / 2) ;
   MMO= TABMOD.ISTRUB1;
  'SI'   (( 'EXISTE' MMO 'MATE' 'ENDOMMAGEABLE'  )
      'OU' ('EXISTE' MMO 'MATE' 'VISCODOMMAGE'   )
      'OU' ('EXISTE' MMO 'MATE' 'PLASTIQUE_ENDOM')) ;
    'SI' ISPE;
       MOD_SPE = MOD_SPE 'ET' MMO           ;
       MAT_SPE = MAT_SPE 'ET'('REDU' MA MMO);
    'SINON';
       MOD_SPE = MMO          ;
       MAT_SPE ='REDU' MA  MMO;
       ISPE=VRAI              ;
    'FINSI';

  'SINON';
    'SI'  ( ('EXISTE' MMO  'MATE' 'DRUCKER_PARFAIT' )
    'OU' ('EXISTE' MMO 'MATE' 'MAZARS')  );
      'SI' IBET;
         MOD_BET=MOD_BET 'ET' MMO;
         MAT_BET=MAT_BET 'ET'  ('REDU'  MA  MMO);
      'SINON';
         MOD_BET= MMO           ;
         MAT_BET='REDU'  MA  MMO;
         IBET   = VRAI          ;
      'FINSI';

    'SINON';
      'SI' ISTA;
*         MOD_STA= MOD_STA 'ET' MMO            ;
*         MAT_STA= MAT_STA 'ET' ('REDU' MA MMO);
      'SINON';
*         MOD_STA= MMO         ;
*         MAT_STA='REDU' MA MMO;
         ISTA   = VRAI        ;
      'FINSI';
    'FINSI';
  'FINSI';
   ISTRUB1 = ISTRUB1 + 2;
'FIN' STRUB1;

MA = WTAB.'CARACTERISTIQUES';
'SI' IBET;
  'SI' WTAB.'BETON_HT';
*    traitement particulier pour beton HT
     LDEV= EXTR MAT_BET 'DEVA';
    'SI' ('EXIS' LDEV 'T   ');
       MAT_BET IMAUVAIS=IDBHT MAT_BET MOD_BET WTAB.'TET1' WTAB.'TET2';
      'SI' IMAUVAIS;
         'QUITTER' PASAPAS;
      'FINSI';
       MA = MA 'ET' MAT_BET ;
    'FINSI';
  'FINSI';

  'SI' ISTA ;
*     MAT_STA= MAT_STA 'ET' MAT_BET;
*     MOD_STA= MOD_STA 'ET' MOD_BET;
  'SINON';
*     MAT_STA= MAT_BET;
*     MOD_STA= MOD_BET;
     ISTA   = VRAI   ;
  'FINSI';
'FINSI';

*  PERF-RAID : reutilisation des caracteristiques d'un appel a l'autre
*  tant que les parametres externes dont elles dependent (WTAB . 'LDEVA')
*  sont inchanges (tolerance relative WTAB . 'TOL_MATERIAU', indice
*  PASAPAS 'TOLERANCE_MATERIAU', < 0 : desactive). Le champ renvoye est
*  alors le meme objet, ce qu'UNPAS exploite pour conserver la raideur.
*  Desactive de lui-meme si le modele est recompose a chaque appel
*  (MO different), en modal / frequentiel et pour le beton HT.
   IPERFMA = VRAI ;
   'SI' ('EXIS' WTAB 'PERF_RAID') ;
      IPERFMA = WTAB . 'PERF_RAID' ;
   'FINSI' ;
   XTOLMA = 1.E-12 ;
   'SI' ('EXIS' WTAB 'TOL_MATERIAU') ;
      XTOLMA = WTAB . 'TOL_MATERIAU' ;
   'FINSI' ;
   IMCACHE = IPERFMA 'ET' WTAB . 'MATVAR' ;
   'SI' IMCACHE ;
      'SI' (WTAB . 'MODAL' 'OU' WTAB . 'FREQUENTIEL') ;
         IMCACHE = FAUX ;
      'FINSI' ;
      'SI' (XTOLMA '<' 0.) ;
         IMCACHE = FAUX ;
      'FINSI' ;
      'SI' IBET ;
         'SI' WTAB . 'BETON_HT' ;
            IMCACHE = FAUX ;
         'FINSI' ;
      'FINSI' ;
*     liste des parametres externes absente ou vide : pas de cache
      NDVAMA = 0 ;
      'SI' ('EGA' ('TYPE' (WTAB . 'LDEVA')) 'LISTMOTS') ;
         NDVAMA = 'DIME' (WTAB . 'LDEVA') ;
      'FINSI' ;
      'SI' (NDVAMA 'EGA' 0) ;
         IMCACHE = FAUX ;
      'FINSI' ;
   'FINSI' ;
   IMHIT = FAUX ;
   'SI' IMCACHE ;
      'SI' ('EXIS' WTAB 'PMAT_MMM') ;
         'SI' (('EGA' MA (WTAB . 'PMAT_MA')) 'ET'
               ('EGA' MO (WTAB . 'PMAT_MO'))) ;
            LCPMAT = 'EXTR' ETAT 'COMP' ;
            IMHIT = VRAI ;
            'REPETER' BMAT ('DIME' WTAB . 'LDEVA') ;
               NOMDVA = 'EXTR' WTAB . 'LDEVA' &BMAT ;
               'SI' ('EXISTE' LCPMAT NOMDVA) ;
                  'SI' ('EXIS' (WTAB . 'PMAT_ETAT') NOMDVA) ;
                     CHA1 = 'EXCO' ETAT NOMDVA ;
                     CHA2 = WTAB . 'PMAT_ETAT' . NOMDVA ;
                     XD = 'MAXI' 'ABS' (CHA1 '-' CHA2) ;
                     XR = 'MAXI' 'ABS' CHA2 ;
                     'SI' (XR '<' 1.) ;
                        XR = 1. ;
                     'FINSI' ;
                     'SI' (XD '>' (XTOLMA '*' XR)) ;
                        IMHIT = FAUX ;
                        'QUITTER' BMAT ;
                     'FINSI' ;
                  'SINON' ;
                     IMHIT = FAUX ;
                     'QUITTER' BMAT ;
                  'FINSI' ;
               'SINON' ;
                  IMHIT = FAUX ;
                  'QUITTER' BMAT ;
               'FINSI' ;
            'FIN' BMAT ;
         'FINSI' ;
      'FINSI' ;
   'FINSI' ;
   'SI' IMHIT ;
      MMM = WTAB . 'PMAT_MMM' ;
      'SI' ('EXIS' WTAB 'NB_MAT_REUT') ;
         WTAB . 'NB_MAT_REUT' = WTAB . 'NB_MAT_REUT' + 1 ;
      'FINSI' ;
   'SINON' ;
      MMM  = 'VARI' 'NUAG' MO MA ETAT 'RIGIDITE' ;
      'SI' IMCACHE ;
         TMETAT = 'TABL' ;
         LCPMAT = 'EXTR' ETAT 'COMP' ;
         'REPETER' BMAT2 ('DIME' WTAB . 'LDEVA') ;
            NOMDVA = 'EXTR' WTAB . 'LDEVA' &BMAT2 ;
            'SI' ('EXISTE' LCPMAT NOMDVA) ;
               TMETAT . NOMDVA = 'EXCO' ETAT NOMDVA ;
            'FINSI' ;
         'FIN' BMAT2 ;
         WTAB . 'PMAT_MMM' = MMM ;
         WTAB . 'PMAT_MA' = MA ;
         WTAB . 'PMAT_MO' = MO ;
         WTAB . 'PMAT_ETAT' = TMETAT ;
      'FINSI' ;
   'FINSI' ;

'SI' ISTA;
*   MMM  =           'VARI' 'NUAG' MOD_STA MAT_STA ETAT 'RIGIDITE' ;
   WTAB.'MA_COMP'= MMM ;
  'SI' ISPE;
*     MMM= MMM 'ET' ('VARI' 'NUAG' MOD_SPE MAT_SPE ETAT 'RIGIDITE');
     WTAB.'MA_COMP'= MMM 'ET' MAT_SPE ;
  'FINSI';

'SINON';
*   MMM  =           'VARI' 'NUAG' MOD_SPE MAT_SPE ETAT 'RIGIDITE';
   WTAB.'MA_COMP'= MAT_SPE ;
'FINSI';

'SINO';
   MMM  = WTAB.'CARACTERISTIQUES';
'FINS';

'FINPROC' MMM ;
