$$$$ UNPAS
* UNPAS     PROCEDUR  OF166741  24/05/06    21:15:27     11082
'DEBPROC' UNPAS PRECED*'TABLE';
*
*----------------------------------------------------------------------*
*         PROCEDURE UNPAS                                              *
*                                                                      *
*    calcul d'un increment de solution en grand deplacement plastique  *
*    par la methode des residus                                        *
*----------------------------------------------------------------------*
*    En entree
*     PRECED  la table passee à PASAPAS
*
*  kich nota champ de materiau : etablit au debut de procedure UNPAS
*  estimation des caracteristiques fin de pas (TI     ): ZMAT22  -->> ZMATXX
*  caracteristiques debut de pas              (TEMPS0) : ZMAT11
*  puis dans la boucle de non-convergence
*      ZMAT1 initialise avec ZMAT11
*  materiau fin de pas de temps : ZMAT2 sorti de COMP,
*    range dans WTAB.'MAT1' en sortie unpas
************************************************************************
*    sortie STAB12  indice :                                           *
*                                                                      *
*      DEPT   increment de deplacement  sur le pas                     *
*      SIGF   contraintes a la fin du pas                              *
*      VARF   variables internes a la fin du pas                       *
*      DFPF   deformation inelastique a la fin du pas                  *
*      CONV   logique valant vrai si pas de probleme de convergence    *
*      DEFF   deformations a la fin du pas si grandes deformations     *
*----------------------------------------------------------------------*
*
* Appel a PAS_MODL :
* Mise a jour des indices de PRECED.WTABLE relatifs aux modeles
* si PRECED.WTABLE.MODELE a ete modifie
PAS_MODL PRECED ;

*CB215821 : Recuperation de XPETIT (07/12/2016)
XPETIT   = 'VALE' 'PETI'    ;
XGRAND   = 'VALE' 'GRAND'   ;

*  declanchement du recalcul de la matrice
  DLTAIT = WTAB.'DELTAITER' ;
  ITRCLC =  1  '*' DLTAIT ;
  'SI' (ITRCLC <  20) ; ITRCLC =  20; 'FINSI';

WTAB = PRECED.'WTABLE'      ;
LAG_TOT=VRAI;
'SI' ('EXIS' WTAB 'LAG_TOT'); LAG_TOT=WTAB.'LAG_TOT'; 'FINS';
conti= PRECED.'CONTINUATION';
estim= PRECED.'ESTIMATION'  ;
*
*  initialisation et reprise des valeurs des tables ****************
*
* Liste de composantes utiles
MXMYMZ = 'MOTS' 'MX'  'MY'  'MZ'  'MT'  'FP'  'FPQ'  'FTP'
                'IMX' 'IMY' 'IMZ' 'IMT' 'IFP' 'IFPQ' 'IFTP' ;
MXMFLX = 'MOTS' 'MX'  'MY'  'MZ'  'MT'  'FLX' 'FP'  'FPQ'  'FTP'
                'IMX' 'IMY' 'IMZ' 'IMT' 'FLX' 'IFP' 'IFPQ' 'IFTP' ;
MNPRIM = 'MOTS' 'UX'  'UY'  'UZ'  'UR'  'UT'   'RX'   'RY'  'RZ'  'RT'
                      'P'   'PQ'  'TP'   'ALFA' 'BETA'
                'IUX' 'IUY' 'IUZ' 'IUR'  'IUT'  'IRX'  'IRY' 'IRZ' 'IRT'
                'IP' 'IPQ'  'ITP' 'IALF' 'IBET' ;
MLPRIM = MNPRIM 'ET' ('MOTS' 'LX');
MNDUAL = 'MOTS' 'FX'  'FY'  'FZ'  'FR'   'FT'   'MX'   'MY'  'MZ'  'MT'
                      'FP'  'FPQ' 'FTP'  'FALF' 'FBET'
                'IFX' 'IFY' 'IFZ' 'IFR'  'IFT'  'IMX'  'IMY' 'IMZ' 'IMT'
                'IFP' 'IFPQ' 'IFTP' 'IFAL' 'IFBE' ;
MLDUAL = MNDUAL 'ET' ('MOTS' 'FLX');
MLDEPL = 'MOTS' 'UX' 'UY' 'UZ' 'UR' 'UT'  'IUX' 'IUY' 'IUZ' 'IUR' 'IUT'
                'ALFA' 'BETA' 'IALF' 'IBET' ;
MLROTA = 'MOTS' 'RX' 'RY' 'RZ' 'RT' 'P' 'PQ' 'TP'
                'IRX' 'IRY' 'IRZ' 'IRT' 'IP' 'IPQ' 'ITP';
MLDEFOR = 'MOTS'  'EPXX' 'EPYY' 'EPZZ' 'EPSS' 'EPTT' 'EPRR'
                  'GAXY' 'GAXZ' 'GAYZ' 'GAST' 'GASN' 'GATN'
                  'GARZ' 'GART' 'GAZT' 'GXY '
*                 'CX  ' 'CY  ' 'CZ  '
                  'EPSE' 'EPS' ;
MLDPRIN = 'MOTS'  'SI11' 'SI22' 'SI33' ;
MOCA = 'MOTS' 'VECT' 'VX  ' 'VY  ' 'VZ  ' 'VXF ' 'VYF ' 'VZF '
              'V1X ' 'V1Y ' 'V1Z ' 'V2X ' 'V2Y ' 'V2Z ' ;
* Pour MOD_LIAISON :
MLPRIM_LIA = MLPRIM ;
MVPRIM_LIA = 'MOTS' 'VTX' 'VTY' 'VTZ' 'VTR' 'VTT' 'VWX' 'VWY' 'VWZ' 'VWT'
                    'VVP' 'VVPQ' 'VVTP' 'VALF' 'VBET'
                    'IVTX' 'IVTY' 'IVTZ' 'IVTR' 'IVTT' 'IVWX' 'IVWY' 'IVWZ' 'IVWT'
                    'IVVP' 'IVPQ' 'IVTP' 'IVAL' 'IVBE' 'VLX';
MLDUAL_LIA = MLDUAL ;

*=DEB===== Formulation HHO = Definition des DDLs ===============================
* Definition des DDLs primaux : inconnues de deplacements des cellules et des Faces
MNPRIM_HHO = 'MOTS'
*                'UXC0' 'UXC1' 'UXC2' 'UXC3' 'UXC4' 'UXC5' 'UXC6' 'UXC7' 'UXC8' 'UXC9'
*                'UYC0' 'UYC1' 'UYC2' 'UYC3' 'UYC4' 'UYC5' 'UYC6' 'UYC7' 'UYC8' 'UYC9'
*                'UZC0' 'UZC1' 'UZC2' 'UZC3' 'UZC4' 'UZC5' 'UZC6' 'UZC7' 'UZC8' 'UZC9'
                'UXF0' 'UXF1' 'UXF2' 'UXF3' 'UXF4' 'UXF5' 'UXF6' 'UXF7' 'UXF8' 'UXF9'
                'UYF0' 'UYF1' 'UYF2' 'UYF3' 'UYF4' 'UYF5' 'UYF6' 'UYF7' 'UYF8' 'UYF9'
                'UZF0' 'UZF1' 'UZF2' 'UZF3' 'UZF4' 'UZF5' 'UZF6' 'UZF7' 'UZF8' 'UZF9' ;
MNDUAL_HHO = 'MOTS'
*                'FXC0' 'FXC1' 'FXC2' 'FXC3' 'FXC4' 'FXC5' 'FXC6' 'FXC7' 'FXC8' 'FXC9'
*                'FYC0' 'FYC1' 'FYC2' 'FYC3' 'FYC4' 'FYC5' 'FYC6' 'FYC7' 'FYC8' 'FYC9'
*                'FZC0' 'FZC1' 'FZC2' 'FZC3' 'FZC4' 'FZC5' 'FZC6' 'FZC7' 'FZC8' 'FZC9'
                'FXF0' 'FXF1' 'FXF2' 'FXF3' 'FXF4' 'FXF5' 'FXF6' 'FXF7' 'FXF8' 'FXF9'
                'FYF0' 'FYF1' 'FYF2' 'FYF3' 'FYF4' 'FYF5' 'FYF6' 'FYF7' 'FYF8' 'FYF9'
                'FZF0' 'FZF1' 'FZF2' 'FZF3' 'FZF4' 'FZF5' 'FZF6' 'FZF7' 'FZF8' 'FZF9' ;
* Pour l'istant on ne considere que les inconnues (DEPL et FORC) de face pour
* le calcul de l'equilibre et l'acceleration de convergence
* D'ou les lignes commentees ci-dessus dans la definition de MNPRIM_HHO et MNDUAL_HHO
MNPRIM = MNPRIM 'ET' MNPRIM_HHO ;
MLPRIM = MLPRIM 'ET' MNPRIM_HHO ;
MNDUAL = MNDUAL 'ET' MNDUAL_HHO ;
MLDUAL = MLDUAL 'ET' MNDUAL_HHO ;
MLDEPL = MLDEPL 'ET' MNPRIM_HHO ;
*A Ameliorer : ne faire que si presence HHO et n'ajouter que les DDLs utilises par HHO !
*=FIN===== Formulation HHO =====================================================

*  definition de variables locales
PASUNIL = FAUX;
*'SI' ( 'EXIS' PRECED 'ECRIT' ) ; list wtab; 'FINS';
* PERF-RAID : interrupteur general des optimisations (indice PASAPAS
* 'PERF_RAID', VRAI par defaut) et indicateur "matrice de Hooke inutile"
IPERFRD = VRAI ;
'SI' ('EXIS' WTAB 'PERF_RAID') ;
  IPERFRD = WTAB . 'PERF_RAID' ;
'FINSI' ;
IHKSKIP = FAUX ;
*   PERF-RAID niveau 3 : rafraichissement de la raideur en cas de stagnation
*   ('PERF_RAID_NIVEAU' >= 3 ou indice 'RAFRAICHISSEMENT_RAIDEUR' VRAI)
IPERFSTG = FAUX ;
'SI' (IPERFRD 'ET' ('EXIS' WTAB 'PERF_STAG')) ;
  IPERFSTG = WTAB . 'PERF_STAG' ;
'FINSI' ;
'SI' ('NON' ('EXIS' WTAB 'NB_RAFRAICH')) ;
  WTAB . 'NB_RAFRAICH' = 0 ;
'FINSI' ;
'SI' ('NON' ('EXIS' WTAB 'NB_HOOK_EVITE')) ;
  WTAB . 'NB_HOOK_EVITE' = 0 ;
'FINSI' ;
'SI' ('NON' ('EXIS' WTAB 'NB_RAIDEUR_CALC')) ;
  WTAB . 'NB_RAIDEUR_CALC' = 0 ;
'FINSI' ;
'SI' ('NON' ('EXIS' WTAB 'PERF_STRUCT')) ;
  WTAB . 'PERF_STRUCT' = VRAI ;
'FINSI' ;
'SI' ('NON' ('EXIS' WTAB 'TOL_RAIDEUR_DIAG')) ;
  WTAB . 'TOL_RAIDEUR_DIAG' = 0. ;
'FINSI' ;
ICERAM = WTAB.'CERAMIQUE' ;
IDYN   = WTAB.'DYNAMIQUE';
IELANL = WTAB.'NON_LINEAIRE';
IENDOM = WTAB.'ENDOMMAGEMENT';
IFEFP  = WTAB.'FEFP_FORMULATION' ;
IFEFPUL= WTAB.'UPDATE_LAGRANGIAN';
IFTOL  = 'NEG' WTAB.'FTOL' 'INCONNU' ;
HYPDEF = 'MOT' WTAB.'HYPOTHESE_DEFORMATIONS';
IGRD   = WTAB.'GRANDS_DEPLACEMENTS';
IKSIA  = WTAB.'K_SIGMA';
IKTAN  = WTAB.'K_TANGENT' ;
IMPLP  = WTAB.'LIAISON_PERSISTANTE';
IMTOL  = 'NEG' WTAB.'MTOL' 'INCONNU';
IPILOT = WTAB.'AUTOMATIQUE';
IPLAST = WTAB.'PLASTIQUE';
IPLAVI = WTAB.'IPLAVI';
IPREDIC = WTAB.'PREDICTEUR';
IRCON  = WTAB.'RAIDCONST';
IRAUGLU  = WTAB.'RAIDAUGM';
IRAUG = IRAUGLU ;
AUTAUG = WTAB.'AUTOAUGM';
ISOL   = WTAB.'CONSOLIDATION';
ISSTE  = WTAB.'SUBSTEPPING';
ITHER  = WTAB.'CHAR_THE' 'OU' WTAB.'FOR_THER';
IVIEXT = WTAB.'VISCO_EXTERNE';
IVIDOM = WTAB.'VISCODOMMAGE';
IVISCO = WTAB.'VISCOPLASTIQUE';
LIERR1 = PROG 0;
LOGHLIN = VRAI ;
LNLOC  = WTAB.'NLOC';
LOGDEF = WTAB.'CHAR_DEFI';
LOGPRE = WTAB.'CHAR_PRES' ;
LOGPIL = WTAB.'CHAR_PILO' ;
NITMA  = WTAB.'NITERINTER_MAX';
NIHL   = WTAB.'MAXSOUSITERATION';
PRECHL = WTAB.'PRECSOUSITERATION';
NSSTE  = WTAB.'NMAXSUBSTEPS';
POR1   = WTAB.'POR1' ;
TI     = WTAB.'T_FINAL';
EKREAC = WTAB.'REAC_GRANDS';
ekreac = 1e50;
ZMAXIT = WTAB.'MAXITERATION' ;
ZNACCE = VRAI;
XCONV = 0.;
DEPSTDM = 0.;
ZNCONS = WTAB.'NITER_KTANGENT'     ;
ZPREC  = WTAB.'PRECISION'          ;
ZPRECHPP = ZPREC;
ZPREK  = WTAB.'PRECISINTER'        ;
ZPRECD = WTAB.'PRECDECHARGE'       ;
ZPRECM = WTAB.'PRECFLEX'           ;
ZCLIM0 = WTAB.'BLOCAGES_MECANIQUES';
*-- Autres initialisations en non-local helmholtz --
'SI' (LNLOC 'ET' ('EGA' WTAB.'NON_LOCAL' 'HELM'));
  TAHELM = WTAB.'HELMHOLTZ' ;
  NHELM =  TAHELM . 'N_VARI_NL' ;
'FINSI' ;
*-- On initialise ZCLIM qui va contenir l'ensemble des C.L.
ZCLIM  = ZCLIM0    ;
DT     = WTAB.'DT' ;
TEMPS0=WTAB.'TEMPS0';
*---  doit on reactualiser la geometrie temp0 ne 0 et grand depl ? ---
'SI'  WTAB.'RECALCUL'  ;
    WTAB . 'RECARI'   = VRAI ;
    WTAB . 'RECADET'  = VRAI ;
    WTAB . 'REA_GEOM' = VRAI ;
*   on suppose que l'on est sur la bonne configuration
    GEOM1 = 'FORM';
*  'FORM'  GEOM1;
'SINON';
    GEOM1 = WTAB.'FOR0' ;
    WTAB . 'RECARI'  = FAUX ;
    WTAB . 'RECADET' = FAUX ;
'FINS';

'SI' ('OU' ('OU' IENDOM  IVIDOM) ICERAM);
     WTAB.'RECARI'= VRAI;
     LAG_TOT=0;
'FINS';

'SI' IRAUG;
   RIG_AUG  = WTAB.'RIGIDITE_AUGMENTEE';
'FINS';

'SI' IRCON;
   RIG_CONS = WTAB.'RIGIDITE_CONSTANTE';
   MAI_CONS ='EXTR' RIG_CONS 'MAIL'    ;
'FINS';
*
WTAB.'POST_COFR' = 'TABL' ;
*
*---------- chamelem etat estime pour la fin du pas de temps ------
 ZETAT2 = PAS_ETAT PRECED TI    ;
 ZMAT22 = PAS_MATE PRECED ZETAT2;
 ZMATFI = ZMAT22                ;

*----------------------- nouveau chargement ----------------------
'SI' ('EXIS' (WTAB.'CHARGEMENT') 'MECA');
      ZFEXT2 = 'TIRE' WTAB.'CHARGEMENT' 'MECA' TI;
      TYP_2  = 'TYPE' ZFEXT2;
      'SI' ('NEG' TYP_2 'CHPOINT ');
 'MESS' '*** Erreur dans la definition du chargement ( MECA ) ***';
 'ERRE' '*** Le type du champ n est pas CHPOINT ***';
      'FINS';
'SINON';
    ZFEXT2= 'VIDE' 'CHPOINT' / 'DISCRET';
'FINS';

'SI' ('EXIS' (WTAB.'CHARGEMENT') 'FORC');
      F2_FOR = 'TIRE' WTAB.'CHARGEMENT' 'FORC' TI;
       TYP_2 = 'TYPE' F2_FOR;
       'SI' ('NEG' TYP_2 'CHPOINT ');
 'MESS' '*** Erreur dans la definition du chargement ( FORC ) ***';
 'ERRE' '*** Le type du champ n est pas CHPOINT ***';
      'FINS';
       ZFEXT2 = ZFEXT2 '+' F2_FOR ;
'FINS';

'SI' (LOGPRE 'ET' ('NON' IGRD)) ;
   MOP   = WTAB.'MOD_PRE' ;
   ZPEXT ='TIRE' WTAB.'CHARGEMENT' 'PRES' TI ;
  'SI' ('EXIS' WTAB 'MAT_PRE') ;
     ZFPEXT = 'BSIG' MOP ZPEXT ('REDU' ZMATFI MOP) ;
  'SINON' ;
     ZFPEXT = 'BSIG' MOP ZPEXT ;
  'FINS' ;
   ZFEXT2 = ZFEXT2 '+' ZFPEXT ;
'FINS' ;


*--------------- Si il existe des deplacements imposes --------------
         'SI' ('EXIS' (WTAB.'CHARGEMENT') 'DIMP');
             F2_DEP = 'TIRE' WTAB.'CHARGEMENT' 'DIMP' TI;
             ZFEXT2 = ZFEXT2 + F2_DEP;
         'FINS';
*--------------- Si il un increment de deplacements imposes -----------------
         'SI' ('EXIS' (WTAB.'CHARGEMENT') 'DINC');
             F2_INC = 'TIRE' WTAB.'CHARGEMENT' 'DINC' TI;
*              list f2_inc;
             F2_mail = extr f2_inc maillage;
             zclim_mail = zclim extrai 'MAILLAGE';
             F2_Mcmp = zclim_mail elem appu larg f2_mail;
             zclim_inc = zclim redu f2_mcmp;

             f2_base = (zclim_inc * conti.'DEPLACEMENTS') exco 'FLX' 'NOID' 'FLX';
*              list  f2_base;
             ZFEXT2 = ZFEXT2 + F2_INC + F2_base; ;
         'FINS';
*---------------- si chargement deformation actualisation DEFOR ------
         'SI' WTAB.'CHAR_DEFI' ;
             WTAB.'DEFOR2' = 'TIRE' WTAB.'CHARGEMENT' 'DEFI' TI;
         'FINS';

*---------- dynamique : preparation du second membre --------------
         'SI' ( WTAB.'DYNAMIQUE' ) ;
            'SI'  ('EGA' WTAB.'FREA1' 'INCONNU');
               'SI' ('EXIS' WTAB.'CHARGEMENT' 'MECA');
                   F1 = 'TIRE' WTAB.'CHARGEMENT' 'MECA' TEMP0;
               'FINS';
               'SI' ('EXIS' WTAB.'CHARGEMENT' 'FORC');
                  F1F = 'TIRE' WTAB.'CHARGEMENT' 'FORC' TEMP0;
                'SI' ('EGA' ('TYPE' F1) 'CHPOINT ') ;
                  F1 = F1 + F1F ;
                'SINON';
                  F1 = F1F ;
                'FINS' ;
               'FINS';

               'SI' WTAB.'PROCEDURE_CHARMECA';
                  TFF1 = CHARMECA PRECED TEMPS0 ;
                 'SI' ('EXIS' TFF1 'ADDI_SECOND');
                    FF1=TFF1 .'ADDI_SECOND';
                 'FINS';
                 'SI' ('EGA' ('TYPE' F1) 'CHPOINT ');
                    F1=F1 + FF1;
                 'SINON';
                    F1 = FF1;
                 'FINS';
               'FINS';

               'SI' LOGPRE ;
                 MOP = WTAB.'MOD_PRE' ;
                 ZPEXT0 = 'TIRE' WTAB.'CHARGEMENT' 'PRES' TEMPS0 ;
                 'SI' ('EXIS' WTAB 'MAT_PRE') ;
                   FF1 = 'BSIG' MOP ZPEXT0 ('REDU' WTAB.'MAT1' MOP) ;
                 'SINON' ;
                   FF1 = 'BSIG' MOP ZPEXT0 ;
                 'FINS' ;
                 'SI' ('EGA' ('TYPE' F1) 'CHPOINT ');
                   F1=F1 + FF1;
                 'SINON';
                   F1 = FF1;
                 'FINS';
               'FINS';
*
*HHO : Modifications appel a BSIGMA (ajout du champ de deplacements necessaire en HHO)
                 LAF0 = 'BSIG' WTAB.'MO_TOT' conti.'CONTRAINTES' ZMAT22 conti.'DEPLACEMENTS' ;
               'SI'  IRCON  ;
                  LAF0 = LAF0 'ET'
                  ('REDU' MAI_CONS (RIG_CONS '*' conti.'DEPLACEMENTS'));
               'FINS';
               'SI' (('EXIS' WTAB.'CHARGEMENT' 'MECA') 'OU'
                    ('EXIS' WTAB.'CHARGEMENT' 'FORC') 'OU'
                   wtab.'PROCEDURE_CHARMECA');
                  LAF1  = F1  - LAF0 ;
               'SINON';
                  LAF1 = -1 * LAF0;
               'FINS';
               LAF2 = 'ENLEVER' (ZCLIM0 '*' conti.'DEPLACEMENTS') 'FLX';
* forces exterieures + reactions - forces interieures au debut du calcul
* c.a.d. (masse*acceleration initiale)+(amortissement*vitesse initiale)
                WTAB.'FREA1' = LAF1 - LAF2 ;
            'FINS';
            'SI' wtab.'LIAISON_PERSISTANTE' ;
*  forces d'acceleration au debut du pas
              'SI' ('NEG' WTAB.'AMORTISSEMENT' 'INCONNU');
                 FF4 = WTAB.'AMORTISSEMENT'* conti.'VITESSES';
                 WTAB.'FMAN'= WTAB.'FREA1' - FF4 ;
              'SINON' ;
                 WTAB.'FMAN'= WTAB.'FREA1' ;
              'FINS';
            'FINS';
*------------  il faut calculer la matrice de masse tout de suite -------------
            'SI' ( ('NON' ('EXIS' WTAB MASSE )) 'OU'
                               WTAB.'GRANDS_DEPLACEMENTS');
                WTAB.'MASSE' = 'MASS' WTAB.'MO_TOT' ('CHAN' 'MASSE'
                         ZMAT22 WTAB.'MO_TOT' ) ;
               'SI' WTAB.'MASSCONST';
                  WTAB.'MASSE'=WTAB.'MASSE' 'ET' WTAB.'MASSE_CONSTANTE';
               'FINS';
            'FINS';
            FF = WTAB.'MASSE' *conti.'VITESSES';
            FF4 = 4. / DT * FF; 'DETR' FF;
* partie du second membre qui ne depend que des informations du pas prec
            WTAB.'FREA1' = FF4 + WTAB.'FREA1';
         'FINS';
*--------- consolidation  : preparation du second membre ---------
          'SI' WTAB.'CONSOLIDATION' ;
            FF  = 'BSIG'  WTAB.'MOD_POR' conti.'CONTRAINTES' ;
            FF4 = 'EXCO'  WTAB.'MOT_POR' FF
                    WTAB.'MOT_POR' 'NOID' 'NATURE' 'DISCRET' ;
            'SI' WTAB.'DYNAMIQUE';
                WTAB.'FREA1' = WTAB.'FREA1' +   FF4   ;
            'SINON';
                 WTAB.'FREA1' =  FF4   ;
            'FINS';
             ZFEXT2 = ZFEXT2 '+' FF4  ;  'DETR' FF ;
*           ---- traitement des flux si besoin ----
            'SI' ( 'EXIS' WTAB.'CHARGEMENT' 'FLUX' ) ;
               FLUXT0= 'TIRE' WTAB.'CHARGEMENT' 'FLUX' TEMPS0;
               FLUXTI= 'TIRE' WTAB.'CHARGEMENT' 'FLUX' TI  ;
               FACFLU =  -1. * WTAB.'DT';
               FLUXT =   ( FACFLU * (1 - WTAB.'TETA') * FLUXT0 )
                       + ( FACFLU * WTAB.'TETA' *FLUXTI ) ;
               ZFEXT2 = ZFEXT2 '+' FLUXT ;
              'DETR' FLUXT ; 'DETR' FLUXT0; 'DETR' FLUXTI;
           'FINS' ;
        'FINS';

*----------------- calcul de la masse si frequentiel -------------
        'SI' ( WTAB.'FREQUENTIEL' 'ET' ('NON' ('EXIS' WTAB 'MASSE' )));
             WTAB.'MASSE' = 'MASS' WTAB.'MO_TOT'('CHAN' 'MASSE'
                         ZMAT22 WTAB.'MO_TOT' ) ;
        'FINS';

*----------------- pilotage indirect : preparation --------------
        'SI' (LOGPIL);
             ZFPILIN = WTAB.'FORCES_PILOTEES' 'ET' WTAB.'DEPLACEMENTS_PILOTES' ;
                         DTAU = ('IPOL' WTAB.'PARAMETRE_DE_PILOTAGE' TI) -
                                ('IPOL' WTAB.'PARAMETRE_DE_PILOTAGE' TEMPS0) ;
             ETA0 = 'EXTR' PRECED.'COEFFICIENT_DE_PILOTAGE'
                             ('DIME' PRECED.'COEFFICIENT_DE_PILOTAGE') ;
             D_ETA=0.;
        'FINS' ;

*-      Second membre
        ZFCONSTA = ZFEXT2 ;
        ZFLXB = 'EXCO' ZFEXT2 'FLX' 'NOID' 'FLX' ;


************************************************************************
*             Parallélisation du GIBIANE via les ASSISTANTS            *
************************************************************************
NBPART = WTAB.'NBPART'     ;

'SI' (WTAB.'FOR_MECA') ;
  ZMODLI = WTAB.'MO_TOT'     ;
  ZMODLP = WTAB.'MO_TOT_PREC';
PARALLEL = FAUX ;
PARTLOCA = FAUX ;
ZMODL  = ZMODLI ;
*  PERF-RAID : la matrice de Hooke passee a EPSI n'est lue que par
*  l'element de coque DST (sources epsi1.eso et epsi3.eso : IMAT = 2 ne
*  sert que pour MELE = 93). Pour tout modele sans element de coque, elle
*  est ignoree : on evite alors un HOOK par iteration. Le test est mis en
*  cache pour le modele courant ; il se desactive de lui-meme des qu'un
*  element de coque est present.
'SI' IPERFRD ;
  IMASREU = FAUX ;
  'SI' ('EXIS' WTAB 'HOOK_MOD') ;
    'SI' ('EGA' ZMODLI (WTAB . 'HOOK_MOD')) ;
      IMASREU = VRAI ;
    'FINSI' ;
  'FINSI' ;
  'SI' ('NON' IMASREU) ;
    WTAB . 'HOOK_MOD' = ZMODLI ;
    WTAB . 'HOOK_INUTILE' = VRAI ;
    'SI' ('EXISTE' ZMODLI 'ELEM' 'DST' 'DSQ' 'DKT' 'DKQ' 'COQ2' 'COQ3'
          'COQ4' 'COQ8') ;
      WTAB . 'HOOK_INUTILE' = FAUX ;
    'FINSI' ;
  'FINSI' ;
  IHKSKIP = WTAB . 'HOOK_INUTILE' ;
'FINSI' ;
*  jacobien du modele pour ponderer les champs de act3
CH1 = 'MANU' 'CHML' zmodl  'SCAL' 1. 'GRAVITE';
zjac= 'INTG' 'ELEM' CH1 zmodl;
zjac = zjac zmodl 'CHANGER' 'CHPO' 'SOMM' + xpetit;
zjac = zjac '**' -0.5;

'SI' ('EGA' WTAB.'PROCESSEURS' 'COMPORTEMENT') ;
  PARALLEL = VRAI ;
  PARTLOCA = VRAI ;
  MODRELOC = 'PART' 'ARLE' ZMODLI NBPART ;
'FINS' ;
'SI' ('EGA' WTAB.'PROCESSEURS' 'AUTOMATIQUE') ;
  PARALLEL = VRAI ;
  PARTLOCA = FAUX ;
  ZMODL = 'PART' 'ARLE' ZMODLI NBPART ;
  'OPTI' 'PARA' VRAI ;
'FINS' ;

* Test sur un MODELE qui aurait changé
'SI' ('NEG' ZMODLI ZMODLP)                                   ;
   CONTI.'CONTRAINTES' =('REDU' CONTI. 'CONTRAINTES' ZMODLI) '+' ('ZERO' ZMODLI 'CONTRAINTES') ;
   ESTIM.'CONTRAINTES' =('REDU' ESTIM. 'CONTRAINTES' ZMODLI) '+' ('ZERO' ZMODLI 'CONTRAINTES') ;
   CONTI.'DEFORMATIONS'=('REDU' CONTI.'DEFORMATIONS' ZMODLI) '+' ('ZERO' ZMODLI 'DEFORMAT'   ) ;
   ESTIM.'DEFORMATIONS'=('REDU' ESTIM.'DEFORMATIONS' ZMODLI) '+' ('ZERO' ZMODLI 'DEFORMAT'   ) ;
  'SI' IPLAVI ;
     CONTI.'DEFORMATIONS_INELASTIQUES'=('REDU' CONTI.'DEFORMATIONS_INELASTIQUES' ZMODLI) '+' ('ZERO' ZMODLI 'DEFINELA') ;
     ESTIM.'DEFORMATIONS_INELASTIQUES'=('REDU' ESTIM.'DEFORMATIONS_INELASTIQUES' ZMODLI) '+' ('ZERO' ZMODLI 'DEFINELA') ;
     CONTI.'VARIABLES_INTERNES'       =('REDU' CONTI.'VARIABLES_INTERNES'        ZMODLI) '+' ('ZERO' ZMODLI 'VARINTER') ;
     ESTIM.'VARIABLES_INTERNES'       =('REDU' ESTIM.'VARIABLES_INTERNES'        ZMODLI) '+' ('ZERO' ZMODLI 'VARINTER') ;
  'FINS';

   WTAB.'ETAT1' = PAS_ETAT PRECED TEMPS0      ;
   WTAB.'MAT1'  = PAS_MATE PRECED WTAB.'ETAT1';

  'SI' ITHER ;
     WTAB.'ETHER1'    =('REDU' WTAB.'ETHER1'   ZMODLI) '+' ('ZERO' ZMODLI 'DEFORMAT') ;
    'SI' POR1;
       WTAB.'MSRTHER1'=('REDU' WTAB.'MSRTHER1' ZMODLI) '+' ('ZERO' ZMODLI 'DEFORMAT') ;
    'FINS';
  'FINS';

  'SI' ('EXIS' WTAB 'DEFOR1' );
     WTAB.'DEFOR1' =
                   ('REDU'  WTAB.'DEFOR1' ZMODLI) '+'
                   ('ZERO' ZMODLI 'DEFORMAT'    ) ;
  'FINS';

  'SI' ('EXIS' WTAB 'DEFOR2' );
     WTAB.'DEFOR2' =
                   ('REDU'  WTAB.'DEFOR2' ZMODLI) '+'
                   ('ZERO' ZMODLI 'DEFORMAT'    ) ;
  'FINS';
'FINS';
* FOR_MECA
'FINSI';

*-----------materiau au debut du pas ------------------------------
ZMAT11 = WTAB.'MAT1'        ;
'SI' ('EGA' WTAB.'PROCESSEURS' 'AUTOMATIQUE') ;
   ZMAT1 ='REDU' ZMAT11 ZMODL ; COMM 'REDU au cas ou le modele est parallele';
'SINO';
   ZMAT1 = ZMAT11;
'FINS';
 ZMAT1I  = ZMAT1; COMM 'Version Initiale de ZMAT1 pour BONOCONV';


************************************************************************
*                       Quelques initialisations                       *
************************************************************************
STAB12             = 'TABL'                    ;
'SI' (WTAB.'FOR_MECA') ;
STAB12.'ZU1'       =  CONTI.'DEPLACEMENTS'     ;
STAB12.'SIGF'      =  CONTI.'CONTRAINTES'      ;
STAB12.'DEFF'      =  CONTI.'DEFORMATIONS'     ;
STAB12.'FNONL'     =  WTAB.'FNONL'             ;
STAB12.'RESIDU'    =  WTAB.'RESIDU'            ;
STAB12.'XDENO'     =  WTAB.'XDENO'             ;
STAB12.'XDENOM'    =  WTAB.'XDENOM'            ;
* XDENOo  = WTAB.'XDENO';
* XDENOMo = WTAB.'XDENOM';
'SI' ( 'EXIS' WTAB 'ETAT1' );
  STAB12.'ETAT1'   = WTAB.'ETAT1';
'FINS';
STAB12.'ETAT2'= ZETAT2;
'SI' ('EXIS' WTAB 'DEFOR1' );
  STAB12.'DEFOR1'  = WTAB.'DEFOR1'  ;
  STAB12.'DEFOR2'  = WTAB.'DEFOR2'  ;
'FINS';
'SI' ( 'EXIS' WTAB 'FNONL');
  STAB12.'FNONL'   = WTAB.'FNONL'   ;
'FINS';
'SI' ('EXIS' WTAB  'TET1') ;
  STAB12.'TET1'    = WTAB.'TET1'    ;
  STAB12.'TET2'    = WTAB.'TET2'    ;
'FINS';
* STAB12.'SUCCES' = VRAI ;
'SI' ('NEG' WTAB.'AUTOCOEF' 'INCONNU') ;
  STAB12.'AUTOCOEF' = WTAB.'AUTOCOEF' ;
'FINS' ;
'SI' ('NEG' WTAB.'AUTOREDU' 'INCONNU') ;
  STAB12.'AUTOREDU' = WTAB.'AUTOREDU' ;
'FINS' ;
'SI' ('NEG' WTAB.'SECOND_MEMBRE' 'INCONNU') ;
  STAB12.'SECOND_MEMBRE' = WTAB.'SECOND_MEMBRE' ;
'FINS' ;
'SI' ('NEG' WTAB.'LASTKTAN' 'INCONNU') ;
  STAB12.'LASTKTAN' = WTAB.'LASTKTAN' ;
'FINS' ;
'SI' ('NEG' WTAB.'AUTORED1' 'INCONNU') ;
  STAB12.'AUTORED1' = WTAB.'AUTORED1' ;
'FINS' ;
'SI' ('NEG' WTAB.'LISEA_M' 'INCONNU') ;
  STAB12.'LISEA_M' = WTAB.'LISEA_M' ;
  STAB12.'RIBLO_M' = WTAB.'RIBLO_M' ;
'FINS' ;
'SI' ('NEG' WTAB.'INCREMENT' 'INCONNU' );
  STAB12.'INCREMENT' = WTAB.'INCREMENT';
  INCRPREC = STAB12.'INCREMENT'        ;
'FINS';
STAB12.'FFROT'    = WTAB.'FFROT'    ;
STAB12.'INITEMPS' = WTAB.'INITEMPS' ;
STAB12.'DT'       = WTAB.'DT'       ;
STAB12.'DTPREC'   = WTAB.'DTPREC'   ;

** Recuperation des champs de temperature debut (TETA1) et fin de pas (TETA2)
'SI'  ITHER  ;
* Si les maillages mecanique/thermique sont differents,
* on projette le champ de temperature sur le modele mecanique
  'SI' WTAB.'PROJECTION';
    'SI' igrd ;
      for1 = 'FORM' ;
      'FORM' (WTAB . 'FOR0') ;
    'FINSI' ;
    'SI' ('EGA' ('TYPE' (WTAB . 'TET1')) 'CHPOINT') ;
      STAB12.'TETA1' = 'PROI' ('EXTR' ZMODL 'MAILLAGE') ('CHAN' 'CHAM' (WTAB . 'TET1') (WTAB . 'MOD_THE') 'NOEUD') ;
      STAB12.'TETA2' = 'PROI' ('EXTR' ZMODL 'MAILLAGE') ('CHAN' 'CHAM' (WTAB . 'TET2') (WTAB . 'MOD_THE') 'NOEUD') ;
    'SINON' ;
      STAB12.'TETA1' = 'PROI' ('EXTR' ZMODL 'MAILLAGE') (WTAB . 'TET1') ;
      STAB12.'TETA2' = 'PROI' ('EXTR' ZMODL 'MAILLAGE') (WTAB . 'TET2') ;
    'FINSI' ;
    'SI' igrd ;
      'FORM' for1 ;
    'FINSI' ;
* Sinon, on vient seulement recuperer les champs de temperature
  'SINON' ;
    STAB12.'TETA1'  = WTAB.'TET1';
    STAB12.'TETA2'  = WTAB.'TET2';
  'FINSI' ;
  ETT0 ='REDU' WTAB.'ETHER1' ZMODL;     'COMM' 'REDU au cas ou le modele soit parallele';
  'SI' POR1;
    MSRTT0='REDU' WTAB.'MSRTHER1' ZMODL; 'COMM' 'REDU au cas ou le modele soit parallele';
  'FINS';
'SINON' ;
   che3 ='MANU' 'CHML' ZMODL 'T' 20. 'STRESSES' ;
   che4 ='MANU' 'CHML' ZMODL 'T' 20. 'STRESSES' ;
'FINS' ;

ZMATI   ='REDU' ZMAT22 ZMODLI ;
ZMAT    ='REDU' ZMATI  ZMODL  ;

* SP : initialisation DFGRAD en presence d'un modele MECANIQUE
*      (DFGRAD mis a INCONNU par defaut dans PAS_INIT)
'SI' ('NEG' WTAB.'MOD_MEC' 'INCONNU') ;
  'SI' (('NEG' WTAB.'DFGRAD' 'INCONNU') 'ET' IGRD) ;
    geot = 'FORM' ; 'FORM' WTAB.'FOR0' ;
    STAB12.'DFGRAD' ='GRAD' ZMODL ZMAT STAB12.'ZU1' ;
    'FORM' geot ;
**'SINO';
**  STAB12.'DFGRAD' ='REDU' WTAB.'DFGRAD' ZMODL;
  'FINS' ;
'SINON' ;
  STAB12.'DFGRAD' = WTAB.'DFGRAD' ;
'FINS' ;

com_sig  = 'EXTR' ZMODLI  'CONT';
HPP_EPS  =  FAUX                ;
EPS_EPS  = 'TEXT' '        '    ;
* FOR_MECA
'FINSI' ;
* Option a n'utiliser que par les utilisateurs avertis
'SI' ('EXIS' PRECED 'ACCELERATION') ;
  III = PRECED.'ACCELERATION' ;
  'SI' ('EGA' ('TYPE' III) 'ENTIER') ; ZNACCE = III ; 'FINS' ;
'FINS' ;
* Matrice tangente : non utilisee si IPLAVI a FAUX
IKTAN  = IKTAN 'ET' IPLAVI ;
'SI' (WTAB.'K_TANGENT' 'ET' ('NON' IPLAVI)) ;
  'MESS' 'IPLAVI faux : pas de matrice tangente ->'
         ' on utilise la rigidite elastique' ;
'FINS' ;
* Matrice tangente par perturbation :
* Option non disponible si non local ou si IPLAVI a FAUX
IPERT = WTAB.'K_TANGENT_PERT' 'ET' ('NON' LNLOC) 'ET' IPLAVI ;
ZPERC1 = WTAB.'K_TANG_PERT_C1' ;  ZPERC2 = WTAB.'K_TANG_PERT_C2' ;
* Matrice tangente : partie symetrique utilisee
'SI' WTAB.'K_TANGENT_SYME' ;
  ZKTASYM = 'MOT' 'SYME' ;
'SINON' ;
  ZKTASYM = 'TEXTE' '    ' ;
'FINS';
* Matrice tangente : pas d'acceleration en cas de modele FEFP ou SSTE
'SI' IKTAN ;
  'SI' (IFEFP 'OU' ISSTE) ; ZNACCE = FAUX; 'FINS';
'FINS' ;
*
'SI' IFTOL ;
    ZFTOL = 'ABS' WTAB.'FTOL' ;
'FINS';
'SI'  IMTOL  ;
    ZMTOL = 'ABS' WTAB.'MTOL' ;
'FINS';
ITCAR = FAUX ;
'SI' WTAB.'FOR_MECA' ;
ITCAR = ( 'EXIS' ZMATI  'EPAI') 'OU' ('EXIS' ZMATI 'INRY') 'OU'
        ( 'EXIS' ZMATI  'MODS') 'OU'
       (( 'EXIS' ZMODLI 'ELEM' 'JOI1') 'ET' ('EXIS' ZMATI 'V1X ')
                                       'ET' ('EXIS' ZMATI 'V1Y '))  ;
*
* CB215821 : Devrait t-on mutualiser ITCAR et WTAB.ITCAR? ==>
*            Ce ne sont pas tout a fait les memes tests aujourd'hui
'SI' (ITCAR 'EGA' FAUX);
   ZMAT2 = ZMATI ;
   ZMAT2R= ZMAT  ;
'FINS';
*FOR_MECA
'FINSI' ;

'SI' WTAB.'ITCAR';
  'SI' ('EGA' WTAB.'CARA' ('MOT' 'INCONNU'));
     WTAB.'CARA' = ZMAT11 ;
  'FINS';
   CARA1 = ZMAT1;
'FINS';

'SI' ('OU' ('OU' IVISCO IVIDOM) IVIEXT);  ZPREK = 5.E-7 ;  'FINS';
'SI' IENDOM;                              ZPREK = ZPREC ;  'FINS';

* on fait ici la séparation poreux .. pour l'avoir sur
*les modèles partitionnes
'SI' POR1;
    MO_PORI = 'EXTR' ZMODLI 'FORM' 'POREUX';
    MO_POR  = 'EXTR' ZMODL  'FORM' 'POREUX';

    MA_POR  = 'REDU' ZMAT22 MO_POR      ;
** kich ma_por0 intervient si ISOL
** initialement     MA_POR0= 'REDU' MO_POR (STAB12.'MAT1');
    MA_POR0 = 'REDU' ZMAT11 MO_POR      ;

    MAI_POR = 'EXTR' MO_POR  'MAILLAGE' ;
    MAI_PORI= 'EXTR' MO_PORI 'MAILLAGE' ;
'FINS';

* recuperation de certains champs, si nbpart>1 zmodl est partitionné
* sinon c'est le modele initial
*                                                                      *
'SI' WTAB.'FOR_MECA'  ;
DEFT0        = 'REDU' conti.'DEFORMATIONS' ZMODL              ;
ZSIGF        = 'REDU' STAB12.'SIGF' ZMODL                     ;
'FINSI'               ;
'SI' IPLAVI ;
     ZDEIF   = 'REDU' CONTI.'DEFORMATIONS_INELASTIQUES' ZMODL ;
     ZVARF   = 'REDU' CONTI.'VARIABLES_INTERNES'        ZMODL ;
     com_var = 'EXTR' ZMODLI 'VARI' ;
     com_dei = 'EXTR' ZMODLI 'DEIN' ;
     lnom    =  com_var             ;
    'SI' ISOL  ;
       com_maa = 'EXTR' ZMODLI 'MATE' ;
    'FINS' ;
'FINS' ;
*
*   teste t'on les moments  ?
TSTMOM = ITCAR 'OU' ('EGA' ('VALE' 'MODE') 'PLANGENE') ;
*   teste t'on les POREUX   ?
'SI' POR1  ; TSTMOM=VRAI ; 'FINS';
*
IKLFFF=VRAI;
'SI'TSTMOM;    'SI' IFTOL;     'SI' IMTOL;
       IKLFFF=FAUX;
'FINS';        'FINS';        'FINS';
*
'SI'('NON' TSTMOM);
    'SI' IFTOL;
       IKLFFF=FAUX;
    'FINS';
'FINS';
*
GEOREF0  = WTAB.'FOR0' ;
WTAB.'CONV'=VRAI;
ISOUSPPP=0;
'SI' ('EXIS' wtab 'ISOUSPAS'); ISOUSPPP = wtab.'ISOUSPAS'; 'SINON'; isousppp=0; 'FINSI';
WTAB . 'ISOUSPAS' = 0;
NSOUSPAS = WTAB . 'MAXSOUSPAS';
ZCCONV = VRAI ;
KNOCONV = 0 ;

* Initialisation CHArgement SANS T :
CHASANST= WTAB.'CHARGEMENT' 'ENLE' 'T' ;

RED_URG = 0;
   residc = 'VIDE' 'CHPOINT' / 'DISCRET';
'SI' autaug; iraug = faux; 'FINSI';
************************************************************************
****** boucle de non convergence
************************************************************************
* isoucomp : Indicateur SOUci dans COMPortement, FAUX par defaut
isoucomp = faux ;
resmul = 1;
    augmult = 0.30000000;
     RFNS  = 'VIDE' 'RIGIDITE' / 'RIGIDITE' ;
     RTRSF = 'VIDE' 'RIGIDITE' / 'RIGIDITE' ;
     NONCONV = FAUX;
'REPETER'  BONOCONV NSOUSPAS ;
 excfconv = 0;
'SI' ('EGA' RED_URG 0);
 'SI' ((XCONV < ZPREC) 'ET' (DEPSTDM < ZPREC) 'ET' (resmul > 0.99) 'ET' (AUGMULT < 100.));
    augmult = 0.30000000;
*pv resmul = 1;
    augauto = augmult;
    augk    = augmult;
    'SI' autaug ; iraug = faux; 'FINSI';
    znacce=VRAI;
  'SI' (IFEFP 'OU' ISSTE) ; ZNACCE = FAUX; 'FINS';
 'SINON';
    augmult = augmult / 1.5;
    si (augmult < 1d-2); augmult = 1d-2; finsi;
 'FINSI';
'SINON';
   augmult = augmult * 1.5;
 'SI' autaug;   IRAUG = VRAI; 'FINSI';
'FINSI';
***   wtab.'RECARI' = vrai;

'SI' WTAB.'FOR_MECA' ;
  KNOCONV       = KNOCONV+1                 ;
  STAB12.'CONV' = FAUX                      ;
  DT_INIT       = STAB12.'DT'               ;
  DTINI         = STAB12.'DT'               ;

  ZSIG0         = ZSIGF                     ;
  zsig0_1       = zsig0;
 'SI' IPLAVI ;
    ZEPS0 =  ZDEIF                          ;
    ZVAR0 =  ZVARF                          ;
 'FINS';

  ZU1           = STAB12.'ZU1'   ;
  ZDETOT = 'ENLE' ZU1 'LX';
 GR_U_DEB = 'MOT' 'INCONNU';
 'SI' ('EXIS' STAB12 'DFGRAD' );
  GR_U_DEB      = STAB12.'DFGRAD';
 'FINSI';
  'SI'  ITHER  ;
     TETA1 = STAB12.'TETA1' ;
     TETA2 = STAB12.'TETA2' ;
     DTETD = TETA2 '-' TETA1;
  'FINS' ;

* materiau au debut du pas en cas de non convergence etat1=etat2
  'SI' (knoconv > 1) ;
     ZMAT1 = 'REDU' (PAS_MATE PRECED STAB12.'ETAT1') ZMODL ;
  'SINON';
     ZMAT1 = ZMAT1I ;
  'FINS' ;
*------ caracteristiques initiales en cas de grands deplacements ------
  'SI' WTAB.'ITCAR';
     MECAR1 = 'EXCO'  MOCA  ZMAT1  'NOID'            ;
     MECAR2 = 'EXCO'  MOCA  CARA1  'NOID'            ;
     MECAR1 = 'CHAN' 'TYPE' MECAR1 'CARACTERISTIQUES';
     MECAR2 = 'CHAN' 'TYPE' MECAR2 'CARACTERISTIQUES';
     ZMAT1  =  ZMAT1 '-' MECAR1 '+' MECAR2           ;
  'FINS';

*----------- Calcul du champ de materiau a la fin du pas ------------
  'SI' (knoconv '>' 1) ;
     MCHC = PAS_ETAT PRECED TI  ;
     MMMM = PAS_MATE PRECED MCHC;
*    PERF-RAID : etat ayant servi a evaluer le materiau
     ETATRI = MCHC ;
  'SINON' ;
     MMMM = ZMAT22              ;
     ETATRI = ZETAT2 ;
  'FINS' ;
   MMMM = 'REDU' MMMM ZMODL;

*----- Caracteristiques initiales en cas de grands deplacements -----
  'SI' WTAB.'ITCAR';
     MECAR1 = 'EXCO'  MOCA  MMMM   'NOID'            ;
     MECAR2 = 'EXCO'  MOCA  CARA1  'NOID'            ;
     MECAR1 = 'CHAN' 'TYPE' MECAR1 'CARACTERISTIQUES';
     MECAR2 = 'CHAN' 'TYPE' MECAR2 'CARACTERISTIQUES';
     MMMM = MMMM '-' MECAR1 '+' MECAR2               ;
*   (fdp) on reporte les variations du materiau sur le pas
*    dans les autres instances du champ materiau
*   (ZMAT et ZMATI semblent suffirent)
     MECAR1 = 'EXCO'  MOCA  ZMAT  'NOID'             ;
     MECAR2 = 'EXCO'  MOCA  MMMM  'NOID'             ;
     MECAR1 = 'CHAN' 'TYPE' MECAR1 'CARACTERISTIQUES';
     MECAR2 = 'CHAN' 'TYPE' MECAR2 'CARACTERISTIQUES';
     ZMAT   =  ZMAT  '-' MECAR1 '+' MECAR2           ;
     ZMATI  = 'REDU' ZMAT ZMODLI                     ;
  'FINS';

* FOR_MECA
'FINSI' ;
*------------ Calcul de la rigidite a la fin du pas ----------------
'SI' WTAB.'FOR_MECA' ;
*  Test ci-dessous est inutile, WTAB.'BLOCAGES_MECANIQUES' et ZCLIM0
*  correspondent aux memes rigidites ... (cf. ligne 117)
   AA1 ='EXTR' WTAB.'BLOCAGES_MECANIQUES' 'MAIL'     ;
   AA2 ='EXTR' ZCLIM0 'MAIL' ;
   AA3 ='DIFF' AA1 AA2       ;
   AA4 = NBNO  AA3           ;
*  PERF-RAID : reutilisation de la raideur deja factorisee.
*  A geometrie et blocages fixes, la raideur d'iteration ne depend que
*   - du champ de caracteristiques MMMM (parametres externes : T, ...) ;
*   - pour les lois a endommagement (ENDOMMAGEMENT, VISCODOMMAGE), de la
*     raideur elastique endommagee RIGI(ZMODL,HOOK(ZMODL,MMMM,ZVAR0),MMMM),
*     comparee par sa diagonale.
*  Elle est donc conservee tant que ces champs sont inchanges depuis son
*  calcul. Comme elle n'est qu'une matrice d'iteration, la solution est
*  imposee par le residu. Exclus : grands deplacements, FEFP, charges
*  suiveuses, PICA (LAG_TOT), ceramique, rigidite augmentee (y compris
*  automatique), blocages
*  variables (BLOM). Reglages : indices PASAPAS 'PERF_RAID' (interrupteur
*  general), 'TOLERANCE_RAIDEUR' (materiau, relatif, defaut 1E-12, < 0 :
*  desactive), 'TOLERANCE_RAIDEUR_ENDO' (diagonale endommagee, relatif, defaut
*  0 : matrice strictement identique, < 0 : desactive).
  'SI' ('NON' ('EXIS' WTAB 'TOL_RAIDEUR_MAT')) ;
    WTAB . 'TOL_RAIDEUR_MAT' = 1.E-12 ;
  'FINSI' ;
  'SI' ('NON' ('EXIS' WTAB 'TOL_RAIDEUR_ENDO')) ;
    WTAB . 'TOL_RAIDEUR_ENDO' = 0. ;
  'FINSI' ;
  'SI' ('NON' ('EXIS' WTAB 'NB_RAIDEUR_REUT')) ;
    WTAB . 'NB_RAIDEUR_REUT' = 0 ;
  'FINSI' ;
  IRIGREU = FAUX ;
*  raideur candidate construite pour une comparaison : reprise telle quelle
*  par la reconstruction si la comparaison echoue (pas de calcul en double)
  IRHCAN = FAUX ;
  'SI' (IPERFRD 'ET' WTAB . 'RECARI' 'ET' ('EXIS' WTAB 'RRRR_MAT')) ;
    IEXCREU = WTAB . 'GRANDS_DEPLACEMENTS' 'OU' WTAB . 'FEFP_FORMULATION' ;
    'SI' ('NON' (WTAB . 'PERF_STRUCT')) ;
      IEXCREU = IEXCREU 'OU' ITCAR ;
    'FINSI' ;
    IEXCREU = IEXCREU 'OU' (LAG_TOT 'EGA' 1) ;
    IEXCREU = IEXCREU 'OU' ICERAM ;
    IEXCREU = IEXCREU 'OU' IRAUG ;
    IEXCREU = IEXCREU 'OU' AUTAUG ;
    IEXCREU = IEXCREU 'OU' WTAB . 'CHAR_BLOM' ;
    'SI' ('NON' IEXCREU) ;
      IRIGREU = VRAI ;
*     -- materiau : meme objet renvoye par PAS_MATE (cache), sinon
*        comparaison des parametres externes (WTAB . 'LDEVA')
      'SI' ('NON' ('EGA' MMMM (WTAB . 'MAT_RRRR'))) ;
        'SI' WTAB . 'MATVAR' ;
          'SI' (WTAB . 'TOL_RAIDEUR_MAT' '<' 0.) ;
            IRIGREU = FAUX ;
          'SINON' ;
            NDEVTOT = 0 ;
            'SI' ('EGA' ('TYPE' (WTAB . 'LDEVA')) 'LISTMOTS') ;
              NDEVTOT = 'DIME' (WTAB . 'LDEVA') ;
            'FINSI' ;
            LCOREU = 'EXTR' ETATRI 'COMP' ;
            LCOREF = 'EXTR' WTAB . 'ETAT_RRRR' 'COMP' ;
            NDEVREU = 0 ;
            'SI' (NDEVTOT '>' 0) ;
            'REPETER' BDEVREU NDEVTOT ;
              NOMREU = 'EXTR' WTAB . 'LDEVA' &BDEVREU ;
              'SI' (('EXISTE' LCOREU NOMREU) 'ET'
                    ('EXISTE' LCOREF NOMREU)) ;
                NDEVREU = NDEVREU + 1 ;
                CH1REU = 'EXCO' ETATRI NOMREU ;
                CH2REU = 'EXCO' WTAB . 'ETAT_RRRR' NOMREU ;
                XDETREU = 'MAXI' 'ABS' (CH1REU '-' CH2REU) ;
                XREFREU = 'MAXI' 'ABS' CH2REU ;
                'SI' (XREFREU '<' 1.) ;
                  XREFREU = 1. ;
                'FINSI' ;
                'SI' (XDETREU '>'
                      (WTAB . 'TOL_RAIDEUR_MAT' '*' XREFREU)) ;
                  IRIGREU = FAUX ;
                  'QUITTER' BDEVREU ;
                'FINSI' ;
              'FINSI' ;
            'FIN' BDEVREU ;
            'FINSI' ;
*           aucune composante comparable : prudence, on recalcule
            'SI' ('EGA' NDEVREU 0) ;
              IRIGREU = FAUX ;
            'FINSI' ;
          'FINSI' ;
        'SINON' ;
*         materiau modifie sans parametre externe declare : on recalcule
          IRIGREU = FAUX ;
        'FINSI' ;
      'FINSI' ;
*     -- lois a endommagement : comparaison de la diagonale de la raideur
*        elastique endommagee reconstruite avec l'etat courant (la
*        matrice de Hooke n'est pas comparable par MAXI : composante
*        MAHO de type matrice). Cout : un HOOK et un RIGI par pas.
      'SI' (IRIGREU 'ET' ('OU' IENDOM IVIDOM)) ;
        'SI' (WTAB . 'TOL_RAIDEUR_ENDO' '<' 0.) ;
          IRIGREU = FAUX ;
        'SINON' ;
          'SI' ('EXIS' WTAB 'DIAG_RRRR') ;
            HKNREU = 'HOOK' ZMODL MMMM ZVAR0 ;
            RHCAN = 'RIGI' ZMODL HKNREU MMMM ;
            'DETR' HKNREU ;
            DGCAN = 'EXTR' RHCAN 'DIAG' ;
            IRHCAN = VRAI ;
            XDVAREU = 'MAXI' 'ABS' (DGCAN '-' (WTAB . 'DIAG_RRRR')) ;
            XRVAREU = 'MAXI' 'ABS' (WTAB . 'DIAG_RRRR') ;
            'SI' (XRVAREU '<' 1.E-300) ;
              XRVAREU = 1. ;
            'FINSI' ;
            'SI' (XDVAREU '>'
                  (WTAB . 'TOL_RAIDEUR_ENDO' '*' XRVAREU)) ;
              IRIGREU = FAUX ;
            'FINSI' ;
          'SINON' ;
            IRIGREU = FAUX ;
          'FINSI' ;
        'FINSI' ;
      'FINSI' ;
*     -- reutilisation approchee (indice PASAPAS 'PERF_RAID_NIVEAU' = 2 ou
*        'TOLERANCE_RAIDEUR_DIAG' > 0) : quelle que soit la cause du
*        changement (T, endommagement, ...), la raideur est conservee si
*        la diagonale de la raideur elastique reconstruite avec les
*        caracteristiques et l'etat courants ne differe de celle de la
*        raideur factorisee que de moins de la tolerance (relative).
      'SI' ('NON' IRIGREU) ;
        'SI' ((WTAB . 'TOL_RAIDEUR_DIAG' '>' 0.) 'ET'
              (KNOCONV '<EG' 1) 'ET' ('EXIS' WTAB 'DIAG_RRRR')) ;
          'SI' ('NON' IRHCAN) ;
            'SI' ('OU' IENDOM IVIDOM) ;
              HKNREU = 'HOOK' ZMODL MMMM ZVAR0 ;
              RHCAN = 'RIGI' ZMODL HKNREU MMMM ;
              'DETR' HKNREU ;
            'SINON' ;
              RHCAN = 'RIGI' ZMODL MMMM ;
            'FINSI' ;
            DGCAN = 'EXTR' RHCAN 'DIAG' ;
            IRHCAN = VRAI ;
          'FINSI' ;
          XDVAREU = 'MAXI' 'ABS' (DGCAN '-' (WTAB . 'DIAG_RRRR')) ;
          XRVAREU = 'MAXI' 'ABS' (WTAB . 'DIAG_RRRR') ;
          'SI' (XRVAREU '<' 1.E-300) ;
            XRVAREU = 1. ;
          'FINSI' ;
          'SI' (XDVAREU '<EG'
                (WTAB . 'TOL_RAIDEUR_DIAG' '*' XRVAREU)) ;
            IRIGREU = VRAI ;
          'FINSI' ;
        'FINSI' ;
      'FINSI' ;
*     -- apres une non-convergence (sous-pas), une raideur approchee est
*        toujours reconstruite exactement
      IAPREU = (WTAB . 'TOL_RAIDEUR_DIAG' '>' 0.) 'OU'
               (WTAB . 'TOL_RAIDEUR_ENDO' '>' 0.) 'OU'
               (WTAB . 'TOL_RAIDEUR_MAT' '>' 1.E-9) ;
      'SI' (IAPREU 'ET' (KNOCONV '>' 1)) ;
        IRIGREU = FAUX ;
      'FINSI' ;
      'SI' IRIGREU ;
        WTAB . 'RRRR' = WTAB . 'RRRR_MAT' ;
        WTAB . 'NB_RAIDEUR_REUT' = WTAB . 'NB_RAIDEUR_REUT' + 1 ;
        'SI' IRHCAN ;
          'DETR' RHCAN ;
          IRHCAN = FAUX ;
        'FINSI' ;
      'FINSI' ;
    'FINSI' ;
  'FINSI' ;
  'SI' ( ((WTAB.'RECARI' 'ET' ('NON' IRIGREU)) 'OU' IRAUG ) 'OU'
         ('NON' ('EXIS' WTAB 'RRRR')    ) 'OU' ('NEG' AA4 0));
    WTAB . 'NB_RAIDEUR_CALC' = WTAB . 'NB_RAIDEUR_CALC' + 1 ;
    'SI' IRHCAN ;
*     PERF-RAID : raideur candidate deja construite avec MMMM et ZVAR0
*     (memes donnees que ci-dessous) lors de la comparaison
      RH = RHCAN ;
    'SINON' ;
    'SI' ('OU' IENDOM  IVIDOM ICERAM);
       HOOKENDO ='HOOK' ZMODL MMMM     ZVAR0;
       RH       ='RIGI' ZMODL HOOKENDO MMMM ;
      'DETR' HOOKENDO;
    'SINON';
       'SI' ((LAG_TOT 'EGA' 1) 'ET' vrai);
          'FORM' GEOREF0;
          HOOKRH = 'HOOK' ZMODL MMMM;
          HOOKRH2 = 'PICA' HYPDEF HOOKRH ZMODL ZU1;
          'FORM' GEOM1;
          RH = 'RIGI' HOOKRH2 ZMODL MMMM;
          'DETRUI' HOOKRH;
          'DETRUI' HOOKRH2;
       'SINON';
          RH  = 'RIGI' ZMODL MMMM ;
       'FINSI';
    'FINS';
    'FINSI' ;
*   RH peut contenir des CL
    ZCL = 'EXTR' RH 'RIGI' 'MULT' ;
    'SI' ('NEG' ('DIME' ZCL) 0) ;
      ZCLIM = ZCLIM0 'ET' ZCL ;
    'FINSI' ;
    RRRR = RH 'ET' ZCLIM0 ;
*   Prise en compte d'eventuelles RIGIDITE_CONSTANTE
    'SI' IRCON;
      RRRR = RRRR 'ET' RIG_CONS;
    'FINS';
*
    ZRAIDNA = RRRR;
    'SI' (IRAUG 'ET' ('NON' AUTAUG));
      RRRR = RRRR 'ET' RIG_AUG  ;
    'FINSI';
*
    'SI' (AUTAUG 'ET' ('NON' IRAUGLU));
       RIG_AUG  = 'MASSE' ZMODL MMMM ;
***    mess 'actualisation rig_aug';
    'FINSI';
    'SI' (AUTAUG 'ET' IRAUG);
*  recalcul masse pour l'augmentation
      RRRR = RRRR 'ET' (RIG_AUG * augauto) 'ET' (RH   * augk) ;
    'FINS';
    'SI' ('NON' IRAUG);
*  recalcul masse pour l'augmentation
      'SI' IRAUGLU;
***     'MESS' ' augmentation residuelle ';
        RRRR = RRRR 'ET' RIG_AUG ;
    'FINS';
    'FINSI';

    'SI' ('EGA' ('DIME' ZCL) 0) ;
*   Stockage de la rigidite pour eviter de la recalculer
    WTAB.'RRRR'=RRRR;
*   PERF-RAID : copie conservee d'un pas a l'autre (PASAPAS detruit
*   WTAB . 'RRRR' en fin de pas quand RECARI est vrai) avec le materiau,
*   l'etat et la diagonale de la raideur qui ont servi a la construire
      'SI' (IPERFRD 'ET' (WTAB . 'MATVAR' 'OU' IENDOM 'OU' IVIDOM)) ;
        WTAB . 'RRRR_MAT' = RRRR ;
        WTAB . 'ETAT_RRRR' = ETATRI ;
        WTAB . 'MAT_RRRR' = MMMM ;
        'SI' ((('OU' IENDOM IVIDOM) 'ET'
               (WTAB . 'TOL_RAIDEUR_ENDO' '>EG' 0.)) 'OU'
              (WTAB . 'TOL_RAIDEUR_DIAG' '>' 0.)) ;
          WTAB . 'DIAG_RRRR' = 'EXTR' RH 'DIAG' ;
        'FINSI' ;
      'FINSI' ;
    'FINSI';
*
  'SINON';
     RRRR=WTAB.'RRRR';
  'FINS';
  ZRAID=RRRR;

*FOR_MECA
'FINSI' ;

'SI' WTAB.'NVSTNL'                                        ;
   'SI' ('NON' ('EXISTE' WTAB 'RNSL'))                    ;
      RINSL = 'RIGI' WTAB.'MOD_NSL' WTAB.'MAT_NSL'        ;
      ndiv = 'RIGI' 'DIVE' WTAB.'MOD_NSL' WTAB.'MAT_NSL'  ;
      nmass = 'MASSE' WTAB.'MOD_NSL' WTAB.'MAT_NSL'       ;
      WTAB.'RNSL' = RINSL 'ET' ZCLIM0 'ET' ndiv 'ET' nmass;
   'FINSI'                                                ;
'FINSI'                                                   ;
*------------ consolidation ou dynamique faut-il recalculer l'operateur?
* -----: preparation du pas de temps ------------
    'SI' ( WTAB.'CONSOLIDATION' 'OU' WTAB.'DYNAMIQUE');
       DT = TI '-' TEMP0;
      'SI' ( '>' (DELTAN '*' 0.9999) DT) ;
         WTAB . 'RECAOP' = VRAI;
      'FINS';
      'SI' ( '<' (DELTAN '*' 1.0001) DT) ;
         WTAB . 'RECAOP' = VRAI;
      'FINS';
      'SI' WTAB.'MATVAR';
         WTAB . 'RECAOP' = VRAI;
      'FINS';
       DELTAN=WTAB.'DT';
    'FINS';
*---------------------- Formation de l operateur -----------------------
     'SI' ( WTAB.'DYNAMIQUE' 'OU' WTAB.'CONSOLIDATION');
       'SI' ('NEG' WTAB.'OPERATEUR' 'INCONNU');
          ZRAID = WTAB.'OPERATEUR';
         'SI' (WTAB . 'RECAOP') ;
            ZRAID = RRRR ;
         'FINS';
       'FINS';
     'FINS';

*------------ operateur frequentiel -----------------------
*------------ operateur amortissement en frequentiel
     'SI' WTAB.'FREQUENTIEL' ;
        RRR2 = 'AMOR'  ZMODL ZMAT ;
        RR2  = 'CHAN' 'INCO' RRR2
              ('MOTS' 'ALFA' 'BETA') ('MOTS' 'IALF' 'IBET')
              ('MOTS' 'FALF' 'FBET') ('MOTS' 'FALF' 'FBET') 'QUEL' ;
        RR3  = 'CHAN' 'INCO' RRR2
              ('MOTS' 'ALFA' 'BETA') ('MOTS' 'ALFA' 'BETA')
              ('MOTS' 'FALF' 'FBET') ('MOTS' 'IFAL' 'IFBE') 'QUEL' ;
        RRR2 = RR2 'ET' RR3 ;

        RR1  = ZRAID ;
        OMEGI= 2.* PI * TI ;
        RRR1 = OMEGI * OMEGI * (-1.) * WTAB.'MASSE' ;
        RR1  = ZRAID 'ET' RRR1 ;
        RR4  = 'CHAN' 'INCO' (RR1 '*' (-1.D0))
              ('MOTS' 'ALFA' 'BETA') ('MOTS' 'IALF' 'IBET')
              ('MOTS' 'FALF' 'FBET') ('MOTS' 'IFAL' 'IFBE') 'QUEL';
        ZRAID= RR1   'ET' RR4  ;
        RR5  = OMEGI '*'  RRR2 ;
        ZRAID= ZRAID 'ET' RR5  ;
     'FINS' ;

*--------------- et la perméabilité  ----------------------------------
     'SI' (WTAB.'CONSOLIDATION') ;
       'SI' (WTAB.'GRANDS_DEPLACEMENTS' 'OU' WTAB.'MATVAR') ;
          WTAB .'PERMEABILITE'= 'PERM' WTAB.'MOD_POR' MMMM ;
          WTAB .'RECAOP'      =  VRAI                      ;
       'FINS';
     'FINS';

*------------- Cas de la consolidation ou de la dynamique -------------
*------------- il faut recalculer l'operateur d'iteration -------------
     'SI' (WTAB . 'RECAOP') ;
       'SI' ( WTAB.'DYNAMIQUE');
          ZRAID =  4.D0 '/'( DT ** 2) '*' WTAB.'MASSE'     'ET' ZRAID;
         'SI' ('NEG' WTAB.'AMORTISSEMENT' 'INCONNU');
            ZRAID = WTAB.'AMORTISSEMENT' '*' (2.D0 '/' DT) 'ET' ZRAID;
         'FINS';
       'FINS' ;

       'SI' ( WTAB.'CONSOLIDATION');
          ZRAID =-1.* DT* WTAB.'TETA'* WTAB.'PERMEABILITE' 'ET' ZRAID ;
       'FINS' ;
        WTAB . 'OPERATEUR'= ZRAID ;
        WTAB . 'RECAOP'   = FAUX  ;
     'FINS';
     ZRAIDNA = ZRAID;


*-------------- traitement des contacts frottements automatiques -------
   'SI' WTAB.'FOR_MECA'                    ;
      CDEP    = STAB12.'ZU1'               ;
      CDEPSLX ='ENLE' CDEP 'LX'            ;

      BFCONT  = FAUX                       ;
      BCLIM2  = FAUX                       ;
     'SI' WTAB.'CONTACT';
        MODCON= WTAB.'MODCONTA';
       'SI' ('EXIS' WTAB 'MATCONTA') ;
          WTAB.'MATCONTA'= 'REDU' MODCON WTAB.'MATCONTA';
**       list resu wtab.'MATCONTA';
          CJEU CRR      ='RFCO' MODCON  WTAB.'CONV' WTAB.'MATCONTA' ;
       'SINON' ;
          CJEU CRR      ='RFCO' MODCON  WTAB.'CONV'                ;
       'FINS';

*
       'SI' ('NEG' 0 CJEU) ;
         FADHE = 'EXCO' CJEU 'FADH' 'NOID' 'FADH' ;
         CDAP  = 'EXCO' CJEU 'FLX'  'NOID' 'FLX' ;
       'FINSI' ;

       'SI' (WTAB . 'MODAL') ;
          CRR  = 'PJBA' CRR   ZMODL  MMMM  ;
          MCRR = 'EXTR' CRR  'MAIL' 'MULT' ;
          MCDAP= 'EXTR' CDAP 'MAIL'        ;
         'REPETER' BCDA ('NBNO' MCDAP) ;
            PBCDA ='POIN' MCDAP &BCDA ;
            PCRR  ='POIN' MCRR  &BCDA ;
            CHCR  ='MANU' 'CHPO' PCRR 1 'FLX' ('EXTR' CDAP 'FLX' PBCDA)
                   'NATURE' 'DISCRETE' ;
           'SI' ('EGA' 1 &BCDA) ;
              CCDA = CHCR ;
           'SINON' ;
              CCDA = CHCR 'ET' CCDA ;
           'FINS' ;
         'FIN' BCDA ;
          CDAP = CCDA ;
       'FINS' ;

*       ATTENTION : mettre les conditions de frottement en premier pour
*                   les numeroter en dernier
        ZCLIM2 = 'VIDE' 'RIGIDITE' / 'RIGIDITE';
        ZFCONT  ='VIDE' 'CHPOINT' / 'DISCRET';
       'SI'  ('NEG' CRR 0);
          BCLIM2 = VRAI                ;
          BFCONT = VRAI                ;
          ZCLIM2 = CRR    'ET' ZCLIM2  ;
          CCOR   = CRR    '*'  CDEPSLX 'EXCO' 'FLX' 'NOID' 'FLX';
          ZFCONT = ZFCONT '+'  CCOR    ;
       'FINS';

       'SI' ( 'NEG' 0 CJEU);
          BFCONT = VRAI                ;
          ZFCONT = ZFCONT '+'  CDAP    ;
       'FINS';

*
*      Mise a jour de ZCLIM et ZFCONSTA si necessaire
       'SI' BCLIM2;
         ZCLIM  = ZCLIM2 'ET' ZCLIM ;
         ZRAID  = ZCLIM2 'ET' ZRAID;
       'FINS';
*
       'SI' BFCONT;
         ZFCONSTA = ZFEXT2 '+' ZFCONT ;
       'FINS';
     'FINS';
*
      ZFCONST1 = ZFCONSTA;
      zclimp = zclim;


* ---------------  pilotage automatique ********************************
     ISNPB = FAUX ;
     AL1 = 1. ;COEPI = 1.d0; COEINC=0.d0;COEPI0=1.d0;DAL1=100.D0;
     CORPREC = 1. ;
*    CORPREC = 10.;
     'SI' (('EGA' ipredic  'HPP') 'ET' WTAB.'CONV');
          EPS_EPS = 'TEXTE' 'LINEAIRE';
          HPP_EPS = VRAI;
     'FINS';
*
     'SI' IPILOT ;
          'SI' ( WTAB.'AUTODEUX' ) ;
                COEPI = 'ABS' ( STAB12.'AUTOCOEF');
                COEPI = COEPI / (1.-COEPI);
                'SI' (COEPI > 1.D0) ; COEPI=1.D0;'FINS';
                COEPI0=COEPI;STAB12.'AUTOCOEF'=COEPI;
           'SINON';
                STAB12.'AUTOCOEF' = 1.D0;
           'FINS' ;
           RED1 = 1. ;
           RED2 = 0 ;
           'SI' ('NEG' WTAB.'AUTORED1' 'INCONNU') ;
                'SI' (STAB12.'AUTORED1' > 0);
                     STAB12.'AUTORED1' = STAB12.'AUTORED1' - 1;
                     'SI' (STAB12.'AUTORED1' 'EGA' 0) ;
                           COEPI = 3 *  COEPI ;
                           STAB12.'AUTOREDU' = STAB12.'AUTOREDU' / 3.;
                           'SI' (STAB12.'AUTOREDU' > 1.1 );
*                      on travaille encore avec un critere reduit
                                STAB12.'AUTORED1' = 4 ;
                                RED1 = 3. ;
                           'FINS';
                     'MESS' 'On multiplie le critere de pilotage par 3';
                     'FINS';
                'FINS';
           'FINS';
           'SI' (COEPI > 1d0);
                 RED1 = RED1 / COEPI ;COEPI =1d0;
           'FINS';
           'SI' ( 'NEG' WTAB.'NBPLAS' 'INCONNU') ;
                 'SI' ( WTAB.'NBPLAS' 'EGA' 0) ;
                    'SI' (COEPI < 0.) ;COEPI = COEPI * -2.;'FINS';
                 'FINS';
           'FINS';
           COEPI = 'ABS' COEPI ;
           COEPI0 = COEPI;
*    sans pilotage
     'SINON';
           STAB12.'AUTOCOEF'= 1.D0;
     'FINS';

*FOR_MECA
   'FINSI' ;
************************************************************************
*-------------    quelques initialisations  pour la boucle ETIQ ********
************************************************************************
     URG    = FAUX; RED_URG = 0 ; IT = 0 ; ITACC = 0;
     ZICONV = VRAI; MMC     = 0 ; MMCMAX = 0 ; EPSM = 0.; DPSMAX = xpetit; dpsmaxp = dpsmax;
     DEPSTDM  = 0. ;  DEKREAC1 = 0. ;XCONVNOR = 0. ; ITNORM1  = 0 ;
     DEPSTREF = 100. * (WTAB . 'MAXDEFOR') ;
     DITNORM1 = 0  ;NBCYCLE1 = 0  ;
   'SI' WTAB.'FOR_MECA'                                ;
     ZDEPL='EXCO' conti.'DEPLACEMENTS' 'LX' 'NOID' 'LX';
     zdept = zu1 - (zu1 'ENLE' 'LX')                   ;
   'FINSI'                                             ;
     zdeptq = zdept; zdeptp = zdept;
     GR_U_K   = GR_U_DEB ;
     zprecnc=1e-5;  FDEF = 0. ; ITNV = -5 ;
     TABCONV = 'TABL';
     'SI' IFEFPUL;
        XUPDA = 1;
     'FINS';
     XDENDEF = 0 ; FDENDEF = 0. ;

*********** Corrections en cas de materiaux variables ****************************
      DEPST0=0 ;
     'SI' WTAB.'MATVAR' ;
       'SI' ('OU'  IENDOM IVIDOM ICERAM);
          XXX3 ='ELAS' ZMODL ZSIG0 ZMAT  ZVAR0;
          XXX4 ='ELAS' ZMODL ZSIG0 ZMAT1 ZVAR0;
       'SINON';
          XXX3 ='ELAS' ZMODL ZSIG0 ZMAT       ;
          XXX4 ='ELAS' ZMODL ZSIG0 ZMAT1      ;
       'FINS';
        DDEF0 = XXX4 - XXX3;
**      XDENDEF = -1.*XXX4 ;
       'DETR' XXX3;
       'DETR' XXX4;
        DEPST0=-1.* DDEF0;
     'FINS';

***** En cas de chargement thermiques *********************************
      DMSRT0=0;
     'SI' ITHER ;
       'SI' (WTAB.'MATVAR' 'ET' IPILOT);
         'MESS' 'Le pilotage n est pas possible avec un materiau qui depend de la temperature' ;
         'ERREUR' 19 ;
       'FINS';

       'SI' ('EGA' ('TYPE' TETA2) 'CHPOINT');
          MCHTETA2 ='CHAN' 'CHAM' TETA2 ZMODL 'STRESSES' 'TEMPERATURES' ;
       'SINON';
          MCHTETA2 = TETA2;
       'FINS';
        ETREF= 'REDU' WTAB.'ETREF' ZMODL ; 'COMM' 'REDU au cas ou le modele soit parallele';
**      ETT  =('EPTH' ZMODL ZMAT MCHTETA2 ) - WTAB.'ETREF' ;
        ETT  =('EPTH' ZMODL ZMAT MCHTETA2 ) - ETREF ;
        DTT  =  ETT '-' ETT0 ;
        XDENDEF = XDENDEF '+' ETT ;

       'SI' WTAB.'POR1';
*------   Cas du milieu poreux avec chargement thermique ----------
*         cas isotrope seulement pour le moment
*         et on  ne s'occupe pas du alpha-reference !!
          MSRTT = PAS_EPTH PRECED ZMODL ZMAT MCHTETA2 ;
          DMSRT0= MSRTT '-' MSRTT0 ;
       'FINS' ;

        DEPST0 = DTT '+' DEPST0 ;
     'FINS';

*     calcul de DSIGT0 et FTHE en cas de chargement si necessaire ***********
      FTHE = 0 ;
     'SI' (DEPST0 'NEG' 0);
       'SI' ('OU'  IENDOM IVIDOM ICERAM);
          DSIGT0  = 'ELAS' ZMODL DEPST0  ZMAT ZVAR0;
          'SI' (XDENDEF 'NEG' 0) ;
            XDENDEF = 'ELAS' ZMODL XDENDEF ZMAT ZVAR0;
          'FINSI' ;
       'SINON';
          DSIGT0  = 'ELAS' ZMODL DEPST0  ZMAT      ;
          'SI' (XDENDEF 'NEG' 0) ;
            XDENDEF = 'ELAS' ZMODL XDENDEF ZMAT      ;
          'FINSI' ;
       'FINS' ;

       'SI' (DMSRT0 'NEG' 0);
          DSIGT0 = DSIGT0 '+' DMSRT0 ;
          XDENDEF = XDENDEF '+' MSRTT ;
       'FINS';
        FTHE ='BSIG' ZMODL DSIGT0 ZMAT conti.'DEPLACEMENTS' ;
        'SI' (XDENDEF 'NEG' 0) ;
          FDENDEF = 'BSIG' ZMODL XDENDEF ZMAT conti.'DEPLACEMENTS';
        'FINSI' ;
     'FINS';

*-------------- deformations imposes ==> contraintes imposees **********************************
     'SI' LOGDEF;
           DDEFOR0 ='REDU' (STAB12.'DEFOR2' - STAB12.'DEFOR1') ZMODL;
           XDENDEF = 'REDU' STAB12.'DEFOR2' ZMODL ;
          'SI' ('OU' IENDOM IVIDOM ICERAM);
             DSI1 = 'ELAS' ZMODL DDEFOR0 ZMAT ZVAR0;
             XDENDEF = 'ELAS' ZMODL XDENDEF ZMAT ZVAR0;
          'SINON';
             DSI1 = 'ELAS' ZMODL DDEFOR0 ZMAT      ;
             XDENDEF = 'ELAS' ZMODL XDENDEF ZMAT ;
          'FINS';
           FDEF = 'BSIG' ZMODL DSI1 ZMAT conti.'DEPLACEMENTS';
           FDENDEF = FDENDEF '+' ('BSIG' ZMODL XDENDEF ZMAT conti.'DEPLACEMENTS') ;
     'FINS';

*-------------- pression imposee et grands deplacements ?***************
     'SI' (LOGPRE 'ET' IGRD) ;
       MOP = WTAB.'MOD_PRE' ;
       ZPEXT0 = 'TIRE' WTAB.'CHARGEMENT' 'PRES' TEMPS0 ;
       ZPEXTF = 'TIRE' WTAB.'CHARGEMENT' 'PRES' TI     ;
*
       'SI' ('EXIS' WTAB 'MAT_PRE') ;
          ZFPEXT0 = 'BSIG' MOP ZPEXT0 ('REDU' ZMAT11 MOP) ;
          ZFPEXTF = 'BSIG' MOP ZPEXTF ('REDU' ZMAT22 MOP) ;
       'SINON' ;
          ZFPEXT0 = 'BSIG' MOP ZPEXT0 ;
          ZFPEXTF = 'BSIG' MOP ZPEXTF ;
       'FINS' ;
       ZFP0F = 'COPIER' ZFPEXTF ; COEFP=1.D0;
     'FINS';

* ---------  ktangent et fefp******************************************
     'SI' IKTAN ;
           'SI' IFEFP ;
                IKT_SAUV = VRAI ;
                'SI' ('NEG' WTAB.'LASTKTAN' 'INCONNU') ;
                       'MESS' 'FEFP: Start with LASTKTAN' ;
                     ZRIKTA = STAB12.'LASTKTAN' ;
                     ZRAID = ZCLIM 'ET' ZRIKTA ;
                'SINON' ;
                     'MESS' 'FEFP: Previous KTAN not available' ;
                     ZRAID = ZRAID 'ET' ('KSIGMA' ZMODL ZSIG0 ZMAT) ;
                'FINS' ;
           'SINON' ;
                'SI' ('NEG' WTAB.'LASTKTAN' 'INCONNU') ;
                     IKT_SAUV = VRAI ;
                     'SI' IPERT ;
                         'MESS' 'Matrice tangente par perturbation - '
                         'Demarrage avec KTAN = LASTKTAN' ;
                     'SINON' ;
                         'MESS' 'Matrice tangente "coherente" - '
                         'Demarrage avec KTAN = LASTKTAN' ;
                     'FINS' ;
                      ZRIKTA = STAB12.'LASTKTAN' ;
                      ZRAID = ZCLIM 'ET' ZRIKTA ;
                'SINON' ;
                     'SI' IPERT ;
                          IKT_SAUV='NEG' WTAB.'K_TANGENT_ITER0'
                                   'MAT_ELASTIQUE';
                         'MESS' 'Matrice tangente par perturbation - '
                         'Demarrage avec KTAN = rigidite elastique' ;
                     'SINON' ;
               IKT_SAUV = ('NEG' WTAB.'K_TANGENT_ITER0' 'MAT_ELASTIQUE')
               'ET' ('NEG' WTAB.'K_TANGENT_ITER0' 'MAT_TANGENTE') ;
                         'SI' ('EGA' WTAB.'K_TANGENT_ITER0'
                              'MAT_ELASTIQUE') ;
                               'MESS' 'Matrice tangente "coherente" - '
                            'Demarrage avec KTAN = rigidite elastique' ;
                         'SINON' ;
                               'MESS' 'Matrice tangente "coherente" - '
                               'Demarrage avec KTAN (DTTAN = 0.)' ;
                               DTTAN = 0. ;
                               ZRIKTA = 'KTAN' ZMODL ZSIG0 ZVAR0 ZMAT
                                    'PREC' ZPREK 'DT  ' DTTAN ZKTASYM ;
                               ZRAID = ZCLIM 'ET' ZRIKTA ;
                         'FINS' ;
                     'FINS' ;
                'FINS' ;
           'FINS' ;
     'FINS' ;

*--------  en grands deplacements option K_SIGMA ***********************
*
* ksigma autorise en hpp_eps
     'SI' IGRD ;
       'SI' (IKSIA 'ET' ('NON' IFEFP)) ;
          KSI1    ='KSIGMA' ZMODL ZSIG0 ZMAT;
          ZRAIDINI= ZRAID           ;
          ZRAID   = ZRAID 'ET' KSI1 ;
       'FINS' ;
     'FINS' ;

* Y a-t-il des forces non conservatives ( forces suiveuses)? ***********
      ADDISEC0 = FAUX;
      ADDISEC2 = FAUX;
     'SI' WTAB.'PROCEDURE_CHARMECA';
*       on ajoute l indice ADDI_MATRICE pour signaler a charmeca qu on
*       souhaite aussi l operateur linearisé des Forces NL de charmeca
        PRECED . 'ADDI_MATRICE' = vrai;
        TFP22  = CHARMECA  PRECED   WTAB.'T_FINAL';
        PRECED . 'ADDI_MATRICE' = faux;
*   FP22 = F^suiv_n+1
         DMZPRES = 0.D0 ;
       'SI' ('EXIS' TFP22 'ADDI_SECOND') ;
          FP22    = TFP22.'ADDI_SECOND'  ;
          FP022   = 'COPIER' FP22        ;
          MZPRES  = 'MAXI' 'ABS' FP22    ;
          DMZPRES = MZPRES               ;
          ADDISEC2= VRAI                 ;
       'FINS';
       'SI' ('EXIS' TFP22 'ADDI_MATRICE');
          ZRAID = ZRAID 'ET' TFP22.'ADDI_MATRICE';
       'FINS';

*  FP0 = F^suiv_n
        TFP0 = CHARMECA  PRECED   TEMPS0 ;
       'SI'('EXIS' TFP0 'ADDI_SECOND')   ;
          FP0     = TFP0.'ADDI_SECOND'   ;
          MZPRES0 = 'MAXI' 'ABS' FP0     ;
          DMZPRES = DMZPRES '-' MZPRES0  ;
          ADDISEC0= VRAI                 ;
       'FINS';
*      'SI' ('EXIS' TFP0 'ADDI_MATRICE');
*         ZRAID = ZRAID 'ET' TFP0.'ADDI_MATRICE';
*      'FINS';
        COEFP   = 1.D0              ;
     'FINS';


* -----------calcul de la partie constante du second membre  **********
*                          en consolidation
*     ZFP1 est cense contenir : - B0*SIG0 et
*                                 DT*(1-TETA)*FI0 + DT*H*P
*
*     dans ZFCONSTA on met le second membre de u ***********************

*  en dynamique ********************************************************
* ZFP1 est cense contenir : F0 + 4/DT*M*V0 - B0*SIG0
     'SI' IDYN  ;
        UNSURH  = 1.D0 '/' STAB12.'DT'    ;
        ZFP1    = WTAB.'FREA1'            ;
        ZDYFEXT = ZFCONSTA 'ENLEVER' 'FLX';
        ZFCONSTA= ZFCONSTA '+' ZFP1       ;
     'FINS';
      ZFEXT     = ZFCONSTA 'ENLEVER' 'FLX';

*---------deplacement (ou jeu) e imposer e la fin du pas *************
* on separe les efforts ZFEXT (=F^ext_n+1)   ***************************
* et deplacement (ou jeu) ZFLX1 (u^imp_n+1) a imposer a la fin du pas
     ZFLX1 = 'EXCO' ZFCONSTA 'FLX' 'NOID' 'FLX' 'NATURE' 'DISCRET';
      IMPO12= FAUX;
      IMPO12U = FAUX;

  'SI' WTAB.'FOR_MECA' ;
     'SI' ('NEG' STAB12.'FFROT' 'INCONNU'); FFROT = STAB12.'FFROT';
     'SINON' ; FFROT=ZFEXT * 0; 'FINS';

*   calcul des forces externes deja equilibrees au debut du pas ********
*   par B*SIGMA : ZF1 = F^int_n = B*sigma_n + K^cst*u_n
*HHO : Modifications appel a BSIGMA (ajout du champ de deplacements necessaire en HHO)
     ZF1 = 'BSIG' ZMODL ZSIG0 ZMAT1 ZU1 ;
     'SI' IRCON;
           ZF1 = ZF1 '+' ('REDU' MAI_CONS (RIG_CONS '*' ZU1));
     'FINS';
     'SI'  IDYN  ;  FFDYN = 'COPIER' ZF1; 'FINS';
     'SI' ISOL ;
           GRAP0= 'GRAD' MO_POR ZU1 MA_POR0 'CONS' ;
           XXX1 = 'GRAD' MO_POR ZU1 MA_POR  'CONS' ;
           XXXS =((1.- WTAB. 'TETA' )*GRAP0)+ (WTAB. 'TETA' * XXX1);
           XXX2 = STAB12.'DT' * ('GNFL' MO_POR XXXS) ;
           XXX3 = ZF1  ;
           ZF1  = XXX3 - XXX2;'DETR' XXX3;
           'DETR' XXX2 ;
     'FINS';

* initialisation des variables forces et deplacement*******************
* zzd est le deplacement au pas precedent   (=u_n)  et ZLX=lambda_n
     ZZD ='ENLE' ZU1 'LX';
     ZLX = ZU1 'EXCO' 'LX' 'NOID' 'LX' 'NATURE' 'DIFFUS';
* ---------  flxini est la partie des FLX deja realisee au debut du pas
**pv     FLXINI= ZZD '*' ZCLIM;
* FREAP  : -1*reactions du pas precedent    (=F^reac_n) transportees sur les nou
**pv     FREAP = ZLX '*' ZCLIM;
    FZU1 = ZU1 '*' ZCLIM;
    FLXINI = FZU1 'EXCO' 'FLX' 'NOID' 'FLX' 'NATURE' 'DISCRET';
    FREAP  = FZU1 'ENLE' 'FLX';


     FEXT0 = ZF1 '+' FREAP;
* FEXT0 est le chargement externe (sans reactions vu par la
* structure le pas d'avant)   = F^ext_n = F^int_n - F^reac_n
*
*  on va calculer le premier residu c'est a dire le desequilibre *******
*  entre les forces externes et le calcul B*SIGMA.
*  le sigma qui sert est celui qui existerait si le champ de
*  deplacement ne changeait pas (ZU1). faire attention aux FLX
*  En pilotage on reprend ce residu que l'on multiplie par COEPI
*  XXX1 = [F^ext_n+1 ; Du^imp]
*  DFEXT0 = increment des forces et des FLX a imposer (le residu
*  du pas precedent) = [DF^ext ; Du^imp]
     XXX1   = ZFCONSTA '-' FLXINI ;
     DFEXT0 = XXX1     '-' FEXT0  ;

* si pression suiveuse dfext0 contient en plus l'increment des forces
* de pression du uniquement a la reactualisation de la geometrie (sans
* augmentation du module)
* mais comme F^int_n equilibre deja F^ext_n + F^suiv_n +... et qu'on est
* toujours sur config_n, on doit avoir : DFEXT0= [DF^ext ; Du^imp]
* avec DF^ext qui ne contient pas de forces suiveuses (...a vérifier)
    'SI' ADDISEC0;
       DFEXT0 = DFEXT0 '+' FP0     ;
    'FINS';
    'SI' (LOGPRE 'ET' IGRD) ;
       DFEXT0 = DFEXT0 '+' ZFPEXT0 ;
    'FINS' ;
     DFEXT0F = DFEXT0 'ENLEVER' 'FLX';
     DFEXT0L = DFEXT0 'EXCO' 'FLX' 'NOID' 'FLX';

*    DFEXT0 = [DFEXT0F ; DFEXT0L]
*           = [F^ext_n+1 - (F^int_n - F^reac_n - F^suiv_n) ; Du^imp]
*    RESIDU = forces exterieures sans reactions
*            (avec des termes supplementaires le cas echeant p.ex. en
*             dynamique ou en poreux) - forces interieures
*    et increment des relations imposees
*             ---> la resolution fournira dU et dR

*     RESIDU = [F^ext_n+1 + F^ther_n+1 + F^defi_n+1 - F^int_n ; Du^imp]
      RESIDU =  XXX1     '+'FTHE      '+'FDEF      '-'ZF1;
      ZDFINI ='COPIER' DFEXT0          ;
      ZFPLO  = ZF1 '-' FTHE '-' FDEF   ;
     'SI' (ITHER 'OU' WTAB.'MATVAR');
        ZDFINI=ZDFINI '+' FTHE;
     'FINS';
     'SI' LOGDEF;
        ZDFINI= ZDFINI '+' FDEF;
     'FINS';
     'SI' (LOGPRE 'ET' IGRD) ;
        RESIDU = RESIDU '+' ZFPEXTF ;
        ZDFINI = ZDFINI '+' ZFPEXTF '-' ZFPEXT0 ;
     'FINS';

     'SI' ADDISEC0 ;
        ZDFINI = ZDFINI '-' FP0 ;
     'FINS';

     'SI' ADDISEC2 ;
*       mess ' fp22 ' ; list resu fp22;
        RESIDU = RESIDU '+' FP22 ;
*       on tient compte de l'increment des forces suiveuses en direction
*       et en module
        ZDFINI = ZDFINI '+' FP22 ;
     'FINS';

* ici, on a :
* RESIDU = [F^ext_n+1 + F^ther_n+1 + F^defi_n+1 + F^suiv_n+1
*           - F^int_n  ;  Du^imp]
*        = [ DF^tot ; Du^imp]
* ZDFINI = [F^ext_n+1 + F^ther_n+1 + F^defi_n+1 + F^suiv_n+1
*           - (F^int_n - F^reac_n)  ;  Du^imp]
*
      XXX1  ='EXTR' ZCLIM 'MAIL' 'UNIL';
     'SI' (('NBEL' XXX1) '>' 0);
        IMPO12 = VRAI;
        IMPO12U = VRAI;
        DIMPO12='REDU' DFEXT0L XXX1 ;
        DIMPOV = DFEXT0L '-' DIMPO12;
     'FINS';
      stab12.'SECOND_MEMBRE' = RESIDU '*' 1.D0;

* FOR_MECA
  'FINSI' ;

  'SI' WTAB.'NVSTNL'                          ;
    ZVIFL = conti.'VITESSES_FLUIDE'           ;
    movifl = 'EXTR' WTAB.'MOD_NSL' 'DEPL'     ;
    UN = 'EXCO' ZVIFL movifl                  ;
    ch_un = 'MANU' 'CHML' WTAB.'MOD_NSL' 'ADVE' un 'TYPE' 'CARACTERISTIQUES';
    nugrad = 'ADVE' WTAB.'MOD_NSL' ch_un      ;
    ZRNSL = WTAB.'RNSL' 'ET' nugrad           ;

    fmass = nmass * un                        ;
    ftnsl  = ZFCONSTA 'ET' fmass              ;

    resnsl = ftnsl '-' (ZRNSL * ZVIFL)        ;

  'FINSI'                                     ;
************************************************************************
***               1ERE RESOLUTION                                    ***
************************************************************************
     FEXCI = 'VIDE' 'CHPOINT' / 'DISCRET' ;


     'SI' (WTAB.'ADHERENCE') ;
       'SI' ('EXIS' WTAB 'MAIL_BLOM') ;
         FADRE = 'REDU' FADHE WTAB.'MAIL_BLOM' ;
       'SINON' ;
         FADRE = FADHE ;
       'FINSI' ;
       FEXCI = FEXCI 'ET' FADRE ;
     'FINSI' ;
*
*

     'SI' LOGPIL ;
*    Modification du residu
        RESIDU = RESIDU 'ET' (ETA0 '*' ZFPILIN);
    'FINSI' ;
*  recalcul frottement
'SI' (WTAB.'CAFROTTE' 'ET' IMPO12);
    'SI' (WTAB.'FROCABL');
       zsigfT = 'REDU' zsigf ZMODLI;
       FFROT = 'EXCC' ZCLIM ZDEPT MODCON WTAB.'MATCONTA'  ZSIGFT;
       RTRSF = 'VIDE' 'RIGIDITE' / 'RIGIDITE' ;
       RFNS  = 'VIDE' 'RIGIDITE' / 'RIGIDITE' ;
       FEXCI = FEXCI '+' FFROT ;
     'FINSI';
    'SI' (WTAB.'FROCOUL');
        excfconv = excfconv + 1 ;
       RTRSF*'RIGIDITE' RFNS*'RIGIDITE'  FFROT = 'EXCF' ZCLIM (ZDEPT          ) MODCON WTAB.'MATCONTA'  excfconv;
       FEXCI = FEXCI '+' FFROT ;
       MFROT = 'EXTR' FFROT 'MAIL' ;
     'FINSI';
'FINS';


     'SI' ('EXIS' STAB12 'RIBLO_M' ) ;
         'SI' ((WTAB.'CAFROTTE' 'OU' WTAB.'ADHERENCE') 'ET' IMPO12);
            ZDEP1 BID BID BID BID = 'RESO' ZRAID 'SOUC' RESIDU 'INIB'
                                            STAB12.'RIBLO_M'
**                                           STAB12.'LISEA_M' FEXCI ;
                                            STAB12.'LISEA_M' FEXCI RFNS RTRSF ;
         'SINON';
            ZDEP1 BID BID BID     = 'RESO' ZRAID 'SOUC' RESIDU 'INIB'
                                            STAB12.'RIBLO_M'
                                            STAB12.'LISEA_M'      ;
         'FINS';
         'OUBLIER' STAB12 'RIBLO_M';
     'SINON';
         'SI' ((WTAB.'CAFROTTE' 'OU' WTAB.'ADHERENCE') 'ET' IMPO12U);
**               ZDEP1 = 'RESO' ZRAID 'SOUC' RESIDU FEXCI           ;
                 ZDEP1 = 'RESO' ZRAID 'SOUC' RESIDU FEXCI RFNS RTRSF          ;
         'SINON';
            'SI' WTAB.'NVSTNL' ;
               ZVIF1  = 'KRES' ZRNSL resnsl;
               ZVIFL = ZVIFL '+' ZVIF1;
            'FINSI' ;
            'SI' WTAB.'FOR_MECA';
               ZDEP1 = 'RESO' ZRAID 'SOUC' RESIDU;
            'FINSI' ;
         'FINS';
     'FINS';

     'SI' LOGPIL ;
       ZDEPII= 'RESO' ZRAID ZFPILIN ;
       ZDEPILO = 0. * ZDEPII ;
*    Calcul de D_eta par appel a la procedure PILOINDI
           D_ETA = PILOINDI PRECED ZU1  ZDEPILO ZDEP1 ZDEPII DTAU;
*    Mise à jour
           ZDEP1 = ZDEP1 '+' (D_ETA '*' ZDEPII) ;
       ETA = ETA0 ;
    'FINSI' ;


  'SI' WTAB.'FOR_MECA' ;
      ZRAID_T = 'EXTR' ZRAID 'CONT';

     'SI'  IDYN;
        STAB12.'ZRAIDV'= ZRAID;
     'FINS';

     'SI' ('EXIS' ZRAID_T 'NITER');
          STAB12.'RIBLO_M' = ZRAID_T. 7 ;
          STAB12.'LISEA_M' = ZRAID_T. 6 ;
     'FINS';
*  pour eventuel calcul de augauto
 zdep1d = zdep1 'ENLE' 'LX';
*  et initialisation zdepl (sert pour xnum)
 ZDEPL = 'EXCO' ZDEP1 'LX' 'NOID' 'LX' ;
* On sauve le deplacement initial pour la convergence forcee ***********
     'SI' ('EXIS' WTAB 'DEPI');
     'SINON';
     'FINS';
*FOR_MECA
  'FINSI' ;
*
*        calcul d'une norme pour la convergence**************************
*
      XXX1= ZFEXT;
     'SI' ADDISEC2;
       XXX1=ZFEXT + FP22;
     'FINS';
     'SI' (LOGPRE 'ET' IGRD) ;
       XXX1 = ZFEXT + ZFPEXTF ;
     'FINS';


     'SI' LOGPIL ;
*    Modification du chargement
        XXX1 = XXX1 '+' ((ETA '+' D_ETA) '*' ZFPILIN);
    'FINSI' ;

'SI' WTAB.'FOR_MECA' ;

     ZDEP1P50 = ZDEP1       ;
     XDENO='XTY' ZDEP1P50  ( XXX1 -( RESIDU  'EXCO'
        'FLX' 'NOID' 'FLX' 'NATURE' 'DISCRET')) MLPRIM MLDUAL;
     'SI' ('VERI' xdeno) ; 'SINON'; xdeno = 1; 'FINSI';
     MZDEP1M = 'MAXI' ZDEP1P50 'ABS' 'AVEC' MLDEPL;
     MZFM = 'MAXI' (FDENDEF + FTHE + FDEF + ZF1) 'ABS' 'AVEC' MLDUAL;
     XDENO1 = 'ABS' XDENO  + (MZFM * MZDEP1M);
     MZDEP1M = MZDEP1M + XPETIT;
     XDENO=XDENO1/MZDEP1M;
     XDENO = XDENO + MZFM;
     XDENO = 'MAXI' XDENO ('MAXI' XXX1 'ABS' 'AVEC' MLDUAL);
     'SI' (XDENO < XPETIT); XDENO = 1.; 'FINSI';
     XDENOM=XDENO;
     'SI' TSTMOM ;
        ZDEP1P50 = ZDEP1 + XPETIT;          ;
        XDENOM = XDENO1/('MAXI' ZDEP1P50 'ABS' 'AVEC' MLROTA);
     XDENOM = XDENOM + XPETIT       ;
     'FINS' ;
**  mess 'xdeno propose' ' ' xdeno ' xdeno precedent' ' ' xdenoo;
**     XDENO = MAXI XDENOo XDENO;
**     XDENOo = XDENO;
**     XDENOM = MAXI XDENOMo XDENOM;
**     XDENOMo = XDENOM;
     'SI' IPILOT ;
           'SI' ( WTAB.'AUTODEUX' ) ;
              XDENO = STAB12.'XDENO';
              XDENOM = STAB12.'XDENOM';
           'FINS';
     'FINS';
     'SI' ('NON' WTAB.'CONV');
*        'MESS' 'non convergence on garde xdeno xdenom ' xdeno xdenom;
            'SI' (XDENO < STAB12.'XDENO'); XDENO = STAB12.'XDENO'; 'FINSI';
            'SI' (XDENOM < STAB12.'XDENOM'); XDENOM = STAB12.'XDENOM'; 'FINSI';
     'FINS';

     IAFAIR=FAUX;
     'SI'  WTAB.'CONV';
     STAB12.'INCREMENT' = 'COPIER' ZDFINI ; 'FINS';
     RESIDNOR = 'COPIER' RESIDU ;
     'SI' IPILOT;
            XXX3=DFEXT0F * ( 1-COEPI) ;
            XXX2 = ZFEXT - XXX3;'DETR' XXX3;
           'DETR' ZFEXT; ;ZFEXT = XXX2;
            XXX1 = RESIDU * COEPI; 'DETR' RESIDU;
            XXX2 = 1.D0 -COEPI * FREAP;RESIDU = XXX1 + XXX2;
           'SI' IMPO12;
                RESIDU = 1.D0 - COEPI * DIMPO12 + RESIDU;
           'FINS';
           IAFAIR=VRAI;
     'FINS';
*
*  petite correction du residu pour esperer gagner du temps ************
*
     INIT = FAUX ;
     'SI'(('NEG' STAB12.'FNONL' 'INCONNU') 'ET'
           (WTAB.'INITIALISATION'));
        'SI' IPILOT;
              'SI' ( WTAB.'AUTODEUX' 'ET' (COEPI 'NEG' 1.D0)) ;
              'MESS' 'Initialisation a partir du pas precedent '  COEPI;
                    IAFAIR=VRAI; INIT = VRAI;
                     XXX1= RED1 * STAB12.'FNONL';
                     XXX2= XXX1 + RESIDU ;
                    'DETR' RESIDU ;'DETR' XXX1 ;RESIDU =XXX2;
               'FINS' ;
        'SINON';
* on fait la correction si le pas precedent a converge sans non convergence
            'SI' (WTAB.'CONV' 'ET' (ISOUSPPP 'EGA' 0));
* on fait la correction si le pas precedent etait non lineaire.
              'SI' (('MAXI' 'ABS' STAB12.'FNONL') > (ZPREC * XDENO)) ;
* on enleve le residu du pas precedent pour recuperer l'increment
* nominal du second membre e imposer f1.
* f2 et l'increment du second membre du pas precedent
                STAB12.'INCREMENT'=STAB12.'INCREMENT' - STAB12.'RESIDU';
                    zdeps = WTAB.'ZDEP1' + zdep1;
                    FFNO= 'XTY' STAB12.'FNONL' zdeps  MNDUAL MNPRIM;
                    F1 = STAB12.'INCREMENT' ;
                    F2 = INCRPREC ;
                    f12 = 'XTY' f1 zdeps MNDUAL MNPRIM;
                    f22 = 'XTY' f2 zdeps MNDUAL MNPRIM;
                    AMPL = f12/(f22 + XPETIT);
                    DTPREC=1E30; AMPLT = 0;
                    'SI' ('NEG' STAB12.'DTPREC' 'INCONNU');
                         DTPREC = STAB12.'DTPREC';
                         'SI' (DTPREC > XPETIT);
                             AMPLT=WTAB.'DT_INIT' /DTPREC;
                         'FINS';
                     'FINS';
*  Le chargement n'est il pas de fluage ou de thermique ?';
                    XDCOMP = ('XTY' ZDEP1 F1 MNPRIM MNDUAL) ;
                   'SI' (('ABS' XDCOMP) < (ZPREC * XDENO * mzdep1m)
                        'OU' (('ABS' FFNO) > (('ABS' F22) * 2.e2   )));
                        DTPREC = STAB12.'DTPREC';
                        AMPL=AMPLT;
* la decharge est-elle significative
                      'SI'((F12/(f22 + XPETIT)) < -0.05);ampl=0.;'FINS';
                        STAB12.'INITEMPS'=VRAI;LOGTEMP=FAUX;;
                        'MESS'
'Pas d increment de charge, initialisation calculee avec le temps';
                   'SINON';
                        AMPL = F12 / (F22 + XPETIT);
                        LOGTEMP=STAB12.'INITEMPS';
                        STAB12.'INITEMPS'=FAUX;
                   'FINS';
* changement de modele on n'initialise pas
                   'SI' ('NEG' ZMODLI ZMODLP);  AMPL = 0; 'FINSI';

                    AMPL = MINI (prog AMPL AMPLT);
                   'SI' ((AMPL > 0) 'ET' (AMPL < 2e1)) ;
      'MESS' 'Initialisation a partir de la solution precedente Coeff'
                         AMPL;
                         XXX1 = AMPL * STAB12.'FNONL';
                         XXX2 =RESIDU+ XXX1;
                         'DETR' XXX1;'DETR' RESIDU;
                         RESIDU = XXX2;
                         IAFAIR=VRAI; INIT = VRAI;
                   'FINS';
              'FINS';
            'FINS';
        'FINS';
     'FINS';
     WTAB.'ZDEP1'=zdep1;
*FOR_MECA
'FINSI' ;
*
*  initialisation en plastique *****************************************
*
     'SI' IPLAVI ;
          'SI' ('NEG' WTAB.'MOVA' 'RIEN') ;
                  ACC0 = 'EXCO' (WTAB.'MOVA') ZVAR0 ;
          'FINS' ;
     'FINS' ;
*
*    debut des iterations internes boucle etiquette ********************
*
     IKT =  FAUX ;
     IPREM =  VRAI ; RECA_K = FAUX; RECA_N = 0;
     ZITAC= 0 ;

     iafair = vrai                        ;
  'SI' WTAB.'FOR_MECA'                    ;
     DEPST  = 'ZERO' ZMODL 'DEFORMATIONS' ;
     DEPSTP = depst ;
*
*       initialisation acceleration de convergence ********************
*
     PASTEST = FAUX;
*     on peut mettre n'importe quoi c'est pour
*     ne pas faire de tests dans la boucle
     ACFP1  = 'COPIER' ZFEXT2 *0. ;
     ACFP2  = ACFP1 ;
     ZDEPLD = ACFP1 ;
     ACFP3  = ACFP1 ;
     ACFEP1 = ACFP1 ;
     ACFEP2 = ACFP1 ;
     FCORF  = 'COPIER' FREAP              ;
* initialisation du meilleur critere
     XCONVMIN = 1e20;
     DPSMREF  = 0  ;
     XCONV    = 0. ;
     XCONVP   = 1. ;
     NSOINCR  = 1  ;
     'SI' ('NEG' WTAB.'SOUS_INCREMENT'  'INCONNU') ;
         NSOINCR = WTAB.'SOUS_INCREMENT' ;
     'FINS';
     NONCONV = FAUX;
     CORREC=0;
     PASREINI=VRAI;
     coefmt=1.;
*
*   PERF-RAID niveau 3 : conditions du rafraichissement de la raideur en
*   cours de pas (modeles d'endommagement, petits deplacements, raideur
*   de la forme RH + ZCLIM0 sans autre terme) et memoire de la raideur du
*   debut de pas
     ZRAIDS0 = ZRAID ;
     IRFRCH = FAUX ;
     NBRFR  = 0 ;
     ITRFR  = 0 ;
     TSTG   = 'TABL' ;
     ISTGOK = IPERFSTG ;
     'SI' ISTGOK ;
       ISTGOK = IPLAVI ;
     'FINSI' ;
     'SI' ISTGOK ;
       ISTGOK = IENDOM 'OU' IVIDOM ;
       ISTGOK = ISTGOK 'OU' ICERAM ;
     'FINSI' ;
     'SI' ISTGOK ;
       IEXCSTG = IGRD 'OU' IDYN ;
       IEXCSTG = IEXCSTG 'OU' IKTAN ;
       IEXCSTG = IEXCSTG 'OU' IFEFP ;
       IEXCSTG = IEXCSTG 'OU' IRCON ;
       IEXCSTG = IEXCSTG 'OU' IRAUG ;
       IEXCSTG = IEXCSTG 'OU' AUTAUG ;
       IEXCSTG = IEXCSTG 'OU' LOGPIL ;
       IEXCSTG = IEXCSTG 'OU' WTAB . 'CONTACT' ;
       IEXCSTG = IEXCSTG 'OU' WTAB . 'CONSOLIDATION' ;
       IEXCSTG = IEXCSTG 'OU' WTAB . 'FREQUENTIEL' ;
       IEXCSTG = IEXCSTG 'OU' WTAB . 'NVSTNL' ;
       IEXCSTG = IEXCSTG 'OU' WTAB . 'ADHERENCE' ;
       IEXCSTG = IEXCSTG 'OU' WTAB . 'CAFROTTE' ;
       IEXCSTG = IEXCSTG 'OU' WTAB . 'MAN' ;
       IEXCSTG = IEXCSTG 'OU' WTAB . 'CHAR_BLOM' ;
       'SI' IEXCSTG ;
         ISTGOK = FAUX ;
       'FINSI' ;
     'FINSI' ;
*   diagnostic (une fois par table) : etat du rafraichissement et motifs
     'SI' (IPERFSTG 'ET' ('NON' ('EXIS' WTAB 'STAG_MSG'))) ;
       WTAB . 'STAG_MSG' = VRAI ;
       'SI' ISTGOK ;
         'MESS' ' PERF-RAID niveau 3 : rafraichissement de la raideur actif' ;
       'SINON' ;
         'MESS' ' PERF-RAID niveau 3 : rafraichissement inactif, motifs :' ;
         'SI' ('NON' IPLAVI) ; 'MESS' '    IPLAVI faux' ; 'FINSI' ;
         'SI' ('NON' ('OU' IENDOM IVIDOM ICERAM)) ;
           'MESS' '    ni endommagement, ni viscoendommagement, ni ceramique' ;
         'FINSI' ;
         'SI' IGRD ; 'MESS' '    grands deplacements' ; 'FINSI' ;
         'SI' IDYN ; 'MESS' '    dynamique' ; 'FINSI' ;
         'SI' IKTAN ; 'MESS' '    K_TANGENT' ; 'FINSI' ;
         'SI' IFEFP ; 'MESS' '    FEFP' ; 'FINSI' ;
         'SI' IRCON ; 'MESS' '    rigidite constante' ; 'FINSI' ;
         'SI' IRAUG ; 'MESS' '    rigidite augmentee' ; 'FINSI' ;
         'SI' AUTAUG ; 'MESS' '    augmentation automatique' ; 'FINSI' ;
         'SI' LOGPIL ; 'MESS' '    pilotage' ; 'FINSI' ;
         'SI' WTAB . 'CONTACT' ; 'MESS' '    contact' ; 'FINSI' ;
         'SI' WTAB . 'CONSOLIDATION' ; 'MESS' '    consolidation' ; 'FINSI' ;
         'SI' WTAB . 'FREQUENTIEL' ; 'MESS' '    frequentiel' ; 'FINSI' ;
         'SI' WTAB . 'NVSTNL' ; 'MESS' '    NVSTNL' ; 'FINSI' ;
         'SI' WTAB . 'ADHERENCE' ; 'MESS' '    adherence' ; 'FINSI' ;
         'SI' WTAB . 'CAFROTTE' ; 'MESS' '    frottement' ; 'FINSI' ;
         'SI' WTAB . 'MAN' ; 'MESS' '    MAN' ; 'FINSI' ;
         'SI' WTAB . 'CHAR_BLOM' ; 'MESS' '    blocages variables' ; 'FINSI' ;
       'FINSI' ;
     'FINSI' ;
**
*
* initialisation des messages pour l'iteration en cours ****************
*
     'SI' IKLFFF ;
          'MESSAGE'
'Iter'*13   'Nplas'*26    'Critere'*39        'Deps.max'*52       'Eps.max'*65      'Crit.flex'*78
;
     'SINON';
         'MESSAGE'
'Iter'*13   'Nplas'*26     'Fresidu'*39        'Deps.max'*52       'Eps.max'*65      'Mresidu'*78
;
     'FINS';
 INSTAB = FAUX;
 RESIDIN = RESIDU * 1.        ;
hpp_exit = faux; 'SI' hpp_eps; hpp_exit=vrai; 'FINSI';

*=======================================================================
*======= DEBUT DE LA BOUCLE DE CONVERGENCE                       =======
*=======================================================================
** trac cach v1  nclk ;
*  trac (surf1 et surf2 et surf3 et _rext et _rint) nclk;
*  trac cach (engr1 et engr2) nclk;
dpsmaxp = 0;

IT_RECA = 0;
depst = depst * 0;
depstp = depst;
zdept = (zdept 'EXCO' 'LX' 'NOID' 'LX') +    (ZDEPT * 0.);
zdep1 = zdept;
*FOR_MECA
  'FINSI'                                 ;


'REPETER'  ETIQ ;

'SI' WTAB.'FOR_MECA' ;
  zdep1 = (zdept 'EXCO' 'LX' 'NOID' 'LX') +    (ZDEPT * 0.);
'FINSI' ;
depstp = depst;
zdeptp = zdept;
zsigfp = zsigf;

zsigf = zsigfp;
depst = depstp;
zdept = zdeptp;
'SI'  igrd ; 'FORM' geom1; 'FINSI';
'SI' autaug;
resmul = 2. * resmul;
'SI' ((dpsmax <   1d-3) 'ET' (resmul > 1D-20) 'ET' ('NON' PASTEST)) ; resmul = resmul / (dpsmax + xpetit) * 1d-3; 'FINSI';
'SI' (resmul > 1.0); resmul = 1.0; 'SINON'; itacc = 4; 'FINSI';
'FINSI';
*  sauvegarde des etats sur la configuration debut de sous-increment: geom1
*  mise a jour apres la sortie de etiq

INSTAB = FAUX;

nconvr = faux;
*IT est le compteur de ETIQ, ITACC doit etre =< 0 pour qu'on accelere
IT= IT + 1 ;
ITACC = ITACC - 1;
ZITAC = ZITAC + 1 ;
*
*---------------------------------------------------------------------
*           La force motrice de l'iteration est fixee: RESIDU
*           on va calculer un nouveau champ de deplacement
*
*   calcul de l'increment de l'increment de deplacement zdep1
*   par resolution lineaire
*-----------------------------------------------------------------------
*
*  petits travaux pour acceleration de convergence
*
CORRECP = CORREC ;
CORREC = 0;
PASTEST=FAUX;
'SI' WTAB.'FOR_MECA' ;
ACFEP0 = RESIDU - FCORF;
ACFEP0 = ACFEP0 'ENLE' 'FLX';
ACFP0 = ACFEP0 * ZJAC ;
ACFEP0 = ACFEP0 - CORRECP;
* FOR_MECA
'FINSI' ;
'SI' IGRD ;
  'FORM' GEOM1;
*  rem : 0.1 est la valeur par defaut de EKREAC (= . 'REAC_GRANDS')
  'SI' ((IT > 1) 'ET' (URG 'OU' (ITACC > 3) 'OU' INSTAB 'OU'
  (('MULT' (IT - IT_RECA)  ITRCLC) 'ET' ('NON' HPP_EPS))));
  URG = FAUX;
      IT_RECA = IT;
      dekreac1 = 0;
      INSTAB = FAUX;
      URG=FAUX;
        PASREINI=FAUX;
*     zdeptr = zdept - (zdep1/2);
      zdeptr = zdept ;
      GEOR ZMATTEMP = 'FORM' ZDEPTR   ZMODLI  ZMATI ;
*     A cause de FORM, ZMATTEMP n'est plus parallele...
      ZMATTEMP = 'REDU' ZMATTEMP ZMODL;
      RECA_K = VRAI;
      RECA_N = RECA_N + 1;

     'SI' (RECA_N > 20) ;
        nonconv = vrai;
     'FINS';

      txt_k ='CHAI' ' Recalcul de K (= K^el';
       'SOUC' 0;
       'SI' ((LAG_TOT 'EGA' 1) 'ET' vrai);
          'FORM' GEOREF0;
          HOOKRH = 'HOOK' ZMODL ZMATI;
          HOOKRH2 = 'PICA' HYPDEF HOOKRH ZMODL (ZU1 + ZDEPTR);
          'FORM' GEOR;
          RITC = 'RIGI' HOOKRH2 ZMODL zmattemp 'NOER';
          'DETRUI' HOOKRH;
          'DETRUI' HOOKRH2;
          'FORM' GEOM1;
       'SINON';
         ritc  ='RIGI'   zmodl zmattemp 'NOER' ;
       'FINSI';
      PASOK = 'SOUCI';
      'SI' PASOK;
         'MESS' 'rigi rate. on reessaye avec la configuration geom1';
         'FORM' GEOM1;
         ritc  ='RIGI'   zmodl zmatI ;
      'FINSI';

** recalcul masse si augmentation automatique
    'SI' (AUTAUG 'ET' ('NON' IRAUGLU));
       'FORM' GEOR  ;
       RIG_AUG  = 'MASSE' ZMODL ZMATI;
       RH  = RITC;
***    mess 'actualisation rig_aug';
    'FINSI';


      ZMATTEMP = 0 ;

*     RH peut contenir des CL
      ZRI = 'EXTR' RITC 'RIGI' 'NOMU' ;
      ZCL = 'EXTR' RITC 'RIGI' 'MULT' ;
      'SI' ('NEG' ('DIME' ZCL) 0) ;
        ZCLIM = ZCLIM0 'ET' ZCL ;
      'SINON' ;
        ZCLIM = ZCLIM0 ;
      'FINSI' ;
      ZFLX1 = ZFLXB ;

      BFCONT  = FAUX                       ;
      BCLIM2  = FAUX                       ;
     'SI' WTAB.'CONTACT';
*       recalcul raideur de contact et jeu
*   Maintenant, on veut la configuration finale pour les directions et les jeux
  'FORM' GEOR ;
**'FORM' ZDEPT ;
*
       ZFLX = 'EXCO' (CRR '*' ZDEPT) 'FLX' 'NOID' 'FLX' ;
*
        MODCON  = wtab.'MODCONTA';
       'SI' ('EXIS' WTAB 'MATCONTA');
          CJEU CRR      ='RFCO' MODCON  WTAB.'CONV'  WTAB.'MATCONTA';
       'SINON' ;
          CJEU CRR      ='RFCO' MODCON  WTAB.'CONV'                ;
       'FINS' ;

       'SI' ('NEG' 0 CJEU) ;
         FADHE = 'EXCO' CJEU 'FADH' 'NOID' 'FADH' ;
         CDAP  = 'EXCO' CJEU 'FLX'  'NOID' 'FLX' ;
*
*        Ajout du glissement deja parcouru sur les conditions de frot.
         'SI' WTAB.'CAFROTTE' ;
           CGLI = 'REDU' ZFLX MFROT ;
           CDAP = CDAP ET (-1*CGLI) ;
         'FINSI';
       'FINSI';

       'SI' (WTAB . 'MODAL') ;
          CRR  = 'PJBA' CRR  ZMODL MMMM ;
          MCRR = 'EXTR' CRR 'MAIL' 'MULT' ;
          MCDAP = 'EXTR' CDAP 'MAIL' ;

         'REPETER' BCDA ('NBNO' MCDAP) ;
            PBCDA = MCDAP 'POINT' &BCDA ;
            PCRR  ='POINT' MCRR &BCDA   ;
            CHCR  ='MANU' 'CHPO' PCRR 1 'FLX' ('EXTR' CDAP 'FLX' PBCDA)
                   'NATURE' 'DISCRETE' ;
           'SI' ('EGA' 1 &BCDA) ;
              CCDA = CHCR ;
           'SINON' ;
              CCDA = CCDA 'ET' CHCR ;
           'FINS' ;
         'FIN' BCDA ;

          CDAP = CCDA ;
       'FINS' ;

*       ATTENTION : mettre les conditions de frottement en premier pour
*                   les numeroter en dernier
        ZCLIM2 ='VIDE' 'RIGIDITE' / 'RIGIDITE';
        ZFCONT ='VIDE' 'CHPOINT' / 'DISCRET';
        CDEP = ZU1   + ZDEPT  ;
        CDEPSLX ='ENLE' CDEP 'LX'              ;
       'SI'  ('NEG' CRR 0);
          BCLIM2 = VRAI                ;
          BFCONT = VRAI                ;
          ZCLIM2 = CRR    'ET' ZCLIM2  ;
          CCOR   = CRR '*' CDEPSLX   'EXCO' 'FLX' 'NOID' 'FLX'  ;
          ZFCONT = ZFCONT '+'  CCOR    ;
       'FINS';

       'SI' ( 'NEG' 0 CJEU);
          BFCONT = VRAI                ;
          ZFCONT = ZFCONT '+'  CDAP    ;
       'FINS';


*      Mise a jour de ZCLIM, ZFCONSTA et RESIDU si necessaire
       'SI' BCLIM2;
         ZCLIM  = ZCLIM2 'ET' ZCLIM             ;

*  pas de correction a faire sur residu car il est hors reactions pour qu'elles
*  sortent en total a la resolution incrementale
*
*        Mise a jour des jeux dans le residu (partie force inchangees)
         RFORCE = 'ENLE' RESIDU 'FLX' ;
         FLXPRE = 'EXCO' (ZCLIM '*' (ZU1 '+' ZDEPT)) 'FLX' 'NOID' 'FLX';
         RJEUX  = ZFCONT '+' ZFLXB '-' FLXPRE ;
         RESIDU = RFORCE 'ET' RJEUX ;
         ZFLX1 = ZFLX1 'ET' ZFCONT ;

       'FINS';

     'FINS';

     'SI' BFCONT;
        ZFCONSTA = ZFEXT2 '+' ZFCONT;
     'SINO';
        ZFCONSTA = ZFEXT2           ;
     'FINS';
      ZFCONST1 = ZFCONSTA;

         zclimp = zclim;

     'SI' IDYN;
        ZFCONSTA = ZFCONSTA '+' ZFP1  ;
     'FINS';

***   ZFLX1 = 'EXCO' ZFCONSTA 'FLX' 'NOID' 'FLX' 'NATURE' 'DISCRET';
      ZRAID =  ZCLIM 'ET' ZRI;
*  repasser sur la configuration de calcul des raideurs
     'SI' iksia ;
       'FORM' geom1;
        sigttcca ='PICA' HYPDEF ZMODL ZSIGF ZDEPT ;
       'FORM' geor;
        ksigtc= 'KSIGM' sigttcca zmodl zmat;
        ZRAID= ZRAID 'ET' ksigtc ;
        txt_k = 'CHAI' txt_k ' + K^sig';
     'SINON';
       'FORM' geor;
     'FINS';
     'SI' IRCON;
        ZRAID = ZRAID 'ET' RIG_CONS;
        txt_k = 'CHAI' txt_k ' + K^cst';
     'FINS';
*  remise a jour impo12
      IMPO12= FAUX;
      IMPO12U = FAUX;
      XXX1  ='EXTR' ZCLIM 'MAIL' 'UNIL';
     'SI' (('NBEL' XXX1) '>' 0);
        IMPO12 = VRAI;
        IMPO12U = VRAI;
        DIMPO12='REDU' DFEXT0L XXX1 ;
        DIMPOV = DFEXT0L '-' DIMPO12;
     'FINS';
* pv
    'SI' IRAUG;

   'SI'  iprem; zdep1d = zu1 'ENLE' 'LX'; 'FINSI';
  xkx = (xtmx zdep1d rh)  + xpetit;
  xmx = (xtmx zdep1d rig_aug) + xpetit;
  'SI' (('VERI' xkx) 'ET' ('VERI' xmx) 'NON');
    zu1l = zu1 'ENLE' 'LX';
    xkx = (xtmx zu1l rh)  + xpetit;
    xmx = (xtmx zu1l rig_aug) + xpetit;
  'FINSI';
      augauto = xkx / xmx; augk = 1.;


      augauto = abs augauto;
      augk = abs augk;

      augmult = augmult * 1.02;
      'SI' (augmult > 1D4 ); augmult=1D4 ; 'FINSI';

      augauto = augauto * augmult ;
      augk = augk * augmult;


'SI' (iraug 'ET' autaug) ; 'MESS' 'multiplicateur d augmentation masse' augauto ' raideur' augk ; 'FINSI';
        ZRAIDNA=  ZRAID ;
       'SI' AUTAUG;
        ZRAID = ZRAID 'ET' (RIG_AUG * augauto) 'ET' (RH * augk) ;
       'SINON';
        ZRAID = ZRAID 'ET' RIG_AUG ;
***      'MESS' ' augmentation residuelle ';
       'FINSI';

        txt_k = 'CHAI' txt_k ' + K^aug';
***     ZNACCE = FAUX;

    'SINON';
      augmult = augmult * 0.55 ;
    si (augmult < 1d-2); augmult = 1d-2; finsi;
'SI' iraug; 'MESS' 'nouveau augauto augmult' ' ' augauto augmult;  'FINSI';
     'SI' IRAUGLU;
        zraid = zraid 'ET' rig_aug;
     'FINSI';
    'FINSI';
***     'FINS';

     'SI' WTAB.'PROCEDURE_CHARMECA';
        PRECED . 'ADDI_MATRICE' = vrai;
        TFP22= CHARMECA  PRECED   WTAB.'T_FINAL';
        PRECED . 'ADDI_MATRICE' = faux;
       'SI' (EXIS TFP22 'ADDI_MATRICE');
          zraid = zraid 'ET' TFP22.'ADDI_MATRICE';
          txt_k = 'CHAI' txt_k ' + K^cent';
       'FINS';
     'FINS';

     'SI' IDYN;
*      bp : en toute rigueur, il faudrait aussi recalculer la MASSE ...
*           et ajouter l'amortissement le cas échéant ...
        MMA  = WTAB.'MASSE' '*' ( 4.D0 '/' WTAB.'DT' '/' WTAB.'DT');
        ZRAID= ZRAID 'ET' MMA;
      'FINS';
      'MESS' ( 'CHAI' txt_k ' ) dans config deformee ' DEKREAC1 );
      'FORM' GEOM1;
*      on impose le recalcul de K a la prochaine iteration si it=2
      'SI' (IT 'EGA' 2) ;
         ITACC = 4 ;
      'SINON';
*  pas de raison d'interferer avec les accelerations de convergence
*****    ITACC = 1 ;
      'FINS' ;
       GR_U_K  = GR_U_FIN ;
       zdeptm = zdept ;
  'FINS';
*IGRD
'FINS';

'SI' WTAB.'NVSTNL'                            ;
    UN = 'EXCO' ZVIFL movifl                  ;
    ch_un = 'MANU' 'CHML' WTAB.'MOD_NSL' 'ADVE' un 'TYPE' 'CARACTERISTIQUES';
    nugrad = 'ADVE' WTAB.'MOD_NSL' ch_un      ;
    ZRNSL = WTAB.'RNSL' 'ET' nugrad           ;

    resnsl = ftnsl '-' (ZRNSL * ZVIFL)        ;

'FINSI'                                       ;
*
*  acceleration de convergence effective ------------------------------
*
ACCEL = FAUX;
'SI' WTAB.'FOR_MECA' ;
'SI' (('NON' instab) 'ET' (ITACC '<EG' 0) 'ET' (IT '>' 3) 'ET' ZNACCE );
 ITACC = 2;
 ACCEL = VRAI;
   CORREC = 'ACT3' ACFEP2  ACFEP1 ACFEP0
                   ACFP3   ACFP2  ACFP1  ACFP0 ;
  'SI' (wtab.'STABILITE' 'ET' ('NON' HPP_EPS));
*    verif que l'acceleration ne renvoie pas en arriere

     acc_ref = xty acfep0 zdep1d MNDUAL MNPRIM;
     acc_ref = acc_ref + xpetit;

     acc_dir = xty (acfep0 - correc) zdep1d MNDUAL MNPRIM;
     acc_rap = acc_dir/acc_ref;
    acc_lim = 256.; 'SI' (acc_ref < 0.); acc_lim = 1.; 'FINSI';
    'SI' (acc_rap  '>' acc_lim) ;
* en cas d'acceleration trop grande, on la limite
       'MESS' 'Limitation acceleration ' ' 'acc_rap;  CORREC = correc * (acc_lim/acc_rap);
     'FINSI';
     'SI' (acc_rap '<EG' 0.) ;
* en cas d'acceleration retrograde, on n'accelere pas
       'MESS' 'Annulation acceleration: retrograde' ' ' acc_rap;
       correc =  0.;
       itacc=2;
     'FINSI';
  'FINSI';
  RESIDU = RESIDU '-' CORREC;
  RESIDC = RESIDC '-' CORREC;
'FINS';
*FOR_MECA
'FINSI' ;

 ACFP3  = ACFP2  ;
 ACFP2  = ACFP1  ;
 ACFP1  = ACFP0  ;
 ACFEP2 = ACFEP1 ;
 ACFEP1 = ACFEP0 ;
*
* Resolution ---------------------------------------------------------
* on obtient ZDEP1 = [ du ; Dlx ]
'SI' (resmul < 0.99);
'MESS' 'Reduction du chargement. Coefficient: ' resmul;
'SI' (resmul < 1.d-20); 'ERREUR' 996; 'FINSI';
**ZDETOT = ZZD   '+' ZDEPT ;
**XXX1   = ZCLIM '*' ZDETOT;
* -1*reactions a l'iteration it
**FCORF = 'ENLEVER'  XXX1 'FLX';
     residu = ((residu -fcorf) * resmul) +  fcorf;
    ACFP0 = (RESIDU  - FCORF) ;
**  ACFP0=ACFP0 + ((FFROT- FFROTP) * ZCLIM) ;
'FINSI';
  'SOUCI' 0;
'SI' IAFAIR;
*

  FEXCI = 'VIDE' 'CHPOINT' / 'DISCRET' ;
  'SI' (WTAB.'ADHERENCE') ;
    'SI' ('EXIS' WTAB 'MAIL_BLOM') ;
      FADRE = 'REDU' FADHE WTAB.'MAIL_BLOM' ;
    'SINON' ;
      FADRE = FADHE ;
    'FINSI' ;
    FEXCI = FEXCI 'ET' FADRE ;
  'FINSI' ;
*
*  recalcul frottement
'SI' (WTAB.'CAFROTTE' 'ET' IMPO12);
    'SI' (WTAB.'FROCABL');
       zsigfT = 'REDU' zsigf ZMODLI;
       FFROT = 'EXCC' ZCLIM ZDEPT MODCON WTAB.'MATCONTA' ZSIGFT;
       RTRSF = 'VIDE' 'RIGIDITE' / 'RIGIDITE';
       RFNS  = 'VIDE' 'RIGIDITE' / 'RIGIDITE';
       FEXCI = FEXCI '+' FFROT ;
     'FINSI';
    'SI' (WTAB.'FROCOUL');
        excfconv = excfconv + 1 ;
       RTRSF*'RIGIDITE' RFNS*'RIGIDITE'  FFROT = 'EXCF' ZCLIM (ZDEPT           )  MODCON WTAB.'MATCONTA' excfconv;
       FEXCI = FEXCI '+' FFROT ;
       MFROT = 'EXTR' FFROT 'MAIL' ;
     'FINSI';

'FINS';
*
  'SI' ( ('EXIS' STAB12 'RIBLO_M') 'ET' (IPREM 'OU' RECA_K) ) ;
    'SI' ((WTAB.'CAFROTTE' 'OU' WTAB.'ADHERENCE') 'ET' IMPO12U);
       ZDEP1 BID BID BID BID = 'RESO' ZRAID 'SOUC' RESIDU 'INIB'
                              STAB12.'RIBLO_M'   STAB12.'LISEA_M'
                              FEXCI RFNS RTRSF;
**                            FEXCI ;
    'SINON';
       ZDEP1 BID BID BID     = 'RESO' ZRAID 'SOUC' RESIDU 'INIB'
                              STAB12.'RIBLO_M'   STAB12.'LISEA_M' ;
    'FINS';

  'SINON';
    'SI' ((WTAB.'CAFROTTE' 'OU' WTAB.'ADHERENCE') 'ET' IMPO12U);
**    ZDEP1 = 'RESO' ZRAID 'SOUC' RESIDU FEXCI ;
**   mess 'fexci 2 avant reso'; list fexci;
      ZDEP1 = 'RESO' ZRAID 'SOUC' RESIDU FEXCI       RFNS RTRSF;
    'SINON';

       'SI' WTAB.'FOR_MECA' ;
          ZDEP1 = 'RESO' ZRAID 'SOUC' RESIDU 'NOID';
         'SI' (WTAB.'MAN' 'ET' IPREM);
           ORDRE      = WTAB.'ORDRE' ;
           ZDEP2 IOUT = CORMAN ZRAIDINI ZMODL ZMAT  ORDRE
                       ZU1 ZSIG0      RESIDNOR  WTAB ;
           'SI' (IOUT 'EGA' 1) ;
             ZDEP1=ZDEP2;
           'FINS';
         'FINSI' ;
       'FINS';

       'SI' WTAB.'NVSTNL'             ;
         ZVIF1  = 'KRES' ZRNSL Resnsl ;
         ZVIFL = ZVIFL '+' ZVIF1      ;
       'FINSI'                        ;
    'FINS';
  'FINS';
**  verif stabilite matrice elastique
'SI' WTAB.'FOR_MECA' ;
  'SI' (wtab.'STABILITE' 'ET' ('NON' HPP_EPS) 'ET' AUTAUG);
     RESIDD = RESIDU - (ZCLIM * (ZDEP1 EXCO   'LX' 'NOID' 'LX'));
     acc_ref = xty (RESIDD       ) zdep1 MNDUAL MNPRIM;
** diag refactorise la matrise. On evite donc provisoirement de l'appeler
**   nbng = 'DIAG' ZRAID;
     nbng = 0;
     'SI' ((acc_ref <EG 0.) 'OU' (nbng > 0));
     'MESS' 'Raideur negative' ' ' acc_ref ' ' nbng;;

       SI IKSIA; URG = VRAI; SINON;
       MESS 'RAIDEUR ELASTIQUE NEGATIVE'; ERREUR 5; FINSI;
**     IKSIA = FAUX;

        tabconv . it = 1;
        iraug = vrai;
        itacc = 3;
        resmul = resmul * 0.25;
        HPP_EPS = FAUX;
        pastest = vrai;
        urg = vrai;
        itacc = 3;
        augmult = augmult * 1.4;
        ZDEPT = zdeptp ;
        zdep1 = (zdept - zdeptp) + (zdept 'EXCO' 'LX' 'NOID' 'LX');
        'ITERER' etiq;
     'FINSI';
  'FINSI';
  monsouc ='SOUCI';
  'SI' monsouc; 'SI' ('NON' autaug);
     'MESS' 'Souci':  (vale 'SOUCI');
           URG=VRAI;
   'FINSI'; 'FINSI';


     'SI' LOGPIL ;
*      Calcul de D_eta par appel a la procedure PILOINDI
       D_ETA = PILOINDI PRECED ZU1 ZDEPT ZDEP1 ZDEPII DTAU ;
*      Mise à jour
           ZDEP1 = ZDEP1 '+' (D_ETA '*' ZDEPII) ;
           ETA = ETA '+' D_ETA ;
         'FINSI' ;

*FOR_MECA
'FINSI' ;

tabconv . it = 1;
*
*  verif sens ----------------------------------------------------------
*
'SI' WTAB.'FOR_MECA' ;
'SI' (resmul < 1d-2) ; souci 0; 'FINSI';
zdep1s = zdep1 'ENLE' 'LX';
monsouc = souci;
pasunil = monsouc;
'SI' (WTAB.'STABILITE' 'ET' (('NON' HPP_EPS) 'OU' monsouc) 'ET' autaug );
    sens = xtmx zraid zdep1s;
    'SI' ((sens < 0) 'OU' monsouc);
     'MESS' 'Annulation sous-increment: instable ' ' ' sens;
     itacc = 3  ;
     'SI' monsouc ;
     'MESS' 'souci: ' (vale 'SOUC'); 'FINSI';
                            resmul = resmul * 0.25;
  'SI' autaug;   iraug = vrai; 'FINSI';
     'SI' HPP_EPS; itacc=4; 'FINSI';
     HPP_EPS = FAUX;
     pastest = vrai;
     instab = vrai;
     urg = vrai;
     augmult = augmult * 1.4;
    'SI' (iraug 'ET' (augmult < 1d3));
      ZDEPT = zdeptp ;
      zdep1 = (zdept - zdeptp) + (zdept 'EXCO' 'LX' 'NOID' 'LX');
      'ITERER' etiq;
     'FINSI';
    'FINS';
'FINS';
*
  ZRAID_T = 'EXTR' ZRAID 'CONT';
  'SI' ('EXIS' ZRAID_T 'NITER');
       'SI' IDYN ; STAB12.'ZRAIDV'= ZRAID; 'FINS';
        STAB12.'RIBLO_M' = ZRAID_T.7;
        STAB12.'LISEA_M' = ZRAID_T.6;
        WTAB.'MAIL_BLOM' = 'EXTR' ZRAID_T.7 'MAIL' 'MULT' ;
  'FINS';
*FOR_MECA
'FINSI' ;

*IAFAIR
'FINS';
RECA_K = FAUX;
*
'SI' WTAB.'FOR_MECA' ;
* 1ere iteration ------------------------------------------------------
'SI'   IPREM  ;
          ZDEPT  = 'COPIER' ZDEP1 ;
          ZDEPTM = ZDEPT ;
*         ZDEPf  = ZDEPT ;
          ZDELA  =   'COPIER' ZDEPT ;
          'SI' (WTAB . 'MODAL') ;
             'SI' ('EXIS' WTAB 'MODCONTA') ;
                mamoco1 = 'EXTR' (ZDEPT 'ENLEVER' 'LX') 'MAIL' ;
             'FINS';
          'FINS' ;
*   iprem est faux: on est apres la premiere operation---------------
*
'SINON';
*     zdept est l'increment de deplacement total avec les lagrangiens
*     de la solution complete
        XXX1   = ZDEPT 'ENLEVER' 'LX' ;
*       ZDEPf  = (ZDEPT + ZDEPTP) * 0.5;
*       on cumule les deplacements mais pas les lx
*       Du^(i)  = Du^(i-1) + du   ;   Dlx^(i) = 0 + Dlx

        ZDEPT  = XXX1 '+' ZDEP1 ;
       'DETR' XXX1 ;
'FINS' ;
*FOR_MECA
'FINSI';
*
'SI' (WTAB . 'MODAL') ;
     'SI' ('EXIS' WTAB 'MODCONTA') ;
* mettre les point materiels dans zdept
         zdeptu1 =  'REDU' zdept   mamoco1      ;
         ch_dco  =  'RECO' zdeptu1 ZMODL ZMATFI ;
         ZDEPT   = ('EXCO' zdept 'LX' 'LX') 'ET' zdeptu1 'ET' ch_dco ;
     'FINS';
'FINS' ;
*
* ATTENTION ON EST SUR LA CONFIGURATION GEOM1?


*

'SI' WTAB.'FOR_MECA' ;
*
*--- CAS 2 ------------------------------------------------------------*
*  si on part dans les decors on redemarre a 0
'SI' ((XCONV > 1E8) 'ET' PASREINI 'ET' ('NON' IPILOT)) ;
        'MESS' 'Reinitialisation du schema';
      ZDEPT = zdeptp ;
      zdep1 = (zdept - zdeptp) + (zdept 'EXCO' 'LX' 'NOID' 'LX');
        PASREINI=FAUX;
        ITACC=3;
        'ITERER' ETIQ;
'FINS';

*
*--- CAS 3 ------------------------------------------------------------*
'SI'  ACCEL ;

*   pilotage automatique
    'SI' IPILOT;
              RED1 = STAB12.'AUTOREDU' ;

*       reduction du critere de pilotage red2 sert d'incateur si
*       pas accelere tous les 2 pas

* MODIFICATION CB215821 : 18/06/2015
           'SI' (RED2 < (IT '/' 20));
                STAB12.'AUTOREDU' = STAB12.'AUTOREDU' '*' 3.D0 ;
                RED2 = RED2 '+' 1 ;
                ITACC= 3;
           'FINS';

            RED1 = RED1 '/' (STAB12.'AUTOREDU') ;
            'SI' (RED1 '<' 0.9) ;  STAB12.AUTORED1 = 10 ; 'FINS' ;

            'SI' ( STAB12.'AUTOREDU' '>' 1.D0 ) ;
               'MESS' 'On divise le critere de pilotage par '
                STAB12.'AUTOREDU';
            'FINS' ;

*      test si snap back et si refus de l'acceleration
            'SI' IPLAVI ;
                  XXX2 = 'EXCO' ZDEPT  'LX' 'NOID' 'LX' ;
                  XXX1 = 2.D0  '*' XXX2;
                  XXX3 = ZDEPT '-' XXX1;
            'SINON' ;
                  XXX1 = COEPI '*' ZDELA;
                  XXX3 = ZDEPT '-' XXX1 ;
                  XXX2 = 'EXCO' XXX3 'LX' 'NOID' 'LX';
                  XXX1 = XXX2  '*' 2.D0 ;
                  XXX4 = COEPI '*' ZDELA;
                  XXX3 = ZDEPT '-' XXX4 '-' XXX1;
           'FINS' ;

           'DETR' XXX2 ;'DETR' XXX1; 'DETR' XXX3;
            XXX1 ='EXCO' ZDEPT 'LX' 'NOID' 'LX' ;
            XXX2 = XXX1 '*' 2.D0 ;
            XXX3 = ZDEPT '-' XXX2;
            SRT  = 'XTY' ZDFINI XXX3 MLDUAL MLPRIM;            pvpv      ;
           'DETR' XXX1 ;  'DETR' XXX2; 'DETR' XXX3;

            ISNPB = FAUX;
           'SI'  (SRT '<' 0) ;
                ISNPB = VRAI ;
           'FINS';

            OO = WTAB.AUTOCRIT ;
            OO = OO '/' STAB12.'AUTOREDU' ;
            U1MA = AUTOPILO ZDEPT (COEPI'*'ZDELA) ZMODLI ZMATFI WTAB;
            AL1 = OO '/' U1MA ;
*        al1 est le coefficient de normalisation
           'SI' (( al1 '>EG' 1.d0) 'ET' (coepi '>EG' 1.d0)) ;
*     pour eviter d'aller au dela de alpha=1 on ignore le critere
                 AL1 = 1.d0 ;
           'FINS' ;
            'SI'((AL1 '>' 1.D0) 'ET' (COEPI '>' 0.D0));
              'SI' ( AL1 '>' (1.D0 '/' COEPI));
                   AL1 = 1.D0 '/' COEPI;
              'FINS';
            'FINS';
*  normalisation

              PASTEST=VRAI;
              XXX1   = ZLX   '*' ( 1.d0 '-' AL1);
              XXX3   = ZDEPT '*' AL1 ;
              ZDEPT   = XXX3  '+' XXX1;
             'DETR' XXX3;
    'FINS';
'SINON';
      'SI' IPILOT ;
**
*   le calcul d'al1 est fait pour eviter la convergence
*   s'il est  externe a l'interval 0.5 --- 2.
            OO = WTAB.'AUTOCRIT' ;
            OO = OO '/' STAB12.'AUTOREDU' ;
            U1MA = AUTOPILO ZDEPT (COEPI'*'ZDELA) ZMODLI ZMATFI WTAB;
            AL1 = OO '/' U1MA ;
           'SI' (( AL1 '>EG' 1.d0) 'ET' (COEPI '>EG' 1.d0)) ;
                 AL1 = 1.d0 ;
           'FINS' ;
      'FINS' ;
'FINS';
*
*  garder les reactions pour le test de convergence
*
ZDEPLP = ZDEPL                         ;
ZDEPL  = ZDEPT 'EXCO' 'LX' 'NOID' 'LX' ;

*----------------------------------------------------------------------
*     le nouveau champ est fixe on va tester l'equilibre(convergence)
*     et calculer la force motrice pour l'iteration suivante
*----------------------------------------------------------------------
*
*  calcul de  fcorf = lambda * m   force de reaction -----------------
*             fcoru = m * u     depimp (flx)

'DETRUIRE' FCORF;
*       calcul du deplacement total u
zdetotp = zdetot;
ZDETOT = ZZD   '+' ZDEPT ;
XXX1   = ZCLIM '*' ZDETOT;
* -1*reactions a l'iteration it
FCORF = 'ENLEVER'  XXX1 'FLX';
* valeur des relations imposees a l'iteration it
FCORU = 'EXCO'  XXX1 'FLX'  'NOID' 'FLX';
'DETR' XXX1 ;
*FOR_MECA
'FINSI' ;
*
*  dans le cas des modeles endommageables de Lemaitre, on ecoule
*  en tenant compte, dans les iterations internes, de la variation du
*  materiau avec la temperature
*
ZMATT = ZMAT    ;
'SI' ('ET' ('ET' ITHER ('OU' IENDOM IVIDOM ) ) WTAB.'MATVAR')  ;
* on recupere certain materiau avec les parametres fct de la temperatue
* voir PAS_mate  (il ne faut que la dependance thermique)
      ZMATT = 'REDU' WTAB.'MA_COMP' ZMODL;
'FINS';

'SI' WTAB.'FOR_MECA' ;
'SI' IFEFP;
* Update or total lagrangian -----------------------------------------
  'SI' IFEFPUL;
*  mess ' update lagrangian ZRIKTA';
    GEOM2 = 'FORM' ZDEPT ;
    ZRIKTA ZSIGF ZVARF ZDEIF = 'ECFEFP'
         ZMODL ZEPS0 ZVAR0 ZDEPT ZMAT ZPREK NITMA XUPDA;
  'SINON';
*  mess ' total lagrangian ZRIKTA';
    chp_z = ZDEPT + ZU1 ;
    GEOM2 = 'FORM' chp_z ;
    ZRIKTA ZSIGF ZVARF ZDEIF = 'ECFEFP'
         ZMODL ZEPS0 ZVAR0 chp_z ZMAT ZPREK NITMA ;
    chp_z = 1 ;
  'FINS';
  FEQU2 = 'BSIG' ZMODL ZSIGF ZMAT ;
  ZRAID = ZRIKTA 'ET' ZCLIM ;
   'FORM' GEOM1 ;
**
  XXX1 = 'EXCO' (WTAB.'MOVA') ZVARF ;
  EPSM = 'MAXI' XXX1 'AVEC' MLDEFOR ;
  ACC  = 'ABS' ( XXX1 - ACC0 ) ;
*'DETR' XXX1 ;
  MMC = 'MASQUE' ACC 'SUPERIEUR' 1.D-10 'SOMME' ;
  'SI' (MMC '>' MMCMAX) ; MMCMAX = MMC ; 'FINS' ;
  DPSMAX  = 'MAXI' ACC 'AVEC'  MLDEFOR ;
  DEPST   = 'CHAN' 'TYPE' ZDEIF 'DEFORMATIONS' ;

  GR_U_FIN= 'MOT' 'INCONNU';

'SINON';
* cas standard --------------------------------------------------------
  ZMAT05=ZMAT;
  GEOM2 = GEOM1;
  'SI' IGRD;
    zdepm  = zdept '*' 0.5;
    'FORM' GEOM1 ;
     GEOM2m = 'FORM' zdepm  ;
     GEOM2  = 'FORM' zdepm  ;
    'FORM' GEOM1 ;
  'FINS';
*
*     calcul de l'increment de deformation elast totale  DEPST--------
*
* Pour les hypotheses de deformations non lineaires,
* on calcule l'increment de deformation sur le pas avec EPSI 'LINE'
* mais en se placant sur une configuration intermediaire (mi pas)
  iDEFOK = VRAI ;
  'SI' (('NEG' HYPDEF 'LINEAIRE') 'ET' IGRD);
    'SOUC' 0;
    'SI' ITCAR;
      GEOMIL  ZMATTEMP = 'FORM' ZDEPM ZMODLI (ETG ZMAT05) ;
*     A cause de FORM, ZMATTEMP n'est plus parallele...
      ZMATTEMP         = 'REDU' ZMATTEMP ZMODL ;
    'SINON';
      GEOMIL           = 'FORM' ZDEPM    ;
      ZMATTEMP = ZMAT05;
    'FINS';
    'SI' ('OU' IENDOM IVIDOM ICERAM);
      'SI' IHKSKIP ;
*   PERF-RAID : matrice de Hooke inutile pour EPSI (modele sans coque DST)
    WTAB . 'NB_HOOK_EVITE' = WTAB . 'NB_HOOK_EVITE' + 1 ;
        DEPST    = 'EPSI' 'LINE' ZMODL ZDEPT ZMAT05 ;
      'SINON' ;
        HOOKENDO = 'HOOK' ZMODL ZMAT05 ZVAR0 ;
        DEPST    = 'EPSI' 'LINE' ZMODL ZDEPT HOOKENDO ZMAT05 ;
        'DETR' HOOKENDO ;
      'FINSI' ;
    'SINON';
        DEPST            = 'EPSI' 'LINE' 'NOER' ZMODL ZDEPT ZMATTEMP ;
    'FINS';

    PASOK = 'SOUCI';

    'SI' ('NON' PASOK);
      'FORM'  geom1;
      DEPST = 'CAPI' HYPDEF DEPST ZMODL ZDEPM;
      'SI' (('MAXI' 'ABS' DEPST 'AVEC' MLDEFOR ) '>' 10);
        PASOK = VRAI;
      'FINS';
    'FINS';

    'SI' PASOK;
     MSGZ = 'CHAI' 'Deformation non lineaire non calculable' ;
      pastest = vrai;
      iDEFOK = FAUX ;
      'SI' autaug;
        mess ('CHAI' MSGZ ' : annulation sous-increment');
        iraug = vrai;
        itacc = 3;
        resmul = resmul * 0.25;
        HPP_EPS = FAUX;
        pastest = vrai;
        urg = vrai;
        itacc = 3;
        augmult = augmult * 1.4;
        ZDEPT = zdeptp ;
        zdep1 = (zdept - zdeptp) + (zdept 'EXCO' 'LX' 'NOID' 'LX');
        'SI' IGRD;
          'FORM' GEOM1 ;
        'FINS';
        'ITERER' etiq;
      'FINSI';
      MESS MSGZ ;
    'FINSI';
    'SI' PASOK;
      'MESS' 'deformation lineaire';
     'FINSI';
  'SINON';
    PASOK = vrai;
  'FINS';

** on n'a pas pu calcule DEPST : on utilise les deformations lineaires
  'SI' PASOK;
    'SI' IGRD;
      'FORM' GEOM1;
    'FINSI';
    'SI' ('OU' IENDOM IVIDOM ICERAM);
      'SI' IHKSKIP ;
*   PERF-RAID : matrice de Hooke inutile pour EPSI (modele sans coque DST)
    WTAB . 'NB_HOOK_EVITE' = WTAB . 'NB_HOOK_EVITE' + 1 ;
        DEPST    = 'EPSI' 'LINE' ZMODL ZDEPT ZMAT05 ;
      'SINON' ;
        HOOKENDO = 'HOOK' ZMODL ZMAT05 ZVAR0 ;
        DEPST    = 'EPSI' 'LINE' ZMODL ZDEPT HOOKENDO ZMAT05 ;
        'DETR' HOOKENDO ;
      'FINSI' ;
    'SINON';
       DEPST = 'EPSI' 'LINE' ZMODL ZDEPT ZMAT05;
    'FINSI';
   'SI' (('NEG' HYPDEF 'LINEAIRE') 'ET' IGRD);
    'MESS' 'Attention utilisation des deformations lineaires';
   'FINS';
  'FINS';

* calcul des increments de deformation et contrainte sur la configuration initiale
* en lagrangien total
  ZSIG0a = ZSIG0;
  'SI' (IGRD 'ET' iDEFOK);
    'SI' (LAG_TOT 'EGA' 1);
*  passage de depst et sig0 sur for0
      'FORM' GEOREF0;
      DEPST = 'CAPI' HYPDEF DEPST ZMODL ZU1 ;
      ZSIG0a = 'CAPI' HYPDEF ZSIG0 ZMODL ZU1 ;
    'FINSI';
*    passage de depst et sig0 sur geom2
    'SI' (LAG_TOT 'EGA' 2);
      DEPST = 'PICA' HYPDEF DEPST ZMODL ZDEPT ;
      ZSIG0a = 'PICA' HYPDEF ZSIG0 ZMODL ZDEPT ;
      'FORM'  geom2;
    'FINS';
    'SI' (LAG_TOT 'EGA' 3);
      DEPST = 'PICA' HYPDEF DEPST ZMODL ZDEPM ;
      ZSIG0a = 'PICA' HYPDEF ZSIG0 ZMODL ZDEPM ;
      'FORM'  geom2m;
    'FINS';
  'FINS';

*  ICI depst et zsig0a sont sur la configuration initiale en lagrangien total et
*      il faut soustraire les parties thermique et deformations imposees
  'SI' IPLAVI;
*    si thermoplastique on enleve e alpha *dt et d'autres termes
*    si le materiau depend de la temperature
    'SI' (ITHER 'OU' WTAB.'MATVAR') ;
       XXX1  = DEPST0 '*' COEPI;
       XXX2  = DEPST  '-' XXX1 ;
*       'DETR' DEPST ; 'DETR' XXX1;
       DEPST = XXX2 ;
    'FINS' ;

    'SI' LOGDEF  ;
       XXX1 = DDEFOR0 '*' COEPI;
       XXX2 = DEPST   '-' XXX1 ;
*       'DETR' DEPST ; 'DETR' XXX1;
       DEPST = XXX2 ;
    'FINS' ;

  'SINON';
*   en elasticite, on a directement l'increment de contrainte
    DSIGT= 'ELAS'  ZMODL DEPST ZMAT05 ;
    'SI' (('NON' ITHER) 'ET' WTAB.'MATVAR') ;
      XXXXX3 = 'ELAS' ZMODL ZSIG0a ZMAT05 ;
      XXXXX4 = 'ELAS' ZMODL ZSIG0a ZMAT1  ;
      XXDEFO = XXXXX4 '-' XXXXX3 ;
      DSIGTV = 'ELAS' ZMODL XXDEFO ZMAT05 ;
      DSIGT  =  DSIGT '+' DSIGTV ;
*      'DETR' XXXXX3 ; 'DETR' XXXXX4 ;
*      'DETR' XXDEFO ; 'DETR' DSIGTV ;
    'FINS' ;
*   si thermoplastique on enleve alpha *dT et d'autres termes
*   si le materiau depend de la temperature
    'SI' ITHER  ;
      XXX1 = DSIGT0 '*' COEPI;
      XXX2 = DSIGT  '-' XXX1;
      'DETR' DSIGT ; 'DETR' XXX1;
      DSIGT =  XXX2  ;
    'FINS';

    'SI' LOGDEF  ;
      XXX1 = DSI1  '*' COEPI;
      XXX2 = DSIGT '-' XXX1;
*      'DETR' DSIGT ; 'DETR' XXX1;
      DSIGT =  XXX2 ;
    'FINS';
  'FINS';
*
*  Calcul du gradient des deplacements (total) a la fin du pas de ------
*  temps par rapport a la configuration de reference GEOREF0 (initiale)
*  rappel : On a : ZDETOT = ZZD + ZDEPT ;
'SI' igrd;
'SI' ('NEG' GR_U_DEB 'INCONNU');
  'SI' (LAG_TOT 'NEG' 1); geot = 'FORM';
     'FORM' WTAB.FOR0; 'FINS' ;
   GR_U_FIN = 'GRAD' ZMODL ZMAT ZDETOT ;
   D_GR_U   =  GR_U_FIN '-' GR_U_DEB   ;
  'SI' (LAG_TOT 'NEG' 1); 'FORM' GEOT; 'FINS';
'SINON';
   GR_U_FIN = 'MOT' 'INCONNU';
'FINS';
'FINS';
*
  'SI' ZCCONV ;
    STAB12.'DT' = DTINI '*' COEPI ;
  'SINON' ;
    STAB12.'DT' = 0. ;
  'FINS' ;
*
*  si on est plastique ou viscoplastique on ecoule pour avoir-----------
*  le nouveau champ de contraintes
*
MMC = 0 ;
'SI'  IPLAVI ;

*...cas SSTE...
   'SI' ISSTE;
      ZRIKTA ZSIGF ZVARF ZDEIF =
                        'SSTE' ZMODL ZSIG0a ZVAR0 DEPST ZMATT
                               ZPREK NSSTE NITMA;
      zvar0 = ('EXCO' zvar0 ('ENLE' lnom ('DIME' lnom))) 'ET'
              ('EXCO' zvarf ssii);
      zvar0 = 'CHANGER' 'TYPE' zvar0 'VARIABLES INTERNES';

*...cas non SSTE...
   'SINON';
      ZSIG01=ZSIG0a;
      ZVAR01=ZVAR0;
      ZEPS01=ZEPS0;
**     defineto = DEPIN0 ; TABCONT='TABLE';

     'SI' (nsoincr 'NEG' 1);
        ZSIGM=ZSIG0a '/' 2;
     'FINS';

     'REPETER'  sousinc nsoincr;

       tsodeb='FLOT' stab12 .'DT'/nsoincr*( &sousinc - 1)+conti.'TEMPS';
       tsofin='FLOT' stab12 .'DT'/nsoincr*  &sousinc     +conti.'TEMPS';
      'SI' ('NON' ZCCONV) ;
         tsodeb = tsofin ;
      'FINS' ;

       che1= 'ADET' 'NOUV' ZMODL CHASANST tsodeb 'TEMP' tsodeb;
       che2= 'ADET' 'NOUV' ZMODL CHASANST tsofin 'TEMP' tsofin;

       'SI' ('EXIS' WTAB 'MOD_LIA') ;
          vite1 =  'CHAN' 'COMP' conti.'VITESSES' MLPRIM_LIA MVPRIM_LIA ;
          che1  = che1
            'ET' ('CHAN' 'CHAM' ZMODL vite1                'STRESSES')
            'ET' ('CHAN' 'CHAM' ZMODL conti.'DEPLACEMENTS' 'STRESSES');
          che2  = che2
            'ET' ('CHAN' 'CHAM' ZMODL  ZDETOT              'STRESSES')
            'ET' ('CHAN' 'CHAM' ZMODL  ZFCONST1            'STRESSES');
       'FINS';

       'SI' ither ;
         TETDE=STAB12.'TET1' + (DTETD *('FLOT' (&sousinc - 1)/nsoincr));
         TETDF=STAB12.'TET1' + (DTETD *('FLOT'  &sousinc     /nsoincr));
         che3 = 'CHAN' 'CHAM' ZMODL TETDE 'STRESSES' ;
         che4 = 'CHAN' 'CHAM' ZMODL TETDF 'STRESSES' ;
       'FINS' ;

       che1 = che1 'ET' che3 ;
       che2 = che2 'ET' che4 ;
       aa5  = DEPST '*' ( (&sousinc '-' 1.) '/' nsoincr);
       che5 = DEFT0 '+'   aa5;
       cc5  = DEPST '*' ('FLOT' &sousinc '/' nsoincr);
       che6 = DEFT0 '+'  CC5;
*On met les deformations en tete des champs pour COMP ('KTAN' 'PERT')
       che1 = che5 'ET' che1 ;
       che2 = che6 'ET' che2 ;
* pour les materiaux on garde toujours la valeur a la fin du pas
* et au debut du pas
*       'SI' ('NEG'  ZMAT1 'INCONNU') ;
          che1 = che1 'ET' ZMAT1 ;
*       'FINS' ;
*
*  Modele NON LINEAIRE UTILISATEUR + GRANDES DEFORMATIONS
*  On ajoute les gradients de deplacements qui seront transformes en
*  gradients de transformation avant appel a UMAT (dans WKUMA1.ESO)
       'SI' (( 'NEG' GR_U_DEB 'INCONNU') 'ET' igrd) ;
         gru1 = GR_U_DEB + ( D_GR_U * ('FLOT' (&sousinc-1) / nsoincr));
         che1 = che1 'ET' gru1 ;
         gru2 = GR_U_DEB + ( D_GR_U * ('FLOT'  &sousinc    / nsoincr));
         che2 = che2 'ET' gru2 ;
       'FINS';

       'SI' LNLOC ;
          CHE1A = che1 ;
          CHE2A = che2 ;
          ISTEP = 1 ;
          chm_z = 'ADET' 'NOUV' ZMODL CHASANST tsodeb 'STEP' ISTEP ;
          che11 = CHE1A 'ET' chm_z ;
          che11 = che11 'ET' ZSIG01 'ET' ZVAR01 'ET' ZEPS01 ;

          chm_z = 'ADET' 'NOUV' ZMODL CHASANST tsofin 'STEP' ISTEP ;
          che22 = CHE2A 'ET' chm_z ;
          che22 = che22 'ET' ZMATT ;

          'SI' PARTLOCA ;
            cha11 = 'ASSIS' 'TOUS' 'REDU' MODRELOC che11 ;
            cha22 = 'ASSIS' 'TOUS' 'REDU' MODRELOC che22 ;
            souci 0 ;
            cho22 = 'ASSIS' 'TOUS' 'COMP' MODRELOC cha11 cha22 ;
            isoucomp = souci ;
            cho2  = 'REDU' ZMODL ('ETG' cho22) ;
            cha11 = 0 ; cha22 = 0 ; cho22 = 0 ;
          'SINON';
             souci 0 ;
             cho2  = 'COMP' ZMODL che11 che22 ;
             isoucomp = souci ;
          'FINS' ;

          ZVARF = 'CHANGER' ('EXCO' cho2 com_var 'NOID')
                            'TYPE' 'VARIABLES INTERNES' ;
* NLOC ne traitant pas des champs //, on reduit tout au modele initial.
          'SI' (PARALLEL 'ET' ('NON' PARTLOCA)) ;
            ZVARF = 'REDU'  ZVARF ZMODLI ;
          'FINS' ;

********** boucle sous-iterations Helmholtz **************

*         donnees pour acceleration Helmholtz
*         periode de recours a  l acceleration ACT3 pour Helmholtz
          ZNACCEHL = 3;
*         NBR min de sous-iterations d Helmholtz  a faire avant d appeler ACT3 pour la 1ere fois
          ITDEPHL  = 4;

          'REPE' BIHL NIHL ;

            'SI' ('NEG'  WTAB.'NON_LOCAL' 'HELM');

*               cas non-local MOYE ou SB
                'SI' ('EGA' WTAB.'NON_LOCAL' 'SB') ;
                    MOD_SB =  WTAB.'NLOC_MODL' ;
                    CONTP = 'PRIN' ('REDU' ZSIG01 MOD_SB) MOD_SB ;
                    ZVARF = ZVARF '+' CONTP '+' WTAB.'NLOC_SB_REGU' ;
                'FINS' ;
                ZVARN = 'NLOC'  ZVARF  WTAB.'CONN'  ;
                ZVARN = 'CHANGER' ('EXCO' ZVARN com_var)
                'TYPE' 'VARIABLES INTERNES' ;

            'SINON' ;

*               cas non-local HELM Sellier Millard
                MOD_HELM =  WTAB.'NLOC_MODL' ;
                ZVARN = 'COPI' ZVARF ;
                ZVARF1 = 'REDU' ZVARN MOD_HELM ;
                LICOHELM = 'EXTR' ZVARF1 'COMP' ;
*               (re) lecture du materiau si init ou evolutif
                ZMATHL = PAS_MATE PRECED cho2 ;
*               (re) calcul des matrices de rigidite de Helmholtz Sellier
                PAS_HELM PRECED ZMATHL;
*              variable pour la liste des residus de convergence sur Helmholtz
                LIERR1='PROG';

*               ----- debut boucle sur les formulations de Helmholtz ---
*               on reste en lineaire si toutes les vari sont lineaires (sinon on aura des istep a 3)
                LOGHLIN = VRAI ;
                'REPE' BH NHELM ;
                    LOGHLIN=LOGHLIN 'ET' TAHELM . &BH. 'LINEAIRE' ;
*                   nom de la variable a delocaliser
                    LEMO = TAHELM . &BH. 'NOM' ;
*                   recuperation de la variable sur le modele mecanique
                    ZVAUX = 'EXCO' ZVARF1 LEMO 'SCAL';
                    ZVAUX2 = 'CHAN' 'NOEUD' MOD_HELM ZVAUX;
*                   projection sur le modele de Helmholtz associe
                    ZVAUX2 = 'PROI' TAHELM . &BH . 'H_MODELE'  ZVAUX2 'MINI';
*                   TRAC zvaux2 TAHELM . &BH . 'H_MODELE' titre ('CHAI' 'Vari a diffuser:'LEMO );
*                   la variable devient la source
                    FSOUR = 'SOUR' (TAHELM . &BH . 'H_MODELE') ZVAUX2 ;
*                    trac fsour (extr TAHELM . &BH . 'H_MODELE' 'MAIL') titre 'Source';
*                    trac (TAHELM . &BH . 'H_OPER')  titre 'H_Oper';
*                   ***  pour istep=1 *** 1ere etape non locale ***
                    'SI' ('EGA' &BIHL 1)  ;
*                       &BIHL est le compteur de sous iteration de Helmholtz
*                       il vaut forcement 1 si istep vaut 1, on fait la resolution classique
                        ZVNEW = 'RESO' (TAHELM . &BH . 'H_OPER') FSOUR ;
*                       sauvegarde pour possible acceleration ulterieure
                        TAHELM . &BH . 'XN' = ZVNEW ;
                    'SINON';
*                       recuperation de la solution de la sous iteration de Helmholtz precedente
                        ZVNEW = TAHELM . &BH . 'XN' ;
                    'FINSI';
*                   *** traitement non lineaire de la formulation ***
                    'SI' ( 'NON'  TAHELM . &BH . 'LINEAIRE' ) ;
*                      calcul du residu sur l evolution de la source
                        RESN = FSOUR - (TAHELM . &BH . 'H_OPER' '*' TAHELM . &BH . 'XN' );
*                      stockage du residu pour la mesure d erreur
                        RESN0='NOMC' RESN 'SCAL' ;
*                       normalisation des residus par l inverse de la capacite
*                       (calculee dans pas_helm.procedur)
                        ZERR0 = RESN0 '*'  (TAHELM . &BH . 'INV_CAPA' );
*                       erreur residu
                        ZERR2 = 'MAXI' ( 'ABS' (ZERR0) );
*                        'SI' ('EGA' &BIHL 1);
*                             TAHELM . &BH . 'RES1' = ZERR2;
*                        'FINSI';
*                       carre de norme du residu
*                        ZERR1 = 'XTX' ZERR0;
*                       Residu
*                        ZERR2 = (ZERR1)**0.5;
*                       normalisation de la source par la capacite
                        ZERR3 = FSOUR '*' (TAHELM . &BH . 'INV_CAPA' )('MOTS' 'Q') ('MOTS' 'SCAL') ('MOTS' 'SCAL');
*                       calcul erreur
                        ZERR6 = 'MAXI' ( 'ABS' (ZERR3) );
*                       carre de la norme de la source
*                        ZERR5 = 'XTX' ZERR3;
*                       norme de la source
*                        ZERR6 = ZERR5 **0.5;
*                       valeur maximale du champs
*                       ZERR3='MAXI' (TAHELM . &BH . 'XN') 'ABS';
*                       mess 'variable Helmholtz', LEMO;
*                       mess 'residu', ZERR2;
*                       mess 'norme de la source ', ZERR5;
*                       mess 'norme Source', ZERR3;
*                       on teste si la valeur maximale est capable de normaliser
                        'SI' (ZERR6 '>' 0.);
                            ZERR4 = ZERR2 '/' ZERR6;
                        'SINON';
                            ZERR4 = ZERR2;
                        'FINS';
*                       preparation acceleration
                        'SI' ( 'EGA' &BIHL 1 ) ;
                            TAHELM . &BH . 'H_RESO' = TAHELM . &BH . 'H_OPER' ;
                            FWOR = FSOUR * 0. ;
                            TAHELM . &BH . 'ACFP1'  = FWOR ;
                            TAHELM . &BH . 'ACFP2'  = FWOR ;
                            TAHELM . &BH . 'RESNP'  = FWOR ;
                            TAHELM . &BH . 'ACFP3'  = FWOR ;
                            TAHELM . &BH . 'ACFEP1' = FWOR ;
                            TAHELM . &BH . 'ACFEP2' = FWOR ;
                            TAHELM . &BH . 'CORREC' = 0.;
                        'SINON' ;
*                           acceleration de convergence act3
                            CORRECPHL = TAHELM . &BH . 'CORREC';
                            CORRECHL = 0;
                            ACFP0HL = RESN - TAHELM . &BH . 'RESNP' ;
                            ACFEP0HL = ACFP0HL - CORRECPHL ;
                            'SI' ('MULT' &BIHL ZNACCEHL)   ;
                                'SI' (&BIHL > ITDEPHL);
                                    CORRECHL   = 'ACT3'
                                    TAHELM . &BH . 'ACFEP2'
                                    TAHELM . &BH . 'ACFEP1'  ACFEP0HL
                                    TAHELM . &BH . 'ACFP3'
                                    TAHELM . &BH . 'ACFP2'
                                    TAHELM . &BH . 'ACFP1'   ACFP0HL ;
                                    RESN = RESN - CORRECHL ;
                                'FINS';
                           'FINS';
                            TAHELM . &BH . 'RESNP'  = RESN ;
                            TAHELM . &BH . 'ACFP3'  = TAHELM . &BH . 'ACFP2'  ;
                            TAHELM . &BH . 'ACFP2'  = TAHELM . &BH . 'ACFP1'  ;
                            TAHELM . &BH . 'ACFP1'  = ACFP0HL ;
                            TAHELM . &BH . 'ACFEP2' = TAHELM . &BH . 'ACFEP1' ;
                            TAHELM . &BH . 'ACFEP1' = ACFEP0HL ;
*                           calcul correction delta-sigma
                            DZVN = 'RESO' TAHELM . &BH . 'H_RESO' RESN;
                            ZVNEW = ZVNEW + DZVN ;
                            TAHELM . &BH . 'XN'   = ZVNEW ;
                        'FINSI' ;
                    'SINON';
*                       cette variable est traitee de facon lineaire
                        ZERR4=0.;
                    'FINSI';
                    ZVNEW1 = 'NOMC' ZVNEW 'SCAL' ;
                    ZVNEW = 'CHAN' 'CHAM' ZVNEW1 MOD_HELM 'STRESSES' 'VARIABLES INTERNES';
*                    trac zvnew mod_helm titre 'ZVNEW';
                    DZVN = ZVNEW '-' ZVAUX ;
                    DZVN = 'NOMC' DZVN LEMO ;
                    ZVARN = ZVARN '+' DZVN ;

*                   mess 'Erreur retenue', ZERR4;
*                   stockage de l erreur normalisee dans la liste des erreurs
                    LIERR1 = LIERR1 'ET' ('PROG' ZERR4);

*                   cas particulier TWL2 Sellier theorie WL2
                    'SI' ('EGA' LEMO 'TWL2') ;
                        ZSMAX = 'EXCO' ZVARF1 'SMAX' 'SMAX' ;
                        ZSMAN = 'MANU' 'CHML' MOD_HELM 'SMAX' ('MAXI' ZSMAX) 'TYPE' 'VARIABLES INTERNES' 'STRESSES' ;
                        ZVARN = ZVARN '+' ZSMAN '-' ZSMAX ;
                    'FINS' ;
*                   ---- cas particulier SER Sellier renfort avec gradient
*                   calcul GRADIENT des contraintes sur les renforts (SERi)
*                   stockage dans la VARI HELM1(&BH,2) du gradient selon l absc curviligne
                    MOPRE = 'EXTR' LEMO 1 3 ;
                    'SI'  ('EGA' MOPRE 'SHR');
                        NUME='EXTR' LEMO 4;
                        NDIM1='VALE' 'DIME';
                        'SI' ( 'EGA' NDIM1 3 );
*                           valeur SERi du pas precedent dans Helm(&bh,1)
                            LEMO1=CHAI 'H' &BH '1';
*                           valeur SERi du pas actuel
                            ZAUX1='EXCO' ZVARN LEMO 'SCAL';
                            ZVNEW1='NOMC' ZAUX1 'T' ;
                            ZVAUX1 = 'CHAN' 'NOEUD' MOD_HELM ZVNEW1;
                            ZVNEW2='PROI' TAHELM . &BH . 'H_MODELE' ZVAUX1 'MINI';
                            GRA1=GRAD TAHELM . &BH . 'H_MODELE' ZVNEW2;
                            GRA2=CHAN 'CHAM' 'NOEUD' GRA1 TAHELM . &BH . 'H_MODELE';
                            GRA3=PROI GRA2 MOD_HELM;
                            LMO3=EXTR GRA3 COMP;
                            NOM1=EXTR LMO3 1;
                            NOM2=EXTR LMO3 2;
                            NOM3=EXTR LMO3 3;
                            GRA11=EXCO NOM1 GRA3 'SCAL';
                            GRA22=EXCO NOM2 GRA3 'SCAL';
                            GRA33=EXCO NOM3 GRA3 'SCAL';
*                           recuperation vecteur direction de projection
                            LEMON1=CHAI 'VR' NUME '1';
                            NX1=EXCO LEMON1 ZMATHL 'SCAL';
                            NX1=CHAN 'NOEUD' NX1 MOD_HELM;
                            NX11=CHAN NX1 TYPE 'SCALAIRE';
                            LEMON2=CHAI 'VR' NUME '2';
                            NX2=EXCO LEMON2 ZMATHL 'SCAL';
                            NX2=CHAN 'NOEUD' NX2 MOD_HELM;
                            NX22=CHAN NX2 TYPE 'SCALAIRE';
                            LEMON3=CHAI 'VR' NUME '3';
                            NX3=EXCO LEMON3 ZMATHL 'SCAL';
                            NX3=CHAN 'NOEUD' NX3 MOD_HELM;
                            NX33=CHAN NX3 TYPE 'SCALAIRE';
*                           produit scalaire
                            ZVAUX3=(NX11*GRA11)+(NX22*GRA22)+(NX33*GRA33);
*                           stockage du gradient de epse dans YU2j
                            mot4=CHAI 'H' NUME '2';
                            zvaux5= 'NOMC' zvaux3 mot4;
                            zvaux6= 'CHAN' 'CHAM' zvaux5 MOD_HELM 'STRESSES' 'VARIABLES INTERNES';
*                     trac zvaux6 MOD_HELM titre '3D H2';
                            ZVAUX7 = 'EXCO' ZVARF1 MOT4 ;
                            DZVN = ZVAUX6 '-' ZVAUX7;
                            ZVARN = ZVARN '+' DZVN ;
                        'SINON';
*                           valeur SERi du pas precedent dans Helm(&bh,1)
                            LEMO1=CHAI 'H' &BH '1';
                            ZAUX1='EXCO' ZVARF1 LEMO1 'SCAL';
                            ZVNEW1='NOMC' ZAUX1 'T' ;
                            ZVAUX1 = 'CHAN' 'NOEUD' MOD_HELM ZVNEW1;
                            ZVNEW2='PROI' TAHELM . &BH . 'H_MODELE' ZVAUX1 'MINI';
                            GRA1=GRAD TAHELM . &BH . 'H_MODELE' ZVNEW2;
                            GRA2=CHAN 'CHAM' 'NOEUD' GRA1 TAHELM . &BH . 'H_MODELE';
                            GRA3=PROI GRA2 MOD_HELM;
                            LMO3=EXTR GRA3 COMP;
                            NOM1=EXTR LMO3 1;
                            NOM2=EXTR LMO3 2;
                            GRA11=EXCO NOM1 GRA3 'SCAL';
                            GRA22=EXCO NOM2 GRA3 'SCAL';
*                           recuperation vecteur direction de projection
                            LEMON1=CHAI 'VR' NUME '1';
                            NX1=EXCO LEMON1 ZMATHL 'SCAL';
                            NX1=CHAN 'NOEUD' NX1 MOD_HELM;
                            NX11=CHAN NX1 TYPE 'SCALAIRE';
                            LEMON2=CHAI 'VR' NUME '2';
                            NX2=EXCO LEMON2 ZMATHL 'SCAL';
                            NX2=CHAN 'NOEUD' NX2 MOD_HELM;
                            NX22=CHAN NX2 TYPE 'SCALAIRE';
*                           produit scalaire
                            ZVAUX3=(NX11*GRA11)+(NX22*GRA22);
*                           stockage du gradient de epse dans YU2j
                            mot4=CHAI 'H' NUME '2';
                            zvaux5= 'NOMC' zvaux3 mot4;
                            zvaux6= 'CHAN' 'CHAM' zvaux5 MOD_HELM 'STRESSES' 'VARIABLES INTERNES';
*                         trac zvaux6 MOD_HELM titr '2DH2';
                            ZVAUX7 = 'EXCO' ZVARF1 MOT4 ;
                            DZVN = ZVAUX6 '-' ZVAUX7;
                            ZVARN = ZVARN '+' DZVN ;
                        'FINSI';
                    'FINSI';
*                    ------fin du calcul des gradients  et Hessiens--------
                 'FIN' BH ;
*                 ------fin boucle sur les formulations de Helmholtz ---
            'FINS' ;

*            On rend ZVARN // si besoin :
            'SI' (PARALLEL 'ET' ('NON' PARTLOCA)) ;
                ZVARN = 'REDU' ZVARN ZMODL ;
            'FINS' ;

*            Recherche du residu maxi parmi les formulations non locales
             ISTEP0=ISTEP;
*            residu maxi de tous les Helmholtz actifs
             ZERR6='MAXI' LIERR1;

            'SI' ('EGA' &BIHL NIHL) ;
                'MESSAGE' ' SOUS ITERATION HELMHOLTZ CONVERGENCE FORCEE';
*                on indique au modele de mecanique que la sous
*                iteration de Helmholtz est achevee
                 ISTEP = 2 ;
            'SINON' ;
                'SI' ((( ZERR6 '<' PRECHL ) 'ET' ('NEG' ISTEP 1)) 'OU' LOGHLIN ) ;
*                   on indique au modele de mecanique que la sous
*                   iteration de Helmholtz est achevee
                    ISTEP = 2 ;
                'SINON';
*                   on indique au modele de mecanique que les sous
*                   iterations de Helmholtz continuent
                    ISTEP = 3 ;
                'FINS';
            'FINS' ;
*
            'SI' ('EGA' ISTEP0 1);
                 mess1=chai ' SOUS ITERATION HELMHOLTZ:' &BIHL  ' ISTEP:' ISTEP0 ;
            'SINON';
                 mess1=chai ' SOUS ITERATION HELMHOLTZ:' &BIHL  ' ISTEP:' ISTEP0 ' CRITERE:' ZERR6;
            'FINSI';
            'MESSAGE' mess1 ;
*
             chm_z = 'ADET' 'NOUV' ZMODL CHASANST tsodeb 'STEP' ISTEP ;
             che11 = CHE1A 'ET' chm_z ;
             che11 = che11 'ET' ZSIG01 'ET' ZVARN 'ET' ZEPS01 ;

             chm_z = 'ADET' 'NOUV' ZMODL CHASANST tsofin 'STEP' ISTEP ;
             che22 = CHE2A 'ET' chm_z ;
             che22 = che22 'ET' ZMATT ;

            'SI' PARTLOCA ;
               cha11 = 'ASSIS' 'TOUS' 'REDU' MODRELOC che11 ;
               cha22 = 'ASSIS' 'TOUS' 'REDU' MODRELOC che22 ;
               souci 0 ;
               cho22 = 'ASSIS' 'TOUS' 'COMP' MODRELOC cha11 cha22 ;
               isoucomp = souci ;
               cho2  = 'REDU' ZMODL ('ETG' cho22) ;
               cha11 = 0 ; cha22 = 0 ; cho22 = 0 ;
            'SINON';
               souci 0 ;
               cho2  = 'COMP' ZMODL che11 che22 ;
               isoucomp = souci ;
            'FINS' ;
*
            'SI' ('EGA'  ISTEP 2 );
                'QUITTER' BIHL;
            'FINS';
*          fin de boucle sous-iterations
             ZVARF = 'CHANGER' ('EXCO' cho2 com_var 'NOID') 'TYPE' 'VARIABLES INTERNES' ;
*            NLOC ne traitant pas des champs //, on reduit tout au modele initial.
            'SI' (PARALLEL 'ET' ('NON' PARTLOCA)) ;
                ZVARF = 'REDU'  ZVARF ZMODLI ;
            'FINS' ;
          'FIN' BIHL ;
*      ------ fin des sous iterations de Helmholtz ------

*         Un peu de menage
          CHE1A = 1 ;
          CHE2A = 1 ;
          ZVARN = 1 ;
          ZVARF = 1 ;
          chm_z = 1 ;
          LIERR1 = 1 ;
          ZMATHL = 1;
       'SINON' ;
           che11 = che1 'ET' ZSIG01 'ET' ZVAR01 'ET' ZEPS01 ;
           che22 = che2 'ET' ZMATT ;
*           si ( 'EXIST'  PRECED 'ECRIT' ) ;
*           'FINS';
           'SI' PARTLOCA;
               cha11 = 'ASSIS' 'TOUS' 'REDU' MODRELOC che11 ;
               cha22 = 'ASSIS' 'TOUS' 'REDU' MODRELOC che22 ;
               souci 0 ;
               cho22 = 'ASSIS' 'TOUS' 'COMP' MODRELOC cha11 cha22 ;
               isoucomp = souci ;
               cho2  = 'REDU' ZMODL ('ETG' cho22) ;
               cha11 = 0 ; cha22 = 0 ; cho22 = 0 ;
           'SINON';
*          'SI' ( 'EXIS' PRECED 'ECRIT' );
*          'FINS';
              souci 0 ;
              cho2  = 'COMP' ZMODL che11 che22 ;
              isoucomp = souci ;
           'FINS';
       'FINS' ;
       si isoucomp ;
         mess ' Souci dans le comportement' ;
       fins ;
   ZSIGF = 'CHANGER' ('EXCO' cho2 com_sig 'NOID')'TYPE' 'CONTRAINTES' ;
   ZVARF = 'CHANGER' ('EXCO' cho2 com_var 'NOID')'TYPE' 'VARIABLES INTERNES' ;
   ZDEIF = 'CHANGER' ('EXCO' cho2 com_dei 'NOID')'TYPE' 'DEFORMATIONS INELASTIQUES' ;

       'SI' ('EXIS' WTAB 'MOD_LIA') ;
         ZFLIA = 'EXCO' cho2 'FLIA' 'NOID';
       'FINS' ;
       'SI' (nsoincr 'NEG' 1);
         'SI' (&sousinc 'EGA' nsoincr);
           aaa1=zsigf/2;
           aaa2=aaa1+ zsigm;
           'DETR' aaa1; 'DETR' zsigm;
           zsigm=aaa2;
         'SINON';
           aaa2=zsigf+ zsigm;
           'DETR' zsigm;
           zsigm=aaa2;
         'FINS';
       'FINS';
       zsig01 = zsigf ;
       ZVAR01 = ZVARF ;
       ZEPS01 = ZDEIF ;
**       defineTO=ZDEIF+defineTO;
     'FIN' sousinc;
*
* Matrice tangente par perturbation evaluee pour la derniere iteration calculee
* A voir : cas grand deplacement ZSIGF et ZMAT, cas poreux et thermique ZSIGF
     'SI' (IKTAN 'ET' IPERT) ;
       Z1COMP = che11 ;
       Z2COMP = che22 'ET' ZSIGF ;
     'FINS' ;
*
     'SI' (nsoincr 'NEG' 1);
* pour tenir compte de ce que le travail de la correction est 1/2 FU,
* on la multiplie par 2
          CONT  =(ZSIGF + ZSIG0a)          ;
          ZSIGM = ZSIGM*(2. /nsoincr)     ;
          ZSIGM = ZSIGM - CONT            ;
          BZSIGM='BSIG' ZMODL ZSIGM ZMAT;
**        ZDEPSPL=defineTO - ZEPS0 ;
     'FINS';
* on enleve toutes traces de champs inutiles
     zsig01=1;ZVAR01=1;ZEPS01=1;
**     defineTO=1; tabcont =1;

*     le fin d'en dessous est le fin de "si isste ... sinon ... finsi"
*     on est encore dans "si iplavi ... finsi"
   'FINS';
*...fin du si ISSTE sinon ...
*
*        cas particulier poreux et thermique
*
   'SI' ITHER;
     'SI' POR1 ;
        ZSIGF = ZSIGF - ( COEPI * DMSRT0 ) ;
     'FINS';
   'FINS';
*
*  max de epse pendant l'iteration
*  nbre de points qui ont une evolution non lineaire
*
   'SI' ('EGA' WTAB.'MOVA' 'RIEN') ;
**    EPSM = 0.; DPSMAX=0.;
      MMC=0;
   'SINON';
      XXX1 = 'EXCO' (WTAB.'MOVA') ZVARF ;
**    EPSM = 'MAXI' XXX1 ;
      ACC = 'ABS' ( XXX1 - ACC0 ) ;
**    'DETR' XXX1 ;
      MMC = 'MASQUE' ACC 'SUPERIEUR' 1.D-10 'SOMME' ;
      'SI' (MMC > MMCMAX) ; MMCMAX = MMC ; 'FINS' ;
**    DPSMAX = 'MAXI' ACC ;
   'FINS';
*
*  dans le cas SANS  plasticite,viscoplas,endommagement
*  on calcule directement le nouveau champ de contrainte
*
'SINON' ;
    ZSIGF = ZSIG0a + DSIGT ;
'FINS';
* si il y a lieu transport sur configuration debut de pas
'SI' (IGRD 'ET' iDEFOK) ;
      'SI' (LAG_TOT 'EGA' 1);
**        ZSIG0 =  'PICA' HYPDEF ZSIG0 ZMODL ZU1;
        ZSIGF =  'PICA' HYPDEF ZSIGF ZMODL ZU1;
        DEPST =  'PICA' HYPDEF DEPST ZMODL ZU1;
        'FORM' GEOM1;
      'FINS';
      'SI' (LAG_TOT 'EGA' 2);
        'FORM' GEOM1;
**        ZSIG0 =  'CAPI' HYPDEF ZSIG0 ZMODL ZDEPT;
        ZSIGF =  'CAPI' HYPDEF ZSIGF ZMODL ZDEPT;
        DEPST =  'CAPI' HYPDEF DEPST ZMODL ZDEPT;
      'FINS';
      'SI' (LAG_TOT 'EGA' 3);
        'FORM' GEOM1;
**        ZSIG0 =  'CAPI' HYPDEF ZSIG0 ZMODL ZDEPM;
        ZSIGF =  'CAPI' HYPDEF ZSIGF ZMODL ZDEPM;
        DEPST =  'CAPI' HYPDEF DEPST ZMODL ZDEPM;
      'FINS';
    'FINS';
*
 DPSMAX = 'MAXI' 'ABS' DEPST 'AVEC' MLDEFOR ;
*DPSMAX = 'MAXI' 'ABS' (DEPST PRIN ZMODL) 'AVEC' MLDPRIN ;
    DEPSTI = DEPST;
'SI' (IGRD 'ET' ('NON' HPP_EPS) 'ET' ('EGA' LAG_TOT 1));
    'FORM' georef0;
     DEPSTI = 'CAPI'  ZU1 HYPDEF DEPST ZMODL;
'FINSI';
EPSMX   = DEFT0 '+' DEPSTI;
EPSM   ='MAXI' 'ABS' EPSMX 'AVEC' MLDEFOR ;
'DETR' EPSMX;
'SI' (IGRD 'ET' ('NON' HPP_EPS) 'ET' ('EGA' LAG_TOT 1));
     'FORM' geom1;
     'DETR' DEPSTI;
'FINSI';
*
*--- CAS 4 -------------------------------------------------------------
*  on  determine les forces resultantes de l'increment------------------
*
*   en grand deplacements on transforme pi en sigma
*   on met a jour les coordonnees
*
 ZMAT2=ZMAT;

  'SI' (IGRD 'ET' (('NON' HPP_EPS) 'OU' (IT > 0 )));

  ref = 40;
  coefmul = 1.d0 / (DPSMAX + XPETIT);

    'SI' (((coefmul < ref) 'OU' PASUNIL) 'ET' AUTAUG);

*   il faut reduire d'urgence les deplacements ;
    zdeptlx = zdept 'EXCO' 'LX' 'NOID' 'LX';
    coefmul = 0.0;
    'SI' ((red_urg > 3) 'ET' ('NON' instab)); resmul = resmul * 0.25;
           'FINSI';

      augmult = augmult * 1.5;
      urg = vrai;
     'SI' autaug;    iraug = vrai; 'FINSI';
* on garde zdep1d pour le calcul des coeff d'acceleration
       zdep1d = zdep1 'ENLE' 'LX';
     'SI' AUTAUG;
*  reprise du vieux zdept. Tout le reste est recalcule a chaque pas de etiq
      ZDEPT = zdeptp ;
      zdep1 = (zdept - zdeptp) + (zdept 'EXCO' 'LX' 'NOID' 'LX');
     itacc = 3;
     'FINSI';
     'SI' ((dpsmaxp < 5e-4) 'OU' (dpsmaxp > 2e-2 )) ;
         PASTEST=VRAI;
     'SINON';
     'SI' (red_urg > 4);   nconvr = vrai; 'FINSI';
         tabconv . it = 1;
     'FINSI';
    'SI' (RED_URG > 2 )  ;
     'SI' ('NON' nonconv);  'MESS' ' non convergence detectee 1' ;
      ZMAXIT =     IT+5;
     'FINS';
     nonconv = vrai;
    'FINS';
      'MESS' 'annulation du sous-increment: trop grand ' dpsmax;
      itacc = 3;
      'SI' (resmul < 0.99); resmul = resmul * 0.25; 'FINSI';
      HPP_EPS = FAUX;

      RED_URG = RED_URG + 1;
     'SI' ((dpsmaxp > 1.8d-2) 'ET' (augmult > 100));
         zprecnc= 2.1d-2;
       'SI' (zmaxit > it) ;
           zmaxit = it - 1;
       'FINSI';
     'FINSI';
     'SI' ((zmaxit > it) 'ET' (RED_URG > 4 )); ZMAXIT = IT-1; 'FINS';
     'ITERER' etiq;
    'FINS';
  'FINS';

'FINS';

*  au dessus le finsi du si  fefp sinon(Update or total lagrangian) ----
*FOR_MECA
'FINSI' ;
*
*  fin de boucle de reduction de zdept
*---------------------------------------------------------------------

'SI' WTAB.'FOR_MECA' ;
'SI' ('NON' IFEFP);
  'SI' (IGRD 'ET' ('NON' HPP_EPS));
  zdepf = zdept ;
*    grands deplacements -----------------------------------------------

     ZSIGG ='PICA' HYPDEF ZMODL ZSIGF ZDEPT ;

    'SOUC' 0;
    'SI' ITCAR ;
       GEOM2 ZMAT2 ='FORM' ZDEPF ZMODLI ZMATI;
       ZMAT2       ='REDU' ZMAT2 ZMODL       ;
    'SINON';
       GEOM2 = 'FORM' ZDEPF ;
    'FINS';
*HHO : Modifications appel a BSIGMA (ajout du champ de deplacements necessaire en HHO)
     FEQU2 = 'BSIG' 'NOER' ZMODL ZSIGG ZMAT2 ZDETOT ;
     PASOK = 'SOUCI';
     'SI' PASOK;
       'FORM' geom1;
       MESS 'BSIG impossible : tentative sur geom1' ;
       FEQU2 = 'BSIG' 'NOER' ZMODL ZSIGF  ZMAT2  ;
       pastest = vrai;
     'SINON' ;
       ZSIGF = ZSIGG ;
     'FINSI';

    'SI' IRCON;
       FEQU2 = FEQU2 '+'('REDU' MAI_CONS (RIG_CONS '*' ZDETOT));
    'FINS';
    'SI' LOGPRE ;
      ZDFINI = ZDFINI - ZFPEXTF ;
      'DETR' ZFPEXTF ;
      ZPEXTF = 'TIRE' WTAB.'CHARGEMENT' 'PRES' TI ;
      'SI' ('EXIS' WTAB 'MAT_PRE') ;
        ZFPEXTF = 'BSIG' MOP ZPEXTF ('REDU' ZMATFI MOP) ;
      'SINON' ;
        ZFPEXTF = 'BSIG' MOP ZPEXTF ;
      'FINS' ;
      ZDFINI = ZDFINI + ZFPEXTF ;
    'FINS' ;

    'SI' ADDISEC2;
       ZDFINI   = ZDFINI '-' FP22 ;
    'FINS';
    'SI' WTAB.'PROCEDURE_CHARMECA';
       TFP22    = CHARMECA PRECED WTAB.'T_FINAL' ;
       ADDISEC2 = FAUX;
      'SI' ('EXIS'  TFP22 'ADDI_SECOND') ;
         FP22     = TFP22.'ADDI_SECOND'  ;
         ZDFINI   = ZDFINI + FP22        ;
         ADDISEC2 = VRAI                 ;
      'FINS';
      'SI' IPILOT ;
         COEFP =(COEPI*DMZPRES+ MZPRES0)/(MZPRES+XPETIT);
      'FINS' ;
    'FINS' ;
    'FORM' GEOM1 ;
*
*  dans les autres  que IGRD cas on calcule fequ2(desequilibre)---------
*
  'SINON';
*HHO : Modifications appel a BSIGMA (ajout du champ de deplacements necessaire en HHO)
     FEQU2 = 'BSIG' ZMODL ZSIGF ZMAT ZDETOT ;
    'SI' IRCON;
        FEQU2 = FEQU2 '+' ('REDU' MAI_CONS (RIG_CONS '*' ZDETOT));
    'FINS';
    'SI' ADDISEC2;
       ZDFINI = ZDFINI '-' FP22 ;
    'FINS';
    'SI' WTAB.'PROCEDURE_CHARMECA';
       TFP22  = CHARMECA PRECED WTAB.'T_FINAL' ;
       ADDISEC2 = FAUX;
      'SI' ('EXIS' TFP22 'ADDI_SECOND');
         FP22     = TFP22.'ADDI_SECOND';
         ZDFINI   = ZDFINI '+' FP22    ;
         ADDISEC2 = VRAI               ;
      'FINS';
      'SI' IPILOT ;
         COEFP =(COEPI*DMZPRES+ MZPRES0)/(MZPRES+XPETIT);
      'FINS' ;
    'FINS' ;
  'FINS';
'FINS';
* le finsi au dessus est le finsi de si iefefp
       'SI' ('EXIS' WTAB 'MOD_LIA') ;
          FLIAI = 0.d0 ;
         'SI' ('EGA' ('TYPE' ZFLIA) 'MCHAML  ') ;
            NZLIA = 'EXTR' ZFLIA 'NBZO' ;
          'SI' (NZLIA > 0) ;
           'REPETER' BZLIA NZLIA ;
* un point support par zone - 2010 kich
        FLIAI= FLIAI +
  ('EXCO' ('EXTR' ZFLIA 'FLIA' &BZLIA 1 1) MLDUAL_LIA 'NOID') ;
           'FIN' BZLIA ;
          'FINS' ;
           FEQU2 = FEQU2 + FLIAI ;
         'FINS' ;
       'FINS' ;
*

'SI' ISOL  ;
        'SI' IPLAVI ;
           ZMATPF = 'CHANGER' ('EXCO' cho2 com_maa 'NOID')
           'TYPE' 'CARACTERISTIQUES';
           MA_POR = 'REDU' ZMATPF MO_POR ;
        'FINS';
        XXX1 = 'GRAD' MO_POR ZDETOT MA_POR 'CONS'  ;
        XXXS = (1. - WTAB.'TETA' )*GRAP0 + (WTAB.'TETA'*XXX1) ;
        XXX2 = STAB12.'DT' * ('GNFL' MO_POR XXXS) ;
        XXX3 = FEQU2 ;
        FEQU2 = XXX3 - XXX2;'DETR' XXX3; 'DETR' XXX2 ;
*       'DETR' XXX1; 'DETR' XXXS  ;
'FINS' ;

* si on a fait de la sous incrementation ( a cause du dynamique
'SI' ( nsoincr > 1);
  FEQU2 = FEQU2 + BZSIGM ;
'FINS';

*FOR_MECA
'FINSI' ;
*
*   forces qui varient en dynamique------------------------------------
*                       b*sigma + 4/h2*m*dx
*                               + 2/h *c*dx
*
'SI' IDYN;
   'DETR' FFDYN;
    FFDYN = 'COPIER' FEQU2 ;
    XXX1 = WTAB.'MASSE' * ZDEPT;
    XXX3 = 4. * UNSURH * UNSURH  * XXX1 ;
   'DETR' XXX1;
   'SI' ('EXIS' WTAB 'MOD_LIA');
     'SI' (NZLIA > 0) ;
        XVIT2 = 0.d0;
       'REPETER' BZLIA NZLIA ;
          XVIT2 = XVIT2 +
  ('EXCO' ('EXTR' ZFLIA 'FLIA' &BZLIA 1 1) MVPRIM_LIA MLPRIM_LIA 'NOID') ;
       'FIN' BZLIA ;
     'FINS' ;
   'FINS' ;
   'SI' ( 'NEG' WTAB.'AMORTISSEMENT' 'INCONNU') ;
      XXX1 = WTAB.'AMORTISSEMENT' * ZDEPT;
      XXX2 = 2. * UNSURH * XXX1 ;
      XXX4 = XXX3 + XXX2 ;
     'DETR'  XXX3 ;
     'DETR'  XXX1 ;
     'DETR'  XXX2 ;
      XXX3 = XXX4 ;
   'FINS' ;
    XXX4 = FEQU2 + XXX3;
   'DETR' XXX3         ;
   'DETR' FEQU2        ;
    FEQU2 = XXX4       ;
*
*         forces correctrices en cas de liaison persistante :
*  on veut avoir (forces inertielles + forces visqueuses) compatibles
*  avec accelerations et vitesses relatives nulles aux points de contact
*  (pendant le contact). On modifie fequ2 ---> residu et l'iteration sui
*  fournira les bonnes reactions
*
  'SI' IMPLP;
     VADD XXX3 = VITETFOR ZRAID_T  WTAB  FCORU ;
     XXX4      = FEQU2 - XXX3;
    'DETR' XXX3      ;
    'DETR' FEQU2     ;
     FEQU2     = XXX4;
  'FINS' ;
'FINS';
*     mess ' zdept ';list (resu  zdept);
*
*   preparation des tests de convergence.-------------------------------
*   on calcule la plus grande composante de  f + freac(sans flx)
* fequi est de plus le second membre que l'on veut equilibrer
*  ne pas oublier d'y ajouter les forces suiveuses
*      test de convergence:   equilibre de la structure
*      il se fait sur residc, on calcule auusi le nouveau second
* membre qui est residc moins les forces d'appuis, il faut aussi
* remettre a jour les FLX qui travaillent eux en incremental
* pour les depl imposes cela revient a imposer un increment nul et
* pour les rela unilaterales cela revient a mettre a jour le jeu
*
'SI' WTAB.'FOR_MECA' ;
 RESIDUP= RESIDU ;
 XXX1   = ZFEXT  ;
'SI' ADDISEC2 ;
   XXX2= XXX1 '+' (FP22 '*' COEFP) ;
   XXX1= XXX2                  ;
'FINS';

'SI' (LOGPRE 'ET' IGRD) ;
  XXX2 = XXX1 '+' (ZFPEXTF '*' COEFP) ;
  XXX1 = XXX2 ;
'FINS' ;


     'SI' LOGPIL ;
*    Modification du chargement
        XXX1 = XXX1 '+' (ETA '*' ZFPILIN);
    'FINSI' ;


* forces exterieures(+ autres termes p.ex. en dynamique ou en poreux)
* sans reactions
*  - forces interieures(+ autres termes p.ex. en dynamique ou en poreux)

RESIDU = XXX1 - FEQU2;
* forces exterieures(+ autres termes p.ex. en dynamique ou en poreux)
* + reactions
FEQUI =  XXX1 - FCORF;

* forces exterieures(+ autres termes p.ex. en dynamique ou en poreux)
* + reactions - forces interieures(+ autres termes p.ex. en dynamique
* ou en poreux)
RESIDC=  RESIDU - FCORF;

* relations unilaterales et autres(Reinitialisation)
*'SI' IMPO12 ;
       XXX1 = RESIDU +ZFLX1;'DETR' RESIDU;
       RESIDU = XXX1 - FCORU;'DETR' XXX1;
      'SI' (IPILOT 'ET' IMPO12);
               XXX3 =COEPI-1.D0*DIMPOV;
               XXX1= RESIDU + XXX3;'DETR' RESIDU;RESIDU=XXX1;
              'DETR' XXX3;
      'FINS';
*'FINS';
XXX1 = FEQUI - ZFPLO;
ZFAU1 = 'ABS'  XXX1  ;'DETR' XXX1;
XAUXF = 'MAXI' ZFAU1 'ABS' 'SANS' MXMFLX;
'SI' TSTMOM ;
   XAUXM = 'MAXI' ZFAU1 'ABS' 'AVEC' MXMYMZ;
'FINS';
'DETR' ZFAU1;
**'DETR' ZDETOT ;
COEINC = 0.D0;
*FOR_MECA
'FINSI' ;
*
* Calcul du nouveau alpha pour le pilotage -----------------------------
*
'SI' (IPILOT 'ET' PASTEST) ;
*   seulement si on a accelere
*
       'SI' (WTAB.'VISCOPLASTIQUE' 'OU' WTAB.'VISCODOMMAGE'
       'OU' ITHER 'OU' LOGDEF );
             'MESS' 'ALPHA calcule avec la norme de l increment' ;
              COEPI0 = COEPI;
              COEPI = 'MINI' ('PROG' 1. (STAB12.'AUTOCOEF' * al1) );
*           les acceleration auront lieu toutes les 4 pas
              COEINC =COEPI0 - COEPI ;
*              ITACC=3 ;
      'SINON' ;
*          les multiplicateurs sont affectes d'un signe -
              XXX1 = 'EXCO' ZDEPT 'LX' 'NOID' 'LX';
              XXX2=2.D0 * XXX1;'DETR' XXX1;
              XXX4=ZDEPT - XXX2;'DETR' XXX2;
              XXX3=DFEXT0L *(  COEPI * ( 1 - AL1 ));
              XXX2 = XXX3 + RESIDC;'DETR' XXX3;XXX5=RESIDNOR* 1.D0;
             'SI' IMPO12 ;
                   XXX1= COEPI * ( 1 - AL1 ) * DIMPO12;
                   XXX3= XXX2  - XXX1;'DETR' XXX1;'DETR' XXX2;
                   XXX2 = XXX3;XXX1 = XXX5 - DIMPO12;
                  'DETR' XXX5; XXX5=XXX1;
             'FINS';
             'SI' ADDISEC2;
                  XXX7  = XXX5 '+' FP22 ;
                  CORFR = XXX7 '-' FP022;
             'FINS';

              XX3 ='XTY' RESIDNOR XXX4 MLDUAL MLPRIM;
              XX1 ='XTY' XXX2     XXX4 MLDUAL MLPRIM;
              XX2 ='XTY' XXX5     XXX4 MLDUAL MLPRIM;
              COEINC =  XX1 '/' XX2;
             'DETR' XXX4;'DETR' XXX2;'DETR' XXX5;
              COEPI0 = COEPI;
              COEPI = 'MINI' ('PROG' (COEPI0 - COEINC) 1.d0 ) ;
             'SI' ((COEPI0 'EGA' 1d0) 'ET' (AL1 'EGA' 1D0));
                   COEPI = 1d0;
             'FINS';
              COEINC = COEPI0 - COEPI;
             'SI' ((COEPI 'EGA' 1d0) 'ET' (COEPI0 'NEG' 1d0));ITACC=3;
             'FINS';
     'FINS' ;
* mise a jour de ZFEXT en fonction de coepi on ne met a jour
* de maniere definitive que les forces, les modifs sur les FLX
* pour reimposer les conditions de deplacements ne
* sont faites que pour le premier residu attention au cas des jeux
* sortis de IMPO qu'il ne faut pas toucher
       XXX3 = DFEXT0F '*' COEINC ;
       XXX2 = ZFEXT '-' XXX3;'DETR' XXX3;
      'DETR' ZFEXT; ;ZFEXT = XXX2;
      'SI' ADDISEC2;
         MZPRES2=COEPI   '*' DMZPRES '+' MZPRES0;
         COEFP  =MZPRES2 '/'(MZPRES  '+' XPETIT);
         XXX3 = FP22  '*' COEFP;
         XXX2 = ZFEXT '+' XXX3;
        'DETR' XXX3;
      'FINS';
       XXX1= XXX2 - FEQU2;
      'DETR' RESIDU;XXX3=COEPI * DFEXT0L; XXX4= XXX3 + FLXINI;
      'DETR' XXX3; XXX3 = XXX4 - FCORU;'DETR' XXX4;
       RESIDU = XXX1 + XXX3;'DETR' XXX3;
       'SI' IMPO12;
              XXX3= 1.D0 - COEPI * DIMPO12;
              XXX2= RESIDU + XXX3; 'DETR' RESIDU;
              RESIDU = XXX2; 'DETR' XXX3;
      'FINS';
      'SI' (ITHER  'OU' WTAB.'MATVAR') ;
              XXX3 = FTHE * COEINC;
              XXX2= RESIDU + XXX3; 'DETR' RESIDU;
              RESIDU = XXX2; 'DETR' XXX3;
      'FINS';
      'SI' LOGDEF ;
              XXX3 = FDEF * COEINC;
              XXX2= RESIDU + XXX3; 'DETR' RESIDU;
              RESIDU = XXX2; 'DETR' XXX3;
      'FINS';

       STAB12.'AUTOCOEF'= COEPI ;
*
*       mise a jour des termes force de l'acceleration de convergence
      'SI' WTAB.'PROCEDURE_CHARMECA';
            XXX1= COEINC * CORFR;'DETR' CORFR;
      'SINON';
            XXX1=(COEINC * RESIDNOR) 'ENLE' FLX;
      'FINS';

       XXX3 = ACFEP2 - XXX1 ;
       XXX4 = ACFEP1 - XXX1 ;
      'DETR' ACFEP2; ACFEP2= XXX3;
      'DETR' ACFEP1; ACFEP1= XXX4;
      'DETR' XXX1;

*      test si on est sur une branche descendante
*            corprec est la correction de precision
       CORPREC = 1. ;
      'SI' (COEPI < 0) ;
           CORPREC = ZPRECD / ZPREC;
          'MESS' 'Chargement decroissant. Critere divise par ' CORPREC;
      'FINS';
      'SI' ISNPB ;
          'SI' ( COEPI > 0) ;
                ISNPB = FAUX ;
          'FINS' ;
      'FINS' ;
      'MESS' 'nouvelle valeur de ALPHA' COEPI;
'FINS' ;
*
'SI' WTAB.'FOR_MECA' ;
'DETR' FCORU;

XNUMF = 'MAXI' RESIDC 'ABS' 'SANS' MXMFLX;
XNUMG = 'MAXI' ((ZDEPL '-' ZDEPLP) '*' ZCLIM) 'ABS';
XNUMF = 'MAXI' ('PROG' XNUMF XNUMG);
*
'SI' TSTMOM ;
       XNUMM= 'MAXI' RESIDC 'ABS' 'AVEC' MXMYMZ;
'FINS';
*
'SI' IFTOL;
       ZPREC =  ZFTOL ;
       XDENO  = 1.;
'FINS';
'SI' IMTOL;
      ZPRECM = ZMTOL ;
      XDENOM = 1.;
'FINS';
*
XCONV = XNUMF/ XDENO ;
** mess 'xnumf' xnumf 'xdeno' xdeno;
XCONVM = XCONV ;
*
'SI' TSTMOM ;
      'SI' ( '<'   XAUXM  XPETIT ) ;
             XCONVM=0.;
      'SINON';
            'SI' ( <   (XAUXF / XAUXM)  1.D-12 ) ;
                  XCONV=0.;
            'FINS';
             XCONVM =XNUMM/ XDENOM ;
      'FINS';
'FINS' ;

*  residu etant calcule on met a jour zdep1d qui doit etre coherent avec residu
zdep1d = zdep1 'ENLE' 'LX';
**
*FOR_MECA
'FINSI' ;


'SI' WTAB.'NVSTNL'                               ;
    ZFLCONV = FAUX                               ;
    mofofl = 'EXTR' WTAB.'MOD_NSL' 'FORC   '     ;
      dvit2 = 'XTX'  ('EXCO' ZVIF1 movifl)       ;
      err  = dvit2 '**' 0.5                      ;
      res2 = 'XTX' ('EXCO' Resnsl mofofl 'NOID') ;
      errres2  = res2 **0.5                      ;
  'MESSAGE' ' ite:' IT*26 ' errdu:' err*52 ' errres:' errres2*78  ;
   'SI' (err < 1.d-9); ZFLCONV = VRAI ;   'FINSI';
'FINSI' ;
*
*---------------------------------------------------------------------
*                resume de l'iteration
*---------------------------------------------------------------------
*
'SI' WTAB.'FOR_MECA' ;
           'MESS'  IT*13 MMC*26 XCONV*39  DPSMAX*52 EPSM*65 XCONVM*78  ;

* Faut-il reactualiser K ? -----------------------
* Faut-il detruire RESIDUP ?
DETRRES = vrai;

* en grand deplacement, on teste la decroissance du residu
'SI' (DETRRES); 'DETR' RESIDUP; 'FINS';
* on quitte si tout s'est bien passé ...

********************************************************************
*
*  on sauve le deplacement si le critere est bon au cas ou il y ait une
*  non conv
*
   'SI'(xconv < xconvp);  zdeptm = zdept ; xconvp = xconv ; 'FINS';

*---------------------------------------------------------------------
*                 test de convergence
*---------------------------------------------------------------------
*
TABCONV.IT=XCONV;
'SI' nconvr;
   'MESS' 'non convergence due a une reduction d urgence ';
   ZICONV = FAUX;
    'QUITTER' etiq;
'FINSI';
'SI' IPILOT;'SI' ((MMC 'EGA' 0) 'ET' (MMCMAX > 0.) 'ET' (COEPI < 0.));
*  on refuse de converger si on est elastique et en decharge
    COEPI = 'ABS' COEPI;PASTEST = VRAI;
'FINS'; 'FINS';
*  on refuse de converger a la premiere iteration si frottement
  'SI' (WTAB .'CAFROTTE' 'ET' IMPO12 'ET' (IT < 2 ));
    PASTEST=VRAI;
  'FINS';
   PASUNIL = FAUX;
   'SI' ('EXIS' ZRAID_T 'OK');
           'SI' ( 'NON' ZRAID_T.'OK');
                 PASUNIL= VRAI;
           'FINS';
   'FINS';

'SI' (('NON' PASTEST) 'ET'
     (('NON' IRAUG) 'OU' ((it > 1) 'OU' (DPSMAX > 1e-3))));
* variation de Despi entre 2 itérés
DEPSTD  = DEPST - DEPSTP ;
DEPSTDM = 'MAXI' 'ABS' DEPSTD 'AVEC' MLDEFOR;
*  on  ne peut pas tester la convergence apres une acceleration
* ni apres une initialisation a partir de la solution precedente
   'SI' ( ( IT > 1) 'OU' ('NON' INIT) ) ;
*   si les criteres (deplacements + moments) sont < precision
*   et la variation sur Depsi est < precision souhaitee : on a convergé!
        ZPRECHPP = ZPREC; SI HPP_EPS; ZPRECHPP = ZPREC * 1d-1; 'FINSI';


        'SI' ( XCONV   < (ZPRECHPP  * CORPREC )) ;
        'SI' ( XCONVM  < (ZPRECM * CORPREC )) ;
        'SI' ( DEPSTDM < (ZPRECHPP  * CORPREC )) ;

         'SI' (WTAB.'CONTACT' 'ET' ('NON' HPP_EPS) 'ET' ('NON' NONCONV));
           'SI' (('NON' WTAB.'MODAL') 'ET' ('NON' WTAB.'FROCABL'));
             MODCON= WTAB.'MODCONTA';
             'FORM' ZDEPT ;
             'SI' ('EXIS' WTAB 'MATCONTA') ;
               WTAB.'MATCONTA'= 'REDU' MODCON WTAB.'MATCONTA';
                CJEU CRRN       ='RFCO' MODCON  WTAB.'CONV' WTAB.'MATCONTA' ;
             'SINON' ;
                CJEU CRRN       ='RFCO' MODCON  WTAB.'CONV'                ;
             'FINS';
             'FORM' GEOM1 ;
             ZDLX = 'EXCO' ZDEPT 'LX' 'NOID' 'LX' ;
*
             REA1 = 'REAC' CRR  ZDLX ;
             CMPF = 'EXTR' REA1 'COMP' ;
             PSC1 = 'PSCA' REA1 CMPF REA1 CMPF ;
             NOR1 = 'MAXI' 'ABS' PSC1 ;
*-
             'SI' ('>' NOR1 XDENO) ;
               REA2 = 'REAC' CRRN ZDLX ;
               DREA = REA2 '-' REA1 ;
               PSC2 = 'PSCA' DREA CMPF DREA CMPF ;
*-
               RAP4 = ('MAXI' 'ABS' PSC2) '/' NOR1 ;
*-
               'SI' ('>EG' RAP4 ZPREC) ;
                 'MESS' 'Actualiser les conditions de contact-frottement' rap4 nor1;
                 URG = VRAI;
                 'OUBLIER' STAB12.'RIBLO_M';
                 ITACC=4;
                 DLTAIT = WTAB.'DELTAITER' '+' IT ;
                 XCONVREF = 1E50;
                 'SI' autaug; iraug = faux; 'FINSI';
      ZDEPTP = zdept ;
      zsigfp = zsigf;
      depstp = depst;

                 iter etiq ;
               'FINSI' ;
             'FINSI' ;
           'FINSI' ;
         'FINSI' ;
*
     'SI' PASUNIL ;
       'MESS' ' ****** NON CONVERGENCE DE CONTACT A L''ITERATION' ' ' IT ;
       ZICONV = FAUX;
     'SI' HPP_EPS; itacc=4; 'FINSI';
       hpp_eps = faux;
      'SI' IDYN  ;
                        VITI = UNSURH * 2. * ZDEPT -
                               conti. 'VITESSES';
                        VITI = 'ENLE' VITI 'LX' ;
*DMODI_NB
                        ZVITET = VITI - conti. 'VITESSES';
                        ACCEI = UNSURH * 2. * ZVITET -
                               conti. 'ACCELERATIONS';
                        ACCEI = 'ENLE' ACCEI 'LX' ;
*FMODI_NB
                        ZFPU = ZDYFEXT - FFDYN;
* forces exterieures + reactions - forces interieures a la fin du pas
* c.a.d. (masse*acceleration ) + (amortissement*vitesse ) + (residu = qu
                        ZFP  = ZFPU - FCORF;
                       'DETR' ZFPU;'DETR' FFDYN;'DETR' ZDYFEXT;
      'FINS';


      'QUITTER' ETIQ;
        'FINS';
      'SI' (IRAUG 'ET' AUTAUG 'ET' ((DPSMAX > ZPREC ) 'OU' (augmult > 0.6e0)) 'OU' (resmul < 0.99));
      'MESS' ' ****** NON CONVERGENCE DUE A L AUGMENTATION A L''ITERATION' ' ' IT ;
       ZICONV = FAUX;
      'QUITTER' ETIQ;
      'FINS';
        'SI' (('NON' HPP_EPS) et ('NON' isoucomp)) ;

*      la precision est satisfaisante
               'MESS' ' ****** CONVERGENCE A L ITERATION' ' ' IT
                          '  SOUS-PAS' ' ' WTAB . 'ISOUSPAS';
               'MESS' ' ';
*  on sauve le nombre de points plastique
               STAB12.'NBPLAS'= MMC ;
              'SI' IDYN  ;
                        VITI = UNSURH * 2. * ZDEPT -
                           conti. 'VITESSES' ;
                        VITI = 'ENLE' VITI 'LX' ;
                        ZFPU = ZDYFEXT - FFDYN;
* forces exterieures + reactions - forces interieures a la fin du pas
* c.a.d. (masse*acceleration ) + (amortissement*vitesse ) + (residu = qu
                        ZFP  = ZFPU - FCORF;
                       'DETR' ZFPU;'DETR' FFDYN;'DETR' ZDYFEXT;

      'SI' ('EXIS' WTAB 'MOD_LIA');
       'SI' ('EXIS' WTAB.'MOD_LIA' 'MATE' 'NEWMARK') ;
         'SI' ('EGA' 'CHPOINT  ' ('TYPE' FLIAI) ) ;
          MODNEW = 'EXTR' WTAB.'MOD_LIA' 'MATE' 'NEWMARK' ;
          MAUNEW = 'EXTR' MODNEW 'MAIL' ;
          'SI' ('EXIS' ZFLIA MODNEW) ;
             ZFLIANEW = 'REDU' ZFLIA MODNEW ;
             NZNEW = 'EXTR' ZFLIANEW 'NBZO' ;
            ZFPNW = 0. ; XVITW = 0. ;
           'REPETER' BZLIAW NZNEW ;
* un point support par zone - 2010 kich
         ZFPNW = ZFPNW +
  ('EXCO' ('EXTR' ZFLIANEW 'FLIA' &BZLIAW 1 1) MLDUAL_LIA 'NOID') ;
              XVITW = XVITW +
  ('EXCO' ('EXTR' ZFLIANEW 'FLIA' &BZLIAW 1 1) MVPRIM_LIA MLPRIM_LIA 'NOID') ;
           'FIN' BZLIAW ;

            ZFP = ZFP +  ZFPNW ;
          'FINS' ;
         'FINS' ;
       'FINS' ;

       'SI' (NZLIA > 0) ;
            XVIT2 = 0.d0;

           'REPETER' BZLIA NZLIA ;
             XVIT2 = XVIT2 +
  ('EXCO' ('EXTR' ZFLIA 'FLIA' &BZLIA 1 1) MVPRIM_LIA MLPRIM_LIA 'NOID') ;
           'FIN' BZLIA ;
        'SI' ('EGA' ('TYPE' XVIT2) 'CHPOINT  ') ;
          MAAUT2 = 'DIFF' ('EXTR' VITI 'MAIL') ('EXTR' XVIT2 'MAIL') ;
          VITI = ('REDU' VITI MAAUT2) + XVIT2 ; 'DETR' XVIT2 ;
          'SI' ('EGA' ('TYPE' XVITW) 'CHPOINT  ') ;
            MAAUT3 = 'DIFF' ('EXTR' VITI 'MAIL') ('EXTR' XVITW 'MAIL');
          VITI = ('REDU' VITI MAAUT3) + XVITW ; 'DETR' XVITW ;
          'FINS' ;
        'FINS' ;
         'DETR' FLIAI ;'DETR' ZFLIA ;
       'FINS' ;
      'FINS' ;

*DMODI_NB
                        ZVITET = VITI - conti. 'VITESSES';
                        ACCEI = UNSURH * 2. * ZVITET -
                               conti. 'ACCELERATIONS';
                        ACCEI = 'ENLE' ACCEI 'LX' ;
*FMODI_NB
              'FINS' ;
               STAB12.'NOMBRE_ITERATIONS' = IT;
            'SI' WTAB.'NVSTNL' ;
              'SI' ZFLCONV ; 'QUITTE'  ETIQ ; 'FINSI' ;
            'SINON' ;
              'QUITTE' ETIQ ;
            'FINSI' ;
       'SINON';

         CORPREC=1; ITACC=4;
         EPS_EPS = TEXTE '        '; HPP_EPS = FAUX;
         xconvp = 1;
         XCONVMIN = 1e20;
         DPSMREF  = 0   ;
         'REPETER' tabraz it;
          tabconv.&tabraz = 1;
         'FIN' tabraz;

       PASTEST=VRAI;
       si IGRD ; 'MESS' ' passage en grands deplacements'; fins ;
  'SI' autaug;     iraug = faux; 'FINSI';
       hppeexit = vrai;
       ITACC = 4;
       URG = VRAI;
       'FINS';
       'FINS';
       'FINS';
       'FINS';
*PV       'FINS';
   'FINS' ;
*OF 'SINON'; mess 'refus de convergence  al1 ' al1;
*OF 'FINS';
'FINS' ;
*
*
* test de non convergence --------------------------------------------
*
XCONVREF=1E50;
'SI' (IT > DLTAIT);
     XCONVREF=TABCONV.(IT-DLTAIT) * 0.99;
'FINS';
'SI' (('NON' PASTEST) 'ET' (XCONV < XCONVMIN));
XCONVMIN = XCONV; DPSMREF=DPSMAX/10;
'SI' (XCONVMIN < ZPREC); XCONVMIN=ZPREC; 'FINS';
'FINS';
*   si on a depasse le nombre max d'iterations  ou si le residu augmente
*   ou si on aurait du converger et que cela n'est pas le cas :
*   => non convergence detectee !
'SI'(IT '>EG' ZMAXIT 'OU' (XCONV > XCONVREF) 'OU'
((XCONV < ZPRECHPP) 'ET' ( XCONVM < ZPRECHPP) 'ET' (DEPSTDM < ZPRECHPP))
     'ET' ('NON' PASTEST) 'ET' ('NON' NONCONV) 'ET' ( IT > 1)
     'ET' ('NON' IPILOT) 'ET' ('NON' PASUNIL));
      'MESS' ' non convergence detectee 2' ;ZMAXIT = 3 * IT;
*  test pv
**
      HPP_EPS=FAUX;
      URG = VRAI;
      COEPI = WTAB.'RELAXATION_NONCONV';
      STAB12.'AUTOCOEF'= COEPI ;
      NONCONV = VRAI;
      itacc=4;
      'SI' (COEPI < 0.99999); ZICONV = FAUX;  'FINS';
      ITNV=IT;
'FINS';
* changement de la precision en non convergence
**   mess 'unpas 3325  zprecnc pastest' zprecnc ' 'pastest ' ' itnv ' ' it ' ' xconv ' ' xconvref;
**'SI' nonconv ;'SI' (it > (zmaxit *2 /3)); zprecnc=zprecnc*2;
'SI' nonconv ;'SI' (it > 15); zprecnc=zprecnc*2;
'FINS';'FINS';
'SI' ('NON' PASTEST 'ET' (dpsmax < zprecnc));
**mess ' premier test passe ';
'SI' ((IT '>EG' ZMAXIT)
  'OU' (NONCONV 'ET' ('NON' PASTEST)
       'ET' (XCONV '>' XCONVREF)
**     'ET' (XCONV '>' XCONVREF) 'ET' (DPSMAX '>EG'  DPSMREF)
       'ET' (DPSMAX '>EG' (DPSMAXP /4 ))
       'ET' (ITNV 'NEG' IT))
  'ET' ('NON' IPREM) );

      'MESS' ' ****** NON CONVERGENCE A L''ITERATION' ' ' IT  ' SOUS-PAS' ' ' WTAB . 'ISOUSPAS';
       ZICONV = FAUX;
      'SI' IDYN  ;
                        VITI = UNSURH * 2. * ZDEPT -
                               conti. 'VITESSES';
                        VITI = 'ENLE' VITI 'LX' ;
*DMODI_NB
                        ZVITET = VITI - conti. 'VITESSES';
                        ACCEI = UNSURH * 2. * ZVITET -
                               conti. 'ACCELERATIONS';
                        ACCEI = 'ENLE' ACCEI 'LX' ;
*FMODI_NB
                        ZFPU = ZDYFEXT - FFDYN;
* forces exterieures + reactions - forces interieures a la fin du pas
* c.a.d. (masse*acceleration ) + (amortissement*vitesse ) + residu=qu
                        ZFP  = ZFPU - FCORF;
                       'DETR' ZFPU;'DETR' FFDYN;'DETR' ZDYFEXT;
      'FINS';
      'QUITTER' ETIQ;
'FINS' ;
'FINS' ;
** 'FINS' ;
*
'DETR' FEQU2;
'SI' IDYN ;
  'SI' (ADDISEC2 'OU' LOGPRE);
     XXX1=ZFCONSTA '-' ZFP1;
    'SI' ADDISEC2 ;
       XXX1=XXX1 '+' FP22   ;
    'FINS';
    'SI' LOGPRE ;
       XXX1=XXX1 '+' ZFPEXTF;
    'FINS';
     ZDYFEXT = XXX1 'ENLEVER' 'FLX';'DETR' XXX1;
  'FINS';
'FINS' ;
*
*KTAN*DEBUT*************************************************************
* EVALUATION DE LA MATRICE TANGENTE SI DEMANDEE
'SI' IKTAN ;
  'SI' ('NON' IFEFP) ;
    'SI' ('MULT' ZITAC ZNCONS) ;
*     'SI' IKT ;
*       'DETR' ZRIKTA 'ELEM' ;  'DETR' ZRAID ;
*     'FINS' ;
      'SI' (IGRD 'ET' ('NON' HPP_EPS));
        'FORM' GEOM2 ;
        ZMATloc = ZMAT2 ;
      'SINON' ;
        ZMATloc = ZMAT ;
      'FINS' ;

      'SI' ('NON' ISSTE) ;
        'SI' IPERT ;
          'SI' PARTLOCA ;
            cha1 = 'ASSIS' 'TOUS' 'REDU' MODRELOC Z1COMP ;
            cha2 = 'ASSIS' 'TOUS' 'REDU' MODRELOC Z2COMP ;
            zktap = 'ASSIS' 'TOUS' 'KTAN' 'PERT' MODRELOC cha1 cha2
                                          'C1' ZPERC1 'C2' ZPERC2
                                          ZKTASYM ;
            ZRIKTA = 'ET' zktap ;
          'SINON';
            ZRIKTA = 'KTAN' 'PERT' ZMODL Z1COMP Z2COMP
                            'C1' ZPERC1 'C2' ZPERC2 ZKTASYM ;
          'FINS';
* Attention au ZMAT et ZSIGF a utiliser en IGRD !!
        'SINON' ;
          'SI' ('ET' ('NON' IVISCO) ('NON' IVIDOM)) ;
            DTTAN = 0. ;
          'SINON' ;
            DTTAN = STAB12.'DT' ;
          'FINS' ;
          ZRIKTA = 'KTAN' ZMODL ZSIGF ZVARF ZMATloc
                                'PREC' ZPREK 'DT  ' DTTAN ZKTASYM ;
        'FINS' ;
      'FINS' ;

      'SI' IKSIA ;
        KSIG = 'KSIGMA' ZMODL ZSIGF ZMATloc ;
        ZRIKTA = ZRIKTA 'ET' KSIG ;
      'FINS' ;

      ZRAID = ZRIKTA 'ET' ZCLIM ;

      'SI' IGRD ;  'FORM' GEOM1 ;  'FINS' ;

      IKT = VRAI ; ZMATloc = 1. ;

    'FINS' ;
  'FINS' ;
'FINS' ;
*KTAN*FIN***************************************************************
*
'SI' (IGRD 'ET' ('NON' HPP_EPS));
'SI' ('EGA' ('TYPE' GEOM2) 'CONFIGUR');
     'DETR' GEOM2 ;
'FINS';
*     'SI' ITCAR ;  'DETR' ZMAT2R ;  'FINS';
'FINS' ;
'SINON' ;
  'SI' WTAB.'NVSTNL' ; 'SI' ZFLCONV ; 'QUITTE' ETIQ ; 'FINSI'; 'FINSI' ;
*FOR_MECA
'FINSI' ;
*
*'SI' IPLAVI ;
*     'DETR' ZSIGF ;  'DETR' ZVARF ;  'DETR' ZDEIF ;
*'FINS' ;

'SI' IFEFP ; 'DETR' ZRIKTA ; 'DETR' GEOM2;  'FINS' ;
*
*   PERF-RAID niveau 3 : stagnation de la convergence. La raideur gelee en
*   debut de pas est devenue trop raide pour l'endommagement courant : elle
*   est reconstruite (memes HOOK et RIGI qu'en debut de pas) avec les
*   variables internes de l'iteration courante. Le residu et les criteres
*   d'arret ne changent pas. Au plus 3 fois par pas, a 4 iterations
*   d'intervalle, jamais en non-convergence deja declaree.
'SI' ISTGOK ;
  TSTG . IT = XCONV ;
  XSTG3 = 1.E50 ;
  ISTG3 = IT - 3 ;
  'SI' ('EXIS' TSTG ISTG3) ;
    XSTG3 = TSTG . ISTG3 ;
  'FINSI' ;
*   trace PERF-RAID (une seule fois par table, a l'iteration 6)
  'SI' ((IT '>EG' 6) 'ET' ('NON' ('EXIS' WTAB 'STAG_TRACE'))) ;
    WTAB . 'STAG_TRACE' = VRAI ;
    'MESS' ' PERF-RAID trace it=' IT ' XCONV=' XCONV ' XSTG3=' XSTG3 ' ZPREC=' ZPREC ;
    'MESS' ' PERF-RAID trace NBRFR=' NBRFR ' ITRFR=' ITRFR ;
    'SI' PASTEST ; 'MESS' ' PERF-RAID trace PASTEST vrai' ; 'FINSI' ;
    'SI' NONCONV ; 'MESS' ' PERF-RAID trace NONCONV vrai' ; 'FINSI' ;
    'MESS' ' PERF-RAID trace type ZVARF=' ('TYPE' ZVARF) ;
  'FINSI' ;
  'SI' ((IT '>EG' 5) 'ET' ((IT - ITRFR) '>EG' 4) 'ET' (NBRFR '<' 3) 'ET'
        ('NON' PASTEST) 'ET' ('NON' NONCONV) 'ET'
        (('EGA' ('TYPE' ZVARF) 'MCHAML  ') 'OU' ('EGA' ('TYPE' ZVARF) 'TABLE')) 'ET'
        (XCONV '>' (10. * ZPREC)) 'ET' (XCONV '>' (0.7 * XSTG3))) ;
    'MESS' ' PERF-RAID : stagnation a l''iteration' ' ' IT
           ' : raideur reconstruite avec l''endommagement courant' ;
    HOOKRF = 'HOOK' ZMODL MMMM ZVARF ;
    RHRF   = 'RIGI' ZMODL HOOKRF MMMM ;
    'DETR' HOOKRF ;
    ZRAID  = RHRF 'ET' ZCLIM0 ;
    IRFRCH = VRAI ;
    NBRFR  = NBRFR + 1 ;
    ITRFR  = IT ;
    ITACC  = 4 ;
    WTAB . 'NB_RAFRAICH' = WTAB . 'NB_RAFRAICH' + 1 ;
  'FINSI' ;
'FINSI' ;
*
IPREM = FAUX;      IAFAIR=VRAI; RECA_K = FAUX;
*
dpsmaxp = dpsmax;
zsigfp =zsigf;
depstp = depst;
zdeptp = zdept;
'FIN' ETIQ ;

*=======================================================================
*===== FIN DE LA BOUCLE DE CONVERGENCE                             =====
*=======================================================================
'SI' WTAB.'NVSTNL' ;
  STAB12.'ZVIFL' = ZVIFL ;
  'SI' ('NON' ('EXISTE' WTAB 'QNSL')) ;
    WTAB.'QNSL' = 'MASSE' 'PRES' WTAB.'MOD_NSL' WTAB.'MAT_NSL' ;
  'FINSI' ;
  QNSL = WTAB.'QNSL' ;
  FPREFL = 'PROI' WTAB.'MOD_NSL' ZVIFL ;
  ZPREFL = 'RESOUT' QNSL FPREFL ;
  STAB12.'ZPREFL' = ZPREFL ;
'FINSI' ;

'SI' WTAB.'FOR_MECA' ;
*
 'FORM' geom1;
 augmult = augmult * 0.55 ;
    si (augmult < 1d-2); augmult = 1d-2; finsi;
 zdep1d = zdept 'ENLE' 'LX';
*
*  on sauve les pseudo forces de frottement pour initialiser
*  l'iteration suivante
'SI' (WTAB. 'CAFROTTE' 'ET' IMPO12);
     STAB12.'FFROT'= 'COPIER' FFROT;
'FINS';
**  ON cherche a sauver la partie Forces nonlineaires trouvee pendant
*  ce pas pour s'en servir pour l'estimation  de l'initialisation du pas
*  DFNL = K*DU  - DF  - residu
*  Ktot*dutot ne contient pas les forces de reactions mais les forces
* internes dues a un champ de deformation initiales ( thermique)
* donc  enlever ZDFINI au lieu de DFEXT0
* pour les forces suiveuses on fait delta FP
* pour etre plus precis on fait  aussi intervenir le residu
*
               STAB12.'RESIDU' = RESIDC;
***            'SI' ('NEG' ('TYPE' ZRAIDNA) 'RIGIDITE'); ZRAIDNA = ZRAID; 'FINSI';
*   PERF-RAID niveau 3 : l'estimation de FNONL utilise la raideur du debut
*   de pas (comme sans rafraichissement)
           'SI' IRFRCH ;
               ZRAID = ZRAIDS0 ;
           'FINSI' ;
            zraidna = zraid;
               XXX1 = ZRAIDNA * ZDEPT;
               XXX3 = ZDFINI * COEPI;
               XXX4 = XXX1 - XXX3;
               XXX3 = XXX4 + RESIDC;
               XXX1 = XXX3 - FREAP ;
               XXX5 = XXX1 'ENLEVER' 'FLX ' ;
               'DETR' XXX1 ; 'DETR' XXX3 ; 'DETR' XXX4 ;
* en cas de non convergence on cumule les forces non lineaires
           'SI' WTAB.'CONV';
               STAB12.'FNONL' = XXX5 ;
           'SINON';
               STAB12.'FNONL' = XXX5 + STAB12.'FNONL';
               'DETR' XXX5 ;
           'FINS';
*fba verifier                WTAB.'ITERPREC' =IT;
               STAB12.'DTPREC'= WTAB.'DT_INIT';
**             STAB12.'DTPREC'= STAB12.'DT' ;
*
* On garde la derniere matrice KTAN calculee dans ETIQ si necessaire
'SI' IKTAN ;
  'SI' IFEFP ;
*  'MESS' 'FEFP: Last KTAN is kept for next increment' ;
    STAB12.'LASTKTAN' = ZRIKTA ;
  'SINON' ;
    'SI' (IKT_SAUV 'ET' IKT) ;
*     'MESS' 'KTAN : La matrice est conservee pour le pas suivant' ;
      STAB12.'LASTKTAN' = ZRIKTA ;
    'FINS' ;
  'FINS' ;
'FINS' ;
*
*  quelques destructions supplementaires
*
'SI' IPLAVI ;
      'SI' ('NEG' WTAB.'MOVA' 'RIEN') ;
*             'DETR' ACC0;  'DETR' ACC;
       'FINS' ;
**        'DETR' DEPIN0 ;
'FINS' ;
'DETR' ZFEXT ; 'DETR' FREAP ;
'SI' IPILOT;
          'SI' ITHER ;
            'DETR' FTHE ;
             XXX1= (TETA2 - TETA1) * COEPI + TETA1;
             STAB12.'TET2' = XXX1;
             ETT MSRTT = PAS_EPTH PRECED ZMODL ZMAT XXX1;
          'FINS';
          'SI' LOGDEF ;
             XXX1 = 'REDU' (DDEFOR0 '*' COEPI) ZMODLI;
             STAB12.'DEFOR2' = STAB12.'DEFOR1' '+' XXX1    ;
            'DETR' XXX1;'DETR' FDEF ;
          'FINS';
'FINS';

'SI'  IDYN  ;
           STAB12.'FOPL' = ZFP ;
           STAB12.'VITI' = VITI;
           STAB12.'ACCEI' = ACCEI;
           'SI' IMPLP; STAB12.'VAUX' = VADD; 'FINS';
'FINS' ;
'SI' IGRD;
* SP : en lagrangien total, on exprime l'increment sur la configuration
*      de reference (debut de calcul) :
 'SI' (LAG_TOT 'EGA' 1);
    'FORM' georef0;
    DEPST = 'CAPI' HYPDEF ZU1  DEPST ZMODL;
    'FORM' GEOM1;
 'FINS';
'FINS';
DEPS0  = DEFT0 '+' DEPST;
STAB12.'DEFF' = 'REDU' DEPS0 ZMODLI ;
'SI'  IPLAVI ;
   STAB12.'VARF' = 'REDU' ZVARF ZMODLI ;
   STAB12.'DFPF' = 'REDU' ZDEIF ZMODLI ;

  'SI' IFEFPUL;
     STAB12.'FOR'= GEOM2 ;
  'FINS';
'FINS';

STAB12.'DEPT' = ZDEPT ;
STAB12.'ZU1'  = ('ENLE' ZU1 'LX' ) '+'  ZDEPT ;
*
'SI' WTAB.'CAFROTTE' ;
  ZFLX = 'EXCO' (ZDEPT '*' ZCLIM) 'FLX' 'NOID' 'FLX' ;
  WTAB.'POST_COFR'.'RIGI_UNILA' = CRR ;
  WTAB.'POST_COFR'.'MULT_SOLUT' = 'EXCO' ZDEPT 'LX' 'NOID' 'LX' ;
  WTAB.'POST_COFR'.'GLISSEMENT' = ZFLX ;
'FINSI' ;

STAB12.'SIGF' ='REDU' ZSIGF ZMODLI;
STAB12.'CONV' = ZICONV ;
** mess 'xdeno sauve ' xdeno;
'SI' (ZICONV 'OU' VRAI);
   STAB12.'XDENO'  = XDENO;
   STAB12.'XDENOM' = XDENOM;
'SINON';
*  STAB12.'XDENO'  = 'MAXI'  ('PROG' STAB12.'XDENO'  XDENO  );
*  STAB12.'XDENOM' = 'MAXI'  ('PROG' STAB12.'XDENOM' XDENOM );
'FINS';

 STAB12.'DFGRAD' = GR_U_FIN ;

'SI' IGRD;
   'SI' ('EGA' GEOM2 'GEOM2');
     'SI' ITCAR ;
        GEOM2 ZMAT2 ='FORM' ZDEPT ZMODLI ZMATI;
        ZMAT2       ='REDU' ZMAT2 ZMODL       ;
     'SINON';
        GEOM2 = 'FORM' ZDEPT ;
     'FINS';
   'FINS';

   STAB12.'FOR' = GEOM2 ;
   'SI'  (&BONOCONV 'NEG' 1);
     'DETR' GEOM1;
   'FINS';
   'FORM' GEOM1;
    GEOM1=GEOM2;
   'SI' WTAB.'ITCAR';
      CARA1 = ZMAT2 ;
   'FINS';
*  on transporte la deformation totale sur la configuration fin de pas
*  si pas en lagrangien total
*  mais ca casse le cas test traction???
 'SI' (LAG_TOT 'NEG' 1) ;
      DEPS0 = 'PICA' HYPDEF DEPS0 ZMODL ZDEPT ;
 'FINSI';
   'FORM' GEOM2;
'FINS' ;

'SI' LOGDEF;
   STAB12.'DEFOR1'=STAB12.'DEFOR2';
'FINS';

STAB12.'ETAT1'= REDU STAB12.'ETAT2' ZMODLI ;
'SI' ('EXIS' WTAB 'MOD_CHA') ;
  ETAZ = 'REDU' STAB12.'ETAT2' WTAB.'MOD_CHA' ;
  STAB12.'ETAT1' = STAB12.'ETAT1' 'ET' ETAZ ;
  ETAZ = 1. ;
'FINS' ;
'SI' ('NEG' WTAB.'DT' STAB12.'DT');
   STAB12.'DT'= WTAB.'DT' - STAB12.'DT'    ;
'FINS';
TEMPS0 = TI;

  ZCCONV = ZICONV ;
  'SI' ('NON' ZICONV) ;
    DEFT0 = DEPS0 ;
    'SI' ('EXIS' STAB12 'LISEA_M') ;
      WTAB.'LISEA_M' = STAB12.'LISEA_M' ;
    'FINS' ;
    'SI' ('EXIS' STAB12 'RIBLO_M') ;
      WTAB.'RIBLO_M' = STAB12.'RIBLO_M' ;
    'FINS' ;
    'SI' ('EXIS' STAB12 'TET2') ;
      STAB12.'TET1'  = STAB12.'TET2'  ;
    'FINS' ;
    'SI' ITHER ;
      STAB12.'TETA1' = STAB12.'TETA2' ;
    'FINS' ;
  'FINS' ;

'SI' (ZICONV 'OU' ('NON' WTAB.'CONVERGENCE_FORCEE')) ;
  'SI' WTAB.'NVSTNL' ;
    'SI' ZFLCONV ; 'QUITTER' BONOCONV ; 'FINSI';
  'SINON' ;
    'QUITTER'  BONOCONV;
  'FINSI' ;
'FINS';
*
'SI' ITHER ;
  ETT0 = 'REDU' ETT ZMODL ;
  'SI' WTAB.'POR1' ;
    MSRTT0 = 'REDU' MSRTT ZMODL ;
  'FINSI' ;
'FINSI' ;
*
WTAB.'CONV'=STAB12.'CONV';
WTAB.'KNOCONV' = KNOCONV;
* Convergence forcee -> on reinitialise ZCLIM
ZCLIM = ZCLIM0 ;
'SINON' ;
  'SI' WTAB.'NVSTNL' ; STAB12.'CONV' = ZFLCONV ; 'QUITTE' BONOCONV ; 'FINSI' ;
*FOR_MECA
'FINSI' ;

*Nombre maximum de sous-pas atteint? si oui, arret de pasapas
WTAB.'ISOUSPAS' = WTAB.'ISOUSPAS' + 1;
'SI' (WTAB.'ISOUSPAS' >EG WTAB.'MAXSOUSPAS');
     'ERREUR' 996 ;
'FINS';
'FIN' BONOCONV;
************************************************************************
* fin de la boucle de non convergence
************************************************************************
'SI' WTAB.'FOR_MECA' ;

STAB12.'MAT1' = 'REDU' ZMAT2 ZMODLI ;

'SI' WTAB.'ITCAR';
   STAB12.'CARA' = STAB12.'MAT1';
'FINS';

'SI' ITHER;
   STAB12.'ETHER2'    ='REDU' ETT   ZMODLI  ;
   STAB12.'ETHER1'    = STAB12.'ETHER2'       ;
  'SI'  POR1 ;
     STAB12.'MSRTHER2'='REDU' MSRTT ZMODLI;
  'FINS';
'FINS';


'SI' LOGPIL ;
  PRECED.'COEFFICIENT_DE_PILOTAGE' = PRECED.'COEFFICIENT_DE_PILOTAGE'
          'ET' ('PROG'ETA) ;
'FINSI' ;


'SI' (('NEG' GR_U_FIN 'INCONNU') 'ET' igrd) ;
  STAB12.'DFGRAD' = 'REDU' GR_U_FIN ZMODLI ;
'SINON' ;
  STAB12.'DFGRAD' = 'MOT' 'INCONNU' ;
'FINS';
WTAB.'DFGRAD' = STAB12.'DFGRAD' ;

 conti.'TEMPS' = conti.'TEMPS' + DT_INIT ;
WTAB.'MAT1' = STAB12.'MAT1';
'SI' ('EXIS' WTAB 'MOD_CHA') ;
   MODZ = 'REDU' ZMAT22 WTAB.'MOD_CHA' ;
   WTAB.'MAT1' = WTAB.'MAT1' 'ET' MODZ ;
   MODZ = 1.D0 ;
'FINS' ;
* mise a jour des conditions aux limites avec les contacts/frottements actifs
WTAB.'CLIM' = ZCLIM;
*FOR_MECA
'FINSI' ;

* Enregistrement du MODELE
STAB12.'MO_TOT_PREC' = ZMODLI;

'OPTI' 'PARA' FAUX;
*
'FINPROC' STAB12;
