* ======================================================================
* VALID_PERF.DGIBI
* ----------------------------------------------------------------------
* Validation et benchmark des optimisations PERF-RAID (UNPAS / PAS_MATE /
* PASAPAS / PAS_DEFA) sur des cas tests de la distribution (repertoire
* dgibi). Chaque cas est execute dans une procedure (variables locales),
* jusqu'a trois fois :
*   passe 1 : 'PERF_RAID' FAUX (comportement d'origine)
*   passe 2 : 'PERF_RAID' VRAI, niveau 1 (resultats identiques attendus)
*   passe 3 : 'PERF_RAID' VRAI, niveau 2 (reutilisation approchee de la
*             raideur : ecart faible attendu, inferieur a TOLV3)
* Les resultats stockes par PASAPAS (maxi, mini, maxi en valeur absolue de
* DEPLACEMENTS, CONTRAINTES, TEMPERATURES a chaque pas) sont compares a la
* passe 1. Les controles internes du cas (ERRE) sont neutralises et comptes.
* ----------------------------------------------------------------------
* SUIVI : console (lignes >>> Cas ... et <<< Cas ...), fichier
* valid_avancement.log (cas en cours, cas termines), valid_<cas>.log (un
* fichier par cas), valid_synthese.log (tableau final et temps cumules).
* valid_inutile.tmp est un fichier vide (ferme les fichiers de sortie).
* Les procedures modifiees (unpas, pas_mate, pasapas, pas_defa) doivent
* etre dans le repertoire d'execution.
* Reprise apres une erreur : regler IDEB0 sur le numero du cas.
* ======================================================================
* Verbosite : 0 = erreurs et avertissements ; 1 = + instructions ; -1 = erreurs
IECHO0 = 0 ;
OPTI 'ECHO' IECHO0 ;
OPTI 'TRAC' 'PSC' ;
* VRAI : tout l'affichage va dans valid_trace.log (console muette)
ITRACE0 = FAUX ;
* Premier et dernier cas executes (numeros de la liste ci-dessous)
IDEB0 = 1 ;
IFIN0 = 57 ;
NTOT0 = 57 ;
* Chronometrage (benchmark) et nombre de repetitions de chaque calcul
* (temps minimal retenu ; les cas courts durent quelques ms : utiliser 3
* ou plus pour lisser les mesures)
ITEMPS0 = VRAI ;
NREP0 = 1 ;
* Passe 3 (niveau 2, reutilisation approchee) : VRAI ou FAUX
IPASS3 = VRAI ;
* Tolerances relatives sur les extrema : niveau 1 (identique attendu) et
* niveau 2 (approche)
TOLV0 = 1.E-8 ;
TOLV3 = 5.E-3 ;
* Cas a sauter (ex. trop longs) : TSKIP . <numero> = VRAI ;
TSKIP = TABL ;
* Cas 15 (FissVoil) ecarte : son post-traitement (procedure INITOU) designe
* les noeuds par leur numero global (NOEUD i), ce qui suppose que le maillage
* du cas soit le premier cree dans la session. Il echoue donc des la passe 1
* (comportement d'origine) des qu'un autre maillage existe. A valider seul,
* dans une session neuve, si necessaire.
TSKIP . 15 = VRAI ;
*
DEBPROC CHRONO ;
    TH1 = TEMP 'HORL' ;
FINPROC TH1 ;
*
* Suivi : ecrit valid_avancement.log puis referme le fichier
DEBPROC AVANCE TV1*'TABLE' K1*'ENTIER' NT1*'ENTIER' NOM1*'MOT'
    P1*'ENTIER' ETA1*'MOT' ;
    OPTI 'SORT' 'valid_avancement.log' ;
    SORT 'CHAI' 'AVANCEMENT DE LA VALIDATION PERF-RAID' ;
    VM1 = CHAI 'Cas en cours :' ' ' K1 ' ' 'sur' ' ' NT1 ' ' ':' ' ' NOM1 ' ' '- passe' ' ' P1 ' ' '-' ' ' ETA1 ;
    SORT 'CHAI' VM1 ;
    SORT 'CHAI' 'Cas termines :' ;
    REPETER BAV1 NT1 ;
        I1 = &BAV1 ;
        SI ('EXIS' TV1 I1) ;
            T1 = TV1 . I1 ;
            VN1 = T1 . 'NOM' ;
            VO1 = T1 . 'OKM' ;
            VX1 = T1 . 'ERR2' ;
            VE1 = CHAI 'FORMAT' '(1PE9.2)' VX1 ;
            VM2 = CHAI I1*4 ' ' VO1 ' ' 'ecart' ' ' VE1 ' ' VN1 ;
            SORT 'CHAI' VM2 ;
        FINSI ;
    FIN BAV1 ;
    OPTI 'SORT' 'valid_inutile.tmp' ;
FINPROC ;
*
* Comparaison des empreintes de deux passes : ecart relatif maximal,
* nombre de tables de longueurs differentes, nombre de valeurs comparees
DEBPROC COMPAR TA*'TABLE' TB*'TABLE' ;
    VERRM = 0. ;
    VNLEN = 0 ;
    VNCMP = 0 ;
    LVN = 'MOTS' 'DEPLACEMENTS' 'CONTRAINTES' 'TEMPERATURES' ;
    REPETER ZVCMP ('DIME' LVN) ;
        VNOM = 'EXTR' LVN &ZVCMP ;
        VE1 = 'EXIS' TA VNOM ;
        VE2 = 'EXIS' TB VNOM ;
        SI (VE1 'ET' VE2) ;
            VL1 = TA . VNOM ;
            VL2 = TB . VNOM ;
            SI (('DIME' VL1) 'EGA' ('DIME' VL2)) ;
                VNCMP = VNCMP + ('DIME' VL1) ;
                VREF = 'MAXI' VL1 'ABS' ;
                SI (VREF '<' 1.E-300) ;
                    VREF = 1. ;
                FINSI ;
                VDIF = 'MAXI' (VL2 '-' VL1) 'ABS' ;
                VERR = VDIF '/' VREF ;
                SI (VERR '>' VERRM) ;
                    VERRM = VERR ;
                FINSI ;
            SINON ;
                VNLEN = VNLEN + 1 ;
            FINSI ;
        SINON ;
            SI (VE1 'OU' VE2) ;
                VNLEN = VNLEN + 1 ;
            FINSI ;
        FINSI ;
    FIN ZVCMP ;
FINPROC VERRM VNLEN VNCMP ;
*
* Empreinte : pour chaque pas stocke par PASAPAS, max(abs), max et min de
* chaque grandeur ; compteurs PERF-RAID et classes exercees
DEBPROC FPREC TA1*'TABLE' TR1*'TABLE' ;
    NS1 = 0 ;
    'SI' ('EXIS' TA1 'TEMPS') ;
        NS1 = ('DIME' (TA1 . 'TEMPS')) - 1 ;
    'FINSI' ;
    LNOM1 = 'MOTS' 'DEPLACEMENTS' 'CONTRAINTES' 'TEMPERATURES' ;
    'SI' (NS1 '>' 0) ;
        'REPETER' BNO1 ('DIME' LNOM1) ;
            NOM1 = 'EXTR' LNOM1 &BNO1 ;
            'SI' ('EXIS' TA1 NOM1) ;
                TD1 = TA1 . NOM1 ;
                'REPETER' BST1 NS1 ;
                    I1 = &BST1 ;
                    'SI' ('EXIS' TD1 I1) ;
                        V1 = TD1 . I1 ;
                        TY1 = 'TYPE' V1 ;
                        'SI' (('EGA' TY1 'CHPOINT') 'OU' ('EGA' TY1 'MCHAML')) ;
                            X1 = 'MAXI' V1 'ABS' ;
                            X2 = 'MAXI' V1 ;
                            X3 = 'MINI' V1 ;
                            LV1 = 'PROG' X1 X2 X3 ;
                            'SI' ('EXIS' TR1 NOM1) ;
                                TR1 . NOM1 = (TR1 . NOM1) 'ET' LV1 ;
                            'SINON' ;
                                TR1 . NOM1 = LV1 ;
                            'FINSI' ;
                        'FINSI' ;
                    'FINSI' ;
                'FIN' BST1 ;
            'FINSI' ;
        'FIN' BNO1 ;
    'FINSI' ;
    TR1 . 'NRE' = -1 ;
    TR1 . 'NMA' = -1 ;
    TR1 . 'NCA' = -1 ;
    TR1 . 'NHK' = -1 ;
    TR1 . 'CL' = 0 ;
    'SI' ('EXIS' TA1 'WTABLE') ;
        WT1 = TA1 . 'WTABLE' ;
        'SI' ('EXIS' WT1 'NB_RAIDEUR_REUT') ;
            TR1 . 'NRE' = WT1 . 'NB_RAIDEUR_REUT' ;
        'FINSI' ;
        'SI' ('EXIS' WT1 'NB_MAT_REUT') ;
            TR1 . 'NMA' = WT1 . 'NB_MAT_REUT' ;
        'FINSI' ;
        'SI' ('EXIS' WT1 'NB_RAIDEUR_CALC') ;
            TR1 . 'NCA' = WT1 . 'NB_RAIDEUR_CALC' ;
        'FINSI' ;
        'SI' ('EXIS' WT1 'NB_HOOK_EVITE') ;
            TR1 . 'NHK' = WT1 . 'NB_HOOK_EVITE' ;
        'FINSI' ;
        ICL1 = 0 ;
        'SI' ('EXIS' WT1 'MATVAR') ;
            'SI' (WT1 . 'MATVAR') ;
                ICL1 = ICL1 + 1 ;
            'FINSI' ;
        'FINSI' ;
        'SI' ('EXIS' WT1 'ENDOMMAGEMENT') ;
            'SI' (WT1 . 'ENDOMMAGEMENT') ;
                ICL1 = ICL1 + 10 ;
            'FINSI' ;
        'FINSI' ;
        'SI' ('EXIS' WT1 'VISCODOMMAGE') ;
            'SI' (WT1 . 'VISCODOMMAGE') ;
                ICL1 = ICL1 + 20 ;
            'FINSI' ;
        'FINSI' ;
        'SI' ('EXIS' WT1 'GRANDS_DEPLACEMENTS') ;
            'SI' (WT1 . 'GRANDS_DEPLACEMENTS') ;
                ICL1 = ICL1 + 100 ;
            'FINSI' ;
        'FINSI' ;
        TR1 . 'CL' = ICL1 ;
    'FINSI' ;
FINPROC ;
*
VRES = TABL ;
VNBK2 = 0 ;
VNBK3 = 0 ;
VSUM1 = 0 ;
VSUM2 = 0 ;
VSUM3 = 0 ;
MESS '==================================================' ;
VMSG = CHAI 'VALIDATION ET BENCHMARK PERF-RAID :' ' ' NTOT0 ' ' 'cas (du cas' ' ' IDEB0 ' ' 'au cas' ' ' IFIN0 ')' ;
MESS VMSG ;
MESS '==================================================' ;
AVANCE VRES IDEB0 NTOT0 'demarrage' 1 'initialisation' ;

*
* ---------------------------------------------------------------------
* Procedure du cas 1 : mazars (endommagement MAZARS, QUA4 CP)
* Variables locales : le cas ne voit aucune variable des cas precedents
* ---------------------------------------------------------------------
DEBPROC VC1 VPSW*'LOGIQUE' VNIV*'ENTIER' VTFPR*'TABLE' VTCT*'TABLE' IECHO0*'ENTIER' ;
* ----- debut du cas mazars

* fichier :  mazars.dgibi
************************************************************************
* Section : Mecanique Endommagement
* Section : Mecanique Plastique
************************************************************************
*******************************************************************
*                                                                 *
* TEST;  MATERIAU ENDOMMAGEMENT MAZARS                            *
*                                                                 *
* EPROUVETTE EN TRACTION AVEC DEPLACEMENTS IMPOSES                *
* CONTRAINTES PLANES, DEFO. LINEAIRES                             *
*                                                                 *
* LES RESULTATS OBTENUS SONT COMPARES  A LA SOLUTION ANALYTIQUE   *
*                                                                 *
*******************************************************************                                                       *

opti echo IECHO0 dime 2 elem qua4 mode plan cont;


densite 1.;
p1=0. 0.;
p2=1. 0.;
p3=1. 1.;
p4=0. 1.;
d1=d p1 p2;d2=d p2 p3;d3=d p3 p4;d4=d p4 p1;
surf1=daller d1 d2 d3 d4 plane;
at=1.e0;
ac=1.2e0;
bc=1.5e+03;
bt=10000.;
epsd0=1.e-04;
YG=31.E+9;
mod1=mode surf1 mecanique elastique isotrope endommagement mazars;
mat1=MATE mod1  YOUN YG NU 0.2  RHO 2.3E+03
 btra bt ktr0 epsd0 atra at acom ac bcom bc beta 1.06e0;
blo1=bloq  ux  p1;
blo2=bloq  uy  d1;
blo3=bloq  uy  d3;
cltot=blo1 et blo2 et blo3 ;
fo1 = depi blo3 1. ;
evol1=evol manu temps (prog 0. 1. )
                depl (prog 0. 1 );
char1=charg evol1 fo1 DIMP;
lit1=prog  1.e-4 pas 25.e-6 5.e-4 ;
tab1=table;
tab1.mova='D   ';
tab1.blocages_mecaniques=cltot;
tab1.caracteristiques=mat1;
tab1.modele=mod1;
tab1. 'HYPOTHESE_DEFORMATIONS' = MOT 'LINEAIRE';
tab1.chargement=char1;
tab1.temps_calcules=lit1;
tab1 . 'PERF_RAID' = VPSW ; tab1 . 'PERF_RAID_NIVEAU' = VNIV ; PASAPAS tab1 ; FPREC tab1 VTFPR ;
*opti donn 5;
tab2=table;
tab2.1='MARQ CROI';
ev1=@global tab1 blo3 evol1 fy  ;
*
*construction du resultat theorique
*
nb= dime  lit1;
UN=prog nb*1.d0;
LAT = prog nb * AT;
LEPS=prog nb*epsd0;
DT=UN - ( ( EPSD0* (UN-LAT) /lit1 ) + (AT * ( EXP (BT*(LEPS-lit1)))));
lsig0=(un - dt) * YG * lit1;
lsig1 = enle (extr ev1 ordo) 1;
*
*comparaison des deux resultats
*
err1=maxi (( lsig0 - lsig1) / lsig0);
* [valid] temps;
si (err1 < 1.e-10);
  VTCT . 'N0' = (VTCT . 'N0') + 1 ;
sinon ;
  VTCT . 'N5' = (VTCT . 'N5') + 1 ;
finsi;
* [valid] FIN final


* ----- fin du cas mazars
FINPROC ;
*
* ---------------------------------------------------------------------
* Cas 1 : mazars (endommagement MAZARS, QUA4 CP)
* ---------------------------------------------------------------------
SI ((IDEB0 '<EG' 1) 'ET' (IFIN0 '>EG' 1) 'ET' ('NON' ('EXIS' TSKIP 1))) ;
    MENAGE 'OBLI' ;
    MESS ' ' ;
    VMSG = CHAI '>>> Cas' ' ' '1' ' ' 'sur' ' ' NTOT0 ' ' ':' ' ' 'mazars' ' ' '(endommagement MAZARS, QUA4 CP)' ;
    MESS VMSG ;
    NPASS = 2 ;
    SI IPASS3 ;
        NPASS = 3 ;
    FINSI ;
    VTH1 = 0 ;
    VTH2 = 0 ;
    VTH3 = 0 ;
    VNE51 = 0 ;
    VNE01 = 0 ;
    VNE52 = 0 ;
    VNE02 = 0 ;
    VNE53 = 0 ;
    VNE03 = 0 ;
    REPETER ZVRUN NPASS ;
* ordre des passes alterne d'un cas a l'autre (derive des temps en session)
        VIP = &ZVRUN ;
        VPSW = (VIP '>' 1) ;
        VNIV = 1 ;
        VMPS = 'inactif' ;
        SI (VIP 'EGA' 2) ;
            VMPS = 'actif niveau 1' ;
        FINSI ;
        SI (VIP 'EGA' 3) ;
            VNIV = 2 ;
            VMPS = 'actif niveau 2' ;
        FINSI ;
        AVANCE VRES 1 NTOT0 'mazars' VIP 'en_cours' ;
        VMSG = CHAI '    passe' ' ' VIP ' ' 'sur' ' ' NPASS ' ' ': optimisations' ' ' VMPS ;
        MESS VMSG ;
        SI ITRACE0 ;
            OPTI 'IMPR' 'valid_trace.log' ;
        FINSI ;
        OPTI 'DIME' 3 'MODE' 'TRID' 'ELEM' 'CUB8' 'ECHO' IECHO0 ;
        VTHM = 0 ;
        REPETER ZVREP NREP0 ;
            VIR = &ZVREP ;
            VTFPR = TABL ;
            VTCT = TABL ;
            VTCT . 'N0' = 0 ;
            VTCT . 'N5' = 0 ;
            SI ITEMPS0 ;
                TEMP 'ZERO' ;
            FINSI ;
* Le cas s'execute dans une procedure (variables locales) : les variables
* d'un cas precedent ne peuvent pas masquer un mot-cle ou un operateur
            VC1 VPSW VNIV VTFPR VTCT IECHO0 ;
            VTHR = 0 ;
            SI ITEMPS0 ;
                VTHR = CHRONO ;
            FINSI ;
            SI (VIR 'EGA' 1) ;
                VTHM = VTHR ;
            SINON ;
                SI (VTHR '<' VTHM) ;
                    VTHM = VTHR ;
                FINSI ;
            FINSI ;
        FIN ZVREP ;
        VNER5 = VTCT . 'N5' ;
        VNER0 = VTCT . 'N0' ;
        SI (VIP 'EGA' 1) ;
            VTF1 = VTFPR ;
            VTH1 = VTHM ;
            VNE51 = VNER5 ;
            VNE01 = VNER0 ;
        FINSI ;
        SI (VIP 'EGA' 2) ;
            VTF2 = VTFPR ;
            VTH2 = VTHM ;
            VNE52 = VNER5 ;
            VNE02 = VNER0 ;
        FINSI ;
        SI (VIP 'EGA' 3) ;
            VTF3 = VTFPR ;
            VTH3 = VTHM ;
            VNE53 = VNER5 ;
            VNE03 = VNER0 ;
        FINSI ;
    FIN ZVRUN ;
*   comparaison des empreintes avec la passe 1
    VER2 VNL2 VNC2 = COMPAR VTF1 VTF2 ;
    VMOK2 = 'OK' ;
    SI ((VER2 '>' TOLV0) 'OU' (VNL2 '>' 0) 'OU' ('NON' (VNE52 'EGA' VNE51))) ;
        VMOK2 = 'ECART' ;
        VNBK2 = VNBK2 + 1 ;
    FINSI ;
    VER3 = 0. ;
    VNC3 = 0 ;
    VMOK3 = 'sans_objet' ;
    SI IPASS3 ;
        VER3 VNL3 VNC3 = COMPAR VTF1 VTF3 ;
        VMOK3 = 'OK' ;
        SI ((VER3 '>' TOLV3) 'OU' (VNL3 '>' 0) 'OU' ('NON' (VNE53 'EGA' VNE51))) ;
            VMOK3 = 'ECART' ;
            VNBK3 = VNBK3 + 1 ;
        FINSI ;
    FINSI ;
*   accelerations (temps de la passe 1 / temps de la passe)
    VSP2 = 0. ;
    VSP3 = 0. ;
    SI ((VTH1 '>' 0) 'ET' (VTH2 '>' 0)) ;
        VSP2 = (FLOT VTH1) '/' (FLOT VTH2) ;
    FINSI ;
    SI ((VTH1 '>' 0) 'ET' (VTH3 '>' 0)) ;
        VSP3 = (FLOT VTH1) '/' (FLOT VTH3) ;
    FINSI ;
    VSUM1 = VSUM1 + VTH1 ;
    VSUM2 = VSUM2 + VTH2 ;
    VSUM3 = VSUM3 + VTH3 ;
    VCLA = VTF2 . 'CL' ;
    VR2 = VTF2 . 'NRE' ;
    VC2 = VTF2 . 'NCA' ;
    VH2 = VTF2 . 'NHK' ;
    VM2 = VTF2 . 'NMA' ;
    VR3 = -1 ;
    VC3 = -1 ;
    VH3 = -1 ;
    VM3 = -1 ;
    SI IPASS3 ;
        VR3 = VTF3 . 'NRE' ;
        VC3 = VTF3 . 'NCA' ;
        VH3 = VTF3 . 'NHK' ;
        VM3 = VTF3 . 'NMA' ;
    FINSI ;
    VSE2 = CHAI 'FORMAT' '(1PE10.3)' VER2 ;
    VSE3 = CHAI 'FORMAT' '(1PE10.3)' VER3 ;
    VSS2 = CHAI 'FORMAT' '(F6.2)' VSP2 ;
    VSS3 = CHAI 'FORMAT' '(F6.2)' VSP3 ;
*   fichier de resultat du cas (SORT) et affichage console (MESS)
    OPTI 'SORT' 'valid_mazars.log' ;
    VMSG = CHAI '=== Cas' ' ' '1' ' ' ':' ' ' 'mazars' ' ' '(endommagement MAZARS, QUA4 CP)' ' ' '===' ;
    MESS VMSG ;
    SORT 'CHAI' VMSG ;
    VMSG = CHAI 'Valeurs comparees :' ' ' VNC2 ;
    MESS VMSG ;
    SORT 'CHAI' VMSG ;
    VMSG = CHAI 'Temps horloge (ms) : origine' ' ' VTH1 ' ' '; niveau 1' ' ' VTH2 ' ' '; niveau 2' ' ' VTH3 ;
    MESS VMSG ;
    SORT 'CHAI' VMSG ;
    VMSG = CHAI 'Acceleration par rapport a l origine : niveau 1' ' ' VSS2 ' ' '; niveau 2' ' ' VSS3 ;
    MESS VMSG ;
    SORT 'CHAI' VMSG ;
    VMSG = CHAI 'Controles internes du cas : echecs origine' ' ' VNE51 ' ' '; niveau 1' ' ' VNE52 ' ' '; niveau 2' ' ' VNE53 ' ' '- reussites origine' ' ' VNE01 ' ' '; niveau 1' ' ' VNE02 ' ' '; niveau 2' ' ' VNE03 ;
    MESS VMSG ;
    SORT 'CHAI' VMSG ;
    VMSG = CHAI 'Classes exercees (1 MATVAR, 10 ENDOM, 20 VISCODOM, 100 GD) :' ' ' VCLA ;
    MESS VMSG ;
    SORT 'CHAI' VMSG ;
    VMSG = CHAI 'Niveau 1 : raideur reutilisee' ' ' VR2 ' ' 'fois, recalculee' ' ' VC2 ' ' 'fois ; HOOK evite' ' ' VH2 ' ' 'fois ; caracteristiques reutilisees' ' ' VM2 ' ' 'fois' ;
    MESS VMSG ;
    SORT 'CHAI' VMSG ;
    VMSG = CHAI 'Niveau 2 : raideur reutilisee' ' ' VR3 ' ' 'fois, recalculee' ' ' VC3 ' ' 'fois ; HOOK evite' ' ' VH3 ' ' 'fois ; caracteristiques reutilisees' ' ' VM3 ' ' 'fois' ;
    MESS VMSG ;
    SORT 'CHAI' VMSG ;
    VMSG = CHAI 'Ecart relatif maximal : niveau 1' ' ' VSE2 ' ' '; niveau 2' ' ' VSE3 ;
    MESS VMSG ;
    SORT 'CHAI' VMSG ;
    VMSG = CHAI 'RESULTAT : niveau 1' ' ' VMOK2 ' ' '; niveau 2' ' ' VMOK3 ;
    MESS VMSG ;
    SORT 'CHAI' VMSG ;
    SI (('EGA' VNC2 0) ) ;
        VMSG = CHAI 'ATTENTION : aucune valeur comparee (resultats non stockes ?)' ;
        MESS VMSG ;
        SORT 'CHAI' VMSG ;
    FINSI ;
    OPTI 'SORT' 'valid_inutile.tmp' ;
    VRES . 1 = TABL ;
    VRES . 1 . 'NOM' = 'mazars' ;
    VRES . 1 . 'OKM' = VMOK2 ;
    VRES . 1 . 'OK3' = VMOK3 ;
    VRES . 1 . 'ERR2' = VER2 ;
    VRES . 1 . 'ERR3' = VER3 ;
    VRES . 1 . 'TH1' = VTH1 ;
    VRES . 1 . 'TH2' = VTH2 ;
    VRES . 1 . 'TH3' = VTH3 ;
    VRES . 1 . 'SP2F' = VSP2 ;
    VRES . 1 . 'SP3F' = VSP3 ;
    VRES . 1 . 'NRE2' = VR2 ;
    VRES . 1 . 'NCA2' = VC2 ;
    VRES . 1 . 'NHK2' = VH2 ;
    VRES . 1 . 'NMA2' = VM2 ;
    VRES . 1 . 'NRE3' = VR3 ;
    VRES . 1 . 'NCA3' = VC3 ;
    VRES . 1 . 'NHK3' = VH3 ;
    VRES . 1 . 'CL' = VCLA ;
    VRES . 1 . 'NCMP' = VNC2 ;
    VMSG = CHAI '<<< Cas' ' ' '1' ' ' 'sur' ' ' NTOT0 ' ' ':' ' ' 'mazars' ' ' ':' ' ' 'niveau 1' ' ' VMOK2 ', niveau 2' ' ' VMOK3 ' ' '- ecart' ' ' VSE2 ', acceleration' ' ' VSS2 ' ' 'et' ' ' VSS3 ;
    MESS VMSG ;
    AVANCE VRES 1 NTOT0 'mazars' NPASS 'termine' ;
    MENAGE 'OBLI' ;
FINSI ;

*
* ---------------------------------------------------------------------
* Procedure du cas 2 : mazars2 (endommagement MAZARS, cycles)
* Variables locales : le cas ne voit aucune variable des cas precedents
* ---------------------------------------------------------------------
DEBPROC VC2 VPSW*'LOGIQUE' VNIV*'ENTIER' VTFPR*'TABLE' VTCT*'TABLE' IECHO0*'ENTIER' ;
* ----- debut du cas mazars2

* fichier :  mazars2.dgibi
************************************************************************
* Section : Mecanique Endommagement
* Section : Mecanique Plastique
************************************************************************
*   Christian La Borderie 20 janvier 2010
*
*
*
*TESTE LA VERSION MAZARS MODIFIÃ‰E AVEC PRISE EN COMPTE DE GF
*ON SOLLICITE UN Ã‰LÃ‰MENT DE TAILLE VARIABLE EN TRACTION ET ON VÃ‰RIFIE
*QUE L'Ã‰NERGIE DE FISSURATION OBTENUE CORRESPOND Ã€ CELLE QUI Ã‰TAIT VOULUE
*
OPTI ECHO IECHO0;
COMPLET=FAUX;
GRAPH=FAUX;
*
*
*
OPTI DIME 2 ELEM QUA4 MODE PLAN CONT ;
SI COMPLET;N=3;SINON;N=1;FINSI;
TAB2=TABLE;
TAB2.BTRA=TABLE;
TAB2.TAILLE=TABLE;
TAB2.EVTRAC=TABLE;
TAB2.GFCAL=TABLE;
TAB2.VARI=TABLE;
PROGG=PROG;
PROGD=PROG;
REPETER BOU1 N;
  A=10.**(-1*&BOU1);
  TAB2.TAILLE.I=A;
  PROGD=INSE PROGD &BOU1 A;
  DENSITE A;
  P1=0. 0.;
  P2=A 0.;
  P3=A A;
  P4=0. A;
  D1=D P1 P2;D2=D P2 P3;D3=D P3 P4;D4=D P4 P1;
  S1=DALLER D1 D2 D3 D4;
  MOD1=MODE S1 MECANIQUE ELASTIQUE ISOTROPE ENDOMMAGEMENT MAZARS;
  FT=3.D+6;
  YG=30.D+9;
  GF=100.;
  XNU=0.2;
  EPS0=FT/YG;
  CHAM1=MANU CHML MOD1 BTRA 1. TYPE CARACTERISTIQUES RIGIDITE;
  CHAM2=INTG CHAM1 MOD1 ELEM BTRA;
  CHH=CHAM2**(1./2.);
  GF2=GF - (A*(EPS0**2)/(2.*YG));
  CHAM31= CHH*FT/GF2 ;
  MAT1=MATE MOD1 YOUN YG NU 0.2D0 ATRA -1. BTRA CHAM31 KTR0 EPS0
                            ACOM 2000. BCOM 20000. RHO 2.5E+3 BETA 1.06 ;
  CL1=BLOQ P1 UY;
  CL2=BLOQ D2 UX;
  CL3=BLOQ D4 UX;
  CLTOT=CL1 ET CL2 ET CL3;
  F1=DEPI CL2 1.;
  EVOL1=EVOL MANU (PROG 0. 1.)   (PROG 0.  1.);
  CHAR1=CHARGEMENT F1 EVOL1 DIMP;
  TAB1=TABLE;
  TAB1.BLOCAGES_MECANIQUES=CLTOT;
  TAB1.CARACTERISTIQUES=MAT1;
  TAB1.GRAND_DEPLACEMENTS=VRAI;
  TAB1.MODELE=MOD1;
  TAB1.MOVA='D';
  TAB1.CHARGEMENT=CHAR1;
  TAB1.MAXITERATION=100;

  SI (&BOU1 EGA 1);
  TAB1.TEMPS_CALCULES=PROG 0. (A*EPS0) PAS (A*0.1*EPS0) (A*10*EPS0)
                                      PAS (A*EPS0)    (A*30*EPS0);

  FINSI;
  SI (&BOU1 EGA 2);
  TAB1.TEMPS_CALCULES=PROG 0. (A*EPS0) PAS (A*0.1*EPS0) (A*10*EPS0)
                                      PAS (A*EPS0)    (A*100*EPS0)
                                      PAS (A*10*EPS0)  (A*300*EPS0);

  FINSI;
  SI (&BOU1 EGA 3);
  TAB1.TEMPS_CALCULES=PROG 0. (A*EPS0) PAS (A*0.1*EPS0) (A*10*EPS0)
                                      PAS (A*EPS0)    (A*100*EPS0)
                                      PAS (A*10*EPS0)  (A*300*EPS0)
                                      PAS (A*100*EPS0) (A*3000*EPS0);
  FINSI;


  TAB1 . 'PERF_RAID' = VPSW ; TAB1 . 'PERF_RAID_NIVEAU' = VNIV ; PASAPAS TAB1 ; FPREC TAB1 VTFPR ;

  N1=DIME TAB1.TEMPS_CALCULES;
  PROGT=TAB1.TEMPS_CALCULES;
  TITRE 'COURBE CONTRAINTE - DEPLACEMENT';
  EV1=(@GLOBAL TAB1 EVOL1 CL2 FX) / A;
  SI (&BOU1 EGA 1);
    EVT=EV1;
    SINO;
    EVT=EV1 ET EVT;
  FINSI;
  L1=ENLE (EXTR EV1 ABSC) 1;
  L2=ENLE (EXTR EV1 ORDO) 1;
  EV1=EVOL  MANU L1 L2;
  G2=INTG EV1;
  PROGG=INSE PROGG &BOU1 G2;
  TAB2.GFCAL.I=G2;
FIN BOU1;

*
*
*
MESSAGE 'VALEURS DE GF2 OBTENUES';
LIST PROGG;
IERR=0;
REPETER BOU3 N;
 XERR=((EXTR PROGG &BOU3) - GF2)/GF2;
 SI (XERR > 0.01); IERR=5;FINSI;
 MESSAGE 'TAILLE  10-' &BOU3 '  ERREUR DE  CALCUL : ' (100*XERR) '%';
FIN BOU3;
ERREUR IERR;
SI GRAPH;
  DESS EVT;
FINSI;
* [valid] FIN final


* ----- fin du cas mazars2
FINPROC ;
*
* ---------------------------------------------------------------------
* Cas 2 : mazars2 (endommagement MAZARS, cycles)
* ---------------------------------------------------------------------
SI ((IDEB0 '<EG' 2) 'ET' (IFIN0 '>EG' 2) 'ET' ('NON' ('EXIS' TSKIP 2))) ;
    MENAGE 'OBLI' ;
    MESS ' ' ;
    VMSG = CHAI '>>> Cas' ' ' '2' ' ' 'sur' ' ' NTOT0 ' ' ':' ' ' 'mazars2' ' ' '(endommagement MAZARS, cycles)' ;
    MESS VMSG ;
    NPASS = 2 ;
    SI IPASS3 ;
        NPASS = 3 ;
    FINSI ;
    VTH1 = 0 ;
    VTH2 = 0 ;
    VTH3 = 0 ;
    VNE51 = 0 ;
    VNE01 = 0 ;
    VNE52 = 0 ;
    VNE02 = 0 ;
    VNE53 = 0 ;
    VNE03 = 0 ;
    REPETER ZVRUN NPASS ;
* ordre des passes alterne d'un cas a l'autre (derive des temps en session)
        VIP = NPASS + 1 - &ZVRUN ;
        VPSW = (VIP '>' 1) ;
        VNIV = 1 ;
        VMPS = 'inactif' ;
        SI (VIP 'EGA' 2) ;
            VMPS = 'actif niveau 1' ;
        FINSI ;
        SI (VIP 'EGA' 3) ;
            VNIV = 2 ;
            VMPS = 'actif niveau 2' ;
        FINSI ;
        AVANCE VRES 2 NTOT0 'mazars2' VIP 'en_cours' ;
        VMSG = CHAI '    passe' ' ' VIP ' ' 'sur' ' ' NPASS ' ' ': optimisations' ' ' VMPS ;
        MESS VMSG ;
        SI ITRACE0 ;
            OPTI 'IMPR' 'valid_trace.log' ;
        FINSI ;
        OPTI 'DIME' 3 'MODE' 'TRID' 'ELEM' 'CUB8' 'ECHO' IECHO0 ;
        VTHM = 0 ;
        REPETER ZVREP NREP0 ;
            VIR = &ZVREP ;
            VTFPR = TABL ;
            VTCT = TABL ;
            VTCT . 'N0' = 0 ;
            VTCT . 'N5' = 0 ;
            SI ITEMPS0 ;
                TEMP 'ZERO' ;
            FINSI ;
* Le cas s'execute dans une procedure (variables locales) : les variables
* d'un cas precedent ne peuvent pas masquer un mot-cle ou un operateur
            VC2 VPSW VNIV VTFPR VTCT IECHO0 ;
            VTHR = 0 ;
            SI ITEMPS0 ;
                VTHR = CHRONO ;
            FINSI ;
            SI (VIR 'EGA' 1) ;
                VTHM = VTHR ;
            SINON ;
                SI (VTHR '<' VTHM) ;
                    VTHM = VTHR ;
                FINSI ;
            FINSI ;
        FIN ZVREP ;
        VNER5 = VTCT . 'N5' ;
        VNER0 = VTCT . 'N0' ;
        SI (VIP 'EGA' 1) ;
            VTF1 = VTFPR ;
            VTH1 = VTHM ;
            VNE51 = VNER5 ;
            VNE01 = VNER0 ;
        FINSI ;
        SI (VIP 'EGA' 2) ;
            VTF2 = VTFPR ;
            VTH2 = VTHM ;
            VNE52 = VNER5 ;
            VNE02 = VNER0 ;
        FINSI ;
        SI (VIP 'EGA' 3) ;
            VTF3 = VTFPR ;
            VTH3 = VTHM ;
            VNE53 = VNER5 ;
            VNE03 = VNER0 ;
        FINSI ;
    FIN ZVRUN ;
*   comparaison des empreintes avec la passe 1
    VER2 VNL2 VNC2 = COMPAR VTF1 VTF2 ;
    VMOK2 = 'OK' ;
    SI ((VER2 '>' TOLV0) 'OU' (VNL2 '>' 0) 'OU' ('NON' (VNE52 'EGA' VNE51))) ;
        VMOK2 = 'ECART' ;
        VNBK2 = VNBK2 + 1 ;
    FINSI ;
    VER3 = 0. ;
    VNC3 = 0 ;
    VMOK3 = 'sans_objet' ;
    SI IPASS3 ;
        VER3 VNL3 VNC3 = COMPAR VTF1 VTF3 ;
        VMOK3 = 'OK' ;
        SI ((VER3 '>' TOLV3) 'OU' (VNL3 '>' 0) 'OU' ('NON' (VNE53 'EGA' VNE51))) ;
            VMOK3 = 'ECART' ;
            VNBK3 = VNBK3 + 1 ;
        FINSI ;
    FINSI ;
*   accelerations (temps de la passe 1 / temps de la passe)
    VSP2 = 0. ;
    VSP3 = 0. ;
    SI ((VTH1 '>' 0) 'ET' (VTH2 '>' 0)) ;
        VSP2 = (FLOT VTH1) '/' (FLOT VTH2) ;
    FINSI ;
    SI ((VTH1 '>' 0) 'ET' (VTH3 '>' 0)) ;
        VSP3 = (FLOT VTH1) '/' (FLOT VTH3) ;
    FINSI ;
    VSUM1 = VSUM1 + VTH1 ;
    VSUM2 = VSUM2 + VTH2 ;
    VSUM3 = VSUM3 + VTH3 ;
    VCLA = VTF2 . 'CL' ;
    VR2 = VTF2 . 'NRE' ;
    VC2 = VTF2 . 'NCA' ;
    VH2 = VTF2 . 'NHK' ;
    VM2 = VTF2 . 'NMA' ;
    VR3 = -1 ;
    VC3 = -1 ;
    VH3 = -1 ;
    VM3 = -1 ;
    SI IPASS3 ;
        VR3 = VTF3 . 'NRE' ;
        VC3 = VTF3 . 'NCA' ;
        VH3 = VTF3 . 'NHK' ;
        VM3 = VTF3 . 'NMA' ;
    FINSI ;
    VSE2 = CHAI 'FORMAT' '(1PE10.3)' VER2 ;
    VSE3 = CHAI 'FORMAT' '(1PE10.3)' VER3 ;
    VSS2 = CHAI 'FORMAT' '(F6.2)' VSP2 ;
    VSS3 = CHAI 'FORMAT' '(F6.2)' VSP3 ;
*   fichier de resultat du cas (SORT) et affichage console (MESS)
    OPTI 'SORT' 'valid_mazars2.log' ;
    VMSG = CHAI '=== Cas' ' ' '2' ' ' ':' ' ' 'mazars2' ' ' '(endommagement MAZARS, cycles)' ' ' '===' ;
    MESS VMSG ;
    SORT 'CHAI' VMSG ;
    VMSG = CHAI 'Valeurs comparees :' ' ' VNC2 ;
    MESS VMSG ;
    SORT 'CHAI' VMSG ;
    VMSG = CHAI 'Temps horloge (ms) : origine' ' ' VTH1 ' ' '; niveau 1' ' ' VTH2 ' ' '; niveau 2' ' ' VTH3 ;
    MESS VMSG ;
    SORT 'CHAI' VMSG ;
    VMSG = CHAI 'Acceleration par rapport a l origine : niveau 1' ' ' VSS2 ' ' '; niveau 2' ' ' VSS3 ;
    MESS VMSG ;
    SORT 'CHAI' VMSG ;
    VMSG = CHAI 'Controles internes du cas : echecs origine' ' ' VNE51 ' ' '; niveau 1' ' ' VNE52 ' ' '; niveau 2' ' ' VNE53 ' ' '- reussites origine' ' ' VNE01 ' ' '; niveau 1' ' ' VNE02 ' ' '; niveau 2' ' ' VNE03 ;
    MESS VMSG ;
    SORT 'CHAI' VMSG ;
    VMSG = CHAI 'Classes exercees (1 MATVAR, 10 ENDOM, 20 VISCODOM, 100 GD) :' ' ' VCLA ;
    MESS VMSG ;
    SORT 'CHAI' VMSG ;
    VMSG = CHAI 'Niveau 1 : raideur reutilisee' ' ' VR2 ' ' 'fois, recalculee' ' ' VC2 ' ' 'fois ; HOOK evite' ' ' VH2 ' ' 'fois ; caracteristiques reutilisees' ' ' VM2 ' ' 'fois' ;
    MESS VMSG ;
    SORT 'CHAI' VMSG ;
    VMSG = CHAI 'Niveau 2 : raideur reutilisee' ' ' VR3 ' ' 'fois, recalculee' ' ' VC3 ' ' 'fois ; HOOK evite' ' ' VH3 ' ' 'fois ; caracteristiques reutilisees' ' ' VM3 ' ' 'fois' ;
    MESS VMSG ;
    SORT 'CHAI' VMSG ;
    VMSG = CHAI 'Ecart relatif maximal : niveau 1' ' ' VSE2 ' ' '; niveau 2' ' ' VSE3 ;
    MESS VMSG ;
    SORT 'CHAI' VMSG ;
    VMSG = CHAI 'RESULTAT : niveau 1' ' ' VMOK2 ' ' '; niveau 2' ' ' VMOK3 ;
    MESS VMSG ;
    SORT 'CHAI' VMSG ;
    SI (('EGA' VNC2 0) ) ;
        VMSG = CHAI 'ATTENTION : aucune valeur comparee (resultats non stockes ?)' ;
        MESS VMSG ;
        SORT 'CHAI' VMSG ;
    FINSI ;
    OPTI 'SORT' 'valid_inutile.tmp' ;
    VRES . 2 = TABL ;
    VRES . 2 . 'NOM' = 'mazars2' ;
    VRES . 2 . 'OKM' = VMOK2 ;
    VRES . 2 . 'OK3' = VMOK3 ;
    VRES . 2 . 'ERR2' = VER2 ;
    VRES . 2 . 'ERR3' = VER3 ;
    VRES . 2 . 'TH1' = VTH1 ;
    VRES . 2 . 'TH2' = VTH2 ;
    VRES . 2 . 'TH3' = VTH3 ;
    VRES . 2 . 'SP2F' = VSP2 ;
    VRES . 2 . 'SP3F' = VSP3 ;
    VRES . 2 . 'NRE2' = VR2 ;
    VRES . 2 . 'NCA2' = VC2 ;
    VRES . 2 . 'NHK2' = VH2 ;
    VRES . 2 . 'NMA2' = VM2 ;
    VRES . 2 . 'NRE3' = VR3 ;
    VRES . 2 . 'NCA3' = VC3 ;
    VRES . 2 . 'NHK3' = VH3 ;
    VRES . 2 . 'CL' = VCLA ;
    VRES . 2 . 'NCMP' = VNC2 ;
    VMSG = CHAI '<<< Cas' ' ' '2' ' ' 'sur' ' ' NTOT0 ' ' ':' ' ' 'mazars2' ' ' ':' ' ' 'niveau 1' ' ' VMOK2 ', niveau 2' ' ' VMOK3 ' ' '- ecart' ' ' VSE2 ', acceleration' ' ' VSS2 ' ' 'et' ' ' VSS3 ;
    MESS VMSG ;
    AVANCE VRES 2 NTOT0 'mazars2' NPASS 'termine' ;
    MENAGE 'OBLI' ;
FINSI ;

*
* ---------------------------------------------------------------------
* Procedure du cas 3 : compression (endommagement, compression)
* Variables locales : le cas ne voit aucune variable des cas precedents
* ---------------------------------------------------------------------
DEBPROC VC3 VPSW*'LOGIQUE' VNIV*'ENTIER' VTFPR*'TABLE' VTCT*'TABLE' IECHO0*'ENTIER' ;
* ----- debut du cas compression

* fichier : compression.dgibi
************************************************************************
* Section : Mecanique Endommagement
* Section : Mecanique Plastique
************************************************************************
* Type & Elements de representation *
opti dime 3 elem cub8 ;

* Caracteristiques geometriques *
la=1.;
mla=1. ;
crit = 0.00002 ;

* Defintion des noeuds *
P1 = 0. 0.   0.  ;
P2 = 0. la   0.   ;

* Definition des contours *
L1 = droit 1 P1 P2 ;

* Generation de contours *
coteg = L1 TRAN (0. 0. la) DINI mla DFIN mla;

* Creation du volume *
geom = VOLU coteg  TRAN (la 0. 0.)  DINI la DFIN la ;

* Defintion des surfaces supplementaires *
coted=FACE geom  2 ;

* Epurer le volume *
elim crit geom ;
elim crit (geom et coteg);
elim crit (geom et coted);

* Affichage *
coted = coted coul rouge ;
coteg = coteg coul bleu ;

*** Modele

mod1 = MODE geom MECANIQUE ELASTIQUE PLASTIQUE_ENDOM 'ENDO_PLAS' ;

mat1 = MATE mod1 'YOUN' 20.74e9 'NU' 0.2 'AC' 2.75
'AT' 1. 'BC' 2470. 'BT' 15000. 'EPD0' 10.e-5
'RC' 120.e6 'RT' 10.e6 'P' .4 'GAMA' 0.99 'ALFA' 0.5
'A' -1 'AH' 7.e-5 'BH' 2.e-2 'CH' 3.e-6 'BETA' 1. 'K0' 0.1;


*** Conditions aux limites

cl1 = BLOQ P1 UZ UY;
cl2 = BLOQ L1 UZ ;
cl3 = BLOQ COTEG UX ;
cldepl = BLOQ COTED UX ;

cltot = cl1 et cl2 et cl3 et cldepl ;


*** Chargement

fo1 = DEPI cldepl 1. ;
prog1 = PROG 0. 1. ;
prog2 = PROG 0. -2.e-3 ;

step1 = 1./20. ;
list1 = PROG 0. PAS step1 1. ;

evol1 = EVOL MANU prog1 prog2 ;

char1 = CHARGEMENT fo1 evol1 DIMP ;


tab1 = TABLE ;
tab1 . PLASTIQUE = vrai ;
tab1 . MODELE = mod1 ;
tab1 . CARACTERISTIQUES = mat1 ;
tab1 . CHARGEMENT = char1 ;
tab1 . BLOCAGES_MECANIQUES = cltot ;
tab1 . TEMPS_CALCULES = list1 ;
tab1 . TEMPS_SAUVES = list1 ;
tab1 . MOVA = 'D' ;
tab1 . PRECISION = 1.e-8;

tab1 . 'PERF_RAID' = VPSW ; tab1 . 'PERF_RAID_NIVEAU' = VNIV ; PASAPAS tab1 ; FPREC tab1 VTFPR ;

ind = inde (tab1.contraintes);
nbind1 = dime ind;
nbind1 = nbind1 - 1 ;
************************************************************

*definition des fonctions *

sigxx1=prog;
dex1=prog;
dev = prog ;

i = 1;

repeter bou1 nbind1;

  cont1 = (tab1).contraintes.i;

  sigxx1=sigxx1 et (prog(extr cont1 SMXX 1 1 1));

  dep1 = (tab1) . deplacements . i ;

  eps0 = EPSI dep1 mod1;
  depx1 = (EXTR eps0 EPXX 1 1 1);
  depy1 = (EXTR eps0 EPYY 1 1 1);
  depz1 = (EXTR eps0 EPZZ 1 1 1) ;

*  opti donn 5 ;
************************************************************
* deformations suivant les 3 composantes *

  devv = (depx1 + depy1 + depz1) ;
  dev = dev et (prog devv) ;
  dex1 = dex1 et (prog depx1);
 i = i+1;

fin bou1;

sixx = evol manu 'depl_xx' dex1 'sigxx' sigxx1;
sivv = evol manu 'defo_vol' dev 'sigxx' sigxx1 ;

*dess sivv;
*dess sixx;
* [valid] FIN final


* ----- fin du cas compression
FINPROC ;
*
* ---------------------------------------------------------------------
* Cas 3 : compression (endommagement, compression)
* ---------------------------------------------------------------------
SI ((IDEB0 '<EG' 3) 'ET' (IFIN0 '>EG' 3) 'ET' ('NON' ('EXIS' TSKIP 3))) ;
    MENAGE 'OBLI' ;
    MESS ' ' ;
    VMSG = CHAI '>>> Cas' ' ' '3' ' ' 'sur' ' ' NTOT0 ' ' ':' ' ' 'compression' ' ' '(endommagement, compression)' ;
    MESS VMSG ;
    NPASS = 2 ;
    SI IPASS3 ;
        NPASS = 3 ;
    FINSI ;
    VTH1 = 0 ;
    VTH2 = 0 ;
    VTH3 = 0 ;
    VNE51 = 0 ;
    VNE01 = 0 ;
    VNE52 = 0 ;
    VNE02 = 0 ;
    VNE53 = 0 ;
    VNE03 = 0 ;
    REPETER ZVRUN NPASS ;
* ordre des passes alterne d'un cas a l'autre (derive des temps en session)
        VIP = &ZVRUN ;
        VPSW = (VIP '>' 1) ;
        VNIV = 1 ;
        VMPS = 'inactif' ;
        SI (VIP 'EGA' 2) ;
            VMPS = 'actif niveau 1' ;
        FINSI ;
        SI (VIP 'EGA' 3) ;
            VNIV = 2 ;
            VMPS = 'actif niveau 2' ;
        FINSI ;
        AVANCE VRES 3 NTOT0 'compression' VIP 'en_cours' ;
        VMSG = CHAI '    passe' ' ' VIP ' ' 'sur' ' ' NPASS ' ' ': optimisations' ' ' VMPS ;
        MESS VMSG ;
        SI ITRACE0 ;
            OPTI 'IMPR' 'valid_trace.log' ;
        FINSI ;
        OPTI 'DIME' 3 'MODE' 'TRID' 'ELEM' 'CUB8' 'ECHO' IECHO0 ;
        VTHM = 0 ;
        REPETER ZVREP NREP0 ;
            VIR = &ZVREP ;
            VTFPR = TABL ;
            VTCT = TABL ;
            VTCT . 'N0' = 0 ;
            VTCT . 'N5' = 0 ;
            SI ITEMPS0 ;
                TEMP 'ZERO' ;
            FINSI ;
* Le cas s'execute dans une procedure (variables locales) : les variables
* d'un cas precedent ne peuvent pas masquer un mot-cle ou un operateur
            VC3 VPSW VNIV VTFPR VTCT IECHO0 ;
            VTHR = 0 ;
            SI ITEMPS0 ;
                VTHR = CHRONO ;
            FINSI ;
            SI (VIR 'EGA' 1) ;
                VTHM = VTHR ;
            SINON ;
                SI (VTHR '<' VTHM) ;
                    VTHM = VTHR ;
                FINSI ;
            FINSI ;
        FIN ZVREP ;
        VNER5 = VTCT . 'N5' ;
        VNER0 = VTCT . 'N0' ;
        SI (VIP 'EGA' 1) ;
            VTF1 = VTFPR ;
            VTH1 = VTHM ;
            VNE51 = VNER5 ;
            VNE01 = VNER0 ;
        FINSI ;
        SI (VIP 'EGA' 2) ;
            VTF2 = VTFPR ;
            VTH2 = VTHM ;
            VNE52 = VNER5 ;
            VNE02 = VNER0 ;
        FINSI ;
        SI (VIP 'EGA' 3) ;
            VTF3 = VTFPR ;
            VTH3 = VTHM ;
            VNE53 = VNER5 ;
            VNE03 = VNER0 ;
        FINSI ;
    FIN ZVRUN ;
*   comparaison des empreintes avec la passe 1
    VER2 VNL2 VNC2 = COMPAR VTF1 VTF2 ;
    VMOK2 = 'OK' ;
    SI ((VER2 '>' TOLV0) 'OU' (VNL2 '>' 0) 'OU' ('NON' (VNE52 'EGA' VNE51))) ;
        VMOK2 = 'ECART' ;
        VNBK2 = VNBK2 + 1 ;
    FINSI ;
    VER3 = 0. ;
    VNC3 = 0 ;
    VMOK3 = 'sans_objet' ;
    SI IPASS3 ;
        VER3 VNL3 VNC3 = COMPAR VTF1 VTF3 ;
        VMOK3 = 'OK' ;
        SI ((VER3 '>' TOLV3) 'OU' (VNL3 '>' 0) 'OU' ('NON' (VNE53 'EGA' VNE51))) ;
            VMOK3 = 'ECART' ;
            VNBK3 = VNBK3 + 1 ;
        FINSI ;
    FINSI ;
*   accelerations (temps de la passe 1 / temps de la passe)
    VSP2 = 0. ;
    VSP3 = 0. ;
    SI ((VTH1 '>' 0) 'ET' (VTH2 '>' 0)) ;
        VSP2 = (FLOT VTH1) '/' (FLOT VTH2) ;
    FINSI ;
    SI ((VTH1 '>' 0) 'ET' (VTH3 '>' 0)) ;
        VSP3 = (FLOT VTH1) '/' (FLOT VTH3) ;
    FINSI ;
    VSUM1 = VSUM1 + VTH1 ;
    VSUM2 = VSUM2 + VTH2 ;
    VSUM3 = VSUM3 + VTH3 ;
    VCLA = VTF2 . 'CL' ;
    VR2 = VTF2 . 'NRE' ;
    VC2 = VTF2 . 'NCA' ;
    VH2 = VTF2 . 'NHK' ;
    VM2 = VTF2 . 'NMA' ;
    VR3 = -1 ;
    VC3 = -1 ;
    VH3 = -1 ;
    VM3 = -1 ;
    SI IPASS3 ;
        VR3 = VTF3 . 'NRE' ;
        VC3 = VTF3 . 'NCA' ;
        VH3 = VTF3 . 'NHK' ;
        VM3 = VTF3 . 'NMA' ;
    FINSI ;
    VSE2 = CHAI 'FORMAT' '(1PE10.3)' VER2 ;
    VSE3 = CHAI 'FORMAT' '(1PE10.3)' VER3 ;
    VSS2 = CHAI 'FORMAT' '(F6.2)' VSP2 ;
    VSS3 = CHAI 'FORMAT' '(F6.2)' VSP3 ;
*   fichier de resultat du cas (SORT) et affichage console (MESS)
    OPTI 'SORT' 'valid_compression.log' ;
    VMSG = CHAI '=== Cas' ' ' '3' ' ' ':' ' ' 'compression' ' ' '(endommagement, compression)' ' ' '===' ;
    MESS VMSG ;
    SORT 'CHAI' VMSG ;
    VMSG = CHAI 'Valeurs comparees :' ' ' VNC2 ;
    MESS VMSG ;
    SORT 'CHAI' VMSG ;
    VMSG = CHAI 'Temps horloge (ms) : origine' ' ' VTH1 ' ' '; niveau 1' ' ' VTH2 ' ' '; niveau 2' ' ' VTH3 ;
    MESS VMSG ;
    SORT 'CHAI' VMSG ;
    VMSG = CHAI 'Acceleration par rapport a l origine : niveau 1' ' ' VSS2 ' ' '; niveau 2' ' ' VSS3 ;
    MESS VMSG ;
    SORT 'CHAI' VMSG ;
    VMSG = CHAI 'Controles internes du cas : echecs origine' ' ' VNE51 ' ' '; niveau 1' ' ' VNE52 ' ' '; niveau 2' ' ' VNE53 ' ' '- reussites origine' ' ' VNE01 ' ' '; niveau 1' ' ' VNE02 ' ' '; niveau 2' ' ' VNE03 ;
    MESS VMSG ;
    SORT 'CHAI' VMSG ;
    VMSG = CHAI 'Classes exercees (1 MATVAR, 10 ENDOM, 20 VISCODOM, 100 GD) :' ' ' VCLA ;
    MESS VMSG ;
    SORT 'CHAI' VMSG ;
    VMSG = CHAI 'Niveau 1 : raideur reutilisee' ' ' VR2 ' ' 'fois, recalculee' ' ' VC2 ' ' 'fois ; HOOK evite' ' ' VH2 ' ' 'fois ; caracteristiques reutilisees' ' ' VM2 ' ' 'fois' ;
    MESS VMSG ;
    SORT 'CHAI' VMSG ;
    VMSG = CHAI 'Niveau 2 : raideur reutilisee' ' ' VR3 ' ' 'fois, recalculee' ' ' VC3 ' ' 'fois ; HOOK evite' ' ' VH3 ' ' 'fois ; caracteristiques reutilisees' ' ' VM3 ' ' 'fois' ;
    MESS VMSG ;
    SORT 'CHAI' VMSG ;
    VMSG = CHAI 'Ecart relatif maximal : niveau 1' ' ' VSE2 ' ' '; niveau 2' ' ' VSE3 ;
    MESS VMSG ;
    SORT 'CHAI' VMSG ;
    VMSG = CHAI 'RESULTAT : niveau 1' ' ' VMOK2 ' ' '; niveau 2' ' ' VMOK3 ;
    MESS VMSG ;
    SORT 'CHAI' VMSG ;
    SI (('EGA' VNC2 0) ) ;
        VMSG = CHAI 'ATTENTION : aucune valeur comparee (resultats non stockes ?)' ;
        MESS VMSG ;
        SORT 'CHAI' VMSG ;
    FINSI ;
    OPTI 'SORT' 'valid_inutile.tmp' ;
    VRES . 3 = TABL ;
    VRES . 3 . 'NOM' = 'compression' ;
    VRES . 3 . 'OKM' = VMOK2 ;
    VRES . 3 . 'OK3' = VMOK3 ;
    VRES . 3 . 'ERR2' = VER2 ;
    VRES . 3 . 'ERR3' = VER3 ;
    VRES . 3 . 'TH1' = VTH1 ;
    VRES . 3 . 'TH2' = VTH2 ;
    VRES . 3 . 'TH3' = VTH3 ;
    VRES . 3 . 'SP2F' = VSP2 ;
    VRES . 3 . 'SP3F' = VSP3 ;
    VRES . 3 . 'NRE2' = VR2 ;
    VRES . 3 . 'NCA2' = VC2 ;
    VRES . 3 . 'NHK2' = VH2 ;
    VRES . 3 . 'NMA2' = VM2 ;
    VRES . 3 . 'NRE3' = VR3 ;
    VRES . 3 . 'NCA3' = VC3 ;
    VRES . 3 . 'NHK3' = VH3 ;
    VRES . 3 . 'CL' = VCLA ;
    VRES . 3 . 'NCMP' = VNC2 ;
    VMSG = CHAI '<<< Cas' ' ' '3' ' ' 'sur' ' ' NTOT0 ' ' ':' ' ' 'compression' ' ' ':' ' ' 'niveau 1' ' ' VMOK2 ', niveau 2' ' ' VMOK3 ' ' '- ecart' ' ' VSE2 ', acceleration' ' ' VSS2 ' ' 'et' ' ' VSS3 ;
    MESS VMSG ;
    AVANCE VRES 3 NTOT0 'compression' NPASS 'termine' ;
    MENAGE 'OBLI' ;
FINSI ;

*
* ---------------------------------------------------------------------
* Procedure du cas 4 : endoaxi1 (endommagement, axisymetrique)
* Variables locales : le cas ne voit aucune variable des cas precedents
* ---------------------------------------------------------------------
DEBPROC VC4 VPSW*'LOGIQUE' VNIV*'ENTIER' VTFPR*'TABLE' VTCT*'TABLE' IECHO0*'ENTIER' ;
* ----- debut du cas endoaxi1

* fichier :  endoaxi1.dgibi
************************************************************************
* Section : Mecanique Endommagement
* Section : Mecanique Plastique
************************************************************************
*           Test Endoaxi1.dgibi: Jeux de données      *
*           ------------------------------------      *
*                                                     *
*
complet = faux;
*
*************************************************
*  pour calcul complet mettre complet à : vrai;
*************************************************
*******************************************************
*                                                     *
* TEST;  MATERIAU ELASTO-PLASTIQUE ENDOMMAGEABLE      *
*                                                     *
* EPROUVETTE EN TRACTION AVEC DEPLACEMENTS IMPOSES.   *
* MAILLAGE AXISYMETRIQUE.                             *
*                                                     *
* LES RESULTATS OBTENUS SONT COMPARES  A LA SOLUTION  *
* ANALYTIQUE OBTENUE PAR ALGORITHME.                  *
* ON TESTE - LA DEFORMATION PLASTIQUE CUMULEE         *
*            (composante EPSE dans VARIABLES_INTERNES)*
*          - D, LA VARIABLE D'ENDOMMAGEMENT           *
*            (DANS VARIABLES_INTERNES).               *
*          - SIGMAzz ( dans CONTRAINTES ).            *
*                                                     *
* Test effectue par Mr STRUB (cf rapport DMT/91 .558).*
* Test modifie pour evolution 2/06/92.                *
*******************************************************

GRAPH = 'N';

OPTI ECHO IECHO0 DIME 2 ELEM QUA8 MODE AXIS;
opti trac bens;
*------------------------------------------------------
   P1 = 0 0;          P2 = 3E-3 0;
   P3 = 3E-3 30E-3;   P4 = 0 30E-3;
*
   L1 = P1 P2 DROIT 1  ;
   L2 = P2 P3 DROIT 3 ;
   L3 = P3 P4 DROIT 1  ;
   L4 = P4 P1 DROIT 3 ;
*
   EPROU = L1 L2 L3 L4 DALLER PLAN ;

SI ( NEG GRAPH 'N');
   trac eprou;
FINSI;

   CL1 = BLOQ L1 UZ ;
   CL2 = BLOQ L3 UZ ;
   CL3 = BLOQ L4 UR ;
   CL = CL1 ET CL2 ET CL3 ;
   DEP = DEPI CL2 1E-3 ;
*
   MO = MODE EPROU 'MECANIQUE' 'ELASTIQUE' 'PLASTIQUE'
'ENDOMMAGEABLE';
*
  PROGEPS = PROG 0. .47285E-2 .76066E-2 .89226E-2
   1.0533E-2 1.4011E-2 1.9096E-2 2.6081E-2 3.4654E-2
   4.5828E-2 6.0813E-2 7.2835E-2 8.3328E-2 9.5526E-2
   10.691E-2 11.808E-2 12.784E-2 13.891E-2 14.936E-2
   15.700E-2 16.746E-2 17.720E-2 18.946E-2 19.860E-2
   20.703E-2 21.607E-2 22.802E-2 23.685E-2 24.919E-2
   26.083E-2 ;
  PROGSIG = PROG 0. 350.E06 370.59E06 379.18E06
   387.37E06 400.52E06 414.22E06 427.94E06 440.69E06
   453.63E06 467.26E06 476.30E06 483.24E06 490.46E06
   496.56E06 502.06E06 506.53E06 511.28E06 515.51E06
   518.45E06 522.29E06 525.71E06 529.81E06 532.73E06
   535.33E06 538.03E06 541.47E06 543.92E06 547.23E06
   550.24E06 ;
   CTRAC = EVOL MANU EPS PROGEPS TRAC PROGSIG ;

SI ( NEG GRAPH 'N');
   DESS CTRAC;
FINSI;

  MAT = MATE MO YOUN 74020.E06 NU 0.3 RHO 7800. ALPH 0. TALP 0. TREF 0.
               TRAC CTRAC EPSD 0.03 DC 0.23 EPSR 0.25 ;
*
* LISTE DES PAS DE CALCUL :
*                         0.13 MM INCREMENT ELASTIQUE
*                         0.16 MM INCREMENT PLASTIQUE
si complet;
    LIS = PROG 0.13 0.16
               0.5 1. 1.25 1.5 2. 2.5 3. 3.5 4. 4.5
               5. 5.5 6. 6.5 7. 7.5 8.;
sinon;
     LIS = prog  0.13 0.16  0.5 ;
finsi;
*
    LI1 = PROG 0. 30. ; LI2 = PROG 0. 30. ;
    EV = EVOL MANU T LI1 DEP(T) LI2 ;
    CHA = CHAR 'DIMP' DEP EV ;
    TAB = TABLE ;

    TAB.'BLOCAGES_MECANIQUES' = CL;
    TAB.'CARACTERISTIQUES' = MAT;
    TAB.'CHARGEMENT' = CHA;
    TAB.'MODELE' = MO;
    TAB.'TEMPS_CALCULES' = LIS;
    TAB.'PRECISION' = 1E-08;
*
 TAB . 'PERF_RAID' = VPSW ; TAB . 'PERF_RAID_NIVEAU' = VNIV ; PASAPAS TAB ; FPREC TAB VTFPR ;

*******************************************************
***************     TEST DE FONCTIONNEMENT  ***********
*******************************************************

dpc0 = extr TAB.VARIABLES_INTERNES.2 EPSE 1 1 1;
dpc1 = extr TAB.VARIABLES_INTERNES.3 EPSE 1 1 1;
dpc0t = 5.46e-4;dpc1t =1.12694E-02;
si complet;
dpc2 = extr TAB.VARIABLES_INTERNES.7 EPSE 1 1 1;
dpc4 = extr TAB.VARIABLES_INTERNES.11 EPSE 1 1 1;
dpc6 = extr TAB.VARIABLES_INTERNES.15 EPSE 1 1 1;
dpc75 =extr TAB.VARIABLES_INTERNES.18 EPSE 1 1 1;

 dpc2t = 6.03e-2; dpc4t = 12.65e-2; dpc6t = 19.29e-2;
dpc75t = 24.27e-2;
finsi;
D0 =  extr TAB.VARIABLES_INTERNES.2 'VHWD' 1 1 1;
D1 =  extr TAB.VARIABLES_INTERNES.3 'VHWD' 1 1 1;
D0T = 0.; D1T= 0.0;
si complet;
D2 =  extr TAB.VARIABLES_INTERNES.7 'VHWD' 1 1 1;
D4 =  extr TAB.VARIABLES_INTERNES.11 'VHWD' 1 1 1;
D6 =  extr TAB.VARIABLES_INTERNES.15 'VHWD' 1 1 1;
D75 =  extr TAB.VARIABLES_INTERNES.18 'VHWD' 1 1 1;

 D2T= 0.0257; D4T= 0.0901; D6T= 0.1622; D75T= 0.2199;
  finsi;

SZZ0 = EXTR TAB.CONTRAINTES.2 SMZZ 1 1 1;
SZZ1 = EXTR TAB.CONTRAINTES.3 SMZZ 1 1 1;
SZZ0T = 354.3E6; SZZ1T =  4.07984E+08;
si complet;
SZZ2 = EXTR TAB.CONTRAINTES.7 SMZZ 1 1 1;
SZZ4 = EXTR TAB.CONTRAINTES.11 SMZZ 1 1 1;
SZZ6 = EXTR TAB.CONTRAINTES.15 SMZZ 1 1 1;
SZZ75 = EXTR TAB.CONTRAINTES.18 SMZZ 1 1 1;

SZZ2T = 459.3E6; SZZ4T = 461.4E6; SZZ6T = 443.3E6;
SZZ75T = 422.4E6;
finsi;

EDPC0 = ABS((DPC0-DPC0T)/DPC0T);
EDPC1 = ABS((DPC1-DPC1T)/DPC1T);
si complet;
EDPC2 = ABS((DPC2-DPC2T)/DPC2T);
EDPC4 = ABS((DPC4-DPC4T)/DPC4T);
EDPC6 = ABS((DPC6-DPC6T)/DPC6T);
EDPC75 = ABS((DPC75-DPC75T)/DPC75T);
finsi;
ED0 = ABS((D0-D0T)/(D0T+0.001));
ED1 = ABS((D1-D1T)/(D1T+0.001));
si complet;
ED2 = ABS((D2-D2T)/D2T);
ED4 = ABS((D4-D4T)/D4T);
ED6 = ABS((D6-D6T)/D6T);
ED75 = ABS((D75-D75T)/D75T);
finsi;

ESZZ0 = ABS((SZZ0-SZZ0T)/SZZ0T);
ESZZ1 = ABS((SZZ1-SZZ1T)/SZZ1T);
si complet;
ESZZ2 = ABS((SZZ2-SZZ2T)/SZZ2T);
ESZZ4 = ABS((SZZ4-SZZ4T)/SZZ4T);
ESZZ6 = ABS((SZZ6-SZZ6T)/SZZ6T);
ESZZ75 = ABS((SZZ75-SZZ75T)/SZZ75T);

finsi;
si complet;
LERR = PROG EDPC0 EDPC1 EDPC2 EDPC4 EDPC6 EDPC75 ED0
 ED1 ED2 ED4 ED6 ED75
       ESZZ0 ESZZ1 ESZZ2 ESZZ4 ESZZ6 ESZZ75;
sinon;
lerr =  PROG EDPC0 EDPC1 ED0 ED1 ESZZ0 ESZZ1;
finsi;
list LERR;

ermax = maxi LERR;
LIST ermax;
* [valid] temps;
SI ( ERMAX <EG 0.05 );
   VTCT . 'N0' = (VTCT . 'N0') + 1 ;
SINON;
   VTCT . 'N5' = (VTCT . 'N5') + 1 ;
FINSI;
* [valid] FIN final
* [valid] FIN final


* ----- fin du cas endoaxi1
FINPROC ;
*
* ---------------------------------------------------------------------
* Cas 4 : endoaxi1 (endommagement, axisymetrique)
* ---------------------------------------------------------------------
SI ((IDEB0 '<EG' 4) 'ET' (IFIN0 '>EG' 4) 'ET' ('NON' ('EXIS' TSKIP 4))) ;
    MENAGE 'OBLI' ;
    MESS ' ' ;
    VMSG = CHAI '>>> Cas' ' ' '4' ' ' 'sur' ' ' NTOT0 ' ' ':' ' ' 'endoaxi1' ' ' '(endommagement, axisymetrique)' ;
    MESS VMSG ;
    NPASS = 2 ;
    SI IPASS3 ;
        NPASS = 3 ;
    FINSI ;
    VTH1 = 0 ;
    VTH2 = 0 ;
    VTH3 = 0 ;
    VNE51 = 0 ;
    VNE01 = 0 ;
    VNE52 = 0 ;
    VNE02 = 0 ;
    VNE53 = 0 ;
    VNE03 = 0 ;
    REPETER ZVRUN NPASS ;
* ordre des passes alterne d'un cas a l'autre (derive des temps en session)
        VIP = NPASS + 1 - &ZVRUN ;
        VPSW = (VIP '>' 1) ;
        VNIV = 1 ;
        VMPS = 'inactif' ;
        SI (VIP 'EGA' 2) ;
            VMPS = 'actif niveau 1' ;
        FINSI ;
        SI (VIP 'EGA' 3) ;
            VNIV = 2 ;
            VMPS = 'actif niveau 2' ;
        FINSI ;
        AVANCE VRES 4 NTOT0 'endoaxi1' VIP 'en_cours' ;
        VMSG = CHAI '    passe' ' ' VIP ' ' 'sur' ' ' NPASS ' ' ': optimisations' ' ' VMPS ;
        MESS VMSG ;
        SI ITRACE0 ;
            OPTI 'IMPR' 'valid_trace.log' ;
        FINSI ;
        OPTI 'DIME' 3 'MODE' 'TRID' 'ELEM' 'CUB8' 'ECHO' IECHO0 ;
        VTHM = 0 ;
        REPETER ZVREP NREP0 ;
            VIR = &ZVREP ;
            VTFPR = TABL ;
            VTCT = TABL ;
            VTCT . 'N0' = 0 ;
            VTCT . 'N5' = 0 ;
            SI ITEMPS0 ;
                TEMP 'ZERO' ;
            FINSI ;
* Le cas s'execute dans une procedure (variables locales) : les variables
* d'un cas precedent ne peuvent pas masquer un mot-cle ou un operateur
            VC4 VPSW VNIV VTFPR VTCT IECHO0 ;
            VTHR = 0 ;
            SI ITEMPS0 ;
                VTHR = CHRONO ;
            FINSI ;
            SI (VIR 'EGA' 1) ;
                VTHM = VTHR ;
            SINON ;
                SI (VTHR '<' VTHM) ;
                    VTHM = VTHR ;
                FINSI ;
            FINSI ;
        FIN ZVREP ;
        VNER5 = VTCT . 'N5' ;
        VNER0 = VTCT . 'N0' ;
        SI (VIP 'EGA' 1) ;
            VTF1 = VTFPR ;
            VTH1 = VTHM ;
            VNE51 = VNER5 ;
            VNE01 = VNER0 ;
        FINSI ;
        SI (VIP 'EGA' 2) ;
            VTF2 = VTFPR ;
            VTH2 = VTHM ;
            VNE52 = VNER5 ;
            VNE02 = VNER0 ;
        FINSI ;
        SI (VIP 'EGA' 3) ;
            VTF3 = VTFPR ;
            VTH3 = VTHM ;
            VNE53 = VNER5 ;
            VNE03 = VNER0 ;
        FINSI ;
    FIN ZVRUN ;
*   comparaison des empreintes avec la passe 1
    VER2 VNL2 VNC2 = COMPAR VTF1 VTF2 ;
    VMOK2 = 'OK' ;
    SI ((VER2 '>' TOLV0) 'OU' (VNL2 '>' 0) 'OU' ('NON' (VNE52 'EGA' VNE51))) ;
        VMOK2 = 'ECART' ;
        VNBK2 = VNBK2 + 1 ;
    FINSI ;
    VER3 = 0. ;
    VNC3 = 0 ;
    VMOK3 = 'sans_objet' ;
    SI IPASS3 ;
        VER3 VNL3 VNC3 = COMPAR VTF1 VTF3 ;
        VMOK3 = 'OK' ;
        SI ((VER3 '>' TOLV3) 'OU' (VNL3 '>' 0) 'OU' ('NON' (VNE53 'EGA' VNE51))) ;
            VMOK3 = 'ECART' ;
            VNBK3 = VNBK3 + 1 ;
        FINSI ;
    FINSI ;
*   accelerations (temps de la passe 1 / temps de la passe)
    VSP2 = 0. ;
    VSP3 = 0. ;
    SI ((VTH1 '>' 0) 'ET' (VTH2 '>' 0)) ;
        VSP2 = (FLOT VTH1) '/' (FLOT VTH2) ;
    FINSI ;
    SI ((VTH1 '>' 0) 'ET' (VTH3 '>' 0)) ;
        VSP3 = (FLOT VTH1) '/' (FLOT VTH3) ;
    FINSI ;
    VSUM1 = VSUM1 + VTH1 ;
    VSUM2 = VSUM2 + VTH2 ;
    VSUM3 = VSUM3 + VTH3 ;
    VCLA = VTF2 . 'CL' ;
    VR2 = VTF2 . 'NRE' ;
    VC2 = VTF2 . 'NCA' ;
    VH2 = VTF2 . 'NHK' ;
    VM2 = VTF2 . 'NMA' ;
    VR3 = -1 ;
    VC3 = -1 ;
    VH3 = -1 ;
    VM3 = -1 ;
    SI IPASS3 ;
        VR3 = VTF3 . 'NRE' ;
        VC3 = VTF3 . 'NCA' ;
        VH3 = VTF3 . 'NHK' ;
        VM3 = VTF3 . 'NMA' ;
    FINSI ;
    VSE2 = CHAI 'FORMAT' '(1PE10.3)' VER2 ;
    VSE3 = CHAI 'FORMAT' '(1PE10.3)' VER3 ;
    VSS2 = CHAI 'FORMAT' '(F6.2)' VSP2 ;
    VSS3 = CHAI 'FORMAT' '(F6.2)' VSP3 ;
*   fichier de resultat du cas (SORT) et affichage console (MESS)
    OPTI 'SORT' 'valid_endoaxi1.log' ;
    VMSG = CHAI '=== Cas' ' ' '4' ' ' ':' ' ' 'endoaxi1' ' ' '(endommagement, axisymetrique)' ' ' '===' ;
    MESS VMSG ;
    SORT 'CHAI' VMSG ;
    VMSG = CHAI 'Valeurs comparees :' ' ' VNC2 ;
    MESS VMSG ;
    SORT 'CHAI' VMSG ;
    VMSG = CHAI 'Temps horloge (ms) : origine' ' ' VTH1 ' ' '; niveau 1' ' ' VTH2 ' ' '; niveau 2' ' ' VTH3 ;
    MESS VMSG ;
    SORT 'CHAI' VMSG ;
    VMSG = CHAI 'Acceleration par rapport a l origine : niveau 1' ' ' VSS2 ' ' '; niveau 2' ' ' VSS3 ;
    MESS VMSG ;
    SORT 'CHAI' VMSG ;
    VMSG = CHAI 'Controles internes du cas : echecs origine' ' ' VNE51 ' ' '; niveau 1' ' ' VNE52 ' ' '; niveau 2' ' ' VNE53 ' ' '- reussites origine' ' ' VNE01 ' ' '; niveau 1' ' ' VNE02 ' ' '; niveau 2' ' ' VNE03 ;
    MESS VMSG ;
    SORT 'CHAI' VMSG ;
    VMSG = CHAI 'Classes exercees (1 MATVAR, 10 ENDOM, 20 VISCODOM, 100 GD) :' ' ' VCLA ;
    MESS VMSG ;
    SORT 'CHAI' VMSG ;
    VMSG = CHAI 'Niveau 1 : raideur reutilisee' ' ' VR2 ' ' 'fois, recalculee' ' ' VC2 ' ' 'fois ; HOOK evite' ' ' VH2 ' ' 'fois ; caracteristiques reutilisees' ' ' VM2 ' ' 'fois' ;
    MESS VMSG ;
    SORT 'CHAI' VMSG ;
    VMSG = CHAI 'Niveau 2 : raideur reutilisee' ' ' VR3 ' ' 'fois, recalculee' ' ' VC3 ' ' 'fois ; HOOK evite' ' ' VH3 ' ' 'fois ; caracteristiques reutilisees' ' ' VM3 ' ' 'fois' ;
    MESS VMSG ;
    SORT 'CHAI' VMSG ;
    VMSG = CHAI 'Ecart relatif maximal : niveau 1' ' ' VSE2 ' ' '; niveau 2' ' ' VSE3 ;
    MESS VMSG ;
    SORT 'CHAI' VMSG ;
    VMSG = CHAI 'RESULTAT : niveau 1' ' ' VMOK2 ' ' '; niveau 2' ' ' VMOK3 ;
    MESS VMSG ;
    SORT 'CHAI' VMSG ;
    SI (('EGA' VNC2 0) ) ;
        VMSG = CHAI 'ATTENTION : aucune valeur comparee (resultats non stockes ?)' ;
        MESS VMSG ;
        SORT 'CHAI' VMSG ;
    FINSI ;
    OPTI 'SORT' 'valid_inutile.tmp' ;
    VRES . 4 = TABL ;
    VRES . 4 . 'NOM' = 'endoaxi1' ;
    VRES . 4 . 'OKM' = VMOK2 ;
    VRES . 4 . 'OK3' = VMOK3 ;
    VRES . 4 . 'ERR2' = VER2 ;
    VRES . 4 . 'ERR3' = VER3 ;
    VRES . 4 . 'TH1' = VTH1 ;
    VRES . 4 . 'TH2' = VTH2 ;
    VRES . 4 . 'TH3' = VTH3 ;
    VRES . 4 . 'SP2F' = VSP2 ;
    VRES . 4 . 'SP3F' = VSP3 ;
    VRES . 4 . 'NRE2' = VR2 ;
    VRES . 4 . 'NCA2' = VC2 ;
    VRES . 4 . 'NHK2' = VH2 ;
    VRES . 4 . 'NMA2' = VM2 ;
    VRES . 4 . 'NRE3' = VR3 ;
    VRES . 4 . 'NCA3' = VC3 ;
    VRES . 4 . 'NHK3' = VH3 ;
    VRES . 4 . 'CL' = VCLA ;
    VRES . 4 . 'NCMP' = VNC2 ;
    VMSG = CHAI '<<< Cas' ' ' '4' ' ' 'sur' ' ' NTOT0 ' ' ':' ' ' 'endoaxi1' ' ' ':' ' ' 'niveau 1' ' ' VMOK2 ', niveau 2' ' ' VMOK3 ' ' '- ecart' ' ' VSE2 ', acceleration' ' ' VSS2 ' ' 'et' ' ' VSS3 ;
    MESS VMSG ;
    AVANCE VRES 4 NTOT0 'endoaxi1' NPASS 'termine' ;
    MENAGE 'OBLI' ;
FINSI ;

*
* ---------------------------------------------------------------------
* Procedure du cas 5 : endoaxi2 (endommagement + thermique, axi)
* Variables locales : le cas ne voit aucune variable des cas precedents
* ---------------------------------------------------------------------
DEBPROC VC5 VPSW*'LOGIQUE' VNIV*'ENTIER' VTFPR*'TABLE' VTCT*'TABLE' IECHO0*'ENTIER' ;
* ----- debut du cas endoaxi2

* fichier :  endoaxi2.dgibi
************************************************************************
* Section : Mecanique Endommagement
* Section : Mecanique Plastique
************************************************************************
*         Test Endoaxi2.dgibi: Jeux de données        *
*         ------------------------------------        *
*                                                     *

*******************************************************
*                                                     *
* TEST;  MATERIAU ELASTO-PLASTIQUE ENDOMMAGEABLE      *
* MATERIAU DEPENDANT DE LA TEMPERATURE :              *
*                          COURBE DE TRACTION         *
*                          COEFFICIENT DE DILATATION  *
*                          THERMIQUE                  *
*                                                     *
* EPROUVETTE EN TRACTION AVEC DEPLACEMENTS IMPOSES    *
*                           + CHARGEMENT THERMIQUE    *
* MAILLAGE AXISYMETRIQUE.                             *
*                                                     *
* LES RESULTATS OBTENUS SONT COMPARES  A LA SOLUTION  *
* ANALYTIQUE OBTENUE PAR ALGORITHME.                  *
* ON TESTE - LA DEFORMATION PLASTIQUE CUMULEE         *
*            (composante EPSE dans VARIABLES_INTERNES)*
*          - D, LA VARIABLE D'ENDOMMAGEMENT           *
*            DANS VARIABLES_INTERNES .                *
*          - SIGMAzz ( DANS CONTRAINTES ).            *
*******************************************************                                                       *


OPTI ECHO IECHO0 DIME 2 ELEM QUA8 MODE AXIS;
*------------------------------------------------------
   P1 = 0 0;          P2 = 3E-3 0;
   P3 = 3E-3 30E-3;   P4 = 0 30E-3;
*
   L1 = P1 P2 DROIT 1  ;
   L2 = P2 P3 DROIT 1  ;
   L3 = P3 P4 DROIT 1  ;
   L4 = P4 P1 DROIT 1  ;
*
   EPROU = L1 L2 L3 L4 DALLER PLAN ;

   CL1 = BLOQ L1 UZ ;
   CL2 = BLOQ L3 UZ ;
   CL3 = BLOQ L4 UR ;
   CL = CL1 ET CL2 ET CL3 ;
   DEP = DEPI CL2 1E-3 ;
*
   MO = MODE EPROU 'MECANIQUE' 'ELASTIQUE' 'PLASTIQUE'
'ENDOMMAGEABLE';
*
* module tangent valant 783MPa
*-----------------------------
  PROGEPS1 = PROG 0. (350./74020.) 0.3 0.6 ;
  PROGSIG1 = PROG 0. 350.E06 581.1976E06 816.0976E06 ;
   CTRAC1 = EVOL MANU EPS PROGEPS1 SIG PROGSIG1 ;
*
* module tangent valant 491MPa
*-----------------------------
  PROGEPS2 = PROG 0. (350./74020.) 0.3 0.6 ;
  PROGSIG2 = PROG 0. 350.E06 494.9783E06 642.2783E06 ;
   CTRAC2 = EVOL MANU EPS PROGEPS2 SIG PROGSIG2 ;
*
* module tangent valant 199MPa
*-----------------------------
  PROGEPS3 = PROG 0. (350./74020.) 0.3 0.6 ;
  PROGSIG3 = PROG 0. 350.E06 408.7590E06 468.4590E06 ;
   CTRAC3 = EVOL MANU EPS PROGEPS3 SIG PROGSIG3 ;
*
* module tangent variable
*------------------------
CTRAC = NUAGE 'T'*'FLOTTANT' 'TRAC'*'EVOLUTION'
                  0. CTRAC1 100. CTRAC2 200. CTRAC3  ;
*
* coefficient de dilatation thermique vaiable
*--------------------------------------------
*
  PROGTEMP = PROG 0. 100. 200. ;
  PROGALFA = PROG 0. 1E-3 2E-3 ;
  EVALPH = EVOL MANU 'T' PROGTEMP 'ALPH' PROGALFA ;
*
*   MAT = MATE MO YOUN 74020.E06 NU 0.3 RHO 7800.
*   ALPH 1.E-3 TRAC CTRAC1 EPSD 0. DC 0.23 EPSR 0.25 ;
*
   MATvar = MATE MO YOUN 74020.E06 NU 0.3 RHO 7800.
   ALPH EVALPH 'TALP' 0. 'TREF' 0. TRAC CTRAC EPSD 0. DC 0.23 EPSR 0.25 ;
*
************** DEFINITION DU CHARGEMENT ***************
*
   LI1 = PROG 0. 30. ; LI2 = PROG 0. 30. ;
   EV = EVOL MANU T LI1 DEP(T) LI2 ;
   CHA1 = CHAR 'DIMP' DEP EV ;
   TEMP0 = MANU CHPO EPROU 1 'T' 0.     ;
   TEMP200 = MANU CHPO EPROU 1 'T' 200. ;
   t0 = 0. ; t20 = 20.      ;
   TEMP = TABLE; TEMPERA = TABLE;
   TEMP.0 = t0 ; TEMP.1 = t20 ;
   TEMPERA.0 = TEMP0; TEMPERA.1 = TEMP200;
   CHA2 = CHAR 'T' TEMP TEMPERA;
   CHA = CHA1 ET CHA2;
*
* LISTE DES PAS DE CALCUL :
*                         0.14 MM INCREMENT ELASTIQUE
*                         0.15 MM INCREMENT PLASTIQUE
  LIS = PROG 0.14 0.15 0.2 0.4 0.7 1 pas .3
        3.1 3.3 pas .2 4.1 ;
*
TAB = TABLE ;
TAB.'PRECISION' = 1E-3;
TAB.'BLOCAGES_MECANIQUES' = CL;
TAB.'CARACTERISTIQUES' = MATvar;
TAB.'CHARGEMENT' = CHA;
TAB.'TEMPS_CALCULES' = LIS;
TAB.'MODELE' = MO;
TAB . 'PERF_RAID' = VPSW ; TAB . 'PERF_RAID_NIVEAU' = VNIV ; PASAPAS TAB ; FPREC TAB VTFPR ;
*
*
*------------------------------------------------------
*  CONTROLE DES RESULTATS AVEC DE LA SOLUTION
*      DE REFERENCE OBTENUE PAR ALGORITHME
*------------------------------------------------------
*
 REF_D = PROG 2.197E-2 3.417E-2 6.337E-2 8.131E-2 ;
 REF_P = PROG 3.646E-2 5.443E-2 9.296E-2 1.143E-1 ;
 REF_S = (PROG   368.9   376.0   386.4   389.2)*1E6 ;
*
D1 = EXTR (TAB.VARIABLES_INTERNES.7) 'VHWD' 1 1 1;
D2 = EXTR (TAB.VARIABLES_INTERNES.9) 'VHWD' 1 1 1;
D3 = EXTR (TAB.VARIABLES_INTERNES.14) 'VHWD' 1 1 1;
D4 = EXTR (TAB.VARIABLES_INTERNES.18) 'VHWD' 1 1 1;
*
P1 = EXTR (TAB.VARIABLES_INTERNES.7) 'EPSE' 1 1 1;
P2 = EXTR (TAB.VARIABLES_INTERNES.9) 'EPSE' 1 1 1;
P3 = EXTR (TAB.VARIABLES_INTERNES.14) 'EPSE' 1 1 1;
P4 = EXTR (TAB.VARIABLES_INTERNES.18) 'EPSE' 1 1 1;
*
S1 = EXTR (TAB.CONTRAINTES.7) 'SMZZ' 1 1 1;
S2 = EXTR (TAB.CONTRAINTES.9) 'SMZZ' 1 1 1;
S3 = EXTR (TAB.CONTRAINTES.14) 'SMZZ' 1 1 1;
S4 = EXTR (TAB.CONTRAINTES.18) 'SMZZ' 1 1 1;
*
EF_D = PROG D1 D2 D3 D4 ;
EF_P = PROG P1 P2 P3 P4 ;
EF_S = PROG S1 S2 S3 S4 ;
*
PROG_ERD = MAXI (ABS ((EF_D  - REF_D) / REF_D)) ;
PROG_ERP = MAXI (ABS ((EF_P  - REF_P) / REF_P)) ;
PROG_ERS = MAXI (ABS ((EF_S  - REF_S) / REF_S)) ;
*
ERR = MAXI (PROG PROG_ERD PROG_ERP PROG_ERS)    ;
*
* [valid] temps;
SI ( ERR <EG 0.05 );
   VTCT . 'N0' = (VTCT . 'N0') + 1 ;
SINON;
   VTCT . 'N5' = (VTCT . 'N5') + 1 ;
FINSI;
*
* [valid] FIN final


* ----- fin du cas endoaxi2
FINPROC ;
*
* ---------------------------------------------------------------------
* Cas 5 : endoaxi2 (endommagement + thermique, axi)
* ---------------------------------------------------------------------
SI ((IDEB0 '<EG' 5) 'ET' (IFIN0 '>EG' 5) 'ET' ('NON' ('EXIS' TSKIP 5))) ;
    MENAGE 'OBLI' ;
    MESS ' ' ;
    VMSG = CHAI '>>> Cas' ' ' '5' ' ' 'sur' ' ' NTOT0 ' ' ':' ' ' 'endoaxi2' ' ' '(endommagement + thermique, axi)' ;
    MESS VMSG ;
    NPASS = 2 ;
    SI IPASS3 ;
        NPASS = 3 ;
    FINSI ;
    VTH1 = 0 ;
    VTH2 = 0 ;
    VTH3 = 0 ;
    VNE51 = 0 ;
    VNE01 = 0 ;
    VNE52 = 0 ;
    VNE02 = 0 ;
    VNE53 = 0 ;
    VNE03 = 0 ;
    REPETER ZVRUN NPASS ;
* ordre des passes alterne d'un cas a l'autre (derive des temps en session)
        VIP = &ZVRUN ;
        VPSW = (VIP '>' 1) ;
        VNIV = 1 ;
        VMPS = 'inactif' ;
        SI (VIP 'EGA' 2) ;
            VMPS = 'actif niveau 1' ;
        FINSI ;
        SI (VIP 'EGA' 3) ;
            VNIV = 2 ;
            VMPS = 'actif niveau 2' ;
        FINSI ;
        AVANCE VRES 5 NTOT0 'endoaxi2' VIP 'en_cours' ;
        VMSG = CHAI '    passe' ' ' VIP ' ' 'sur' ' ' NPASS ' ' ': optimisations' ' ' VMPS ;
        MESS VMSG ;
        SI ITRACE0 ;
            OPTI 'IMPR' 'valid_trace.log' ;
        FINSI ;
        OPTI 'DIME' 3 'MODE' 'TRID' 'ELEM' 'CUB8' 'ECHO' IECHO0 ;
        VTHM = 0 ;
        REPETER ZVREP NREP0 ;
            VIR = &ZVREP ;
            VTFPR = TABL ;
            VTCT = TABL ;
            VTCT . 'N0' = 0 ;
            VTCT . 'N5' = 0 ;
            SI ITEMPS0 ;
                TEMP 'ZERO' ;
            FINSI ;
* Le cas s'execute dans une procedure (variables locales) : les variables
* d'un cas precedent ne peuvent pas masquer un mot-cle ou un operateur
            VC5 VPSW VNIV VTFPR VTCT IECHO0 ;
            VTHR = 0 ;
            SI ITEMPS0 ;
                VTHR = CHRONO ;
            FINSI ;
            SI (VIR 'EGA' 1) ;
                VTHM = VTHR ;
            SINON ;
                SI (VTHR '<' VTHM) ;
                    VTHM = VTHR ;
                FINSI ;
            FINSI ;
        FIN ZVREP ;
        VNER5 = VTCT . 'N5' ;
        VNER0 = VTCT . 'N0' ;
        SI (VIP 'EGA' 1) ;
            VTF1 = VTFPR ;
            VTH1 = VTHM ;
            VNE51 = VNER5 ;
            VNE01 = VNER0 ;
        FINSI ;
        SI (VIP 'EGA' 2) ;
            VTF2 = VTFPR ;
            VTH2 = VTHM ;
            VNE52 = VNER5 ;
            VNE02 = VNER0 ;
        FINSI ;
        SI (VIP 'EGA' 3) ;
            VTF3 = VTFPR ;
            VTH3 = VTHM ;
            VNE53 = VNER5 ;
            VNE03 = VNER0 ;
        FINSI ;
    FIN ZVRUN ;
*   comparaison des empreintes avec la passe 1
    VER2 VNL2 VNC2 = COMPAR VTF1 VTF2 ;
    VMOK2 = 'OK' ;
    SI ((VER2 '>' TOLV0) 'OU' (VNL2 '>' 0) 'OU' ('NON' (VNE52 'EGA' VNE51))) ;
        VMOK2 = 'ECART' ;
        VNBK2 = VNBK2 + 1 ;
    FINSI ;
    VER3 = 0. ;
    VNC3 = 0 ;
    VMOK3 = 'sans_objet' ;
    SI IPASS3 ;
        VER3 VNL3 VNC3 = COMPAR VTF1 VTF3 ;
        VMOK3 = 'OK' ;
        SI ((VER3 '>' TOLV3) 'OU' (VNL3 '>' 0) 'OU' ('NON' (VNE53 'EGA' VNE51))) ;
            VMOK3 = 'ECART' ;
            VNBK3 = VNBK3 + 1 ;
        FINSI ;
    FINSI ;
*   accelerations (temps de la passe 1 / temps de la passe)
    VSP2 = 0. ;
    VSP3 = 0. ;
    SI ((VTH1 '>' 0) 'ET' (VTH2 '>' 0)) ;
        VSP2 = (FLOT VTH1) '/' (FLOT VTH2) ;
    FINSI ;
    SI ((VTH1 '>' 0) 'ET' (VTH3 '>' 0)) ;
        VSP3 = (FLOT VTH1) '/' (FLOT VTH3) ;
    FINSI ;
    VSUM1 = VSUM1 + VTH1 ;
    VSUM2 = VSUM2 + VTH2 ;
    VSUM3 = VSUM3 + VTH3 ;
    VCLA = VTF2 . 'CL' ;
    VR2 = VTF2 . 'NRE' ;
    VC2 = VTF2 . 'NCA' ;
    VH2 = VTF2 . 'NHK' ;
    VM2 = VTF2 . 'NMA' ;
    VR3 = -1 ;
    VC3 = -1 ;
    VH3 = -1 ;
    VM3 = -1 ;
    SI IPASS3 ;
        VR3 = VTF3 . 'NRE' ;
        VC3 = VTF3 . 'NCA' ;
        VH3 = VTF3 . 'NHK' ;
        VM3 = VTF3 . 'NMA' ;
    FINSI ;
    VSE2 = CHAI 'FORMAT' '(1PE10.3)' VER2 ;
    VSE3 = CHAI 'FORMAT' '(1PE10.3)' VER3 ;
    VSS2 = CHAI 'FORMAT' '(F6.2)' VSP2 ;
    VSS3 = CHAI 'FORMAT' '(F6.2)' VSP3 ;
*   fichier de resultat du cas (SORT) et affichage console (MESS)
    OPTI 'SORT' 'valid_endoaxi2.log' ;
    VMSG = CHAI '=== Cas' ' ' '5' ' ' ':' ' ' 'endoaxi2' ' ' '(endommagement + thermique, axi)' ' ' '===' ;
    MESS VMSG ;
    SORT 'CHAI' VMSG ;
    VMSG = CHAI 'Valeurs comparees :' ' ' VNC2 ;
    MESS VMSG ;
    SORT 'CHAI' VMSG ;
    VMSG = CHAI 'Temps horloge (ms) : origine' ' ' VTH1 ' ' '; niveau 1' ' ' VTH2 ' ' '; niveau 2' ' ' VTH3 ;
    MESS VMSG ;
    SORT 'CHAI' VMSG ;
    VMSG = CHAI 'Acceleration par rapport a l origine : niveau 1' ' ' VSS2 ' ' '; niveau 2' ' ' VSS3 ;
    MESS VMSG ;
    SORT 'CHAI' VMSG ;
    VMSG = CHAI 'Controles internes du cas : echecs origine' ' ' VNE51 ' ' '; niveau 1' ' ' VNE52 ' ' '; niveau 2' ' ' VNE53 ' ' '- reussites origine' ' ' VNE01 ' ' '; niveau 1' ' ' VNE02 ' ' '; niveau 2' ' ' VNE03 ;
    MESS VMSG ;
    SORT 'CHAI' VMSG ;
    VMSG = CHAI 'Classes exercees (1 MATVAR, 10 ENDOM, 20 VISCODOM, 100 GD) :' ' ' VCLA ;
    MESS VMSG ;
    SORT 'CHAI' VMSG ;
    VMSG = CHAI 'Niveau 1 : raideur reutilisee' ' ' VR2 ' ' 'fois, recalculee' ' ' VC2 ' ' 'fois ; HOOK evite' ' ' VH2 ' ' 'fois ; caracteristiques reutilisees' ' ' VM2 ' ' 'fois' ;
    MESS VMSG ;
    SORT 'CHAI' VMSG ;
    VMSG = CHAI 'Niveau 2 : raideur reutilisee' ' ' VR3 ' ' 'fois, recalculee' ' ' VC3 ' ' 'fois ; HOOK evite' ' ' VH3 ' ' 'fois ; caracteristiques reutilisees' ' ' VM3 ' ' 'fois' ;
    MESS VMSG ;
    SORT 'CHAI' VMSG ;
    VMSG = CHAI 'Ecart relatif maximal : niveau 1' ' ' VSE2 ' ' '; niveau 2' ' ' VSE3 ;
    MESS VMSG ;
    SORT 'CHAI' VMSG ;
    VMSG = CHAI 'RESULTAT : niveau 1' ' ' VMOK2 ' ' '; niveau 2' ' ' VMOK3 ;
    MESS VMSG ;
    SORT 'CHAI' VMSG ;
    SI (('EGA' VNC2 0) ) ;
        VMSG = CHAI 'ATTENTION : aucune valeur comparee (resultats non stockes ?)' ;
        MESS VMSG ;
        SORT 'CHAI' VMSG ;
    FINSI ;
    OPTI 'SORT' 'valid_inutile.tmp' ;
    VRES . 5 = TABL ;
    VRES . 5 . 'NOM' = 'endoaxi2' ;
    VRES . 5 . 'OKM' = VMOK2 ;
    VRES . 5 . 'OK3' = VMOK3 ;
    VRES . 5 . 'ERR2' = VER2 ;
    VRES . 5 . 'ERR3' = VER3 ;
    VRES . 5 . 'TH1' = VTH1 ;
    VRES . 5 . 'TH2' = VTH2 ;
    VRES . 5 . 'TH3' = VTH3 ;
    VRES . 5 . 'SP2F' = VSP2 ;
    VRES . 5 . 'SP3F' = VSP3 ;
    VRES . 5 . 'NRE2' = VR2 ;
    VRES . 5 . 'NCA2' = VC2 ;
    VRES . 5 . 'NHK2' = VH2 ;
    VRES . 5 . 'NMA2' = VM2 ;
    VRES . 5 . 'NRE3' = VR3 ;
    VRES . 5 . 'NCA3' = VC3 ;
    VRES . 5 . 'NHK3' = VH3 ;
    VRES . 5 . 'CL' = VCLA ;
    VRES . 5 . 'NCMP' = VNC2 ;
    VMSG = CHAI '<<< Cas' ' ' '5' ' ' 'sur' ' ' NTOT0 ' ' ':' ' ' 'endoaxi2' ' ' ':' ' ' 'niveau 1' ' ' VMOK2 ', niveau 2' ' ' VMOK3 ' ' '- ecart' ' ' VSE2 ', acceleration' ' ' VSS2 ' ' 'et' ' ' VSS3 ;
    MESS VMSG ;
    AVANCE VRES 5 NTOT0 'endoaxi2' NPASS 'termine' ;
    MENAGE 'OBLI' ;
FINSI ;

*
* ---------------------------------------------------------------------
* Procedure du cas 6 : endoaxi3 (endommagement + thermique, axi)
* Variables locales : le cas ne voit aucune variable des cas precedents
* ---------------------------------------------------------------------
DEBPROC VC6 VPSW*'LOGIQUE' VNIV*'ENTIER' VTFPR*'TABLE' VTCT*'TABLE' IECHO0*'ENTIER' ;
* ----- debut du cas endoaxi3

* fichier :  endoaxi3.dgibi
************************************************************************
* Section : Mecanique Endommagement
* Section : Mecanique Plastique
************************************************************************
*          Test Endoaxi3.dgibi: Jeux de données       *
*          ------------------------------------       *
*                                                     *
complet = faux;
*
*************************************************
*  pour calcul complet mettre complet à : vrai;
***************************************************
*******************************************************
*                                                     *
* TEST;  MATERIAU ELASTO-PLASTIQUE ENDOMMAGEABLE      *
* MATERIAU DEPENDANT DE LA TEMPERATURE :              *
*                          COURBE DE TRACTION         *
*                          COEFFICIENT DE DILATATION  *
*                          THERMIQUE                  *
* TEMPERATURE DE REFERENCE = 30°C                     *
* TEMPERATURE DE REFERENCE POUR COEF. DE DILATATION   *
* THERMIQUES               = 10°C                     *
* TEMPERATURE INITIALE     = 50°C                     *
*                                                     *
* EPROUVETTE EN TRACTION AVEC DEPLACEMENTS IMPOSES    *
*                           + CHARGEMENT THERMIQUE    *
* MAILLAGE AXISYMETRIQUE.                             *
*                                                     *
* LES RESULTATS OBTENUS SONT COMPARES  A LA SOLUTION  *
* ANALYTIQUE OBTENUE PAR ALGORITHME.                  *
* ON TESTE - LA DEFORMATION PLASTIQUE CUMULEE         *
*            (composante EPSE dans VARIABLES_INTERNES)*
*          - D, LA VARIABLE D'ENDOMMAGEMENT           *
*            DANS VARIABLES_INTERNES .                *
*          - SIGMAzz ( DANS CONTRAINTES ).            *
*******************************************************                                                       *


OPTI ECHO IECHO0 DIME 2 ELEM QUA8 MODE AXIS;
*------------------------------------------------------
   P1 = 0 0;          P2 = 3E-3 0;
   P3 = 3E-3 30E-3;   P4 = 0 30E-3;
*
   L1 = P1 P2 DROIT 1  ;
   L2 = P2 P3 DROIT 1  ;
   L3 = P3 P4 DROIT 1  ;
   L4 = P4 P1 DROIT 1  ;
*
   EPROU = L1 L2 L3 L4 DALLER PLAN ;

   CL1 = BLOQ L1 UZ ;
   CL2 = BLOQ L3 UZ ;
   CL3 = BLOQ L4 UR ;
   CL = CL1 ET CL2 ET CL3 ;
   DEP = DEPI CL2 -1E-3 ;
*
   MO = MODE EPROU 'MECANIQUE' 'ELASTIQUE' 'PLASTIQUE'
'ENDOMMAGEABLE';
*
* module tangent valant 783MPa
*-----------------------------
  PROGEPS1 = PROG 0. (350./74020.) 0.3 0.6 ;
  PROGSIG1 = PROG 0. 350.E06 581.1976E06 816.0976E06 ;
   CTRAC1 = EVOL MANU EPS PROGEPS1 SIG PROGSIG1 ;
*
* module tangent valant 491MPa
*-----------------------------
  PROGEPS2 = PROG 0. (350./74020.) 0.3 0.6 ;
  PROGSIG2 = PROG 0. 350.E06 494.9783E06 642.2783E06 ;
   CTRAC2 = EVOL MANU EPS PROGEPS2 SIG PROGSIG2 ;
*
* module tangent valant 199MPa
*-----------------------------
  PROGEPS3 = PROG 0. (350./74020.) 0.3 0.6 ;
  PROGSIG3 = PROG 0. 350.E06 408.7590E06 468.4590E06 ;
   CTRAC3 = EVOL MANU EPS PROGEPS3 SIG PROGSIG3 ;
*
* module tangent variable
*------------------------
CTRAC = NUAGE 'T'*'FLOTTANT' 'TRAC'*'EVOLUTION'
                  0. CTRAC1 100. CTRAC2 200. CTRAC3  ;
*
* coefficient de dilatation thermique variable
*--------------------------------------------
*
  PROGTEMP = PROG 0. 100. 200. ;
  PROGALFA = PROG 0. .25E-3 .5E-3 ;
  EVALPH = EVOL MANU 'T' PROGTEMP 'ALPH' PROGALFA ;
*
   MATvar = MATE MO YOUN 74020.E06 NU 0.3 RHO 7800.
   ALPH EVALPH 'TALP' 10. 'TREF' 30. TRAC CTRAC EPSD 0. DC 0.23 EPSR 0.25 ;
*
************** DEFINITION DU CHARGEMENT ***************
*
   LI1 = PROG 0. 1 31. ; LI2 = PROG 0. 0. 30. ;
   EV = EVOL MANU T LI1 DEP(T) LI2 ;
   CHA1 = CHAR 'DIMP' DEP EV ;
 TEMPREF = MANU CHPO EPROU 1 'T' 30.    ;
   TEMP0 = MANU CHPO EPROU 1 'T' 50.    ;
   TEMP200 = MANU CHPO EPROU 1 'T' 200. ;
   t0 = 0. ; T1 = 1. ; t20 = 20.        ;
   TEMP = TABLE;
   TEMPERA = TABLE;
   TEMP   . 0 = t0     ; TEMP   . 1 = t1   ; TEMP   . 2 = t20    ;
   TEMPERA. 0 = TEMPREF; TEMPERA. 1 = TEMP0; TEMPERA. 2 = TEMP200;
   CHA2 = CHAR 'T' TEMP TEMPERA;
   CHA = CHA1 ET CHA2;
*
* LISTE DES PAS DE CALCUL :
*                1.035 MM PREMIER INCREMENT PLASTIQUE
*
si complet ;
  LIS = PROG 1.035 1.1 pas 0.1 7;
sinon;
LIS =   PROG 1.035 1.1 pas 0.1 1.6;
finsi;

*
TAB = TABLE ;
TAB.'PRECISION' = 1E-3;
TAB.'BLOCAGES_MECANIQUES' = CL;
TAB.'CARACTERISTIQUES' = MATvar;
TAB.'CHARGEMENT' = CHA;
TAB.'TEMPS_CALCULES' = LIS;
TAB.'MODELE' = MO;
TAB . 'PERF_RAID' = VPSW ; TAB . 'PERF_RAID_NIVEAU' = VNIV ; PASAPAS TAB ; FPREC TAB VTFPR ;
*
*------------------------------------------------------
*  CONTROLE DES RESULTATS AVEC DE LA SOLUTION
*     DE REFERENCE OBTENUE PAR ALGORITHME
*------------------------------------------------------
*
si complet;
 TA = 4.; TB = 7.;
 REF_D = PROG 7.5E-2 17.7E-2      ;
 REF_P = PROG 10.3E-2 20.9E-2     ;
 REF_S = (PROG -376.9 -369.1)*1E6 ;
SINON;
 TA = 1.2;  TB = 1.6;
 REF_D = PROG 3.52404E-03     1.24384E-02      ;
 REF_P = PROG 5.75205E-03     1.97372E-02   ;
 REF_S = PROG    -3.52473E+08    -3.57838E+08;
finsi;
*
D1=EXTR (PECHE TAB VARIABLES_INTERNES TA) 'VHWD' 1 1 1;
D2=EXTR (PECHE TAB VARIABLES_INTERNES TB) 'VHWD' 1 1 1;
*
P1=EXTR (PECHE TAB VARIABLES_INTERNES TA) 'EPSE' 1 1 1;
P2=EXTR (PECHE TAB VARIABLES_INTERNES TB) 'EPSE' 1 1 1;
*
S1 = EXTR (PECHE TAB CONTRAINTES TA) 'SMZZ' 1 1 1;
S2 = EXTR (PECHE TAB CONTRAINTES TB) 'SMZZ' 1 1 1;
*
EF_D = PROG D1 D2  ;
EF_P = PROG P1 P2  ;
EF_S = PROG S1 S2  ;
*
PROG_ERD = MAXI (ABS ((EF_D  - REF_D) / REF_D)) ;
PROG_ERP = MAXI (ABS ((EF_P  - REF_P) / REF_P)) ;
PROG_ERS = MAXI (ABS ((EF_S  - REF_S) / REF_S)) ;
*
ERR = MAXI (PROG PROG_ERD PROG_ERP PROG_ERS)    ;
*
* [valid] temps;
LIST ERR;
SI ( ERR <EG 0.05 );
   VTCT . 'N0' = (VTCT . 'N0') + 1 ;
SINON;
   VTCT . 'N5' = (VTCT . 'N5') + 1 ;
FINSI;
*
* [valid] FIN final


* ----- fin du cas endoaxi3
FINPROC ;
*
* ---------------------------------------------------------------------
* Cas 6 : endoaxi3 (endommagement + thermique, axi)
* ---------------------------------------------------------------------
SI ((IDEB0 '<EG' 6) 'ET' (IFIN0 '>EG' 6) 'ET' ('NON' ('EXIS' TSKIP 6))) ;
    MENAGE 'OBLI' ;
    MESS ' ' ;
    VMSG = CHAI '>>> Cas' ' ' '6' ' ' 'sur' ' ' NTOT0 ' ' ':' ' ' 'endoaxi3' ' ' '(endommagement + thermique, axi)' ;
    MESS VMSG ;
    NPASS = 2 ;
    SI IPASS3 ;
        NPASS = 3 ;
    FINSI ;
    VTH1 = 0 ;
    VTH2 = 0 ;
    VTH3 = 0 ;
    VNE51 = 0 ;
    VNE01 = 0 ;
    VNE52 = 0 ;
    VNE02 = 0 ;
    VNE53 = 0 ;
    VNE03 = 0 ;
    REPETER ZVRUN NPASS ;
* ordre des passes alterne d'un cas a l'autre (derive des temps en session)
        VIP = NPASS + 1 - &ZVRUN ;
        VPSW = (VIP '>' 1) ;
        VNIV = 1 ;
        VMPS = 'inactif' ;
        SI (VIP 'EGA' 2) ;
            VMPS = 'actif niveau 1' ;
        FINSI ;
        SI (VIP 'EGA' 3) ;
            VNIV = 2 ;
            VMPS = 'actif niveau 2' ;
        FINSI ;
        AVANCE VRES 6 NTOT0 'endoaxi3' VIP 'en_cours' ;
        VMSG = CHAI '    passe' ' ' VIP ' ' 'sur' ' ' NPASS ' ' ': optimisations' ' ' VMPS ;
        MESS VMSG ;
        SI ITRACE0 ;
            OPTI 'IMPR' 'valid_trace.log' ;
        FINSI ;
        OPTI 'DIME' 3 'MODE' 'TRID' 'ELEM' 'CUB8' 'ECHO' IECHO0 ;
        VTHM = 0 ;
        REPETER ZVREP NREP0 ;
            VIR = &ZVREP ;
            VTFPR = TABL ;
            VTCT = TABL ;
            VTCT . 'N0' = 0 ;
            VTCT . 'N5' = 0 ;
            SI ITEMPS0 ;
                TEMP 'ZERO' ;
            FINSI ;
* Le cas s'execute dans une procedure (variables locales) : les variables
* d'un cas precedent ne peuvent pas masquer un mot-cle ou un operateur
            VC6 VPSW VNIV VTFPR VTCT IECHO0 ;
            VTHR = 0 ;
            SI ITEMPS0 ;
                VTHR = CHRONO ;
            FINSI ;
            SI (VIR 'EGA' 1) ;
                VTHM = VTHR ;
            SINON ;
                SI (VTHR '<' VTHM) ;
                    VTHM = VTHR ;
                FINSI ;
            FINSI ;
        FIN ZVREP ;
        VNER5 = VTCT . 'N5' ;
        VNER0 = VTCT . 'N0' ;
        SI (VIP 'EGA' 1) ;
            VTF1 = VTFPR ;
            VTH1 = VTHM ;
            VNE51 = VNER5 ;
            VNE01 = VNER0 ;
        FINSI ;
        SI (VIP 'EGA' 2) ;
            VTF2 = VTFPR ;
            VTH2 = VTHM ;
            VNE52 = VNER5 ;
            VNE02 = VNER0 ;
        FINSI ;
        SI (VIP 'EGA' 3) ;
            VTF3 = VTFPR ;
            VTH3 = VTHM ;
            VNE53 = VNER5 ;
            VNE03 = VNER0 ;
        FINSI ;
    FIN ZVRUN ;
*   comparaison des empreintes avec la passe 1
    VER2 VNL2 VNC2 = COMPAR VTF1 VTF2 ;
    VMOK2 = 'OK' ;
    SI ((VER2 '>' TOLV0) 'OU' (VNL2 '>' 0) 'OU' ('NON' (VNE52 'EGA' VNE51))) ;
        VMOK2 = 'ECART' ;
        VNBK2 = VNBK2 + 1 ;
    FINSI ;
    VER3 = 0. ;
    VNC3 = 0 ;
    VMOK3 = 'sans_objet' ;
    SI IPASS3 ;
        VER3 VNL3 VNC3 = COMPAR VTF1 VTF3 ;
        VMOK3 = 'OK' ;
        SI ((VER3 '>' TOLV3) 'OU' (VNL3 '>' 0) 'OU' ('NON' (VNE53 'EGA' VNE51))) ;
            VMOK3 = 'ECART' ;
            VNBK3 = VNBK3 + 1 ;
        FINSI ;
    FINSI ;
*   accelerations (temps de la passe 1 / temps de la passe)
    VSP2 = 0. ;
    VSP3 = 0. ;
    SI ((VTH1 '>' 0) 'ET' (VTH2 '>' 0)) ;
        VSP2 = (FLOT VTH1) '/' (FLOT VTH2) ;
    FINSI ;
    SI ((VTH1 '>' 0) 'ET' (VTH3 '>' 0)) ;
        VSP3 = (FLOT VTH1) '/' (FLOT VTH3) ;
    FINSI ;
    VSUM1 = VSUM1 + VTH1 ;
    VSUM2 = VSUM2 + VTH2 ;
    VSUM3 = VSUM3 + VTH3 ;
    VCLA = VTF2 . 'CL' ;
    VR2 = VTF2 . 'NRE' ;
    VC2 = VTF2 . 'NCA' ;
    VH2 = VTF2 . 'NHK' ;
    VM2 = VTF2 . 'NMA' ;
    VR3 = -1 ;
    VC3 = -1 ;
    VH3 = -1 ;
    VM3 = -1 ;
    SI IPASS3 ;
        VR3 = VTF3 . 'NRE' ;
        VC3 = VTF3 . 'NCA' ;
        VH3 = VTF3 . 'NHK' ;
        VM3 = VTF3 . 'NMA' ;
    FINSI ;
    VSE2 = CHAI 'FORMAT' '(1PE10.3)' VER2 ;
    VSE3 = CHAI 'FORMAT' '(1PE10.3)' VER3 ;
    VSS2 = CHAI 'FORMAT' '(F6.2)' VSP2 ;
    VSS3 = CHAI 'FORMAT' '(F6.2)' VSP3 ;
*   fichier de resultat du cas (SORT) et affichage console (MESS)
    OPTI 'SORT' 'valid_endoaxi3.log' ;
    VMSG = CHAI '=== Cas' ' ' '6' ' ' ':' ' ' 'endoaxi3' ' ' '(endommagement + thermique, axi)' ' ' '===' ;
    MESS VMSG ;
    SORT 'CHAI' VMSG ;
    VMSG = CHAI 'Valeurs comparees :' ' ' VNC2 ;
    MESS VMSG ;
    SORT 'CHAI' VMSG ;
    VMSG = CHAI 'Temps horloge (ms) : origine' ' ' VTH1 ' ' '; niveau 1' ' ' VTH2 ' ' '; niveau 2' ' ' VTH3 ;
    MESS VMSG ;
    SORT 'CHAI' VMSG ;
    VMSG = CHAI 'Acceleration par rapport a l origine : niveau 1' ' ' VSS2 ' ' '; niveau 2' ' ' VSS3 ;
    MESS VMSG ;
    SORT 'CHAI' VMSG ;
    VMSG = CHAI 'Controles internes du cas : echecs origine' ' ' VNE51 ' ' '; niveau 1' ' ' VNE52 ' ' '; niveau 2' ' ' VNE53 ' ' '- reussites origine' ' ' VNE01 ' ' '; niveau 1' ' ' VNE02 ' ' '; niveau 2' ' ' VNE03 ;
    MESS VMSG ;
    SORT 'CHAI' VMSG ;
    VMSG = CHAI 'Classes exercees (1 MATVAR, 10 ENDOM, 20 VISCODOM, 100 GD) :' ' ' VCLA ;
    MESS VMSG ;
    SORT 'CHAI' VMSG ;
    VMSG = CHAI 'Niveau 1 : raideur reutilisee' ' ' VR2 ' ' 'fois, recalculee' ' ' VC2 ' ' 'fois ; HOOK evite' ' ' VH2 ' ' 'fois ; caracteristiques reutilisees' ' ' VM2 ' ' 'fois' ;
    MESS VMSG ;
    SORT 'CHAI' VMSG ;
    VMSG = CHAI 'Niveau 2 : raideur reutilisee' ' ' VR3 ' ' 'fois, recalculee' ' ' VC3 ' ' 'fois ; HOOK evite' ' ' VH3 ' ' 'fois ; caracteristiques reutilisees' ' ' VM3 ' ' 'fois' ;
    MESS VMSG ;
    SORT 'CHAI' VMSG ;
    VMSG = CHAI 'Ecart relatif maximal : niveau 1' ' ' VSE2 ' ' '; niveau 2' ' ' VSE3 ;
    MESS VMSG ;
    SORT 'CHAI' VMSG ;
    VMSG = CHAI 'RESULTAT : niveau 1' ' ' VMOK2 ' ' '; niveau 2' ' ' VMOK3 ;
    MESS VMSG ;
    SORT 'CHAI' VMSG ;
    SI (('EGA' VNC2 0) ) ;
        VMSG = CHAI 'ATTENTION : aucune valeur comparee (resultats non stockes ?)' ;
        MESS VMSG ;
        SORT 'CHAI' VMSG ;
    FINSI ;
    OPTI 'SORT' 'valid_inutile.tmp' ;
    VRES . 6 = TABL ;
    VRES . 6 . 'NOM' = 'endoaxi3' ;
    VRES . 6 . 'OKM' = VMOK2 ;
    VRES . 6 . 'OK3' = VMOK3 ;
    VRES . 6 . 'ERR2' = VER2 ;
    VRES . 6 . 'ERR3' = VER3 ;
    VRES . 6 . 'TH1' = VTH1 ;
    VRES . 6 . 'TH2' = VTH2 ;
    VRES . 6 . 'TH3' = VTH3 ;
    VRES . 6 . 'SP2F' = VSP2 ;
    VRES . 6 . 'SP3F' = VSP3 ;
    VRES . 6 . 'NRE2' = VR2 ;
    VRES . 6 . 'NCA2' = VC2 ;
    VRES . 6 . 'NHK2' = VH2 ;
    VRES . 6 . 'NMA2' = VM2 ;
    VRES . 6 . 'NRE3' = VR3 ;
    VRES . 6 . 'NCA3' = VC3 ;
    VRES . 6 . 'NHK3' = VH3 ;
    VRES . 6 . 'CL' = VCLA ;
    VRES . 6 . 'NCMP' = VNC2 ;
    VMSG = CHAI '<<< Cas' ' ' '6' ' ' 'sur' ' ' NTOT0 ' ' ':' ' ' 'endoaxi3' ' ' ':' ' ' 'niveau 1' ' ' VMOK2 ', niveau 2' ' ' VMOK3 ' ' '- ecart' ' ' VSE2 ', acceleration' ' ' VSS2 ' ' 'et' ' ' VSS3 ;
    MESS VMSG ;
    AVANCE VRES 6 NTOT0 'endoaxi3' NPASS 'termine' ;
    MENAGE 'OBLI' ;
FINSI ;

*
* ---------------------------------------------------------------------
* Procedure du cas 7 : endocp1 (endommagement, contraintes planes)
* Variables locales : le cas ne voit aucune variable des cas precedents
* ---------------------------------------------------------------------
DEBPROC VC7 VPSW*'LOGIQUE' VNIV*'ENTIER' VTFPR*'TABLE' VTCT*'TABLE' IECHO0*'ENTIER' ;
* ----- debut du cas endocp1

* fichier :  endocp1.dgibi
************************************************************************
* Section : Mecanique Endommagement
* Section : Mecanique Plastique
************************************************************************
*           Test Endocp1.dgibi: Jeux de données       *
*           -----------------------------------       *
*                                                     *
*
complet = faux;
*
*************************************************
*  pour calcul complet mettre complet à : vrai;
*************************************************
**
*******************************************************
*                                                     *
* TEST;  MATERIAU ELASTO-PLASTIQUE ENDOMMAGEABLE      *
*                                                     *
* EPROUVETTE EN TRACTION AVEC DEPLACEMENTS IMPOSES.   *
* MAILLAGE AXISYMETRIQUE.                             *
*                                                     *
* LES RESULTATS OBTENUS SONT COMPARES  A LA SOLUTION  *
* ANALYTIQUE OBTENUE PAR ALGORITHME.                  *
* ON TESTE - LA DEFORMATION PLASTIQUE CUMULEE         *
*            (composante EPSE dans VARIABLES_INTERNES)*
*          - D, LA VARIABLE D'ENDOMMAGEMENT           *
*            dans VARIABLES_INTERNES).                *
*          - SIGMAyy ( dans CONTRAINTES ).            *
*                                                     *
* Test effectue par Mr STRUB (cf rapport DMT/91 .558).*
* Test modifie pour evolution 2/06/92.                *
*******************************************************

GRAPH = 'N';
OPTI ECHO IECHO0 DIME 2 ELEM QUA8 MODE PLAN CONT ;
*
*------------------------------------------------------
   P1 = 0 0;          P2 = 5E-3 0;
   P3 = 5E-3 30E-3;   P4 = 0 30E-3;
*
   L1 = P1 P2 DROIT 1  ;
   L2 = P2 P3 DROIT 2 ;
   L3 = P3 P4 DROIT 1  ;
   L4 = P4 P1 DROIT 2 ;
*
   EPROU = L1 L2 L3 L4 DALLER PLAN ;

SI ( NEG GRAPH 'N');
   trac eprou;
finsi;
   CL1 = BLOQ L1 UY ;
   CL2 = BLOQ L3 UY ;
   CL3 = BLOQ L4 UX ;
   CL = CL1 ET CL2 ET CL3 ;
   DEP = DEPI CL2 1E-3 ;
*
   MO = MODE EPROU 'MECANIQUE' 'ELASTIQUE' 'PLASTIQUE'
        'ENDOMMAGEABLE';
*
  PROGEPS = PROG 0.    .47285E-2 .76066E-2 .89226E-2
   1.0533E-2 1.4011E-2 1.9096E-2 2.6081E-2 3.4654E-2
   4.5828E-2 6.0813E-2 7.2835E-2 8.3328E-2 9.5526E-2
   10.691E-2 11.808E-2 12.784E-2 13.891E-2 14.936E-2
   15.700E-2 16.746E-2 17.720E-2 18.946E-2 19.860E-2
   20.703E-2 21.607E-2 22.802E-2 23.685E-2 24.919E-2
   26.083E-2 ;
  PROGSIG = PROG 0.    350.E06   370.59E06 379.18E06
   387.37E06 400.52E06 414.22E06 427.94E06 440.69E06
   453.63E06 467.26E06 476.30E06 483.24E06 490.46E06
   496.56E06 502.06E06 506.53E06 511.28E06 515.51E06
   518.45E06 522.29E06 525.71E06 529.81E06 532.73E06
   535.33E06 538.03E06 541.47E06 543.92E06 547.23E06
   550.24E06 ;
   CTRAC = EVOL MANU EPS PROGEPS SIG PROGSIG ;
*
SI ( NEG GRAPH 'N');
    DESS CTRAC;
FINSI;
  MAT = MATE MO YOUN 74020.E06 NU 0.3 RHO 7800. ALPH 0.
        TRAC CTRAC EPSD 0.03 DC 0.23 EPSR 0.25 ;
*
   LI1 = PROG 0. 30. ; LI2 = PROG 0. 30. ;
   EV = EVOL MANU T LI1 DEP(T) LI2 ;
   CHA = CHAR 'DIMP' DEP EV ;
*
* LISTE DES PAS DE CALCUL :
*                         0.13 MM INCREMENT ELASTIQUE
*                         0.16 MM INCREMENT PLASTIQUE
si complet;
 LIS = PROG 0.13 0.16 0.33 0.5 0.75 1. 1.25 1.5 1.75 2.
            2.25 2.5 2.75 3. 3.25 3.5 3.75 4. 4.25 4.5
            4.75 5. 5.25 5.5 5.75 6. 6.25 6.5 6.75 7.
            7.25 7.5 7.75 8. ;
sinon;
 LIS = prog  0.13 0.16  0.33 0.5 ;
finsi;
    TAB = TABLE ;
    TAB.'BLOCAGES_MECANIQUES' = CL;
    TAB.'MODELE' = MO;
    TAB.'CARACTERISTIQUES' = MAT;
    TAB.'TEMPS_CALCULES' = LIS;
    TAB.'CHARGEMENT' = CHA;
    TAB.'PRECISION' = 1E-08;
*
    TAB . 'PERF_RAID' = VPSW ; TAB . 'PERF_RAID_NIVEAU' = VNIV ; PASAPAS TAB ; FPREC TAB VTFPR ;

*******************************************************
************     TEST DE FONCTIONNEMENT  **************
*******************************************************

dpc0 = extr TAB.VARIABLES_INTERNES.2 EPSE 1 1 1;
dpc1 = extr TAB.VARIABLES_INTERNES.4 EPSE 1 1 1;
dpc0t = 5.46e-4; dpc1t =1.12694E-02;
si complet;
dpc2 = extr TAB.VARIABLES_INTERNES.10 EPSE 1 1 1;
dpc4 = extr TAB.VARIABLES_INTERNES.18 EPSE 1 1 1;
dpc6 = extr TAB.VARIABLES_INTERNES.26 EPSE 1 1 1;
dpc75 =extr TAB.VARIABLES_INTERNES.32 EPSE 1 1 1;
dpc2t = 6.03e-2; dpc4t = 12.65e-2; dpc6t = 19.29e-2;
dpc75t = 24.27e-2;
finsi;


D0 =  extr TAB.VARIABLES_INTERNES.2 'VHWD' 1 1 1;
D1 =  extr TAB.VARIABLES_INTERNES.4 'VHWD' 1 1 1;
D0T = 0.; D1T= 0.0;
si complet;
D2 =  extr TAB.VARIABLES_INTERNES.10 'VHWD' 1 1 1;
D4 =  extr TAB.VARIABLES_INTERNES.18 'VHWD' 1 1 1;
D6 =  extr TAB.VARIABLES_INTERNES.26 'VHWD' 1 1 1;
D75 =  extr TAB.VARIABLES_INTERNES.32 'VHWD' 1 1 1;
D2T= 0.0257;  D4T= 0.0901; D6T= 0.1622; D75T= 0.2199;
finsi;

SZZ0 = EXTR TAB.CONTRAINTES.2 SMYY 1 1 1;
SZZ1 = EXTR TAB.CONTRAINTES.4 SMYY 1 1 1;
SZZ0T = 354.3E6; SZZ1T =  4.07984E+08;
si complet;
SZZ2 = EXTR TAB.CONTRAINTES.10 SMYY 1 1 1;
SZZ4 = EXTR TAB.CONTRAINTES.18 SMYY 1 1 1;
SZZ6 = EXTR TAB.CONTRAINTES.26 SMYY 1 1 1;
SZZ75 = EXTR TAB.CONTRAINTES.32 SMYY 1 1 1;
 SZZ2T = 459.3E6; SZZ4T = 461.4E6; SZZ6T = 443.3E6;
SZZ75T = 422.4E6;
finsi;

EDPC0 = ABS((DPC0-DPC0T)/DPC0T);
EDPC1 = ABS((DPC1-DPC1T)/DPC1T);
si complet;
EDPC2 = ABS((DPC2-DPC2T)/DPC2T);
EDPC4 = ABS((DPC4-DPC4T)/DPC4T);
EDPC6 = ABS((DPC6-DPC6T)/DPC6T);
EDPC75 = ABS((DPC75-DPC75T)/DPC75T);
finsi;
ED0 = ABS((D0-D0T)/(D0T+0.001));
ED1 = ABS((D1-D1T)/(D1T+0.001));
si complet;
ED2 = ABS((D2-D2T)/D2T);
ED4 = ABS((D4-D4T)/D4T);
ED6 = ABS((D6-D6T)/D6T);
ED75 = ABS((D75-D75T)/D75T);
finsi;
ESZZ0 = ABS((SZZ0-SZZ0T)/SZZ0T);
ESZZ1 = ABS((SZZ1-SZZ1T)/SZZ1T);
si complet;
ESZZ2 = ABS((SZZ2-SZZ2T)/SZZ2T);
ESZZ4 = ABS((SZZ4-SZZ4T)/SZZ4T);
ESZZ6 = ABS((SZZ6-SZZ6T)/SZZ6T);
ESZZ75 = ABS((SZZ75-SZZ75T)/SZZ75T);
finsi;
si complet;

LERR = PROG EDPC0 EDPC1 EDPC2 EDPC4 EDPC6 EDPC75 ED0
       ED1 ED2 ED4 ED6 ED75
       ESZZ0 ESZZ1 ESZZ2 ESZZ4 ESZZ6 ESZZ75;
sinon;
lerr =  PROG EDPC0 EDPC1 ED0 ED1 ESZZ0 ESZZ1;
finsi;
list LERR;
ermax = maxi LERR;
LIST ERMAX;

* [valid] temps;
SI ( ERMAX <EG 0.05 );
   VTCT . 'N0' = (VTCT . 'N0') + 1 ;
SINON;
   VTCT . 'N5' = (VTCT . 'N5') + 1 ;
FINSI;
* [valid] FIN final


* ----- fin du cas endocp1
FINPROC ;
*
* ---------------------------------------------------------------------
* Cas 7 : endocp1 (endommagement, contraintes planes)
* ---------------------------------------------------------------------
SI ((IDEB0 '<EG' 7) 'ET' (IFIN0 '>EG' 7) 'ET' ('NON' ('EXIS' TSKIP 7))) ;
    MENAGE 'OBLI' ;
    MESS ' ' ;
    VMSG = CHAI '>>> Cas' ' ' '7' ' ' 'sur' ' ' NTOT0 ' ' ':' ' ' 'endocp1' ' ' '(endommagement, contraintes planes)' ;
    MESS VMSG ;
    NPASS = 2 ;
    SI IPASS3 ;
        NPASS = 3 ;
    FINSI ;
    VTH1 = 0 ;
    VTH2 = 0 ;
    VTH3 = 0 ;
    VNE51 = 0 ;
    VNE01 = 0 ;
    VNE52 = 0 ;
    VNE02 = 0 ;
    VNE53 = 0 ;
    VNE03 = 0 ;
    REPETER ZVRUN NPASS ;
* ordre des passes alterne d'un cas a l'autre (derive des temps en session)
        VIP = &ZVRUN ;
        VPSW = (VIP '>' 1) ;
        VNIV = 1 ;
        VMPS = 'inactif' ;
        SI (VIP 'EGA' 2) ;
            VMPS = 'actif niveau 1' ;
        FINSI ;
        SI (VIP 'EGA' 3) ;
            VNIV = 2 ;
            VMPS = 'actif niveau 2' ;
        FINSI ;
        AVANCE VRES 7 NTOT0 'endocp1' VIP 'en_cours' ;
        VMSG = CHAI '    passe' ' ' VIP ' ' 'sur' ' ' NPASS ' ' ': optimisations' ' ' VMPS ;
        MESS VMSG ;
        SI ITRACE0 ;
            OPTI 'IMPR' 'valid_trace.log' ;
        FINSI ;
        OPTI 'DIME' 3 'MODE' 'TRID' 'ELEM' 'CUB8' 'ECHO' IECHO0 ;
        VTHM = 0 ;
        REPETER ZVREP NREP0 ;
            VIR = &ZVREP ;
            VTFPR = TABL ;
            VTCT = TABL ;
            VTCT . 'N0' = 0 ;
            VTCT . 'N5' = 0 ;
            SI ITEMPS0 ;
                TEMP 'ZERO' ;
            FINSI ;
* Le cas s'execute dans une procedure (variables locales) : les variables
* d'un cas precedent ne peuvent pas masquer un mot-cle ou un operateur
            VC7 VPSW VNIV VTFPR VTCT IECHO0 ;
            VTHR = 0 ;
            SI ITEMPS0 ;
                VTHR = CHRONO ;
            FINSI ;
            SI (VIR 'EGA' 1) ;
                VTHM = VTHR ;
            SINON ;
                SI (VTHR '<' VTHM) ;
                    VTHM = VTHR ;
                FINSI ;
            FINSI ;
        FIN ZVREP ;
        VNER5 = VTCT . 'N5' ;
        VNER0 = VTCT . 'N0' ;
        SI (VIP 'EGA' 1) ;
            VTF1 = VTFPR ;
            VTH1 = VTHM ;
            VNE51 = VNER5 ;
            VNE01 = VNER0 ;
        FINSI ;
        SI (VIP 'EGA' 2) ;
            VTF2 = VTFPR ;
            VTH2 = VTHM ;
            VNE52 = VNER5 ;
            VNE02 = VNER0 ;
        FINSI ;
        SI (VIP 'EGA' 3) ;
            VTF3 = VTFPR ;
            VTH3 = VTHM ;
            VNE53 = VNER5 ;
            VNE03 = VNER0 ;
        FINSI ;
    FIN ZVRUN ;
*   comparaison des empreintes avec la passe 1
    VER2 VNL2 VNC2 = COMPAR VTF1 VTF2 ;
    VMOK2 = 'OK' ;
    SI ((VER2 '>' TOLV0) 'OU' (VNL2 '>' 0) 'OU' ('NON' (VNE52 'EGA' VNE51))) ;
        VMOK2 = 'ECART' ;
        VNBK2 = VNBK2 + 1 ;
    FINSI ;
    VER3 = 0. ;
    VNC3 = 0 ;
    VMOK3 = 'sans_objet' ;
    SI IPASS3 ;
        VER3 VNL3 VNC3 = COMPAR VTF1 VTF3 ;
        VMOK3 = 'OK' ;
        SI ((VER3 '>' TOLV3) 'OU' (VNL3 '>' 0) 'OU' ('NON' (VNE53 'EGA' VNE51))) ;
            VMOK3 = 'ECART' ;
            VNBK3 = VNBK3 + 1 ;
        FINSI ;
    FINSI ;
*   accelerations (temps de la passe 1 / temps de la passe)
    VSP2 = 0. ;
    VSP3 = 0. ;
    SI ((VTH1 '>' 0) 'ET' (VTH2 '>' 0)) ;
        VSP2 = (FLOT VTH1) '/' (FLOT VTH2) ;
    FINSI ;
    SI ((VTH1 '>' 0) 'ET' (VTH3 '>' 0)) ;
        VSP3 = (FLOT VTH1) '/' (FLOT VTH3) ;
    FINSI ;
    VSUM1 = VSUM1 + VTH1 ;
    VSUM2 = VSUM2 + VTH2 ;
    VSUM3 = VSUM3 + VTH3 ;
    VCLA = VTF2 . 'CL' ;
    VR2 = VTF2 . 'NRE' ;
    VC2 = VTF2 . 'NCA' ;
    VH2 = VTF2 . 'NHK' ;
    VM2 = VTF2 . 'NMA' ;
    VR3 = -1 ;
    VC3 = -1 ;
    VH3 = -1 ;
    VM3 = -1 ;
    SI IPASS3 ;
        VR3 = VTF3 . 'NRE' ;
        VC3 = VTF3 . 'NCA' ;
        VH3 = VTF3 . 'NHK' ;
        VM3 = VTF3 . 'NMA' ;
    FINSI ;
    VSE2 = CHAI 'FORMAT' '(1PE10.3)' VER2 ;
    VSE3 = CHAI 'FORMAT' '(1PE10.3)' VER3 ;
    VSS2 = CHAI 'FORMAT' '(F6.2)' VSP2 ;
    VSS3 = CHAI 'FORMAT' '(F6.2)' VSP3 ;
*   fichier de resultat du cas (SORT) et affichage console (MESS)
    OPTI 'SORT' 'valid_endocp1.log' ;
    VMSG = CHAI '=== Cas' ' ' '7' ' ' ':' ' ' 'endocp1' ' ' '(endommagement, contraintes planes)' ' ' '===' ;
    MESS VMSG ;
    SORT 'CHAI' VMSG ;
    VMSG = CHAI 'Valeurs comparees :' ' ' VNC2 ;
    MESS VMSG ;
    SORT 'CHAI' VMSG ;
    VMSG = CHAI 'Temps horloge (ms) : origine' ' ' VTH1 ' ' '; niveau 1' ' ' VTH2 ' ' '; niveau 2' ' ' VTH3 ;
    MESS VMSG ;
    SORT 'CHAI' VMSG ;
    VMSG = CHAI 'Acceleration par rapport a l origine : niveau 1' ' ' VSS2 ' ' '; niveau 2' ' ' VSS3 ;
    MESS VMSG ;
    SORT 'CHAI' VMSG ;
    VMSG = CHAI 'Controles internes du cas : echecs origine' ' ' VNE51 ' ' '; niveau 1' ' ' VNE52 ' ' '; niveau 2' ' ' VNE53 ' ' '- reussites origine' ' ' VNE01 ' ' '; niveau 1' ' ' VNE02 ' ' '; niveau 2' ' ' VNE03 ;
    MESS VMSG ;
    SORT 'CHAI' VMSG ;
    VMSG = CHAI 'Classes exercees (1 MATVAR, 10 ENDOM, 20 VISCODOM, 100 GD) :' ' ' VCLA ;
    MESS VMSG ;
    SORT 'CHAI' VMSG ;
    VMSG = CHAI 'Niveau 1 : raideur reutilisee' ' ' VR2 ' ' 'fois, recalculee' ' ' VC2 ' ' 'fois ; HOOK evite' ' ' VH2 ' ' 'fois ; caracteristiques reutilisees' ' ' VM2 ' ' 'fois' ;
    MESS VMSG ;
    SORT 'CHAI' VMSG ;
    VMSG = CHAI 'Niveau 2 : raideur reutilisee' ' ' VR3 ' ' 'fois, recalculee' ' ' VC3 ' ' 'fois ; HOOK evite' ' ' VH3 ' ' 'fois ; caracteristiques reutilisees' ' ' VM3 ' ' 'fois' ;
    MESS VMSG ;
    SORT 'CHAI' VMSG ;
    VMSG = CHAI 'Ecart relatif maximal : niveau 1' ' ' VSE2 ' ' '; niveau 2' ' ' VSE3 ;
    MESS VMSG ;
    SORT 'CHAI' VMSG ;
    VMSG = CHAI 'RESULTAT : niveau 1' ' ' VMOK2 ' ' '; niveau 2' ' ' VMOK3 ;
    MESS VMSG ;
    SORT 'CHAI' VMSG ;
    SI (('EGA' VNC2 0) ) ;
        VMSG = CHAI 'ATTENTION : aucune valeur comparee (resultats non stockes ?)' ;
        MESS VMSG ;
        SORT 'CHAI' VMSG ;
    FINSI ;
    OPTI 'SORT' 'valid_inutile.tmp' ;
    VRES . 7 = TABL ;
    VRES . 7 . 'NOM' = 'endocp1' ;
    VRES . 7 . 'OKM' = VMOK2 ;
    VRES . 7 . 'OK3' = VMOK3 ;
    VRES . 7 . 'ERR2' = VER2 ;
    VRES . 7 . 'ERR3' = VER3 ;
    VRES . 7 . 'TH1' = VTH1 ;
    VRES . 7 . 'TH2' = VTH2 ;
    VRES . 7 . 'TH3' = VTH3 ;
    VRES . 7 . 'SP2F' = VSP2 ;
    VRES . 7 . 'SP3F' = VSP3 ;
    VRES . 7 . 'NRE2' = VR2 ;
    VRES . 7 . 'NCA2' = VC2 ;
    VRES . 7 . 'NHK2' = VH2 ;
    VRES . 7 . 'NMA2' = VM2 ;
    VRES . 7 . 'NRE3' = VR3 ;
    VRES . 7 . 'NCA3' = VC3 ;
    VRES . 7 . 'NHK3' = VH3 ;
    VRES . 7 . 'CL' = VCLA ;
    VRES . 7 . 'NCMP' = VNC2 ;
    VMSG = CHAI '<<< Cas' ' ' '7' ' ' 'sur' ' ' NTOT0 ' ' ':' ' ' 'endocp1' ' ' ':' ' ' 'niveau 1' ' ' VMOK2 ', niveau 2' ' ' VMOK3 ' ' '- ecart' ' ' VSE2 ', acceleration' ' ' VSS2 ' ' 'et' ' ' VSS3 ;
    MESS VMSG ;
    AVANCE VRES 7 NTOT0 'endocp1' NPASS 'termine' ;
    MENAGE 'OBLI' ;
FINSI ;

*
* ---------------------------------------------------------------------
* Procedure du cas 8 : fluaendo (fluage + endommagement + thermique)
* Variables locales : le cas ne voit aucune variable des cas precedents
* ---------------------------------------------------------------------
DEBPROC VC8 VPSW*'LOGIQUE' VNIV*'ENTIER' VTFPR*'TABLE' VTCT*'TABLE' IECHO0*'ENTIER' ;
* ----- debut du cas fluaendo

* fichier :  fluaendo.dgibi
************************************************************************
* Section : Mecanique Viscoendommagement
* Section : Mecanique Viscoplastique
************************************************************************
complet = faux ;
*
*************************************************
*  pour calcul complet mettre complet à : vrai;
*************************************************
OPTI ECHO IECHO0 DIME 2 ELEM QUA8 MODE AXIS;
*
*-----------------------------------------------------------------
*  MAILLAGE AXISYMETRIQUE EPROUVETTE CYLINDRIQUE
*  MATERIAU VISCO-PLASTIQUE ENDOMMAGEABLE DEPENDANT DE LA
*                           =============
*                 TEMPERATURE POUR N M KK A R EVOL
*-----------------------------------------------------------------
   P1 = 0 0;   P2 = 3E-3 0;   P3 = 3E-3 30E-3;   P4 = 0 30E-3;
*
   L1 = P1 P2 DROIT 1  ;
   L2 = P2 P3 DROIT 1 ;
   L3 = P3 P4 DROIT 1  ;
   L4 = P4 P1 DROIT 1 ;
*
*  mesh
*
   EPROU = L1 L2 L3 L4 DALLER PLAN ;
*
* boundary conditions
*
   CL1 = BLOQ L1 UZ ;
   CL3 = BLOQ L4 UR ;
   CL = CL1 ET CL3 ;
*
* MODE defines the behavior of the material and the finite element
*                  formulation
*
   MO = MODE EPROU MECANIQUE ELASTIQUE VISCOPLASTIQUE VISCODOMMAGE;
*
* where is the load applied ?
*
   pres=pression mass mo -137. l3 ;
*
* Definition des coefficients variables avec la temperature
*
   PROGKSI1 = PROG 0. 2.E5 ;
   PROGK1 = PROG 15. 15. ;
   CTRAC1 = EVOL MANU KSI PROGKSI1 K PROGK1 ;
*
   PROGKSI2 = PROG 0. 2.E5 ;
   PROGK2 = PROG 75. 75. ;
   CTRAC2 = EVOL MANU KSI PROGKSI2 K PROGK2 ;
*
CTRAC = NUAGE 'T'*'FLOTTANT' 'EVOL'*'EVOLUTION'
                   1000. CTRAC1 1050. CTRAC2  ;
*
* lors de l'ecoulement :
* interpolation des coefficients avec la temperature
* car les listes de temperatures ne sont pas identiques pour N
* et les autre coef.
   EVN = EVOL MANU 'T' (PROG 1000 1025 1050 ) 'N   '
                                        (PROG 9 7 5);
   EVM = EVOL MANU 'T' (PROG 1000 1050) 'M   ' (PROG 8 4    );
   EVKK = EVOL MANU 'T' (PROG 1000 1050) 'KK  ' (PROG 2200 800   );
   EVR = EVOL MANU 'T' (PROG 1000 1050) 'R   ' (PROG 7 3     );
   EVA = EVOL MANU 'T' (PROG 1000 1050) 'A   ' (PROG 639 1261 );
*
* Definition du materiau variable
*
   MATVAR = MATE MO YOUN 150000. NU 0.3 rho 7800. alph 0.   'TALP' 0. 'TREF' 1000.
                 N EVN M EVM KK EVKK ALP1 0. BLP1 0.
                 R EVR A EVA EVOL CTRAC SMAX 0. ;
*
* Definition des cartes de temperature
*
   TEMP0 = MANU CHPO EPROU 1 'T' 1000.   ;
   TEMP1 = MANU CHPO EPROU 1 'T' 1050.   ;
*
* Definition du chargement
*
   LI1 = PROG 0. 3.E7 ; LI2 = PROG 1. 1. ;
   EV = EVOL MANU T LI1 LOAD LI2 ;
   CHA1 = CHAR 'MECA' PRES EV ;
   TEMPSs = TABLE; TEMPE = TABLE;
   TEMPSs.0 = 0. ;TEMPSs.1 = 6000.;
   TEMPE.0 = TEMP0; TEMPE.1 = TEMP1;
   CHA2 = CHAR 'T' TEMPSs TEMPE;
   CHA = CHA1 ET CHA2;

   TAB = TABLE ;
   TAB.'BLOCAGES_MECANIQUES' = CL;
   TAB.'CARACTERISTIQUES' = MATVAR;
   TAB.'MODELE' = MO;
   TAB.'CHARGEMENT' = CHA;
*
si complet;
   LIS = PROG 0. pas 1.E-1 1. 1.5 2 pas 1 10 15 20 pas 10 100
              150 200 pas 100 800. 850. pas 50 1100 pas 20 1400 ;
sinon;
LIS = PROG 0. pas 1.E-1 1. 1.5 2 ;
finsi;
*
   TAB.'TEMPS_CALCULES' = LIS;
   TAB . 'PERF_RAID' = VPSW ; TAB . 'PERF_RAID_NIVEAU' = VNIV ; PASAPAS TAB ; FPREC TAB VTFPR ;
*
*----------------------------------------------------------------
*  CONTROLE DES RESULTATS AVEC DE LA SOLUTION DE REFERENCE
*               OBTENUE PAR ALGORITHME ou par code
*----------------------------------------------------------------
*
si complet;
 REF_D = 5.87E-2 ;
 REF_P = 1.36E-3 ;
sinon;
 REF_D = 3.98156E-05;
 REF_P = 1.51511E-05;
finsi;
*
*tind=index (tab.resucont); ntind=dime tind ;
*T=tind.ntind;
*
D = EXTR ( PECHE TAB VARIABLES_INTERNES) 'VHWD' 1 1 1;
P = EXTR ( PECHE TAB VARIABLES_INTERNES) 'EPSE' 1 1 1;
*
list D; list P;
errd = ABS ((REF_D - D) / REF_D) ;
errp = ABS ((REF_P - P) / REF_P) ;
*
err = MAXI (prog errd errp) ;
*
* [valid] temps;
SI ( ERR <EG 0.05 );
   VTCT . 'N0' = (VTCT . 'N0') + 1 ;
SINON;
   VTCT . 'N5' = (VTCT . 'N5') + 1 ;
FINSI;
*
* [valid] FIN final


* ----- fin du cas fluaendo
FINPROC ;
*
* ---------------------------------------------------------------------
* Cas 8 : fluaendo (fluage + endommagement + thermique)
* ---------------------------------------------------------------------
SI ((IDEB0 '<EG' 8) 'ET' (IFIN0 '>EG' 8) 'ET' ('NON' ('EXIS' TSKIP 8))) ;
    MENAGE 'OBLI' ;
    MESS ' ' ;
    VMSG = CHAI '>>> Cas' ' ' '8' ' ' 'sur' ' ' NTOT0 ' ' ':' ' ' 'fluaendo' ' ' '(fluage + endommagement + thermique)' ;
    MESS VMSG ;
    NPASS = 2 ;
    SI IPASS3 ;
        NPASS = 3 ;
    FINSI ;
    VTH1 = 0 ;
    VTH2 = 0 ;
    VTH3 = 0 ;
    VNE51 = 0 ;
    VNE01 = 0 ;
    VNE52 = 0 ;
    VNE02 = 0 ;
    VNE53 = 0 ;
    VNE03 = 0 ;
    REPETER ZVRUN NPASS ;
* ordre des passes alterne d'un cas a l'autre (derive des temps en session)
        VIP = NPASS + 1 - &ZVRUN ;
        VPSW = (VIP '>' 1) ;
        VNIV = 1 ;
        VMPS = 'inactif' ;
        SI (VIP 'EGA' 2) ;
            VMPS = 'actif niveau 1' ;
        FINSI ;
        SI (VIP 'EGA' 3) ;
            VNIV = 2 ;
            VMPS = 'actif niveau 2' ;
        FINSI ;
        AVANCE VRES 8 NTOT0 'fluaendo' VIP 'en_cours' ;
        VMSG = CHAI '    passe' ' ' VIP ' ' 'sur' ' ' NPASS ' ' ': optimisations' ' ' VMPS ;
        MESS VMSG ;
        SI ITRACE0 ;
            OPTI 'IMPR' 'valid_trace.log' ;
        FINSI ;
        OPTI 'DIME' 3 'MODE' 'TRID' 'ELEM' 'CUB8' 'ECHO' IECHO0 ;
        VTHM = 0 ;
        REPETER ZVREP NREP0 ;
            VIR = &ZVREP ;
            VTFPR = TABL ;
            VTCT = TABL ;
            VTCT . 'N0' = 0 ;
            VTCT . 'N5' = 0 ;
            SI ITEMPS0 ;
                TEMP 'ZERO' ;
            FINSI ;
* Le cas s'execute dans une procedure (variables locales) : les variables
* d'un cas precedent ne peuvent pas masquer un mot-cle ou un operateur
            VC8 VPSW VNIV VTFPR VTCT IECHO0 ;
            VTHR = 0 ;
            SI ITEMPS0 ;
                VTHR = CHRONO ;
            FINSI ;
            SI (VIR 'EGA' 1) ;
                VTHM = VTHR ;
            SINON ;
                SI (VTHR '<' VTHM) ;
                    VTHM = VTHR ;
                FINSI ;
            FINSI ;
        FIN ZVREP ;
        VNER5 = VTCT . 'N5' ;
        VNER0 = VTCT . 'N0' ;
        SI (VIP 'EGA' 1) ;
            VTF1 = VTFPR ;
            VTH1 = VTHM ;
            VNE51 = VNER5 ;
            VNE01 = VNER0 ;
        FINSI ;
        SI (VIP 'EGA' 2) ;
            VTF2 = VTFPR ;
            VTH2 = VTHM ;
            VNE52 = VNER5 ;
            VNE02 = VNER0 ;
        FINSI ;
        SI (VIP 'EGA' 3) ;
            VTF3 = VTFPR ;
            VTH3 = VTHM ;
            VNE53 = VNER5 ;
            VNE03 = VNER0 ;
        FINSI ;
    FIN ZVRUN ;
*   comparaison des empreintes avec la passe 1
    VER2 VNL2 VNC2 = COMPAR VTF1 VTF2 ;
    VMOK2 = 'OK' ;
    SI ((VER2 '>' TOLV0) 'OU' (VNL2 '>' 0) 'OU' ('NON' (VNE52 'EGA' VNE51))) ;
        VMOK2 = 'ECART' ;
        VNBK2 = VNBK2 + 1 ;
    FINSI ;
    VER3 = 0. ;
    VNC3 = 0 ;
    VMOK3 = 'sans_objet' ;
    SI IPASS3 ;
        VER3 VNL3 VNC3 = COMPAR VTF1 VTF3 ;
        VMOK3 = 'OK' ;
        SI ((VER3 '>' TOLV3) 'OU' (VNL3 '>' 0) 'OU' ('NON' (VNE53 'EGA' VNE51))) ;
            VMOK3 = 'ECART' ;
            VNBK3 = VNBK3 + 1 ;
        FINSI ;
    FINSI ;
*   accelerations (temps de la passe 1 / temps de la passe)
    VSP2 = 0. ;
    VSP3 = 0. ;
    SI ((VTH1 '>' 0) 'ET' (VTH2 '>' 0)) ;
        VSP2 = (FLOT VTH1) '/' (FLOT VTH2) ;
    FINSI ;
    SI ((VTH1 '>' 0) 'ET' (VTH3 '>' 0)) ;
        VSP3 = (FLOT VTH1) '/' (FLOT VTH3) ;
    FINSI ;
    VSUM1 = VSUM1 + VTH1 ;
    VSUM2 = VSUM2 + VTH2 ;
    VSUM3 = VSUM3 + VTH3 ;
    VCLA = VTF2 . 'CL' ;
    VR2 = VTF2 . 'NRE' ;
    VC2 = VTF2 . 'NCA' ;
    VH2 = VTF2 . 'NHK' ;
    VM2 = VTF2 . 'NMA' ;
    VR3 = -1 ;
    VC3 = -1 ;
    VH3 = -1 ;
    VM3 = -1 ;
    SI IPASS3 ;
        VR3 = VTF3 . 'NRE' ;
        VC3 = VTF3 . 'NCA' ;
        VH3 = VTF3 . 'NHK' ;
        VM3 = VTF3 . 'NMA' ;
    FINSI ;
    VSE2 = CHAI 'FORMAT' '(1PE10.3)' VER2 ;
    VSE3 = CHAI 'FORMAT' '(1PE10.3)' VER3 ;
    VSS2 = CHAI 'FORMAT' '(F6.2)' VSP2 ;
    VSS3 = CHAI 'FORMAT' '(F6.2)' VSP3 ;
*   fichier de resultat du cas (SORT) et affichage console (MESS)
    OPTI 'SORT' 'valid_fluaendo.log' ;
    VMSG = CHAI '=== Cas' ' ' '8' ' ' ':' ' ' 'fluaendo' ' ' '(fluage + endommagement + thermique)' ' ' '===' ;
    MESS VMSG ;
    SORT 'CHAI' VMSG ;
    VMSG = CHAI 'Valeurs comparees :' ' ' VNC2 ;
    MESS VMSG ;
    SORT 'CHAI' VMSG ;
    VMSG = CHAI 'Temps horloge (ms) : origine' ' ' VTH1 ' ' '; niveau 1' ' ' VTH2 ' ' '; niveau 2' ' ' VTH3 ;
    MESS VMSG ;
    SORT 'CHAI' VMSG ;
    VMSG = CHAI 'Acceleration par rapport a l origine : niveau 1' ' ' VSS2 ' ' '; niveau 2' ' ' VSS3 ;
    MESS VMSG ;
    SORT 'CHAI' VMSG ;
    VMSG = CHAI 'Controles internes du cas : echecs origine' ' ' VNE51 ' ' '; niveau 1' ' ' VNE52 ' ' '; niveau 2' ' ' VNE53 ' ' '- reussites origine' ' ' VNE01 ' ' '; niveau 1' ' ' VNE02 ' ' '; niveau 2' ' ' VNE03 ;
    MESS VMSG ;
    SORT 'CHAI' VMSG ;
    VMSG = CHAI 'Classes exercees (1 MATVAR, 10 ENDOM, 20 VISCODOM, 100 GD) :' ' ' VCLA ;
    MESS VMSG ;
    SORT 'CHAI' VMSG ;
    VMSG = CHAI 'Niveau 1 : raideur reutilisee' ' ' VR2 ' ' 'fois, recalculee' ' ' VC2 ' ' 'fois ; HOOK evite' ' ' VH2 ' ' 'fois ; caracteristiques reutilisees' ' ' VM2 ' ' 'fois' ;
    MESS VMSG ;
    SORT 'CHAI' VMSG ;
    VMSG = CHAI 'Niveau 2 : raideur reutilisee' ' ' VR3 ' ' 'fois, recalculee' ' ' VC3 ' ' 'fois ; HOOK evite' ' ' VH3 ' ' 'fois ; caracteristiques reutilisees' ' ' VM3 ' ' 'fois' ;
    MESS VMSG ;
    SORT 'CHAI' VMSG ;
    VMSG = CHAI 'Ecart relatif maximal : niveau 1' ' ' VSE2 ' ' '; niveau 2' ' ' VSE3 ;
    MESS VMSG ;
    SORT 'CHAI' VMSG ;
    VMSG = CHAI 'RESULTAT : niveau 1' ' ' VMOK2 ' ' '; niveau 2' ' ' VMOK3 ;
    MESS VMSG ;
    SORT 'CHAI' VMSG ;
    SI (('EGA' VNC2 0) ) ;
        VMSG = CHAI 'ATTENTION : aucune valeur comparee (resultats non stockes ?)' ;
        MESS VMSG ;
        SORT 'CHAI' VMSG ;
    FINSI ;
    OPTI 'SORT' 'valid_inutile.tmp' ;
    VRES . 8 = TABL ;
    VRES . 8 . 'NOM' = 'fluaendo' ;
    VRES . 8 . 'OKM' = VMOK2 ;
    VRES . 8 . 'OK3' = VMOK3 ;
    VRES . 8 . 'ERR2' = VER2 ;
    VRES . 8 . 'ERR3' = VER3 ;
    VRES . 8 . 'TH1' = VTH1 ;
    VRES . 8 . 'TH2' = VTH2 ;
    VRES . 8 . 'TH3' = VTH3 ;
    VRES . 8 . 'SP2F' = VSP2 ;
    VRES . 8 . 'SP3F' = VSP3 ;
    VRES . 8 . 'NRE2' = VR2 ;
    VRES . 8 . 'NCA2' = VC2 ;
    VRES . 8 . 'NHK2' = VH2 ;
    VRES . 8 . 'NMA2' = VM2 ;
    VRES . 8 . 'NRE3' = VR3 ;
    VRES . 8 . 'NCA3' = VC3 ;
    VRES . 8 . 'NHK3' = VH3 ;
    VRES . 8 . 'CL' = VCLA ;
    VRES . 8 . 'NCMP' = VNC2 ;
    VMSG = CHAI '<<< Cas' ' ' '8' ' ' 'sur' ' ' NTOT0 ' ' ':' ' ' 'fluaendo' ' ' ':' ' ' 'niveau 1' ' ' VMOK2 ', niveau 2' ' ' VMOK3 ' ' '- ecart' ' ' VSE2 ', acceleration' ' ' VSS2 ' ' 'et' ' ' VSS3 ;
    MESS VMSG ;
    AVANCE VRES 8 NTOT0 'fluaendo' NPASS 'termine' ;
    MENAGE 'OBLI' ;
FINSI ;

*
* ---------------------------------------------------------------------
* Procedure du cas 9 : relaxendo (relaxation + endommagement + thermique)
* Variables locales : le cas ne voit aucune variable des cas precedents
* ---------------------------------------------------------------------
DEBPROC VC9 VPSW*'LOGIQUE' VNIV*'ENTIER' VTFPR*'TABLE' VTCT*'TABLE' IECHO0*'ENTIER' ;
* ----- debut du cas relaxendo

* fichier :  relaxendo.dgibi
************************************************************************
* Section : Mecanique Viscoendommagement
* Section : Mecanique Viscoplastique
************************************************************************
complet = faux;
*
*************************************************
*  pour calcul complet mettre complet à : vrai;
*************************************************
OPTI ECHO IECHO0 DIME 2 ELEM QUA8 MODE AXIS;
*
*-----------------------------------------------------------------
*  MAILLAGE AXISYMETRIQUE EPROUVETTE CYLINDRIQUE
*  MATERIAU VISCO-PLASTIQUE ENDOMMAGEABLE AVEC MATERIAU DEPENDANT
*                           =============
*  DE LA TEMPERATURE (MODULE D'YOUNG ET COEFFICIENT DE DILATATION
*                     THERMIQUE)
*-----------------------------------------------------------------
   P1 = 0 0;   P2 = 3E-3 0;   P3 = 3E-3 30E-3;   P4 = 0 30E-3;
*
   L1 = P1 P2 DROIT 1  ;
   L2 = P2 P3 DROIT 1 ;
   L3 = P3 P4 DROIT 1  ;
   L4 = P4 P1 DROIT 1 ;
*
*  mesh
*
   EPROU = L1 L2 L3 L4 DALLER PLAN ;
*
* boundary conditions
*
   CL1 = BLOQ L1 UZ ;
   CL4 = BLOQ L4 UR ;
*
   CL3 = BLOQ L3 UZ ;
   FO3 = DEPI CL3 1E-4 ;
   CL = CL1 ET CL4 ET CL3 ;
*
* MODE defines the behavior of the material and the finite element
*                  formulation
*
   MO = MODE EPROU MECANIQUE ELASTIQUE VISCOPLASTIQUE VISCODOMMAGE;
*
   PROGKSI = PROG 0. 10000. ;
   PROGK1 = PROG 15. 15. ;
   CTRAC1 = EVOL MANU KSI PROGKSI K PROGK1  ;
*
    evalph = EVOL MANU 'T' (PROG 1000 1025) 'ALPH' (PROG 1E-4 1E-3) ;
  EVY = EVOL MANU 'T' (PROG 1000 1025) 'YOUN' (PROG 300000 150000);
    MATVAR = MATE MO YOUN EVY NU 0. rho 7800. ALPH evalph talp 20. tref 1025.
                  N 10.8 M 9.8 KK 1450. ALP1 0. BLP1 0.
                  R 5.2 A 2511.35
                  EVOL CTRAC1 SMAX 50. ;
   MAT = MATE MO YOUN 150000. NU 0. rho 7800. alph 1.E-3  talp 20. tref 1025.
                  N 10.8 M 9.8 KK 1450. ALP1 0. BLP1 0.
                  R 5.2 A 2511.35
                  EVOL CTRAC1 SMAX 50. ;
*
*       definition des cartes de temperature
*
   TEMP0 = MANU CHPO EPROU 1 'T' 1025.   ;
   TEMP1 = MANU CHPO EPROU 1 'T' 1000.   ;
*
   RIG = (RIGI MO MAT) ET CL ;
*
   DEPI = RESO RIG FO3 ;
   SIGI = SIGMA DEPI MAT MO ;
*
   t0 = 0. ;  t1 = 8.E5  ; tf = 1E9 ;
   LISTT = PROG t0 tf ;
   LISTF = PROG 2*1.  ;
*
   EV = EVOL MANU 'TEMPS' LISTT 'FORCE' LISTF;
   CHA1 = CHAR DIMP FO3 EV ;
*
   TAB = TABLE ;
   TEMP = TABLE  ; TEMPER = TABLE;
   TEMP . 0 = 0.; TEMP . 1 = 8.E5;
   TEMPER . 0 = TEMP0 ; TEMPER . 1 = TEMP1 ;
   CHA2 = CHAR T TEMP TEMPER;
   CHA = CHA1 ET CHA2;
   TAB.'DEPLACEMENTS' = TABLE;
   TAB.'CONTRAINTES' = TABLE;
   TAB.'DEPLACEMENTS' . 0 = DEPI   ;
   TAB.'CONTRAINTES' . 0  = SIGI   ;
si complet;
   LIS = prog 1E-3 pas 1E-3
        1E-2 PAS 1E-2 1E-1 .2 pas 0.2 1 2 PAS 2 10 20
        PAS 20 100 200 pas 200 1000
        2000 pas 2000 10000 PAS 1000 12000 ;
sinon;
  LIS =  prog 1E-3 pas 1E-3
        6.E-3 ;
finsi;

TAB.'BLOCAGES_MECANIQUES' = CL;
TAB.'MODELE' = MO;
TAB.'CHARGEMENT' = CHA;
TAB.'TEMPS_CALCULES' = LIS;
TAB.'CARACTERISTIQUES' = MATVAR;
tab.maxisouspas = 200;

TAB . 'PERF_RAID' = VPSW ; TAB . 'PERF_RAID_NIVEAU' = VNIV ; PASAPAS TAB ; FPREC TAB VTFPR ;
*
*
*----------------------------------------------------------------
*  CONTROLE DES RESULTATS AVEC DE LA SOLUTION DE REFERENCE
*               OBTENUE PAR ALGORITHME
*----------------------------------------------------------------
*
si complet;
 REF_D = PROG 7.86E-3 3.33E-2 1.254E-1 ;
 REF_P = PROG 4.15E-3 8.66E-3 1.55E-2  ;
 REF_S = PROG 231.0 242.2 230.1        ;
TA = 2000.;
TB = 6000.;
TC = 12000.;
sinon;
TA= 3.e-3;
TB = 5.e-3;
TC = 6.e-3;
REF_D = PROG  4.90537E-07  7.65936E-07  8.95267E-07  ;
REF_P = PROG  2.75079E-04  3.29655E-04  3.50683E-04  ;
REF_S = PROG   458.74       450.55       447.40 ;
finsi;
*
D1 = EXTR (PECHE TAB VARIABLES_INTERNES TA)  'VHWD' 1 1 1;
P1 = EXTR (PECHE TAB VARIABLES_INTERNES TA)  'EPSE' 1 1 1;
S1 = EXTR (PECHE TAB CONTRAINTES TA)         'SMZZ' 1 1 1;
D2 = EXTR (PECHE TAB VARIABLES_INTERNES  TB)  'VHWD' 1 1 1;
P2 = EXTR (PECHE TAB VARIABLES_INTERNES  TB)  'EPSE' 1 1 1;
S2 = EXTR (PECHE TAB CONTRAINTES  TB)         'SMZZ' 1 1 1;
D3 = EXTR (PECHE TAB VARIABLES_INTERNES TC) 'VHWD' 1 1 1;
P3 = EXTR (PECHE TAB VARIABLES_INTERNES TC) 'EPSE' 1 1 1;
S3 = EXTR (PECHE TAB CONTRAINTES TC)        'SMZZ' 1 1 1;
 D = PROG D1 D2 D3 ;
 P = PROG P1 P2 P3 ;
 S = PROG S1 S2 S3 ;


*
errd = MAXI (ABS ((REF_D - D) / REF_D)) ;
errp = MAXI (ABS ((REF_P - P) / REF_P)) ;
errs = MAXI (ABS ((REF_S - S) / REF_S)) ;
*
err = MAXI (prog errd errp errs) ;
*
* [valid] temps;
LIST ERR ;
SI ( ERR <EG 0.05 );
   VTCT . 'N0' = (VTCT . 'N0') + 1 ;
SINON;
   VTCT . 'N5' = (VTCT . 'N5') + 1 ;
FINSI;
*
* [valid] FIN final


* ----- fin du cas relaxendo
FINPROC ;
*
* ---------------------------------------------------------------------
* Cas 9 : relaxendo (relaxation + endommagement + thermique)
* ---------------------------------------------------------------------
SI ((IDEB0 '<EG' 9) 'ET' (IFIN0 '>EG' 9) 'ET' ('NON' ('EXIS' TSKIP 9))) ;
    MENAGE 'OBLI' ;
    MESS ' ' ;
    VMSG = CHAI '>>> Cas' ' ' '9' ' ' 'sur' ' ' NTOT0 ' ' ':' ' ' 'relaxendo' ' ' '(relaxation + endommagement + thermique)' ;
    MESS VMSG ;
    NPASS = 2 ;
    SI IPASS3 ;
        NPASS = 3 ;
    FINSI ;
    VTH1 = 0 ;
    VTH2 = 0 ;
    VTH3 = 0 ;
    VNE51 = 0 ;
    VNE01 = 0 ;
    VNE52 = 0 ;
    VNE02 = 0 ;
    VNE53 = 0 ;
    VNE03 = 0 ;
    REPETER ZVRUN NPASS ;
* ordre des passes alterne d'un cas a l'autre (derive des temps en session)
        VIP = &ZVRUN ;
        VPSW = (VIP '>' 1) ;
        VNIV = 1 ;
        VMPS = 'inactif' ;
        SI (VIP 'EGA' 2) ;
            VMPS = 'actif niveau 1' ;
        FINSI ;
        SI (VIP 'EGA' 3) ;
            VNIV = 2 ;
            VMPS = 'actif niveau 2' ;
        FINSI ;
        AVANCE VRES 9 NTOT0 'relaxendo' VIP 'en_cours' ;
        VMSG = CHAI '    passe' ' ' VIP ' ' 'sur' ' ' NPASS ' ' ': optimisations' ' ' VMPS ;
        MESS VMSG ;
        SI ITRACE0 ;
            OPTI 'IMPR' 'valid_trace.log' ;
        FINSI ;
        OPTI 'DIME' 3 'MODE' 'TRID' 'ELEM' 'CUB8' 'ECHO' IECHO0 ;
        VTHM = 0 ;
        REPETER ZVREP NREP0 ;
            VIR = &ZVREP ;
            VTFPR = TABL ;
            VTCT = TABL ;
            VTCT . 'N0' = 0 ;
            VTCT . 'N5' = 0 ;
            SI ITEMPS0 ;
                TEMP 'ZERO' ;
            FINSI ;
* Le cas s'execute dans une procedure (variables locales) : les variables
* d'un cas precedent ne peuvent pas masquer un mot-cle ou un operateur
            VC9 VPSW VNIV VTFPR VTCT IECHO0 ;
            VTHR = 0 ;
            SI ITEMPS0 ;
                VTHR = CHRONO ;
            FINSI ;
            SI (VIR 'EGA' 1) ;
                VTHM = VTHR ;
            SINON ;
                SI (VTHR '<' VTHM) ;
                    VTHM = VTHR ;
                FINSI ;
            FINSI ;
        FIN ZVREP ;
        VNER5 = VTCT . 'N5' ;
        VNER0 = VTCT . 'N0' ;
        SI (VIP 'EGA' 1) ;
            VTF1 = VTFPR ;
            VTH1 = VTHM ;
            VNE51 = VNER5 ;
            VNE01 = VNER0 ;
        FINSI ;
        SI (VIP 'EGA' 2) ;
            VTF2 = VTFPR ;
            VTH2 = VTHM ;
            VNE52 = VNER5 ;
            VNE02 = VNER0 ;
        FINSI ;
        SI (VIP 'EGA' 3) ;
            VTF3 = VTFPR ;
            VTH3 = VTHM ;
            VNE53 = VNER5 ;
            VNE03 = VNER0 ;
        FINSI ;
    FIN ZVRUN ;
*   comparaison des empreintes avec la passe 1
    VER2 VNL2 VNC2 = COMPAR VTF1 VTF2 ;
    VMOK2 = 'OK' ;
    SI ((VER2 '>' TOLV0) 'OU' (VNL2 '>' 0) 'OU' ('NON' (VNE52 'EGA' VNE51))) ;
        VMOK2 = 'ECART' ;
        VNBK2 = VNBK2 + 1 ;
    FINSI ;
    VER3 = 0. ;
    VNC3 = 0 ;
    VMOK3 = 'sans_objet' ;
    SI IPASS3 ;
        VER3 VNL3 VNC3 = COMPAR VTF1 VTF3 ;
        VMOK3 = 'OK' ;
        SI ((VER3 '>' TOLV3) 'OU' (VNL3 '>' 0) 'OU' ('NON' (VNE53 'EGA' VNE51))) ;
            VMOK3 = 'ECART' ;
            VNBK3 = VNBK3 + 1 ;
        FINSI ;
    FINSI ;
*   accelerations (temps de la passe 1 / temps de la passe)
    VSP2 = 0. ;
    VSP3 = 0. ;
    SI ((VTH1 '>' 0) 'ET' (VTH2 '>' 0)) ;
        VSP2 = (FLOT VTH1) '/' (FLOT VTH2) ;
    FINSI ;
    SI ((VTH1 '>' 0) 'ET' (VTH3 '>' 0)) ;
        VSP3 = (FLOT VTH1) '/' (FLOT VTH3) ;
    FINSI ;
    VSUM1 = VSUM1 + VTH1 ;
    VSUM2 = VSUM2 + VTH2 ;
    VSUM3 = VSUM3 + VTH3 ;
    VCLA = VTF2 . 'CL' ;
    VR2 = VTF2 . 'NRE' ;
    VC2 = VTF2 . 'NCA' ;
    VH2 = VTF2 . 'NHK' ;
    VM2 = VTF2 . 'NMA' ;
    VR3 = -1 ;
    VC3 = -1 ;
    VH3 = -1 ;
    VM3 = -1 ;
    SI IPASS3 ;
        VR3 = VTF3 . 'NRE' ;
        VC3 = VTF3 . 'NCA' ;
        VH3 = VTF3 . 'NHK' ;
        VM3 = VTF3 . 'NMA' ;
    FINSI ;
    VSE2 = CHAI 'FORMAT' '(1PE10.3)' VER2 ;
    VSE3 = CHAI 'FORMAT' '(1PE10.3)' VER3 ;
    VSS2 = CHAI 'FORMAT' '(F6.2)' VSP2 ;
    VSS3 = CHAI 'FORMAT' '(F6.2)' VSP3 ;
*   fichier de resultat du cas (SORT) et affichage console (MESS)
    OPTI 'SORT' 'valid_relaxendo.log' ;
    VMSG = CHAI '=== Cas' ' ' '9' ' ' ':' ' ' 'relaxendo' ' ' '(relaxation + endommagement + thermique)' ' ' '===' ;
    MESS VMSG ;
    SORT 'CHAI' VMSG ;
    VMSG = CHAI 'Valeurs comparees :' ' ' VNC2 ;
    MESS VMSG ;
    SORT 'CHAI' VMSG ;
    VMSG = CHAI 'Temps horloge (ms) : origine' ' ' VTH1 ' ' '; niveau 1' ' ' VTH2 ' ' '; niveau 2' ' ' VTH3 ;
    MESS VMSG ;
    SORT 'CHAI' VMSG ;
    VMSG = CHAI 'Acceleration par rapport a l origine : niveau 1' ' ' VSS2 ' ' '; niveau 2' ' ' VSS3 ;
    MESS VMSG ;
    SORT 'CHAI' VMSG ;
    VMSG = CHAI 'Controles internes du cas : echecs origine' ' ' VNE51 ' ' '; niveau 1' ' ' VNE52 ' ' '; niveau 2' ' ' VNE53 ' ' '- reussites origine' ' ' VNE01 ' ' '; niveau 1' ' ' VNE02 ' ' '; niveau 2' ' ' VNE03 ;
    MESS VMSG ;
    SORT 'CHAI' VMSG ;
    VMSG = CHAI 'Classes exercees (1 MATVAR, 10 ENDOM, 20 VISCODOM, 100 GD) :' ' ' VCLA ;
    MESS VMSG ;
    SORT 'CHAI' VMSG ;
    VMSG = CHAI 'Niveau 1 : raideur reutilisee' ' ' VR2 ' ' 'fois, recalculee' ' ' VC2 ' ' 'fois ; HOOK evite' ' ' VH2 ' ' 'fois ; caracteristiques reutilisees' ' ' VM2 ' ' 'fois' ;
    MESS VMSG ;
    SORT 'CHAI' VMSG ;
    VMSG = CHAI 'Niveau 2 : raideur reutilisee' ' ' VR3 ' ' 'fois, recalculee' ' ' VC3 ' ' 'fois ; HOOK evite' ' ' VH3 ' ' 'fois ; caracteristiques reutilisees' ' ' VM3 ' ' 'fois' ;
    MESS VMSG ;
    SORT 'CHAI' VMSG ;
    VMSG = CHAI 'Ecart relatif maximal : niveau 1' ' ' VSE2 ' ' '; niveau 2' ' ' VSE3 ;
    MESS VMSG ;
    SORT 'CHAI' VMSG ;
    VMSG = CHAI 'RESULTAT : niveau 1' ' ' VMOK2 ' ' '; niveau 2' ' ' VMOK3 ;
    MESS VMSG ;
    SORT 'CHAI' VMSG ;
    SI (('EGA' VNC2 0) ) ;
        VMSG = CHAI 'ATTENTION : aucune valeur comparee (resultats non stockes ?)' ;
        MESS VMSG ;
        SORT 'CHAI' VMSG ;
    FINSI ;
    OPTI 'SORT' 'valid_inutile.tmp' ;
    VRES . 9 = TABL ;
    VRES . 9 . 'NOM' = 'relaxendo' ;
    VRES . 9 . 'OKM' = VMOK2 ;
    VRES . 9 . 'OK3' = VMOK3 ;
    VRES . 9 . 'ERR2' = VER2 ;
    VRES . 9 . 'ERR3' = VER3 ;
    VRES . 9 . 'TH1' = VTH1 ;
    VRES . 9 . 'TH2' = VTH2 ;
    VRES . 9 . 'TH3' = VTH3 ;
    VRES . 9 . 'SP2F' = VSP2 ;
    VRES . 9 . 'SP3F' = VSP3 ;
    VRES . 9 . 'NRE2' = VR2 ;
    VRES . 9 . 'NCA2' = VC2 ;
    VRES . 9 . 'NHK2' = VH2 ;
    VRES . 9 . 'NMA2' = VM2 ;
    VRES . 9 . 'NRE3' = VR3 ;
    VRES . 9 . 'NCA3' = VC3 ;
    VRES . 9 . 'NHK3' = VH3 ;
    VRES . 9 . 'CL' = VCLA ;
    VRES . 9 . 'NCMP' = VNC2 ;
    VMSG = CHAI '<<< Cas' ' ' '9' ' ' 'sur' ' ' NTOT0 ' ' ':' ' ' 'relaxendo' ' ' ':' ' ' 'niveau 1' ' ' VMOK2 ', niveau 2' ' ' VMOK3 ' ' '- ecart' ' ' VSE2 ', acceleration' ' ' VSS2 ' ' 'et' ' ' VSS3 ;
    MESS VMSG ;
    AVANCE VRES 9 NTOT0 'relaxendo' NPASS 'termine' ;
    MENAGE 'OBLI' ;
FINSI ;

*
* ---------------------------------------------------------------------
* Procedure du cas 10 : GTN_C20R (endommagement ductile (GTN))
* Variables locales : le cas ne voit aucune variable des cas precedents
* ---------------------------------------------------------------------
DEBPROC VC10 VPSW*'LOGIQUE' VNIV*'ENTIER' VTFPR*'TABLE' VTCT*'TABLE' IECHO0*'ENTIER' ;
* ----- debut du cas GTN_C20R

************************************
* Section : Mecanique Rupture
*******************************************
* Verificationâ€¯duâ€¯modeleâ€¯GURSON2 (GTN) avec
* desâ€¯elements 3Dâ€¯aâ€¯integrationâ€¯reduite
*******************************************

OPTI 'DIME' 3 'ELEM' 'CU20';

* MAILLAGE
P1 = 0. 0. 0.;
P2 = 1. 0. 0.;
D1 = DROI 4 P1 P2;
S1 = D1 TRAN 4 (0. 1. 0.);
V1 = S1 VOLU 'TRAN' 20 (0. 0. 5.);
* TRAC 'CACH' V1;FIN;

* GTN AVEC INTEGRATION COMPLETE
MO = MODE V1 'MECANIQUE' 'ELASTIQUE' 'PLASTIQUE_ENDOM' 'GURSON2';
EV1 = EVOL 'MANU' (PROG 0. 0.02) (PROG 5.E8 7.E8);
MA = MATE MO 'YOUN' 2.E11 'NU' 0.3 'ECRO' EV1 'Q' 1.5 'FU' (2./3.) 'FF' 0.25
              'FC' 0.1 'FNS0' 0. 'FNE0' 0. 'SNS' 1.E3 'SNE' 1. 'SIGN' 1.E3
              'EPSN' 1. 'F0' 0.01 'Q2' 1.1;

PINF = V1 POIN 'PLAN' (0. 0. 0.) (1. 0. 0.) (0. 1. 0.) 1.E-10;
ZMAX = MAXI (COOR 3 V1);
PSUP = V1 POIN 'PLAN' (0. 0. ZMAX) (1. 0. ZMAX) (0. 1. ZMAX) 1.E-10;
BL1 = BLOQ 'DEPL' PINF;
BL2 = BLOQ 'UZ' PSUP;

X_DEP_I = 5.E-2;
DEP_I = DEPI BL2 X_DEP_I;
EV2 = EVOL 'MANU' (PROG 0. 1.)  (PROG 0. 1.);
CHAR1 = CHAR 'DIMP' DEP_I EV2;

TAB1 = TABLE;
TAB1.'MODELE' = MO;
TAB1.'CARACTERISTIQUES' = MA;
TAB1.'BLOCAGES_MECANIQUES' = BL1 ET BL2;
TAB1.'CHARGEMENT' = CHAR1;
TAB1.'TEMPS_CALCULES' = PROG 0. PAS 0.05 1.;
TAB1.'VARIABLES_INTERNES' = TABL;
TAB1.'VARIABLES_INTERNES'.(0) = (ZERO MO 'VARINTER') +
        (MANU 'CHML' MO 'VHWF' 0.01 'TYPE' 'VARINTER' 'STRESSES');

TAB1 . 'PERF_RAID' = VPSW ; TAB1 . 'PERF_RAID_NIVEAU' = VNIV ; PASAPAS TAB1 ; FPREC TAB1 VTFPR ;
* RESULTANTE
NPAS = DIME TAB1.'TEMPS_CALCULES';
EFFORT = PROG;
REPE IPAS NPAS;
    REAC1 = REDU TAB1.'REACTIONS'.(&IPAS-1) PSUP;
    RESU1 = MAXI (RESU REAC1);
    EFFORT = EFFORT ET (PROG RESU1);
FIN IPAS;
EFFORT = EVOL 'MANU' 'DEPL' TAB1.'TEMPS_CALCULES' 'FORCE' EFFORT;

* GTN AVEC INTEGRATION REDUITE
MO_R = MODE V1 'MECANIQUE' 'ELASTIQUE' 'PLASTIQUE_ENDOM' 'GURSON2' 'C20R';
MA_R = MATE MO_R 'YOUN' 2.E11 'NU' 0.3 'ECRO' EV1 'Q' 1.5 'FU' (2./3.) 'FF' 0.25
              'FC' 0.1 'FNS0' 0. 'FNE0' 0. 'SNS' 1.E3 'SNE' 1. 'SIGN' 1.E3
              'EPSN' 1. 'F0' 0.01 'Q2' 1.1;

TAB2 = TABLE;
TAB2.'MODELE' = MO_R;
TAB2.'CARACTERISTIQUES' = MA_R;
TAB2.'BLOCAGES_MECANIQUES' = BL1 ET BL2;
TAB2.'CHARGEMENT' = TAB1.'CHARGEMENT';
TAB2.'TEMPS_CALCULES' = TAB1.'TEMPS_CALCULES';
TAB2.'VARIABLES_INTERNES' = TABL;
TAB2.'VARIABLES_INTERNES'.(0) = (ZERO MO_R 'VARINTER') +
        (MANU 'CHML' MO_R 'VHWF' 0.1 'TYPE' 'VARINTER' 'STRESSES');

TAB2 . 'PERF_RAID' = VPSW ; TAB2 . 'PERF_RAID_NIVEAU' = VNIV ; PASAPAS TAB2 ; FPREC TAB2 VTFPR ;
EFFORT_R = PROG;
REPE IPAS NPAS;
    REAC1 = REDU TAB1.'REACTIONS'.(&IPAS-1) PSUP;
    RESU1 = MAXI (RESU REAC1);
    EFFORT_R = EFFORT_R ET (PROG RESU1);
FIN IPAS;
EFFORT_R = EVOL 'MANU' 'DEPL' TAB1.'TEMPS_CALCULES' 'FORCE' EFFORT_R;

* VERIFICATION DE LA FORCE
ECART = (INTG (EFFORT_R - EFFORT)**2)**0.5;
LIM = ((INTG EFFORT**2)**0.5) * 1.E-3;
MESS ECART LIM;
SI (ECART > LIM);
    MESS 'ERREUR DANS GURSON2 AVEC LES VALEURS PAR DEFAUT DE Q2 ET Q3';
    VTCT . 'N5' = (VTCT . 'N5') + 1 ;
FINSI;

* VERIFICATION DU NOMBRE DE POINTS DE GAUSS
NEL = NBEL V1;
CHAM1 = MANU 'CHML' MO 'SCAL' 1. 'STRESSES';
CHPO1 = CHAN 'CHPO' MO CHAM1 'SUPP';
NGAU = (ENTI (MAXI (RESU CHPO1))) / NEL;
CHAM1 = MANU 'CHML' MO_R 'SCAL' 1. 'STRESSES';
CHPO1 = CHAN 'CHPO' MO_R CHAM1 'SUPP';
NGAU_R = (ENTI (MAXI (RESU CHPO1))) / NEL;
SI (NGAU NEG 27);
    MESS 'ERREUR : LES CU20 DEVRAIENT AVOIR 27 POINTS DE GAUSS...';
    VTCT . 'N5' = (VTCT . 'N5') + 1 ;
FINSI;
SI (NGAU_R NEG 8);
    MESS 'ERREUR : LES C20R DEVRAIENT AVOIR 8 POINTS DE GAUSS...';
    VTCT . 'N5' = (VTCT . 'N5') + 1 ;
FINSI;
* [valid] FIN final


* ----- fin du cas GTN_C20R
FINPROC ;
*
* ---------------------------------------------------------------------
* Cas 10 : GTN_C20R (endommagement ductile (GTN))
* ---------------------------------------------------------------------
SI ((IDEB0 '<EG' 10) 'ET' (IFIN0 '>EG' 10) 'ET' ('NON' ('EXIS' TSKIP 10))) ;
    MENAGE 'OBLI' ;
    MESS ' ' ;
    VMSG = CHAI '>>> Cas' ' ' '10' ' ' 'sur' ' ' NTOT0 ' ' ':' ' ' 'GTN_C20R' ' ' '(endommagement ductile (GTN))' ;
    MESS VMSG ;
    NPASS = 2 ;
    SI IPASS3 ;
        NPASS = 3 ;
    FINSI ;
    VTH1 = 0 ;
    VTH2 = 0 ;
    VTH3 = 0 ;
    VNE51 = 0 ;
    VNE01 = 0 ;
    VNE52 = 0 ;
    VNE02 = 0 ;
    VNE53 = 0 ;
    VNE03 = 0 ;
    REPETER ZVRUN NPASS ;
* ordre des passes alterne d'un cas a l'autre (derive des temps en session)
        VIP = NPASS + 1 - &ZVRUN ;
        VPSW = (VIP '>' 1) ;
        VNIV = 1 ;
        VMPS = 'inactif' ;
        SI (VIP 'EGA' 2) ;
            VMPS = 'actif niveau 1' ;
        FINSI ;
        SI (VIP 'EGA' 3) ;
            VNIV = 2 ;
            VMPS = 'actif niveau 2' ;
        FINSI ;
        AVANCE VRES 10 NTOT0 'GTN_C20R' VIP 'en_cours' ;
        VMSG = CHAI '    passe' ' ' VIP ' ' 'sur' ' ' NPASS ' ' ': optimisations' ' ' VMPS ;
        MESS VMSG ;
        SI ITRACE0 ;
            OPTI 'IMPR' 'valid_trace.log' ;
        FINSI ;
        OPTI 'DIME' 3 'MODE' 'TRID' 'ELEM' 'CUB8' 'ECHO' IECHO0 ;
        VTHM = 0 ;
        REPETER ZVREP NREP0 ;
            VIR = &ZVREP ;
            VTFPR = TABL ;
            VTCT = TABL ;
            VTCT . 'N0' = 0 ;
            VTCT . 'N5' = 0 ;
            SI ITEMPS0 ;
                TEMP 'ZERO' ;
            FINSI ;
* Le cas s'execute dans une procedure (variables locales) : les variables
* d'un cas precedent ne peuvent pas masquer un mot-cle ou un operateur
            VC10 VPSW VNIV VTFPR VTCT IECHO0 ;
            VTHR = 0 ;
            SI ITEMPS0 ;
                VTHR = CHRONO ;
            FINSI ;
            SI (VIR 'EGA' 1) ;
                VTHM = VTHR ;
            SINON ;
                SI (VTHR '<' VTHM) ;
                    VTHM = VTHR ;
                FINSI ;
            FINSI ;
        FIN ZVREP ;
        VNER5 = VTCT . 'N5' ;
        VNER0 = VTCT . 'N0' ;
        SI (VIP 'EGA' 1) ;
            VTF1 = VTFPR ;
            VTH1 = VTHM ;
            VNE51 = VNER5 ;
            VNE01 = VNER0 ;
        FINSI ;
        SI (VIP 'EGA' 2) ;
            VTF2 = VTFPR ;
            VTH2 = VTHM ;
            VNE52 = VNER5 ;
            VNE02 = VNER0 ;
        FINSI ;
        SI (VIP 'EGA' 3) ;
            VTF3 = VTFPR ;
            VTH3 = VTHM ;
            VNE53 = VNER5 ;
            VNE03 = VNER0 ;
        FINSI ;
    FIN ZVRUN ;
*   comparaison des empreintes avec la passe 1
    VER2 VNL2 VNC2 = COMPAR VTF1 VTF2 ;
    VMOK2 = 'OK' ;
    SI ((VER2 '>' TOLV0) 'OU' (VNL2 '>' 0) 'OU' ('NON' (VNE52 'EGA' VNE51))) ;
        VMOK2 = 'ECART' ;
        VNBK2 = VNBK2 + 1 ;
    FINSI ;
    VER3 = 0. ;
    VNC3 = 0 ;
    VMOK3 = 'sans_objet' ;
    SI IPASS3 ;
        VER3 VNL3 VNC3 = COMPAR VTF1 VTF3 ;
        VMOK3 = 'OK' ;
        SI ((VER3 '>' TOLV3) 'OU' (VNL3 '>' 0) 'OU' ('NON' (VNE53 'EGA' VNE51))) ;
            VMOK3 = 'ECART' ;
            VNBK3 = VNBK3 + 1 ;
        FINSI ;
    FINSI ;
*   accelerations (temps de la passe 1 / temps de la passe)
    VSP2 = 0. ;
    VSP3 = 0. ;
    SI ((VTH1 '>' 0) 'ET' (VTH2 '>' 0)) ;
        VSP2 = (FLOT VTH1) '/' (FLOT VTH2) ;
    FINSI ;
    SI ((VTH1 '>' 0) 'ET' (VTH3 '>' 0)) ;
        VSP3 = (FLOT VTH1) '/' (FLOT VTH3) ;
    FINSI ;
    VSUM1 = VSUM1 + VTH1 ;
    VSUM2 = VSUM2 + VTH2 ;
    VSUM3 = VSUM3 + VTH3 ;
    VCLA = VTF2 . 'CL' ;
    VR2 = VTF2 . 'NRE' ;
    VC2 = VTF2 . 'NCA' ;
    VH2 = VTF2 . 'NHK' ;
    VM2 = VTF2 . 'NMA' ;
    VR3 = -1 ;
    VC3 = -1 ;
    VH3 = -1 ;
    VM3 = -1 ;
    SI IPASS3 ;
        VR3 = VTF3 . 'NRE' ;
        VC3 = VTF3 . 'NCA' ;
        VH3 = VTF3 . 'NHK' ;
        VM3 = VTF3 . 'NMA' ;
    FINSI ;
    VSE2 = CHAI 'FORMAT' '(1PE10.3)' VER2 ;
    VSE3 = CHAI 'FORMAT' '(1PE10.3)' VER3 ;
    VSS2 = CHAI 'FORMAT' '(F6.2)' VSP2 ;
    VSS3 = CHAI 'FORMAT' '(F6.2)' VSP3 ;
*   fichier de resultat du cas (SORT) et affichage console (MESS)
    OPTI 'SORT' 'valid_GTN_C20R.log' ;
    VMSG = CHAI '=== Cas' ' ' '10' ' ' ':' ' ' 'GTN_C20R' ' ' '(endommagement ductile (GTN))' ' ' '===' ;
    MESS VMSG ;
    SORT 'CHAI' VMSG ;
    VMSG = CHAI 'Valeurs comparees :' ' ' VNC2 ;
    MESS VMSG ;
    SORT 'CHAI' VMSG ;
    VMSG = CHAI 'Temps horloge (ms) : origine' ' ' VTH1 ' ' '; niveau 1' ' ' VTH2 ' ' '; niveau 2' ' ' VTH3 ;
    MESS VMSG ;
    SORT 'CHAI' VMSG ;
    VMSG = CHAI 'Acceleration par rapport a l origine : niveau 1' ' ' VSS2 ' ' '; niveau 2' ' ' VSS3 ;
    MESS VMSG ;
    SORT 'CHAI' VMSG ;
    VMSG = CHAI 'Controles internes du cas : echecs origine' ' ' VNE51 ' ' '; niveau 1' ' ' VNE52 ' ' '; niveau 2' ' ' VNE53 ' ' '- reussites origine' ' ' VNE01 ' ' '; niveau 1' ' ' VNE02 ' ' '; niveau 2' ' ' VNE03 ;
    MESS VMSG ;
    SORT 'CHAI' VMSG ;
    VMSG = CHAI 'Classes exercees (1 MATVAR, 10 ENDOM, 20 VISCODOM, 100 GD) :' ' ' VCLA ;
    MESS VMSG ;
    SORT 'CHAI' VMSG ;
    VMSG = CHAI 'Niveau 1 : raideur reutilisee' ' ' VR2 ' ' 'fois, recalculee' ' ' VC2 ' ' 'fois ; HOOK evite' ' ' VH2 ' ' 'fois ; caracteristiques reutilisees' ' ' VM2 ' ' 'fois' ;
    MESS VMSG ;
    SORT 'CHAI' VMSG ;
    VMSG = CHAI 'Niveau 2 : raideur reutilisee' ' ' VR3 ' ' 'fois, recalculee' ' ' VC3 ' ' 'fois ; HOOK evite' ' ' VH3 ' ' 'fois ; caracteristiques reutilisees' ' ' VM3 ' ' 'fois' ;
    MESS VMSG ;
    SORT 'CHAI' VMSG ;
    VMSG = CHAI 'Ecart relatif maximal : niveau 1' ' ' VSE2 ' ' '; niveau 2' ' ' VSE3 ;
    MESS VMSG ;
    SORT 'CHAI' VMSG ;
    VMSG = CHAI 'RESULTAT : niveau 1' ' ' VMOK2 ' ' '; niveau 2' ' ' VMOK3 ;
    MESS VMSG ;
    SORT 'CHAI' VMSG ;
    SI (('EGA' VNC2 0) ) ;
        VMSG = CHAI 'ATTENTION : aucune valeur comparee (resultats non stockes ?)' ;
        MESS VMSG ;
        SORT 'CHAI' VMSG ;
    FINSI ;
    OPTI 'SORT' 'valid_inutile.tmp' ;
    VRES . 10 = TABL ;
    VRES . 10 . 'NOM' = 'GTN_C20R' ;
    VRES . 10 . 'OKM' = VMOK2 ;
    VRES . 10 . 'OK3' = VMOK3 ;
    VRES . 10 . 'ERR2' = VER2 ;
    VRES . 10 . 'ERR3' = VER3 ;
    VRES . 10 . 'TH1' = VTH1 ;
    VRES . 10 . 'TH2' = VTH2 ;
    VRES . 10 . 'TH3' = VTH3 ;
    VRES . 10 . 'SP2F' = VSP2 ;
    VRES . 10 . 'SP3F' = VSP3 ;
    VRES . 10 . 'NRE2' = VR2 ;
    VRES . 10 . 'NCA2' = VC2 ;
    VRES . 10 . 'NHK2' = VH2 ;
    VRES . 10 . 'NMA2' = VM2 ;
    VRES . 10 . 'NRE3' = VR3 ;
    VRES . 10 . 'NCA3' = VC3 ;
    VRES . 10 . 'NHK3' = VH3 ;
    VRES . 10 . 'CL' = VCLA ;
    VRES . 10 . 'NCMP' = VNC2 ;
    VMSG = CHAI '<<< Cas' ' ' '10' ' ' 'sur' ' ' NTOT0 ' ' ':' ' ' 'GTN_C20R' ' ' ':' ' ' 'niveau 1' ' ' VMOK2 ', niveau 2' ' ' VMOK3 ' ' '- ecart' ' ' VSE2 ', acceleration' ' ' VSS2 ' ' 'et' ' ' VSS3 ;
    MESS VMSG ;
    AVANCE VRES 10 NTOT0 'GTN_C20R' NPASS 'termine' ;
    MENAGE 'OBLI' ;
FINSI ;

*
* ---------------------------------------------------------------------
* Procedure du cas 11 : mvm_bcn (endommagement)
* Variables locales : le cas ne voit aucune variable des cas precedents
* ---------------------------------------------------------------------
DEBPROC VC11 VPSW*'LOGIQUE' VNIV*'ENTIER' VTFPR*'TABLE' VTCT*'TABLE' IECHO0*'ENTIER' ;
* ----- debut du cas mvm_bcn

* fichier :  mvm_bcn.dgibi
************************************************************************
* Section : Mecanique Endommagement
* Section : Mecanique Dynamique
************************************************************************
********************************************************************************
* TEST : Modified Von Mises nonlocal damage model                              *
* UNITS:                                                                       *
*          Dimensions in mm                                                    *
*          Loads      in N                                                     *
*          Modulus    in N/mm2 (Mpa)                                           *
*                                                                              *
********************************************************************************
 OPTI DIME 2 ELEM QUA4 MODE PLAN DEFO ;
*-------------------------------------------------------------------------------
* Generation of mesh
*-------------------------------------------------------------------------------
 p1 = 0. 0.;
 p2 = 1. 0.;
 l12 = D 1 p1 p2;
 ma1 = l12 TRAN 1 (0. 1);
*
 p1 = POIN ma1 PROC (0. 0.) ;
 p2 = POIN ma1 PROC (1. 0.) ;
 p3 = POIN ma1 PROC (0. 1) ;
 p4 = POIN ma1 PROC (1. 1) ;
*
 l12 = (CONT ma1) ELEM COMPRIS p1 p2 ;
 l13 = (CONT ma1) ELEM COMPRIS p3 p1 ;
 l24 = (CONT ma1) ELEM COMPRIS p2 p4 ;
 l34 = (CONT ma1) ELEM COMPRIS p4 p3 ;
*-------------------------------------------------------------------------------
* Definition of the model and material parameters
*-------------------------------------------------------------------------------
 mobet = MODE ma1 MECANIQUE ELASTIQUE ISOTROPE ENDOMMAGEMENT MVM
      'NON_LOCAL' 'MOYE' 'V_MOYENNE' (MOTS 'EPTI') ;
*
 b1    = 15000.     ; b2       = 0.5     ;
 y0    = 1.e-4      ; ratio_ct = 10.     ;
 ll    = 2.         ; nuc   = 0.         ;
 younc = 1.e4       ; loi   = 1          ;
*
 mabet = MATE mobet 'YOUN' younc 'NU' nuc RHO 1.
                    'Y0' y0 'RATI' ratio_ct
                    'B1' b1 'B2' b2 'LOI' loi 'LCAR' LL ;
*-------------------------------------------------------------------------------
* Boundary conditions
*-------------------------------------------------------------------------------
* 1) Fixed boundaries
 bcfix = (BLOQUE L13 DEPL) ;
* 2) Prescrite Displacements
 bcdisp = BLOQUE  (L24) UX ;
*-------------------------------------------------------------------------------
* Adjustment of the reference load
*-------------------------------------------------------------------------------
 chdisp1 = MANU CHPO L24 1 'UX' 10*y0 ;
 ffextp  = DEPI bcdisp chdisp1 ;
 evol1  = EVOL MANU Temps (PROG 0. 1.) Depl (PROG 0. 1.) ;
 cha1   = CHAR DIMP evol1 ffextp ;
*-------------------------------------------------------------------------------
* Connectivities (for nonlocal averaging)
*-------------------------------------------------------------------------------
 conn1 = CONN mobet MABET 'NORMAL' 'INTERIEUR' ;
*-------------------------------------------------------------------------------
* Input for pasapas procedure
*-------------------------------------------------------------------------------
 t0 = TABLE                                   ;
 t0.'MODELE'             = mobet              ;
 t0.'CARACTERISTIQUES'   = mabet              ;
 t0.'CHARGEMENT'         = cha1               ;
* il y a un probleme pour le temps 0.1  PV
 t0.'TEMPS_CALCULES'     = PROG 0. 0.05  0.099 PAS 0.05 1.;
 t0.'BLOCAGES_MECANIQUES' =  bcfix  et bcdisp ;
 t0.'MAXITERATION'       = 100                ;
 t0.'NACCE'              = 100                ;
 t0.'MOVA'               = 'D   '             ;
 t0.'CONN'               = conn1              ;
 t0.'FACTMIN'            = .001               ;
 t0.'MAXSTEP'            = 10000              ;
 t0.'PRECISION'          = 1.E-10             ;
 t0.'PRECFLEX'           = 1.E-10             ;
 t0.'CONVERGENCE_FORCEE' = FAUX               ;
 t0.'ACCELERATION'       = 50                 ;
*
 t0 . 'PERF_RAID' = VPSW ; t0 . 'PERF_RAID_NIVEAU' = VNIV ; PASAPAS t0 ; FPREC t0 VTFPR ;
*
*------------------------------------------------------------------------------
* Evolution of stress.vs.strain and force.vs.displacement
*------------------------------------------------------------------------------
 sig0 = t0.CONTRAINTES        ;
 dep0 = t0.DEPLACEMENTS       ;
 var0 = t0.VARIABLES_INTERNES ;
 for0 = t0.REACTIONS          ;
 ind0 = INDEX sig0            ;
 nind  = DIME for0            ;
*
 for     = PROG ;
 dep     = PROG ;
 sigma   = PROG ;
 epsilon = PROG ;
*
REPETER indj  nind ;
   i = &indj - 1 ;
*
   sii = EXCO 'SMXX' (sig0.i) 'SCAL' ;
   epi = EXCO 'EPXX' (EPSI mobet (dep0.i)) 'SCAL' ;
   sigp2 = EXTR sii 'SCAL' 1 1 1 ;
   sigma = sigma INSE &indj (sigp2) ;
   epsp2 = EXTR epi 'SCAL' 1 1 1 ;
   epsilon = epsilon INSE &indj (epsp2) ;
*
   fi = EXTR (for0.i) FX p2 ;
   di = EXTR (dep0.i) UX p2 ;
   for      = for    INSE &indj (fi) ;
   dep      = dep   INSE &indj (di) ;
FIN indj ;
*
 SI ((ABS (MAXI ((0.5*sigma) - for))) < 0.5e-5) ;
   VTCT . 'N0' = (VTCT . 'N0') + 1 ;
 SINON ;
 mess 'test :' (ABS (MAXI ((0.5*sigma) - for)));
  VTCT . 'N5' = (VTCT . 'N5') + 1 ;
 FINSI ;
* [valid] FIN final


* ----- fin du cas mvm_bcn
FINPROC ;
*
* ---------------------------------------------------------------------
* Cas 11 : mvm_bcn (endommagement)
* ---------------------------------------------------------------------
SI ((IDEB0 '<EG' 11) 'ET' (IFIN0 '>EG' 11) 'ET' ('NON' ('EXIS' TSKIP 11))) ;
    MENAGE 'OBLI' ;
    MESS ' ' ;
    VMSG = CHAI '>>> Cas' ' ' '11' ' ' 'sur' ' ' NTOT0 ' ' ':' ' ' 'mvm_bcn' ' ' '(endommagement)' ;
    MESS VMSG ;
    NPASS = 2 ;
    SI IPASS3 ;
        NPASS = 3 ;
    FINSI ;
    VTH1 = 0 ;
    VTH2 = 0 ;
    VTH3 = 0 ;
    VNE51 = 0 ;
    VNE01 = 0 ;
    VNE52 = 0 ;
    VNE02 = 0 ;
    VNE53 = 0 ;
    VNE03 = 0 ;
    REPETER ZVRUN NPASS ;
* ordre des passes alterne d'un cas a l'autre (derive des temps en session)
        VIP = &ZVRUN ;
        VPSW = (VIP '>' 1) ;
        VNIV = 1 ;
        VMPS = 'inactif' ;
        SI (VIP 'EGA' 2) ;
            VMPS = 'actif niveau 1' ;
        FINSI ;
        SI (VIP 'EGA' 3) ;
            VNIV = 2 ;
            VMPS = 'actif niveau 2' ;
        FINSI ;
        AVANCE VRES 11 NTOT0 'mvm_bcn' VIP 'en_cours' ;
        VMSG = CHAI '    passe' ' ' VIP ' ' 'sur' ' ' NPASS ' ' ': optimisations' ' ' VMPS ;
        MESS VMSG ;
        SI ITRACE0 ;
            OPTI 'IMPR' 'valid_trace.log' ;
        FINSI ;
        OPTI 'DIME' 3 'MODE' 'TRID' 'ELEM' 'CUB8' 'ECHO' IECHO0 ;
        VTHM = 0 ;
        REPETER ZVREP NREP0 ;
            VIR = &ZVREP ;
            VTFPR = TABL ;
            VTCT = TABL ;
            VTCT . 'N0' = 0 ;
            VTCT . 'N5' = 0 ;
            SI ITEMPS0 ;
                TEMP 'ZERO' ;
            FINSI ;
* Le cas s'execute dans une procedure (variables locales) : les variables
* d'un cas precedent ne peuvent pas masquer un mot-cle ou un operateur
            VC11 VPSW VNIV VTFPR VTCT IECHO0 ;
            VTHR = 0 ;
            SI ITEMPS0 ;
                VTHR = CHRONO ;
            FINSI ;
            SI (VIR 'EGA' 1) ;
                VTHM = VTHR ;
            SINON ;
                SI (VTHR '<' VTHM) ;
                    VTHM = VTHR ;
                FINSI ;
            FINSI ;
        FIN ZVREP ;
        VNER5 = VTCT . 'N5' ;
        VNER0 = VTCT . 'N0' ;
        SI (VIP 'EGA' 1) ;
            VTF1 = VTFPR ;
            VTH1 = VTHM ;
            VNE51 = VNER5 ;
            VNE01 = VNER0 ;
        FINSI ;
        SI (VIP 'EGA' 2) ;
            VTF2 = VTFPR ;
            VTH2 = VTHM ;
            VNE52 = VNER5 ;
            VNE02 = VNER0 ;
        FINSI ;
        SI (VIP 'EGA' 3) ;
            VTF3 = VTFPR ;
            VTH3 = VTHM ;
            VNE53 = VNER5 ;
            VNE03 = VNER0 ;
        FINSI ;
    FIN ZVRUN ;
*   comparaison des empreintes avec la passe 1
    VER2 VNL2 VNC2 = COMPAR VTF1 VTF2 ;
    VMOK2 = 'OK' ;
    SI ((VER2 '>' TOLV0) 'OU' (VNL2 '>' 0) 'OU' ('NON' (VNE52 'EGA' VNE51))) ;
        VMOK2 = 'ECART' ;
        VNBK2 = VNBK2 + 1 ;
    FINSI ;
    VER3 = 0. ;
    VNC3 = 0 ;
    VMOK3 = 'sans_objet' ;
    SI IPASS3 ;
        VER3 VNL3 VNC3 = COMPAR VTF1 VTF3 ;
        VMOK3 = 'OK' ;
        SI ((VER3 '>' TOLV3) 'OU' (VNL3 '>' 0) 'OU' ('NON' (VNE53 'EGA' VNE51))) ;
            VMOK3 = 'ECART' ;
            VNBK3 = VNBK3 + 1 ;
        FINSI ;
    FINSI ;
*   accelerations (temps de la passe 1 / temps de la passe)
    VSP2 = 0. ;
    VSP3 = 0. ;
    SI ((VTH1 '>' 0) 'ET' (VTH2 '>' 0)) ;
        VSP2 = (FLOT VTH1) '/' (FLOT VTH2) ;
    FINSI ;
    SI ((VTH1 '>' 0) 'ET' (VTH3 '>' 0)) ;
        VSP3 = (FLOT VTH1) '/' (FLOT VTH3) ;
    FINSI ;
    VSUM1 = VSUM1 + VTH1 ;
    VSUM2 = VSUM2 + VTH2 ;
    VSUM3 = VSUM3 + VTH3 ;
    VCLA = VTF2 . 'CL' ;
    VR2 = VTF2 . 'NRE' ;
    VC2 = VTF2 . 'NCA' ;
    VH2 = VTF2 . 'NHK' ;
    VM2 = VTF2 . 'NMA' ;
    VR3 = -1 ;
    VC3 = -1 ;
    VH3 = -1 ;
    VM3 = -1 ;
    SI IPASS3 ;
        VR3 = VTF3 . 'NRE' ;
        VC3 = VTF3 . 'NCA' ;
        VH3 = VTF3 . 'NHK' ;
        VM3 = VTF3 . 'NMA' ;
    FINSI ;
    VSE2 = CHAI 'FORMAT' '(1PE10.3)' VER2 ;
    VSE3 = CHAI 'FORMAT' '(1PE10.3)' VER3 ;
    VSS2 = CHAI 'FORMAT' '(F6.2)' VSP2 ;
    VSS3 = CHAI 'FORMAT' '(F6.2)' VSP3 ;
*   fichier de resultat du cas (SORT) et affichage console (MESS)
    OPTI 'SORT' 'valid_mvm_bcn.log' ;
    VMSG = CHAI '=== Cas' ' ' '11' ' ' ':' ' ' 'mvm_bcn' ' ' '(endommagement)' ' ' '===' ;
    MESS VMSG ;
    SORT 'CHAI' VMSG ;
    VMSG = CHAI 'Valeurs comparees :' ' ' VNC2 ;
    MESS VMSG ;
    SORT 'CHAI' VMSG ;
    VMSG = CHAI 'Temps horloge (ms) : origine' ' ' VTH1 ' ' '; niveau 1' ' ' VTH2 ' ' '; niveau 2' ' ' VTH3 ;
    MESS VMSG ;
    SORT 'CHAI' VMSG ;
    VMSG = CHAI 'Acceleration par rapport a l origine : niveau 1' ' ' VSS2 ' ' '; niveau 2' ' ' VSS3 ;
    MESS VMSG ;
    SORT 'CHAI' VMSG ;
    VMSG = CHAI 'Controles internes du cas : echecs origine' ' ' VNE51 ' ' '; niveau 1' ' ' VNE52 ' ' '; niveau 2' ' ' VNE53 ' ' '- reussites origine' ' ' VNE01 ' ' '; niveau 1' ' ' VNE02 ' ' '; niveau 2' ' ' VNE03 ;
    MESS VMSG ;
    SORT 'CHAI' VMSG ;
    VMSG = CHAI 'Classes exercees (1 MATVAR, 10 ENDOM, 20 VISCODOM, 100 GD) :' ' ' VCLA ;
    MESS VMSG ;
    SORT 'CHAI' VMSG ;
    VMSG = CHAI 'Niveau 1 : raideur reutilisee' ' ' VR2 ' ' 'fois, recalculee' ' ' VC2 ' ' 'fois ; HOOK evite' ' ' VH2 ' ' 'fois ; caracteristiques reutilisees' ' ' VM2 ' ' 'fois' ;
    MESS VMSG ;
    SORT 'CHAI' VMSG ;
    VMSG = CHAI 'Niveau 2 : raideur reutilisee' ' ' VR3 ' ' 'fois, recalculee' ' ' VC3 ' ' 'fois ; HOOK evite' ' ' VH3 ' ' 'fois ; caracteristiques reutilisees' ' ' VM3 ' ' 'fois' ;
    MESS VMSG ;
    SORT 'CHAI' VMSG ;
    VMSG = CHAI 'Ecart relatif maximal : niveau 1' ' ' VSE2 ' ' '; niveau 2' ' ' VSE3 ;
    MESS VMSG ;
    SORT 'CHAI' VMSG ;
    VMSG = CHAI 'RESULTAT : niveau 1' ' ' VMOK2 ' ' '; niveau 2' ' ' VMOK3 ;
    MESS VMSG ;
    SORT 'CHAI' VMSG ;
    SI (('EGA' VNC2 0) ) ;
        VMSG = CHAI 'ATTENTION : aucune valeur comparee (resultats non stockes ?)' ;
        MESS VMSG ;
        SORT 'CHAI' VMSG ;
    FINSI ;
    OPTI 'SORT' 'valid_inutile.tmp' ;
    VRES . 11 = TABL ;
    VRES . 11 . 'NOM' = 'mvm_bcn' ;
    VRES . 11 . 'OKM' = VMOK2 ;
    VRES . 11 . 'OK3' = VMOK3 ;
    VRES . 11 . 'ERR2' = VER2 ;
    VRES . 11 . 'ERR3' = VER3 ;
    VRES . 11 . 'TH1' = VTH1 ;
    VRES . 11 . 'TH2' = VTH2 ;
    VRES . 11 . 'TH3' = VTH3 ;
    VRES . 11 . 'SP2F' = VSP2 ;
    VRES . 11 . 'SP3F' = VSP3 ;
    VRES . 11 . 'NRE2' = VR2 ;
    VRES . 11 . 'NCA2' = VC2 ;
    VRES . 11 . 'NHK2' = VH2 ;
    VRES . 11 . 'NMA2' = VM2 ;
    VRES . 11 . 'NRE3' = VR3 ;
    VRES . 11 . 'NCA3' = VC3 ;
    VRES . 11 . 'NHK3' = VH3 ;
    VRES . 11 . 'CL' = VCLA ;
    VRES . 11 . 'NCMP' = VNC2 ;
    VMSG = CHAI '<<< Cas' ' ' '11' ' ' 'sur' ' ' NTOT0 ' ' ':' ' ' 'mvm_bcn' ' ' ':' ' ' 'niveau 1' ' ' VMOK2 ', niveau 2' ' ' VMOK3 ' ' '- ecart' ' ' VSE2 ', acceleration' ' ' VSS2 ' ' 'et' ' ' VSS3 ;
    MESS VMSG ;
    AVANCE VRES 11 NTOT0 'mvm_bcn' NPASS 'termine' ;
    MENAGE 'OBLI' ;
FINSI ;

*
* ---------------------------------------------------------------------
* Procedure du cas 12 : desmorat (endommagement + dynamique)
* Variables locales : le cas ne voit aucune variable des cas precedents
* ---------------------------------------------------------------------
DEBPROC VC12 VPSW*'LOGIQUE' VNIV*'ENTIER' VTFPR*'TABLE' VTCT*'TABLE' IECHO0*'ENTIER' ;
* ----- debut du cas desmorat

* fichier : desmorat.dgibi
************************************************************************
* Section : Mecanique Endommagement
************************************************************************

OPTI dime 3 elem CUB8  echo IECHO0;
*-------------------définition de la géométrie--------------------
P1 = 0. 0. 0.;
P2 = 0. 0.1 0.;
P3 = 0.1 0.1 0.;
P4 = 0.1 0. 0.;
V1 = 0. 0. 0.1;
P5 = 0.1 0. 0.1;
Li1 = D 1 P1 P2 ;
Li2 = D 1 P2 P3;
Li3 = D 1 P3 P4;
Li4 = D 1 P4 P1;
Ltot = Li1 ET Li2 ET Li3 ET li4;
Surf1 = SURF Ltot PLANE;
Vovo = VOLU Surf1 1  TRANS V1;
Surf2 = FACE 2 Vovo;
Surf3 = Vovo POIN PLAN P1 P4 P5 0.001;
Surf4 = Vovo POIN PLAN P3 P4 P5 0.001;
ELIM 0.01 Vovo ;
*-----------MODELE------------------
    Mod1= MODE Vovo MECANIQUE ELASTIQUE ENDOMMAGEMENT DESMORAT CUB8;
    kappa0 = 5E-05 ;
    Mat1 = MATE Mod1 RHO 2400 YOUN 42.E09 NU 0.2 'K0' kappa0 'A' 5E+3
    'a' 2.93E-4
    'etaC' 0. 'etaT' 3. 'Dc' 0.99;


    list mod1;
*-------------CONDITIONS LIMITES-------------
CL1 = BLOQ Li1 Ux;
CL2 = BLOQ P2 Uy;
CL3 = BLOQ Surf1 Uz ;
Cldep = BLOQ Surf2 Uz;
*-------------ASSEMBLAGE CONDITIONS LIMITES
CLtot = CL1 ET CL2 ET CL3  ET  CLdep;
*CLtot = CL3  ET  CLdep;
*--------------CHARGEMENT---------------
FO1 = DEPI Cldep -1;
LI1 = PROG 0. 1e-2;
LI2 = PROG 0  1e-3 ;
EV = EVOL MANU LI1 LI2 ;
CHA1 =  CHAR 'DIMP' FO1 EV;
LIS1 = PROG 0. PAS 1e-5 0.3e-2 ;
TAB1 = TABLE ;
TAB1.'BLOCAGES_MECANIQUES' = CLtot;
TAB1.'MODELE' = Mod1;
TAB1.'CHARGEMENT' = CHA1;
TAB1.'CARACTERISTIQUES' = Mat1;
TAB1.'TEMPS_CALCULES' = LIS1;
TAB1.'MOVA' = 'D11';
TAB1.DYNAMIQUE=faux ;
*--------------RESOLUTION--------------
TAB1 . 'PERF_RAID' = VPSW ; TAB1 . 'PERF_RAID_NIVEAU' = VNIV ; PASAPAS TAB1 ; FPREC TAB1 VTFPR ;

n= dime (tab1.deplacements) - 1;
var = tab1.variables_internes.n ;
tra1= extr var 'D11 ' 1 1 1 ;
tra2= extr var 'D22 ' 1 1 1 ;
tra3= extr var 'D33 ' 1 1 1 ;

D11 = 0.90687;
D22 = 0.90589;
D33 = 4.18284E-22;

err1 = abs ((TRA1 - D11)/D11 * 100) ;
err2 = abs ((TRA2 - D22)/D22 * 100) ;
*err3 = abs ((TRA3 - D33)/D33 * 100) ;
err3 = (abs ( d33 - tra3)) * 1.e9;

mess ' err1 ' err1  ' err2 ' err2 ' err3 ' err3;
si ((err1 > .06) ou (err2 > .06) ou (err3 > .1));
 VTCT . 'N5' = (VTCT . 'N5') + 1 ;
sinon ;
 VTCT . 'N0' = (VTCT . 'N0') + 1 ;
finsi ;
* [valid] FIN final


* ----- fin du cas desmorat
FINPROC ;
*
* ---------------------------------------------------------------------
* Cas 12 : desmorat (endommagement + dynamique)
* ---------------------------------------------------------------------
SI ((IDEB0 '<EG' 12) 'ET' (IFIN0 '>EG' 12) 'ET' ('NON' ('EXIS' TSKIP 12))) ;
    MENAGE 'OBLI' ;
    MESS ' ' ;
    VMSG = CHAI '>>> Cas' ' ' '12' ' ' 'sur' ' ' NTOT0 ' ' ':' ' ' 'desmorat' ' ' '(endommagement + dynamique)' ;
    MESS VMSG ;
    NPASS = 2 ;
    SI IPASS3 ;
        NPASS = 3 ;
    FINSI ;
    VTH1 = 0 ;
    VTH2 = 0 ;
    VTH3 = 0 ;
    VNE51 = 0 ;
    VNE01 = 0 ;
    VNE52 = 0 ;
    VNE02 = 0 ;
    VNE53 = 0 ;
    VNE03 = 0 ;
    REPETER ZVRUN NPASS ;
* ordre des passes alterne d'un cas a l'autre (derive des temps en session)
        VIP = NPASS + 1 - &ZVRUN ;
        VPSW = (VIP '>' 1) ;
        VNIV = 1 ;
        VMPS = 'inactif' ;
        SI (VIP 'EGA' 2) ;
            VMPS = 'actif niveau 1' ;
        FINSI ;
        SI (VIP 'EGA' 3) ;
            VNIV = 2 ;
            VMPS = 'actif niveau 2' ;
        FINSI ;
        AVANCE VRES 12 NTOT0 'desmorat' VIP 'en_cours' ;
        VMSG = CHAI '    passe' ' ' VIP ' ' 'sur' ' ' NPASS ' ' ': optimisations' ' ' VMPS ;
        MESS VMSG ;
        SI ITRACE0 ;
            OPTI 'IMPR' 'valid_trace.log' ;
        FINSI ;
        OPTI 'DIME' 3 'MODE' 'TRID' 'ELEM' 'CUB8' 'ECHO' IECHO0 ;
        VTHM = 0 ;
        REPETER ZVREP NREP0 ;
            VIR = &ZVREP ;
            VTFPR = TABL ;
            VTCT = TABL ;
            VTCT . 'N0' = 0 ;
            VTCT . 'N5' = 0 ;
            SI ITEMPS0 ;
                TEMP 'ZERO' ;
            FINSI ;
* Le cas s'execute dans une procedure (variables locales) : les variables
* d'un cas precedent ne peuvent pas masquer un mot-cle ou un operateur
            VC12 VPSW VNIV VTFPR VTCT IECHO0 ;
            VTHR = 0 ;
            SI ITEMPS0 ;
                VTHR = CHRONO ;
            FINSI ;
            SI (VIR 'EGA' 1) ;
                VTHM = VTHR ;
            SINON ;
                SI (VTHR '<' VTHM) ;
                    VTHM = VTHR ;
                FINSI ;
            FINSI ;
        FIN ZVREP ;
        VNER5 = VTCT . 'N5' ;
        VNER0 = VTCT . 'N0' ;
        SI (VIP 'EGA' 1) ;
            VTF1 = VTFPR ;
            VTH1 = VTHM ;
            VNE51 = VNER5 ;
            VNE01 = VNER0 ;
        FINSI ;
        SI (VIP 'EGA' 2) ;
            VTF2 = VTFPR ;
            VTH2 = VTHM ;
            VNE52 = VNER5 ;
            VNE02 = VNER0 ;
        FINSI ;
        SI (VIP 'EGA' 3) ;
            VTF3 = VTFPR ;
            VTH3 = VTHM ;
            VNE53 = VNER5 ;
            VNE03 = VNER0 ;
        FINSI ;
    FIN ZVRUN ;
*   comparaison des empreintes avec la passe 1
    VER2 VNL2 VNC2 = COMPAR VTF1 VTF2 ;
    VMOK2 = 'OK' ;
    SI ((VER2 '>' TOLV0) 'OU' (VNL2 '>' 0) 'OU' ('NON' (VNE52 'EGA' VNE51))) ;
        VMOK2 = 'ECART' ;
        VNBK2 = VNBK2 + 1 ;
    FINSI ;
    VER3 = 0. ;
    VNC3 = 0 ;
    VMOK3 = 'sans_objet' ;
    SI IPASS3 ;
        VER3 VNL3 VNC3 = COMPAR VTF1 VTF3 ;
        VMOK3 = 'OK' ;
        SI ((VER3 '>' TOLV3) 'OU' (VNL3 '>' 0) 'OU' ('NON' (VNE53 'EGA' VNE51))) ;
            VMOK3 = 'ECART' ;
            VNBK3 = VNBK3 + 1 ;
        FINSI ;
    FINSI ;
*   accelerations (temps de la passe 1 / temps de la passe)
    VSP2 = 0. ;
    VSP3 = 0. ;
    SI ((VTH1 '>' 0) 'ET' (VTH2 '>' 0)) ;
        VSP2 = (FLOT VTH1) '/' (FLOT VTH2) ;
    FINSI ;
    SI ((VTH1 '>' 0) 'ET' (VTH3 '>' 0)) ;
        VSP3 = (FLOT VTH1) '/' (FLOT VTH3) ;
    FINSI ;
    VSUM1 = VSUM1 + VTH1 ;
    VSUM2 = VSUM2 + VTH2 ;
    VSUM3 = VSUM3 + VTH3 ;
    VCLA = VTF2 . 'CL' ;
    VR2 = VTF2 . 'NRE' ;
    VC2 = VTF2 . 'NCA' ;
    VH2 = VTF2 . 'NHK' ;
    VM2 = VTF2 . 'NMA' ;
    VR3 = -1 ;
    VC3 = -1 ;
    VH3 = -1 ;
    VM3 = -1 ;
    SI IPASS3 ;
        VR3 = VTF3 . 'NRE' ;
        VC3 = VTF3 . 'NCA' ;
        VH3 = VTF3 . 'NHK' ;
        VM3 = VTF3 . 'NMA' ;
    FINSI ;
    VSE2 = CHAI 'FORMAT' '(1PE10.3)' VER2 ;
    VSE3 = CHAI 'FORMAT' '(1PE10.3)' VER3 ;
    VSS2 = CHAI 'FORMAT' '(F6.2)' VSP2 ;
    VSS3 = CHAI 'FORMAT' '(F6.2)' VSP3 ;
*   fichier de resultat du cas (SORT) et affichage console (MESS)
    OPTI 'SORT' 'valid_desmorat.log' ;
    VMSG = CHAI '=== Cas' ' ' '12' ' ' ':' ' ' 'desmorat' ' ' '(endommagement + dynamique)' ' ' '===' ;
    MESS VMSG ;
    SORT 'CHAI' VMSG ;
    VMSG = CHAI 'Valeurs comparees :' ' ' VNC2 ;
    MESS VMSG ;
    SORT 'CHAI' VMSG ;
    VMSG = CHAI 'Temps horloge (ms) : origine' ' ' VTH1 ' ' '; niveau 1' ' ' VTH2 ' ' '; niveau 2' ' ' VTH3 ;
    MESS VMSG ;
    SORT 'CHAI' VMSG ;
    VMSG = CHAI 'Acceleration par rapport a l origine : niveau 1' ' ' VSS2 ' ' '; niveau 2' ' ' VSS3 ;
    MESS VMSG ;
    SORT 'CHAI' VMSG ;
    VMSG = CHAI 'Controles internes du cas : echecs origine' ' ' VNE51 ' ' '; niveau 1' ' ' VNE52 ' ' '; niveau 2' ' ' VNE53 ' ' '- reussites origine' ' ' VNE01 ' ' '; niveau 1' ' ' VNE02 ' ' '; niveau 2' ' ' VNE03 ;
    MESS VMSG ;
    SORT 'CHAI' VMSG ;
    VMSG = CHAI 'Classes exercees (1 MATVAR, 10 ENDOM, 20 VISCODOM, 100 GD) :' ' ' VCLA ;
    MESS VMSG ;
    SORT 'CHAI' VMSG ;
    VMSG = CHAI 'Niveau 1 : raideur reutilisee' ' ' VR2 ' ' 'fois, recalculee' ' ' VC2 ' ' 'fois ; HOOK evite' ' ' VH2 ' ' 'fois ; caracteristiques reutilisees' ' ' VM2 ' ' 'fois' ;
    MESS VMSG ;
    SORT 'CHAI' VMSG ;
    VMSG = CHAI 'Niveau 2 : raideur reutilisee' ' ' VR3 ' ' 'fois, recalculee' ' ' VC3 ' ' 'fois ; HOOK evite' ' ' VH3 ' ' 'fois ; caracteristiques reutilisees' ' ' VM3 ' ' 'fois' ;
    MESS VMSG ;
    SORT 'CHAI' VMSG ;
    VMSG = CHAI 'Ecart relatif maximal : niveau 1' ' ' VSE2 ' ' '; niveau 2' ' ' VSE3 ;
    MESS VMSG ;
    SORT 'CHAI' VMSG ;
    VMSG = CHAI 'RESULTAT : niveau 1' ' ' VMOK2 ' ' '; niveau 2' ' ' VMOK3 ;
    MESS VMSG ;
    SORT 'CHAI' VMSG ;
    SI (('EGA' VNC2 0) ) ;
        VMSG = CHAI 'ATTENTION : aucune valeur comparee (resultats non stockes ?)' ;
        MESS VMSG ;
        SORT 'CHAI' VMSG ;
    FINSI ;
    OPTI 'SORT' 'valid_inutile.tmp' ;
    VRES . 12 = TABL ;
    VRES . 12 . 'NOM' = 'desmorat' ;
    VRES . 12 . 'OKM' = VMOK2 ;
    VRES . 12 . 'OK3' = VMOK3 ;
    VRES . 12 . 'ERR2' = VER2 ;
    VRES . 12 . 'ERR3' = VER3 ;
    VRES . 12 . 'TH1' = VTH1 ;
    VRES . 12 . 'TH2' = VTH2 ;
    VRES . 12 . 'TH3' = VTH3 ;
    VRES . 12 . 'SP2F' = VSP2 ;
    VRES . 12 . 'SP3F' = VSP3 ;
    VRES . 12 . 'NRE2' = VR2 ;
    VRES . 12 . 'NCA2' = VC2 ;
    VRES . 12 . 'NHK2' = VH2 ;
    VRES . 12 . 'NMA2' = VM2 ;
    VRES . 12 . 'NRE3' = VR3 ;
    VRES . 12 . 'NCA3' = VC3 ;
    VRES . 12 . 'NHK3' = VH3 ;
    VRES . 12 . 'CL' = VCLA ;
    VRES . 12 . 'NCMP' = VNC2 ;
    VMSG = CHAI '<<< Cas' ' ' '12' ' ' 'sur' ' ' NTOT0 ' ' ':' ' ' 'desmorat' ' ' ':' ' ' 'niveau 1' ' ' VMOK2 ', niveau 2' ' ' VMOK3 ' ' '- ecart' ' ' VSE2 ', acceleration' ' ' VSS2 ' ' 'et' ' ' VSS3 ;
    MESS VMSG ;
    AVANCE VRES 12 NTOT0 'desmorat' NPASS 'termine' ;
    MENAGE 'OBLI' ;
FINSI ;

*
* ---------------------------------------------------------------------
* Procedure du cas 13 : betdynlmt (endommagement + dynamique, beton)
* Variables locales : le cas ne voit aucune variable des cas precedents
* ---------------------------------------------------------------------
DEBPROC VC13 VPSW*'LOGIQUE' VNIV*'ENTIER' VTFPR*'TABLE' VTCT*'TABLE' IECHO0*'ENTIER' ;
* ----- debut du cas betdynlmt

* fichier : betdynlmt.dgibi
************************************************************************
* Section : Mecanique Endommagement
* Section : Mecanique Plastique
************************************************************************
*** essai de traction uniaxiale


OPTI DIME 3 ELEM CUB8 ;

* Defintion du maillage *
* cube à 8 noeuds *

P1 = 0. 0.   0.  ;
P2 = 0. 1.   0.   ;
L1 = DROI 1 P1 P2 ;
COTEG = L1 TRAN (0. 0. 1) DINI 1. DFIN 1.;
GEOM = VOLU COTEG  TRAN (1. 0. 0.)  DINI 1. DFIN 1.;
COTED=FACE GEOM  2 ;

*** Modèle et matériau

MOD1= MODE GEOM MECANIQUE ELASTIQUE PLASTIQUE_ENDOM
         BETON_DYNAR_LMT ;
MAT1 = MATE MOD1 'YOUN' 57.e9 'NU' 0.2 'RHO' 2500
                 'F0' 0.3 'Q1' 1.5 'Q2' 0.8 'Q3' 1.0
                 'SGM0' 70.e6 'XN' 15 'NVP' 1.5
                 'MVP' 1.e-4 'K' 15 'MDT' 0.5e-4
                 'NDT' 3. 'AT' 30000 'BT' 1.6
                 'MDC' 0.5e-3 'NDC' 20 'AC' 3000
                 'BC' 4. 'ED0' 9.5e-5;


*** Conditions aux limites

CL1 = BLOQ P1 UZ UY;
CL2 = BLOQ L1 UZ ;
CL3 = BLOQ COTEG UX ;
CLDEPL = BLOQ COTED UX ;

CLTOT = CL1 et CL2 et CL3 et CLDEPL ;

*** chargement

FO1 = DEPI CLDEPL 1. ;
PROG1 = PROG 0.  20. ;
PROG2 = PROG 0. 2.e-4 ;
EVOL1  = EVOL MANU PROG1 PROG2 ;
LIST1 = PROG 0. PAS 1. 20. ;

CHAR1 = CHARGEMENT FO1 EVOL1 DIMP ;

*** préparation du pasapas

tab1 = TABLE ;
tab1 . PLASTIQUE = vrai ;
tab1 . MODELE = mod1 ;
tab1 . CARACTERISTIQUES=mat1 ;
tab1 . CHARGEMENT = char1 ;
tab1 . BLOCAGES_MECANIQUES = cltot ;
tab1 . TEMPS_CALCULES = list1 ;
tab1 . TEMPS_SAUVES = list1 ;
tab1 . DYNAMIQUE = vrai ;
tab1 . MOVA = 'D' ;
tab1 . HYPOTHESE_DEFORMATIONS = 'QUADRATIQUE' ;

tab1 . 'PERF_RAID' = VPSW ; tab1 . 'PERF_RAID_NIVEAU' = VNIV ; PASAPAS tab1 ; FPREC tab1 VTFPR ;

CONTR = tab1 . CONTRAINTES . 13 ;
SIXX1 = EXTR CONTR SMXX 1 1 1 ;
CONTR = tab1 . CONTRAINTES . 20 ;
SIXX2 = EXTR CONTR SMXX 1 1 1 ;

S1 = 3.43818E6 ;
S2 = 1.04167E6 ;

err1 = abs ((SIXX1 - S1)/S1 * 100) ;
err2 = abs ((SIXX2 - S2)/S2 * 100) ;

si ((err1 > .1) ou (err2 > .1));
 VTCT . 'N5' = (VTCT . 'N5') + 1 ;
finsi ;
* [valid] FIN final


* ----- fin du cas betdynlmt
FINPROC ;
*
* ---------------------------------------------------------------------
* Cas 13 : betdynlmt (endommagement + dynamique, beton)
* ---------------------------------------------------------------------
SI ((IDEB0 '<EG' 13) 'ET' (IFIN0 '>EG' 13) 'ET' ('NON' ('EXIS' TSKIP 13))) ;
    MENAGE 'OBLI' ;
    MESS ' ' ;
    VMSG = CHAI '>>> Cas' ' ' '13' ' ' 'sur' ' ' NTOT0 ' ' ':' ' ' 'betdynlmt' ' ' '(endommagement + dynamique, beton)' ;
    MESS VMSG ;
    NPASS = 2 ;
    SI IPASS3 ;
        NPASS = 3 ;
    FINSI ;
    VTH1 = 0 ;
    VTH2 = 0 ;
    VTH3 = 0 ;
    VNE51 = 0 ;
    VNE01 = 0 ;
    VNE52 = 0 ;
    VNE02 = 0 ;
    VNE53 = 0 ;
    VNE03 = 0 ;
    REPETER ZVRUN NPASS ;
* ordre des passes alterne d'un cas a l'autre (derive des temps en session)
        VIP = &ZVRUN ;
        VPSW = (VIP '>' 1) ;
        VNIV = 1 ;
        VMPS = 'inactif' ;
        SI (VIP 'EGA' 2) ;
            VMPS = 'actif niveau 1' ;
        FINSI ;
        SI (VIP 'EGA' 3) ;
            VNIV = 2 ;
            VMPS = 'actif niveau 2' ;
        FINSI ;
        AVANCE VRES 13 NTOT0 'betdynlmt' VIP 'en_cours' ;
        VMSG = CHAI '    passe' ' ' VIP ' ' 'sur' ' ' NPASS ' ' ': optimisations' ' ' VMPS ;
        MESS VMSG ;
        SI ITRACE0 ;
            OPTI 'IMPR' 'valid_trace.log' ;
        FINSI ;
        OPTI 'DIME' 3 'MODE' 'TRID' 'ELEM' 'CUB8' 'ECHO' IECHO0 ;
        VTHM = 0 ;
        REPETER ZVREP NREP0 ;
            VIR = &ZVREP ;
            VTFPR = TABL ;
            VTCT = TABL ;
            VTCT . 'N0' = 0 ;
            VTCT . 'N5' = 0 ;
            SI ITEMPS0 ;
                TEMP 'ZERO' ;
            FINSI ;
* Le cas s'execute dans une procedure (variables locales) : les variables
* d'un cas precedent ne peuvent pas masquer un mot-cle ou un operateur
            VC13 VPSW VNIV VTFPR VTCT IECHO0 ;
            VTHR = 0 ;
            SI ITEMPS0 ;
                VTHR = CHRONO ;
            FINSI ;
            SI (VIR 'EGA' 1) ;
                VTHM = VTHR ;
            SINON ;
                SI (VTHR '<' VTHM) ;
                    VTHM = VTHR ;
                FINSI ;
            FINSI ;
        FIN ZVREP ;
        VNER5 = VTCT . 'N5' ;
        VNER0 = VTCT . 'N0' ;
        SI (VIP 'EGA' 1) ;
            VTF1 = VTFPR ;
            VTH1 = VTHM ;
            VNE51 = VNER5 ;
            VNE01 = VNER0 ;
        FINSI ;
        SI (VIP 'EGA' 2) ;
            VTF2 = VTFPR ;
            VTH2 = VTHM ;
            VNE52 = VNER5 ;
            VNE02 = VNER0 ;
        FINSI ;
        SI (VIP 'EGA' 3) ;
            VTF3 = VTFPR ;
            VTH3 = VTHM ;
            VNE53 = VNER5 ;
            VNE03 = VNER0 ;
        FINSI ;
    FIN ZVRUN ;
*   comparaison des empreintes avec la passe 1
    VER2 VNL2 VNC2 = COMPAR VTF1 VTF2 ;
    VMOK2 = 'OK' ;
    SI ((VER2 '>' TOLV0) 'OU' (VNL2 '>' 0) 'OU' ('NON' (VNE52 'EGA' VNE51))) ;
        VMOK2 = 'ECART' ;
        VNBK2 = VNBK2 + 1 ;
    FINSI ;
    VER3 = 0. ;
    VNC3 = 0 ;
    VMOK3 = 'sans_objet' ;
    SI IPASS3 ;
        VER3 VNL3 VNC3 = COMPAR VTF1 VTF3 ;
        VMOK3 = 'OK' ;
        SI ((VER3 '>' TOLV3) 'OU' (VNL3 '>' 0) 'OU' ('NON' (VNE53 'EGA' VNE51))) ;
            VMOK3 = 'ECART' ;
            VNBK3 = VNBK3 + 1 ;
        FINSI ;
    FINSI ;
*   accelerations (temps de la passe 1 / temps de la passe)
    VSP2 = 0. ;
    VSP3 = 0. ;
    SI ((VTH1 '>' 0) 'ET' (VTH2 '>' 0)) ;
        VSP2 = (FLOT VTH1) '/' (FLOT VTH2) ;
    FINSI ;
    SI ((VTH1 '>' 0) 'ET' (VTH3 '>' 0)) ;
        VSP3 = (FLOT VTH1) '/' (FLOT VTH3) ;
    FINSI ;
    VSUM1 = VSUM1 + VTH1 ;
    VSUM2 = VSUM2 + VTH2 ;
    VSUM3 = VSUM3 + VTH3 ;
    VCLA = VTF2 . 'CL' ;
    VR2 = VTF2 . 'NRE' ;
    VC2 = VTF2 . 'NCA' ;
    VH2 = VTF2 . 'NHK' ;
    VM2 = VTF2 . 'NMA' ;
    VR3 = -1 ;
    VC3 = -1 ;
    VH3 = -1 ;
    VM3 = -1 ;
    SI IPASS3 ;
        VR3 = VTF3 . 'NRE' ;
        VC3 = VTF3 . 'NCA' ;
        VH3 = VTF3 . 'NHK' ;
        VM3 = VTF3 . 'NMA' ;
    FINSI ;
    VSE2 = CHAI 'FORMAT' '(1PE10.3)' VER2 ;
    VSE3 = CHAI 'FORMAT' '(1PE10.3)' VER3 ;
    VSS2 = CHAI 'FORMAT' '(F6.2)' VSP2 ;
    VSS3 = CHAI 'FORMAT' '(F6.2)' VSP3 ;
*   fichier de resultat du cas (SORT) et affichage console (MESS)
    OPTI 'SORT' 'valid_betdynlmt.log' ;
    VMSG = CHAI '=== Cas' ' ' '13' ' ' ':' ' ' 'betdynlmt' ' ' '(endommagement + dynamique, beton)' ' ' '===' ;
    MESS VMSG ;
    SORT 'CHAI' VMSG ;
    VMSG = CHAI 'Valeurs comparees :' ' ' VNC2 ;
    MESS VMSG ;
    SORT 'CHAI' VMSG ;
    VMSG = CHAI 'Temps horloge (ms) : origine' ' ' VTH1 ' ' '; niveau 1' ' ' VTH2 ' ' '; niveau 2' ' ' VTH3 ;
    MESS VMSG ;
    SORT 'CHAI' VMSG ;
    VMSG = CHAI 'Acceleration par rapport a l origine : niveau 1' ' ' VSS2 ' ' '; niveau 2' ' ' VSS3 ;
    MESS VMSG ;
    SORT 'CHAI' VMSG ;
    VMSG = CHAI 'Controles internes du cas : echecs origine' ' ' VNE51 ' ' '; niveau 1' ' ' VNE52 ' ' '; niveau 2' ' ' VNE53 ' ' '- reussites origine' ' ' VNE01 ' ' '; niveau 1' ' ' VNE02 ' ' '; niveau 2' ' ' VNE03 ;
    MESS VMSG ;
    SORT 'CHAI' VMSG ;
    VMSG = CHAI 'Classes exercees (1 MATVAR, 10 ENDOM, 20 VISCODOM, 100 GD) :' ' ' VCLA ;
    MESS VMSG ;
    SORT 'CHAI' VMSG ;
    VMSG = CHAI 'Niveau 1 : raideur reutilisee' ' ' VR2 ' ' 'fois, recalculee' ' ' VC2 ' ' 'fois ; HOOK evite' ' ' VH2 ' ' 'fois ; caracteristiques reutilisees' ' ' VM2 ' ' 'fois' ;
    MESS VMSG ;
    SORT 'CHAI' VMSG ;
    VMSG = CHAI 'Niveau 2 : raideur reutilisee' ' ' VR3 ' ' 'fois, recalculee' ' ' VC3 ' ' 'fois ; HOOK evite' ' ' VH3 ' ' 'fois ; caracteristiques reutilisees' ' ' VM3 ' ' 'fois' ;
    MESS VMSG ;
    SORT 'CHAI' VMSG ;
    VMSG = CHAI 'Ecart relatif maximal : niveau 1' ' ' VSE2 ' ' '; niveau 2' ' ' VSE3 ;
    MESS VMSG ;
    SORT 'CHAI' VMSG ;
    VMSG = CHAI 'RESULTAT : niveau 1' ' ' VMOK2 ' ' '; niveau 2' ' ' VMOK3 ;
    MESS VMSG ;
    SORT 'CHAI' VMSG ;
    SI (('EGA' VNC2 0) ) ;
        VMSG = CHAI 'ATTENTION : aucune valeur comparee (resultats non stockes ?)' ;
        MESS VMSG ;
        SORT 'CHAI' VMSG ;
    FINSI ;
    OPTI 'SORT' 'valid_inutile.tmp' ;
    VRES . 13 = TABL ;
    VRES . 13 . 'NOM' = 'betdynlmt' ;
    VRES . 13 . 'OKM' = VMOK2 ;
    VRES . 13 . 'OK3' = VMOK3 ;
    VRES . 13 . 'ERR2' = VER2 ;
    VRES . 13 . 'ERR3' = VER3 ;
    VRES . 13 . 'TH1' = VTH1 ;
    VRES . 13 . 'TH2' = VTH2 ;
    VRES . 13 . 'TH3' = VTH3 ;
    VRES . 13 . 'SP2F' = VSP2 ;
    VRES . 13 . 'SP3F' = VSP3 ;
    VRES . 13 . 'NRE2' = VR2 ;
    VRES . 13 . 'NCA2' = VC2 ;
    VRES . 13 . 'NHK2' = VH2 ;
    VRES . 13 . 'NMA2' = VM2 ;
    VRES . 13 . 'NRE3' = VR3 ;
    VRES . 13 . 'NCA3' = VC3 ;
    VRES . 13 . 'NHK3' = VH3 ;
    VRES . 13 . 'CL' = VCLA ;
    VRES . 13 . 'NCMP' = VNC2 ;
    VMSG = CHAI '<<< Cas' ' ' '13' ' ' 'sur' ' ' NTOT0 ' ' ':' ' ' 'betdynlmt' ' ' ':' ' ' 'niveau 1' ' ' VMOK2 ', niveau 2' ' ' VMOK3 ' ' '- ecart' ' ' VSE2 ', acceleration' ' ' VSS2 ' ' 'et' ' ' VSS3 ;
    MESS VMSG ;
    AVANCE VRES 13 NTOT0 'betdynlmt' NPASS 'termine' ;
    MENAGE 'OBLI' ;
FINSI ;

*
* ---------------------------------------------------------------------
* Procedure du cas 14 : ricbet_uni_1 (beton arme, endommagement (structure))
* Variables locales : le cas ne voit aucune variable des cas precedents
* ---------------------------------------------------------------------
DEBPROC VC14 VPSW*'LOGIQUE' VNIV*'ENTIER' VTFPR*'TABLE' VTCT*'TABLE' IECHO0*'ENTIER' ;
* ----- debut du cas ricbet_uni_1

* fichier : ricbet_uni_1.dgibi
************************************************************************
* Section : Mecanique Endommagement
************************************************************************
******************************************************
* DESCRIPTION
******************************************************
* Local test - Multifiber analysis
*
* Loading path considered:
*
* - 1 : Monotonic tension test
* - 2 : Monotonic compression test
* - 3 : Cyclic tension test
* - 4 : Cyclic compression test
* - 5 : Cyclic tension/compression test
* - 6 : Tension/compression/tension test
*
*
******************************************************
* AUTHOR
******************************************************
* Developped by : Benjamin RICHARD
*                 CEA-DEN/DANS/DM2S/SEMT/EMSI
*                 Benjamin.Richard@cea.fr
******************************************************
graph = 'N';
******************************************************
* Type of loading
ncas  = 1;
******************************************************

******************************************************
* OPTIONS
******************************************************
OPTION DIME 2 ELEM QUA4;

* Number of element------------------------------------
nelem = 10;

* Concrete parameters----------------------------------

* Young
ESSS= 28000E6;

* Poisson ratio
nun = 0.20;

* Tension strength
C1  = 2.1E+6;

* Brittleness in tension
C2  = 9.0E-3;

* Kinematic hardening coefficient 1
C3  = 3.0E+9;

* Kinematic hardening coefficient 2
C4  = 8.0e-6;

* Closure stress
C5  = -3.0e6;

* Resistance en compession
C6  = 10.0e6;

* XXX (unused)
C7  = 1.0;

* XXX (unused)
C8  = 1.0;

* Yield surface 1
C9  = 4.0e10;

* Yield surface 2
C10  = 600.0;

* Parameter that can be implemented in ESOPE
* (not subjected to high variations)
C11  = -6.0e6;

******************************************************
* GEOMETRICAL PARAMETERS
******************************************************
SACIER1 = 0. 0.;
SACIER2 = 1. 0.;
SACIER3 = 1. 1.;
SACIER4 = 0. 1.;

LL1 = D 1 SACIER1 SACIER2;
LL2 = D 1 SACIER2 SACIER3;
LL3 = D 1 SACIER3 SACIER4;
LL4 = D 1 SACIER4 SACIER1;

SACIER  = DALL LL1 LL2 LL3 LL4;

******************************************************
* MODEL
******************************************************
OPTI DIME 3 ELEM SEG2;

*mo1 = mode sacier mecanique elastique quas;

*ma1 = MATE mo1 YOUN ESSS NU nun;

mo1 = mode sacier mecanique elastique plastique RICBET_UNI
      quas;

ma1 = MATE mo1 YOUN ESSS NU nun
'FT  ' C1  'ALDI' C2  'GAM1' C3
'A1  ' C4  'SIGF' C5  'FC  ' C6
'AF  ' C7  'AG  ' C8  'AC  ' C9
'BC  ' C10 'SIGU' C11 'HYST'  1;

car1 = CARA mo1 ALPY .66 ALPZ .66;

modstot = mo1;
matstot = ma1 et car1;

******************************************************
* BEAM ELEMENT
******************************************************
OPTI ELEM SEG2;

P1 = 0. 0. 0.;
P2 = 0. 0. 1.;

Lpoutre = d nelem P1 P2;

modpout = MODE Lpoutre MECANIQUE ELASTIQUE SECTION
               PLASTIQUE SECTION TIMO;
matpout = MATE modpout MODS modsTOT MATS matsTOT
               VECT (0 1 0);

******************************************************
* BOUNDARY CONDITIONS
******************************************************
con1 = BLOQ DEPL ROTA         P1;
con3 = BLOQ UZ                P2;
con2 = BLOQ UX UY RX RY RZ P2 ;

******************************************************
* LOADING CASES
******************************************************
fo1  = depi con3 1.0;

SI (EGA ncas 1) ;
LI1  = PROG 0. 1.;
LI2  = PROG 0. 1.0e-3;
LIS1 = PROG 0. PAS 0.02 1.;
FINSI;

SI (EGA ncas 2) ;
LI1  = PROG 0.  1.;
LI2  = PROG 0. -5.0e-3;
LIS1 = PROG 0. PAS 0.02 1;
FINSI;

SI (EGA ncas 3) ;
LI1  = PROG 0. 1. 2. 3. 4. 5.;
LI2  = PROG 0. 1.5e-4 9.5e-6 2.0E-4 3.0E-5 10E-4;
LIS1 = PROG 0. PAS 0.02 5.;
FINSI;

SI (EGA ncas 4) ;
LI1  = PROG 0. 1. 2. 3. 4. 5.;
LI2  = PROG 0. -3.0e-3 1.5e-4 -5.0E-3 -3.5E-4 -8.0E-3;
LIS1 = PROG 0. PAS 0.02 5.;
FINSI;

SI (EGA ncas 5) ;
LI1  = PROG 0. 1. 2. 3. 4. 5.;
LI2  = PROG 0. 3.e-4 -3.0e-4 5.0E-4 -1.5E-4 1.0E-3;
LIS1 = PROG 0. PAS 0.02 5;
FINSI;

SI (EGA ncas 6) ;
LI1  = PROG 0. 1. 2. 3. 4. 5.;
LI2  = PROG 0. 3.e-4 -1.e-5 5.0E-4 -5E-3 -3.0E-3;
LIS1 = PROG 0. PAS 0.02 5;
FINSI;

ev1  = evol manu li1 li2;
cha1 = char dimp fo1 ev1;

******************************************************
* SOLVING PROCEDURE
******************************************************
TAB1 = TABLE;
TAB1 . BLOCAGES_MECANIQUES = con1 et con3 et con2;
TAB1 . MODELE              = modpout;
TAB1 . CARACTERISTIQUES    = matpout;
TAB1 . CHARGEMENT          = cha1;
TAB1 . TEMPS_CALCULES      = lis1;
TAB1 . MAXDEFOR            = 1.E-5;
TAB1 . MOVA                = RIEN;

TAB1 . 'PERF_RAID' = VPSW ; TAB1 . 'PERF_RAID_NIVEAU' = VNIV ; PASAPAS TAB1 ; FPREC TAB1 VTFPR ;

******************************************************
* POST PROCESSING
******************************************************
dep0 = TAB1.'DEPLACEMENTS';
tim0 = tab1. TEMPS;
sig0 = TAB1.'CONTRAINTES';
var0 = TAB1.'VARIABLES_INTERNES';
ind0 = INDE dep0;
time = PROG (tim0 . 0);

uzp0  = PROG 0.;
fzp0  = PROG 0.;

ep1 = prog 0.;
si1 = prog 0.;
nn = (('DIME' ind0) - 1);

j = 1;
REPE lab1 (('DIME' ind0) - 1);
  j = j + 1;
  indj  = ind0.j;
  depj  = dep0.indj;
  sigj  = sig0.indj;
  epsj  = epsi depj modpout matpout;
  vecj  = bsigma sigj modpout matpout;
  time  = time et (prog tim0. &lab1);
  uzp0  = uzp0 ET (PROG (EXTR depj 'UZ' P2));
  fzp0  = fzp0 ET (PROG (EXTR vecj 'FZ' P2));
FIN lab1;

si (ega graph 'O');
evuzfz = evol manu uzp0 (fzp0);
list evuzfz;
dess evuzfz;
finsi;

aa = (EXTR vecj 'FZ' P2);

message 'erreur relative';
err = (aa - 3.46710E+05) / 3.46710E+05;
list err;

si (> err 1E-3);
erreur(5);
finsi;
* [valid] FIN final


* ----- fin du cas ricbet_uni_1
FINPROC ;
*
* ---------------------------------------------------------------------
* Cas 14 : ricbet_uni_1 (beton arme, endommagement (structure))
* ---------------------------------------------------------------------
SI ((IDEB0 '<EG' 14) 'ET' (IFIN0 '>EG' 14) 'ET' ('NON' ('EXIS' TSKIP 14))) ;
    MENAGE 'OBLI' ;
    MESS ' ' ;
    VMSG = CHAI '>>> Cas' ' ' '14' ' ' 'sur' ' ' NTOT0 ' ' ':' ' ' 'ricbet_uni_1' ' ' '(beton arme, endommagement (structure))' ;
    MESS VMSG ;
    NPASS = 2 ;
    SI IPASS3 ;
        NPASS = 3 ;
    FINSI ;
    VTH1 = 0 ;
    VTH2 = 0 ;
    VTH3 = 0 ;
    VNE51 = 0 ;
    VNE01 = 0 ;
    VNE52 = 0 ;
    VNE02 = 0 ;
    VNE53 = 0 ;
    VNE03 = 0 ;
    REPETER ZVRUN NPASS ;
* ordre des passes alterne d'un cas a l'autre (derive des temps en session)
        VIP = NPASS + 1 - &ZVRUN ;
        VPSW = (VIP '>' 1) ;
        VNIV = 1 ;
        VMPS = 'inactif' ;
        SI (VIP 'EGA' 2) ;
            VMPS = 'actif niveau 1' ;
        FINSI ;
        SI (VIP 'EGA' 3) ;
            VNIV = 2 ;
            VMPS = 'actif niveau 2' ;
        FINSI ;
        AVANCE VRES 14 NTOT0 'ricbet_uni_1' VIP 'en_cours' ;
        VMSG = CHAI '    passe' ' ' VIP ' ' 'sur' ' ' NPASS ' ' ': optimisations' ' ' VMPS ;
        MESS VMSG ;
        SI ITRACE0 ;
            OPTI 'IMPR' 'valid_trace.log' ;
        FINSI ;
        OPTI 'DIME' 3 'MODE' 'TRID' 'ELEM' 'CUB8' 'ECHO' IECHO0 ;
        VTHM = 0 ;
        REPETER ZVREP NREP0 ;
            VIR = &ZVREP ;
            VTFPR = TABL ;
            VTCT = TABL ;
            VTCT . 'N0' = 0 ;
            VTCT . 'N5' = 0 ;
            SI ITEMPS0 ;
                TEMP 'ZERO' ;
            FINSI ;
* Le cas s'execute dans une procedure (variables locales) : les variables
* d'un cas precedent ne peuvent pas masquer un mot-cle ou un operateur
            VC14 VPSW VNIV VTFPR VTCT IECHO0 ;
            VTHR = 0 ;
            SI ITEMPS0 ;
                VTHR = CHRONO ;
            FINSI ;
            SI (VIR 'EGA' 1) ;
                VTHM = VTHR ;
            SINON ;
                SI (VTHR '<' VTHM) ;
                    VTHM = VTHR ;
                FINSI ;
            FINSI ;
        FIN ZVREP ;
        VNER5 = VTCT . 'N5' ;
        VNER0 = VTCT . 'N0' ;
        SI (VIP 'EGA' 1) ;
            VTF1 = VTFPR ;
            VTH1 = VTHM ;
            VNE51 = VNER5 ;
            VNE01 = VNER0 ;
        FINSI ;
        SI (VIP 'EGA' 2) ;
            VTF2 = VTFPR ;
            VTH2 = VTHM ;
            VNE52 = VNER5 ;
            VNE02 = VNER0 ;
        FINSI ;
        SI (VIP 'EGA' 3) ;
            VTF3 = VTFPR ;
            VTH3 = VTHM ;
            VNE53 = VNER5 ;
            VNE03 = VNER0 ;
        FINSI ;
    FIN ZVRUN ;
*   comparaison des empreintes avec la passe 1
    VER2 VNL2 VNC2 = COMPAR VTF1 VTF2 ;
    VMOK2 = 'OK' ;
    SI ((VER2 '>' TOLV0) 'OU' (VNL2 '>' 0) 'OU' ('NON' (VNE52 'EGA' VNE51))) ;
        VMOK2 = 'ECART' ;
        VNBK2 = VNBK2 + 1 ;
    FINSI ;
    VER3 = 0. ;
    VNC3 = 0 ;
    VMOK3 = 'sans_objet' ;
    SI IPASS3 ;
        VER3 VNL3 VNC3 = COMPAR VTF1 VTF3 ;
        VMOK3 = 'OK' ;
        SI ((VER3 '>' TOLV3) 'OU' (VNL3 '>' 0) 'OU' ('NON' (VNE53 'EGA' VNE51))) ;
            VMOK3 = 'ECART' ;
            VNBK3 = VNBK3 + 1 ;
        FINSI ;
    FINSI ;
*   accelerations (temps de la passe 1 / temps de la passe)
    VSP2 = 0. ;
    VSP3 = 0. ;
    SI ((VTH1 '>' 0) 'ET' (VTH2 '>' 0)) ;
        VSP2 = (FLOT VTH1) '/' (FLOT VTH2) ;
    FINSI ;
    SI ((VTH1 '>' 0) 'ET' (VTH3 '>' 0)) ;
        VSP3 = (FLOT VTH1) '/' (FLOT VTH3) ;
    FINSI ;
    VSUM1 = VSUM1 + VTH1 ;
    VSUM2 = VSUM2 + VTH2 ;
    VSUM3 = VSUM3 + VTH3 ;
    VCLA = VTF2 . 'CL' ;
    VR2 = VTF2 . 'NRE' ;
    VC2 = VTF2 . 'NCA' ;
    VH2 = VTF2 . 'NHK' ;
    VM2 = VTF2 . 'NMA' ;
    VR3 = -1 ;
    VC3 = -1 ;
    VH3 = -1 ;
    VM3 = -1 ;
    SI IPASS3 ;
        VR3 = VTF3 . 'NRE' ;
        VC3 = VTF3 . 'NCA' ;
        VH3 = VTF3 . 'NHK' ;
        VM3 = VTF3 . 'NMA' ;
    FINSI ;
    VSE2 = CHAI 'FORMAT' '(1PE10.3)' VER2 ;
    VSE3 = CHAI 'FORMAT' '(1PE10.3)' VER3 ;
    VSS2 = CHAI 'FORMAT' '(F6.2)' VSP2 ;
    VSS3 = CHAI 'FORMAT' '(F6.2)' VSP3 ;
*   fichier de resultat du cas (SORT) et affichage console (MESS)
    OPTI 'SORT' 'valid_ricbet_uni_1.log' ;
    VMSG = CHAI '=== Cas' ' ' '14' ' ' ':' ' ' 'ricbet_uni_1' ' ' '(beton arme, endommagement (structure))' ' ' '===' ;
    MESS VMSG ;
    SORT 'CHAI' VMSG ;
    VMSG = CHAI 'Valeurs comparees :' ' ' VNC2 ;
    MESS VMSG ;
    SORT 'CHAI' VMSG ;
    VMSG = CHAI 'Temps horloge (ms) : origine' ' ' VTH1 ' ' '; niveau 1' ' ' VTH2 ' ' '; niveau 2' ' ' VTH3 ;
    MESS VMSG ;
    SORT 'CHAI' VMSG ;
    VMSG = CHAI 'Acceleration par rapport a l origine : niveau 1' ' ' VSS2 ' ' '; niveau 2' ' ' VSS3 ;
    MESS VMSG ;
    SORT 'CHAI' VMSG ;
    VMSG = CHAI 'Controles internes du cas : echecs origine' ' ' VNE51 ' ' '; niveau 1' ' ' VNE52 ' ' '; niveau 2' ' ' VNE53 ' ' '- reussites origine' ' ' VNE01 ' ' '; niveau 1' ' ' VNE02 ' ' '; niveau 2' ' ' VNE03 ;
    MESS VMSG ;
    SORT 'CHAI' VMSG ;
    VMSG = CHAI 'Classes exercees (1 MATVAR, 10 ENDOM, 20 VISCODOM, 100 GD) :' ' ' VCLA ;
    MESS VMSG ;
    SORT 'CHAI' VMSG ;
    VMSG = CHAI 'Niveau 1 : raideur reutilisee' ' ' VR2 ' ' 'fois, recalculee' ' ' VC2 ' ' 'fois ; HOOK evite' ' ' VH2 ' ' 'fois ; caracteristiques reutilisees' ' ' VM2 ' ' 'fois' ;
    MESS VMSG ;
    SORT 'CHAI' VMSG ;
    VMSG = CHAI 'Niveau 2 : raideur reutilisee' ' ' VR3 ' ' 'fois, recalculee' ' ' VC3 ' ' 'fois ; HOOK evite' ' ' VH3 ' ' 'fois ; caracteristiques reutilisees' ' ' VM3 ' ' 'fois' ;
    MESS VMSG ;
    SORT 'CHAI' VMSG ;
    VMSG = CHAI 'Ecart relatif maximal : niveau 1' ' ' VSE2 ' ' '; niveau 2' ' ' VSE3 ;
    MESS VMSG ;
    SORT 'CHAI' VMSG ;
    VMSG = CHAI 'RESULTAT : niveau 1' ' ' VMOK2 ' ' '; niveau 2' ' ' VMOK3 ;
    MESS VMSG ;
    SORT 'CHAI' VMSG ;
    SI (('EGA' VNC2 0) ) ;
        VMSG = CHAI 'ATTENTION : aucune valeur comparee (resultats non stockes ?)' ;
        MESS VMSG ;
        SORT 'CHAI' VMSG ;
    FINSI ;
    OPTI 'SORT' 'valid_inutile.tmp' ;
    VRES . 14 = TABL ;
    VRES . 14 . 'NOM' = 'ricbet_uni_1' ;
    VRES . 14 . 'OKM' = VMOK2 ;
    VRES . 14 . 'OK3' = VMOK3 ;
    VRES . 14 . 'ERR2' = VER2 ;
    VRES . 14 . 'ERR3' = VER3 ;
    VRES . 14 . 'TH1' = VTH1 ;
    VRES . 14 . 'TH2' = VTH2 ;
    VRES . 14 . 'TH3' = VTH3 ;
    VRES . 14 . 'SP2F' = VSP2 ;
    VRES . 14 . 'SP3F' = VSP3 ;
    VRES . 14 . 'NRE2' = VR2 ;
    VRES . 14 . 'NCA2' = VC2 ;
    VRES . 14 . 'NHK2' = VH2 ;
    VRES . 14 . 'NMA2' = VM2 ;
    VRES . 14 . 'NRE3' = VR3 ;
    VRES . 14 . 'NCA3' = VC3 ;
    VRES . 14 . 'NHK3' = VH3 ;
    VRES . 14 . 'CL' = VCLA ;
    VRES . 14 . 'NCMP' = VNC2 ;
    VMSG = CHAI '<<< Cas' ' ' '14' ' ' 'sur' ' ' NTOT0 ' ' ':' ' ' 'ricbet_uni_1' ' ' ':' ' ' 'niveau 1' ' ' VMOK2 ', niveau 2' ' ' VMOK3 ' ' '- ecart' ' ' VSE2 ', acceleration' ' ' VSS2 ' ' 'et' ' ' VSS3 ;
    MESS VMSG ;
    AVANCE VRES 14 NTOT0 'ricbet_uni_1' NPASS 'termine' ;
    MENAGE 'OBLI' ;
FINSI ;

*
* ---------------------------------------------------------------------
* Procedure du cas 15 : FissVoil (endommagement, voile (structure))
* Variables locales : le cas ne voit aucune variable des cas precedents
* ---------------------------------------------------------------------
DEBPROC VC15 VPSW*'LOGIQUE' VNIV*'ENTIER' VTFPR*'TABLE' VTCT*'TABLE' IECHO0*'ENTIER' ;
* ----- debut du cas FissVoil

* fichier : FissVoil.dgibi
**********************************
*Section: Mecanique Nonlineaire  *
*Section: Mecanique Transitoire  *
**********************************
graph = faux ;
*
* CAS TEST DU 13/11/14     PROVENANCE : TEST
SAUT PAGE;
*
*******************************************************
*                                                     *
*  TEST PROCEDURE OUVCOR POUR UN PANEL EN CISSAILEMENT*
*  4. * 1. * 0.2                                      *
*                                                     *
*                                                     *
*  Le maillage est en 3D a l'aide d'elements          *
*  massif CUB8. L'acier est maille a l'aide d'elements*
*  barre.                                             *
*                                                     *
*******************************************************


*******************************************************
* MAILLAGE
*******************************************************
opti dime 3 ;
opti elem cub8 ;


dfi = 0.15 ;

P1 = 0. 0. 0 ;
P2 = 4. 0. 0 ;

DT = DROI P1 P2 dini dfi dfin dfi ;

SM = DT TRANS (0 1. 0) dini dfi dfin dfi ;
DT = SM COTE 3 ;

VT = VOLU SM TRANS (0 0 0.2) dini dfi dfin dfi ;

elim 1.e-4 VT ;
***
*** definition des renforcements dans la pertie centrale
** barre verticale
PA1 = 2. 0.05 0.05 ;
PA2 = PA1 PLUS (0 (1. - 0.05) 0) ;

DV = DROI PA1 PA2 dini dfi dfin dfi ;

** barres horizontales

P1 = 0.05 0.5 0.055 ;
P2 = P1 PLUS ((4. - 0.05) 0 0) ;

DH = DROI P1 P2 dini dfi dfin dfi ;

STRUCT = vt et dv et dh ;

MODB = MODE VT MECANIQUE ELASTIQUE ISOTROPE
                 ENDOMMAGEMENT DAMAGE_TC ;

* aciers

MODA = MODE (DH ET DV) MECANIQUE ELASTIQUE ISOTROPE
                PLASTIQUE ISOTROPE BARR ;

*
MODTOT = MODB et MODA;

* propriÃ©tÃ©s mÃ©caniques

 yg = 22.e9 ;
 nub = 0.19 ;
 rhom = 2410 ;
 Gvalm = 300. ;
 ftulm = 3.3e6 ;
 redcm = 1.7e6 ;
 fc01m = -25.e6 ;
 rt45m = 1.18 ;
 fcu1m = -42.5e6 ;
 extum = -0.015;
 strpm = -22.e6 ;
 extpm = -0.001 ;
 ext1m = -0.006 ;
 str1m = -35.e6 ;
 ext2m = -0.008 ;
 str2m = -22.e6 ;
ncrim = 1 ;

jaco1 = jaco modb ;
jaco2 = chan 'RIGIDITE' modb jaco1 ;
hlenm = jaco2**(1./3.) ;

matb = mate modb  YOUN  yg NU nub RHO rhom HLEN hlenm
                   GVAL Gvalm FTUL ftulm REDC redcm FC01 fc01m
                   RT45 rt45m FCU1 fcu1m STRU extum EXTP extpm
                   STRP strpm EXT1 ext1m STR1 str1m EXT2 ext2m
                   STR2 str2m NCRI ncrim ;

* aciers renforcement

EA = 189274e6 ;
NUA = 0.3 ;

fe=554.e6;
ETa=3245.e6;

epsel  = fe/Ea;
epsfin = 2.7e-2 .;
leps   = prog 0. epsel epsfin;
sigfin = fe + (eta*(epsfin - epsel));
lsig   = prog 0. fe sigfin;
evsig  = evol manu leps lsig;
lsig   =  lsig enle 1 ;
leps   =  (leps enle 1) - (lsig / ea) ;
evecr  =  evol vert manu eps leps sig lsig ;
si graph ;
  dess (evsig et evecr) titr 'Courbes de traction et d ecrouissage (vert)' ;
fins ;


MATA = MATE MODA YOUN EA NU NUA RHO 7850
                   ECRO evecr SECT 7.85e-5  ;


*
MATOT = MATB et MATA;

*******************************************************
* CONDITIONS AUX LIMITES
*******************************************************
p1 = vt poin proc (0 0 0);
p2 = vt poin proc (1 0 0);
p3 = vt poin proc (1 0 1);
sb = vt poin plan p1 p2 p3 1e-4;

p1 = vt poin proc (p1 plus (0 1 0));
p2 = vt poin proc (p2 plus (0 1 0));
p3 = vt poin proc (p3 plus (0 1 0));
sh = vt poin plan p1 p2 p3 1e-4;

pp1 = vt poin proc (0 0 0);
pp2 = vt poin proc (1 0 0);
pp3 = vt poin proc (0 4 0);
ss = vt poin plan pp1 pp2 pp3 1e-4;

cl1 = BLOQ sh ux;
cl2 = BLOQ sb ux uy;
cl3 = BLOQ sh uy ;
cl4 = BLOQ ss uz ;
cl5 = RELA ACCRO (DV ET DH) VT  1.e-4 ;


cltot = cl1 et cl2 et cl3 et cl4 et cl5;


* chargement en dÃ©placement

FO1 = DEPI cl1 (1) ;

list1 = prog 0 1;
list2 = prog 0 1.5e-3 ;

evol1 = evol manu list1 list2 ;

char1= CHAR MECA FO1 evol1;

*******************************************************
* RESOLUTION : PASAPAS
*******************************************************

listt = prog 0 pas 0.05 1 ;

tab1 = TABLE;

tab1 . MODELE = modtot ;

tab1 . CARACTERISTIQUES = matot ;

tab1 . CHARGEMENT = char1 ;

tab1 . BLOCAGES_MECANIQUES = cltot ;

tab1 . TEMPS_CALCULES = listt ;

tab1 . MOVA = 'RIEN' ;


tab1 . 'PERF_RAID' = VPSW ; tab1 . 'PERF_RAID_NIVEAU' = VNIV ; PASAPAS tab1 ; FPREC tab1 VTFPR ;

*******************************************************
* POST-TRAITEMENT AVEC OUVCOR
*******************************************************

* initou
tab1.geo = vt;
tab1.poi = vt poin proc (0. 0. 0.);
tab1.hor = vrai;
tab1.pla = 'XY';
tab1.pas = 20;
tab1.lh = 2.;
tab1.lb = 0.;
tab1.lg = 0.;
tab1.ld = 4.;
tab1.crito = 1.e-9;
tab1.critp = 1.e-5;

initou tab1;


* zonfis
tab1.droi = faux;
hau = 2.;
bas = 0.;
nha = 4;
nba = 2;
pha = 1;
pba = 1;
gau = -0.05;
dro = 0.05;
alpha = 0.;
zonfis tab1 pha pba nha nba hau bas gau dro alpha;


* postou
dist = 0.03;
tab1.critt = 0.5;
*postou tab1 dist;
* [valid] FIN final


* ----- fin du cas FissVoil
FINPROC ;
*
* ---------------------------------------------------------------------
* Cas 15 : FissVoil (endommagement, voile (structure))
* ---------------------------------------------------------------------
SI ((IDEB0 '<EG' 15) 'ET' (IFIN0 '>EG' 15) 'ET' ('NON' ('EXIS' TSKIP 15))) ;
    MENAGE 'OBLI' ;
    MESS ' ' ;
    VMSG = CHAI '>>> Cas' ' ' '15' ' ' 'sur' ' ' NTOT0 ' ' ':' ' ' 'FissVoil' ' ' '(endommagement, voile (structure))' ;
    MESS VMSG ;
    NPASS = 2 ;
    SI IPASS3 ;
        NPASS = 3 ;
    FINSI ;
    VTH1 = 0 ;
    VTH2 = 0 ;
    VTH3 = 0 ;
    VNE51 = 0 ;
    VNE01 = 0 ;
    VNE52 = 0 ;
    VNE02 = 0 ;
    VNE53 = 0 ;
    VNE03 = 0 ;
    REPETER ZVRUN NPASS ;
* ordre des passes alterne d'un cas a l'autre (derive des temps en session)
        VIP = &ZVRUN ;
        VPSW = (VIP '>' 1) ;
        VNIV = 1 ;
        VMPS = 'inactif' ;
        SI (VIP 'EGA' 2) ;
            VMPS = 'actif niveau 1' ;
        FINSI ;
        SI (VIP 'EGA' 3) ;
            VNIV = 2 ;
            VMPS = 'actif niveau 2' ;
        FINSI ;
        AVANCE VRES 15 NTOT0 'FissVoil' VIP 'en_cours' ;
        VMSG = CHAI '    passe' ' ' VIP ' ' 'sur' ' ' NPASS ' ' ': optimisations' ' ' VMPS ;
        MESS VMSG ;
        SI ITRACE0 ;
            OPTI 'IMPR' 'valid_trace.log' ;
        FINSI ;
        OPTI 'DIME' 3 'MODE' 'TRID' 'ELEM' 'CUB8' 'ECHO' IECHO0 ;
        VTHM = 0 ;
        REPETER ZVREP NREP0 ;
            VIR = &ZVREP ;
            VTFPR = TABL ;
            VTCT = TABL ;
            VTCT . 'N0' = 0 ;
            VTCT . 'N5' = 0 ;
            SI ITEMPS0 ;
                TEMP 'ZERO' ;
            FINSI ;
* Le cas s'execute dans une procedure (variables locales) : les variables
* d'un cas precedent ne peuvent pas masquer un mot-cle ou un operateur
            VC15 VPSW VNIV VTFPR VTCT IECHO0 ;
            VTHR = 0 ;
            SI ITEMPS0 ;
                VTHR = CHRONO ;
            FINSI ;
            SI (VIR 'EGA' 1) ;
                VTHM = VTHR ;
            SINON ;
                SI (VTHR '<' VTHM) ;
                    VTHM = VTHR ;
                FINSI ;
            FINSI ;
        FIN ZVREP ;
        VNER5 = VTCT . 'N5' ;
        VNER0 = VTCT . 'N0' ;
        SI (VIP 'EGA' 1) ;
            VTF1 = VTFPR ;
            VTH1 = VTHM ;
            VNE51 = VNER5 ;
            VNE01 = VNER0 ;
        FINSI ;
        SI (VIP 'EGA' 2) ;
            VTF2 = VTFPR ;
            VTH2 = VTHM ;
            VNE52 = VNER5 ;
            VNE02 = VNER0 ;
        FINSI ;
        SI (VIP 'EGA' 3) ;
            VTF3 = VTFPR ;
            VTH3 = VTHM ;
            VNE53 = VNER5 ;
            VNE03 = VNER0 ;
        FINSI ;
    FIN ZVRUN ;
*   comparaison des empreintes avec la passe 1
    VER2 VNL2 VNC2 = COMPAR VTF1 VTF2 ;
    VMOK2 = 'OK' ;
    SI ((VER2 '>' TOLV0) 'OU' (VNL2 '>' 0) 'OU' ('NON' (VNE52 'EGA' VNE51))) ;
        VMOK2 = 'ECART' ;
        VNBK2 = VNBK2 + 1 ;
    FINSI ;
    VER3 = 0. ;
    VNC3 = 0 ;
    VMOK3 = 'sans_objet' ;
    SI IPASS3 ;
        VER3 VNL3 VNC3 = COMPAR VTF1 VTF3 ;
        VMOK3 = 'OK' ;
        SI ((VER3 '>' TOLV3) 'OU' (VNL3 '>' 0) 'OU' ('NON' (VNE53 'EGA' VNE51))) ;
            VMOK3 = 'ECART' ;
            VNBK3 = VNBK3 + 1 ;
        FINSI ;
    FINSI ;
*   accelerations (temps de la passe 1 / temps de la passe)
    VSP2 = 0. ;
    VSP3 = 0. ;
    SI ((VTH1 '>' 0) 'ET' (VTH2 '>' 0)) ;
        VSP2 = (FLOT VTH1) '/' (FLOT VTH2) ;
    FINSI ;
    SI ((VTH1 '>' 0) 'ET' (VTH3 '>' 0)) ;
        VSP3 = (FLOT VTH1) '/' (FLOT VTH3) ;
    FINSI ;
    VSUM1 = VSUM1 + VTH1 ;
    VSUM2 = VSUM2 + VTH2 ;
    VSUM3 = VSUM3 + VTH3 ;
    VCLA = VTF2 . 'CL' ;
    VR2 = VTF2 . 'NRE' ;
    VC2 = VTF2 . 'NCA' ;
    VH2 = VTF2 . 'NHK' ;
    VM2 = VTF2 . 'NMA' ;
    VR3 = -1 ;
    VC3 = -1 ;
    VH3 = -1 ;
    VM3 = -1 ;
    SI IPASS3 ;
        VR3 = VTF3 . 'NRE' ;
        VC3 = VTF3 . 'NCA' ;
        VH3 = VTF3 . 'NHK' ;
        VM3 = VTF3 . 'NMA' ;
    FINSI ;
    VSE2 = CHAI 'FORMAT' '(1PE10.3)' VER2 ;
    VSE3 = CHAI 'FORMAT' '(1PE10.3)' VER3 ;
    VSS2 = CHAI 'FORMAT' '(F6.2)' VSP2 ;
    VSS3 = CHAI 'FORMAT' '(F6.2)' VSP3 ;
*   fichier de resultat du cas (SORT) et affichage console (MESS)
    OPTI 'SORT' 'valid_FissVoil.log' ;
    VMSG = CHAI '=== Cas' ' ' '15' ' ' ':' ' ' 'FissVoil' ' ' '(endommagement, voile (structure))' ' ' '===' ;
    MESS VMSG ;
    SORT 'CHAI' VMSG ;
    VMSG = CHAI 'Valeurs comparees :' ' ' VNC2 ;
    MESS VMSG ;
    SORT 'CHAI' VMSG ;
    VMSG = CHAI 'Temps horloge (ms) : origine' ' ' VTH1 ' ' '; niveau 1' ' ' VTH2 ' ' '; niveau 2' ' ' VTH3 ;
    MESS VMSG ;
    SORT 'CHAI' VMSG ;
    VMSG = CHAI 'Acceleration par rapport a l origine : niveau 1' ' ' VSS2 ' ' '; niveau 2' ' ' VSS3 ;
    MESS VMSG ;
    SORT 'CHAI' VMSG ;
    VMSG = CHAI 'Controles internes du cas : echecs origine' ' ' VNE51 ' ' '; niveau 1' ' ' VNE52 ' ' '; niveau 2' ' ' VNE53 ' ' '- reussites origine' ' ' VNE01 ' ' '; niveau 1' ' ' VNE02 ' ' '; niveau 2' ' ' VNE03 ;
    MESS VMSG ;
    SORT 'CHAI' VMSG ;
    VMSG = CHAI 'Classes exercees (1 MATVAR, 10 ENDOM, 20 VISCODOM, 100 GD) :' ' ' VCLA ;
    MESS VMSG ;
    SORT 'CHAI' VMSG ;
    VMSG = CHAI 'Niveau 1 : raideur reutilisee' ' ' VR2 ' ' 'fois, recalculee' ' ' VC2 ' ' 'fois ; HOOK evite' ' ' VH2 ' ' 'fois ; caracteristiques reutilisees' ' ' VM2 ' ' 'fois' ;
    MESS VMSG ;
    SORT 'CHAI' VMSG ;
    VMSG = CHAI 'Niveau 2 : raideur reutilisee' ' ' VR3 ' ' 'fois, recalculee' ' ' VC3 ' ' 'fois ; HOOK evite' ' ' VH3 ' ' 'fois ; caracteristiques reutilisees' ' ' VM3 ' ' 'fois' ;
    MESS VMSG ;
    SORT 'CHAI' VMSG ;
    VMSG = CHAI 'Ecart relatif maximal : niveau 1' ' ' VSE2 ' ' '; niveau 2' ' ' VSE3 ;
    MESS VMSG ;
    SORT 'CHAI' VMSG ;
    VMSG = CHAI 'RESULTAT : niveau 1' ' ' VMOK2 ' ' '; niveau 2' ' ' VMOK3 ;
    MESS VMSG ;
    SORT 'CHAI' VMSG ;
    SI (('EGA' VNC2 0) ) ;
        VMSG = CHAI 'ATTENTION : aucune valeur comparee (resultats non stockes ?)' ;
        MESS VMSG ;
        SORT 'CHAI' VMSG ;
    FINSI ;
    OPTI 'SORT' 'valid_inutile.tmp' ;
    VRES . 15 = TABL ;
    VRES . 15 . 'NOM' = 'FissVoil' ;
    VRES . 15 . 'OKM' = VMOK2 ;
    VRES . 15 . 'OK3' = VMOK3 ;
    VRES . 15 . 'ERR2' = VER2 ;
    VRES . 15 . 'ERR3' = VER3 ;
    VRES . 15 . 'TH1' = VTH1 ;
    VRES . 15 . 'TH2' = VTH2 ;
    VRES . 15 . 'TH3' = VTH3 ;
    VRES . 15 . 'SP2F' = VSP2 ;
    VRES . 15 . 'SP3F' = VSP3 ;
    VRES . 15 . 'NRE2' = VR2 ;
    VRES . 15 . 'NCA2' = VC2 ;
    VRES . 15 . 'NHK2' = VH2 ;
    VRES . 15 . 'NMA2' = VM2 ;
    VRES . 15 . 'NRE3' = VR3 ;
    VRES . 15 . 'NCA3' = VC3 ;
    VRES . 15 . 'NHK3' = VH3 ;
    VRES . 15 . 'CL' = VCLA ;
    VRES . 15 . 'NCMP' = VNC2 ;
    VMSG = CHAI '<<< Cas' ' ' '15' ' ' 'sur' ' ' NTOT0 ' ' ':' ' ' 'FissVoil' ' ' ':' ' ' 'niveau 1' ' ' VMOK2 ', niveau 2' ' ' VMOK3 ' ' '- ecart' ' ' VSE2 ', acceleration' ' ' VSS2 ' ' 'et' ' ' VSS3 ;
    MESS VMSG ;
    AVANCE VRES 15 NTOT0 'FissVoil' NPASS 'termine' ;
    MENAGE 'OBLI' ;
FINSI ;

*
* ---------------------------------------------------------------------
* Procedure du cas 16 : GLRC_DM (coque + endommagement (HOOK conserve))
* Variables locales : le cas ne voit aucune variable des cas precedents
* ---------------------------------------------------------------------
DEBPROC VC16 VPSW*'LOGIQUE' VNIV*'ENTIER' VTFPR*'TABLE' VTCT*'TABLE' IECHO0*'ENTIER' ;
* ----- debut du cas GLRC_DM

* fichier : GLRC_DM.dgibi
************************************************************************
* Section : Mecanique Endommagement
************************************************************************
*******************************************************
*  Cas test de l'implantation numÃ©rique du modele
*  GLRC_DM
*******************************************************
* DÃ©veloppÃ© par :
*     Benjamin Richard
* Contact :
*     Benjamin.Richard@lmt.ens-cachan.fr
* Institution :
*     CEA\DEN\DANS\DM2S\SEMT\EMSI
*******************************************************
* Choix du cas de charge
* - 1 : Traction/compression - charge dech. (membrane)
* - 2 : Idem - sens oppose

* - 3 : Traction/compression - charge dech. (flexion )
* - 4 : Idem - sens oppose
* - 5 : Idem avec le deux cycle en plus

* - 6 : Distorsion et cisaillement pur plan

* - 7 : Couplage traction/compression
* - 8 :
* - 9 :
*******************************************************
* Choix du cas de charge
ncas  = 1;
nfat  = 0;
*******************************************************
* Choix du modele
*******************************************************
SI (EGA nfat 0);
ric0 = VRAI;
sme0 = FAUX;
FINSI;

SI (EGA nfat 1);
sme0 = VRAI;
ric0 = FAUX;
FINSI;

graph0 = 'N';

*******************************************************
* Parametres materiaux
*******************************************************

* Parametres physiquement accessibles------------------

* Proprietes elastiques du beton
EBN  = 32308E6;
NUBN = 0.2;

* Proprietes elastiques de l'acier
EAN  = 200000E6;
NUAN = 0.3;

* Epaisseur de la dalle (ou du voile)
THN = 0.10;

* Section totale d'acier par metre lineaire
XIA = 8.0E-4;

* Position relative de la nappe dans l'epaisseur
EPR = 0.04;

* Resistance en traction du beton
FTN = 3.4E6;

* Effort limite en compression par metre lineaire
NMAX = 1.0E6;

* Parametres intrinseques au modele BA-----------------
* Le parametre GAMMA_MT
GAMMT = 0.02 ;

* Le parametre GAMMA_F
GAMMF = 0.32 ;

* Parametres intrinseques au modele MAZARS-------------
** Le parametre AT
*AT = 1.e0;

** Le parametre AC
*AC = 1.2e0;

** Le parametre BT
*BC = 1.7e+03;

** Le parametre BC
*BT = 10000.;

** Le parametre de seuil EPSD0
*EPSD0 = (FTN/EBN);

* Energie de fissuration
gft  = 160;

* Resistance en compression
fcn  = 10E6;
*fcn  = 36E6;

* Energie de fissuration
gfc  = 2000;


*******************************************************
* Options de calcul
*******************************************************
OPTION DIME 3 ELEM QUA4;
DENSITE 0.1;

*******************************************************
* Maillage
*******************************************************
P1 = 0. 0. 0.;
P2 = 1. 0. 0.;
P3 = 1. 1. 0.;
P4 = 0. 1. 0.;

L1 = P1 DROIT P2 ;
L2 = P2 DROIT P3 ;
L3 = P3 DROIT P4 ;
L4 = P4 DROIT P1 ;

LTOT = L1 ET L2 ET L3 ET L4 ;

S1   = SURF LTOT PLANE;

SI (EGA graph0 'O');
TRAC s1;
FINSI;

*******************************************************
* Conditions aux limites
*******************************************************

* Conditions selon le chargement-----------------------

SI (ET (> ncas 0) (< ncas 3));
CL1 = BLOQ L4 UX;
CL2 = BLOQ P1 DEPL ROTA;
CL3 = BLOQ L2 UX;
CLTOT = CL1 ET CL2 ET CL3;
D1    = DEPI CL3 1;
FINSI;

SI (ET (> ncas 2) (< ncas 6));
CL1 = BLOQ L4 RY UX ;
CL2 = BLOQ P1 DEPL ROTA;
CL3 = BLOQ L2 RY;
CLTOT = CL1 ET CL2 ET CL3;
D1    = DEPI CL3 1;
FINSI;

SI (ET (> ncas 5) (< ncas 7));

CL1 = BLOQ P1 DEPL ROTA;
NN = NBEL L4;
D0 = 3.3E-4;
CHPO1 = MANU CHPO (INVE L4) 1 'UX'
(PROG 0. PAS (1.0 / NN) 1.0);
CHPO1 = CHPO1 * D0;
CL21 = BLOQ L4 UY;
CL22 = BLOQ L4 UX;
D2  = DEPI CL22 CHPO1;

NN = NBEL L1;
D0 = 3.3E-4;
CHPO2 = MANU CHPO (L1) 1 'UY'
(PROG 0. PAS (1.0 / NN) 1.0);
CHPO2 = CHPO2 * D0;
CL31 = BLOQ L1 UX;
CL32 = BLOQ L1 UY;
D3  = DEPI CL32 CHPO2;

NN = NBEL L2;
D0 = 3.3E-4;
CHPO3 = MANU CHPO (L2) 1 'UX'
(PROG 0. PAS (1.0 / NN) 1.0);
CHPO3 = CHPO3 * D0;
CL41 = BLOQ L2 UX;
CL42 = BLOQ L2 UY;
D41  = DEPI CL41 CHPO3;
D42  = DEPI CL42 D0;

NN = NBEL L3;
D0 = 3.3E-4;
CHPO4 = MANU CHPO (INVE L3) 1 'UY'
(PROG 0. PAS (1.0 / NN) 1.0);
CHPO4 = CHPO4 * D0;
CL51 = BLOQ L3 UX;
CL52 = BLOQ L3 UY;
D51  = DEPI CL51 D0;
D52  = DEPI CL52 CHPO4;

DF1 = FORCE ((-1 * D0) 0 0) L1;
DF2 = FORCE (0 D0 0) L2;
DF3 = FORCE (D0 0 0) L3;
DF4 = FORCE (0 (-1 * D0) 0) L4;
DFT = DF1 ET DF2 ET DF3 ET DF4;
opti trac ps;
SI (EGA graph0 'O');
vect1 = vect chpo1 500 'DEPL' ROUG;
vect2 = vect chpo2 500 'DEPL' VERT;
vect3 = vect chpo3 500 'DEPL' BLEU;
vect4 = vect chpo4 500 'DEPL' JAUN;
TRAC S1 (VECT1 ET VECT2 ET VECT3 ET VECT4);
FINSI;

CLTOT = CL1 ET CL21 ET CL22 ET CL31 ET CL32 ET CL41 ET
CL42 ET CL51 ET CL52;

DTOT = D2 ET D3 ET D41 ET D42 ET D51 ET D52;
FINSI;

SI (ET (> ncas 6) (< ncas 10));
CL1 = BLOQ P1 DEPL ROTA;
CL2 = BLOQ L4 UX RY;
CL3 = BLOQ L2 RY;
CL4 = BLOQ L2 UX;
CLTOT = CL1 ET CL2 ET CL3 ET CL4;
D1    = DEPI CL3 6.0E-3;
D2    = DEPI CL4 2.0E-4;
DTOT  = D1 ET D2;
FINSI;

*******************************************************
* Choix des modeles et des materiaux associes
*******************************************************

* Cas du modele BA-------------------------------------
SI (ric0);

* Identification automatique---------------------------
EEQM NUM EEQF NUF0 XK0 GAMC0 XALFA
= IDENTI 'GLRC_DM'
EBN NUBN EAN NUAN THN XIA
EPR FTN NMAX GAMMT GAMMF 0.;

* Modele-----------------------------------------------
MODTOT  = MODE S1 MECANIQUE ELASTIQUE ISOTROPE
          ENDOMMAGEMENT GLRC_DM DKT COQ4 CONS COUCHE1;

* Materiaux--------------------------------------------
MATTOT  = MATE MODTOT YOUN  EEQM  NU   NUM
                      YOUF  (EEQF * 1.4)  NUF  NUF0
                      GAMT  GAMMT GAMC GAMC0
                      GAMF  GAMMF SEUI XK0
                      ALF   XALFA;

CAR1 = CARA MODTOT EPAI THN;
MATTOT = MATTOT ET CAR1;
FINSI;


* Cas du modele multicouche----------------------------
SI (sme0);

MOD1=TABLE;
mat1=TABLE;
NCOUCH = 9;
I=0;
REPETER BOU1 NCOUCH;
I=I+1;
NAME = CHAINE 'BET' I;
MOD1.I   = MODE S1 MECANIQUE ELASTIQUE
ENDOMMAGEMENT RICCOQ DKT COQ4 CONS NAME;
EPI  = ((THN-XIA) / NCOUCH);
CHAM1  = MANU CHML MOD1.I BTRA 1. TYPE CARACTERISTIQUES RIGIDITE;
CHAM2  = INTG CHAM1 MOD1.I ELEM BTRA;
TAIL1  = (2 ** (1.0 / 2.0)) * CHAM2 ** (1.0 / 2.0);
GFT = GFT / EPI;
EPSUT = (TAIL1) / GFT;
GFC = GFC / EPI;
EPSUC = (TAIL1) / GFC;

mat1.I = MATE mod1.I YOUN EBN  NU   NUBN
                  FT   ftn  EPUT EPSUT
                  FC   fcn  EPUC EPSUC;

EXCN = (4.0 * EPI) + (I - 1) * EPI;

car1 = CARA MOD1.I EPAI EPI EXCE EXCN;
mat1.I = mat1.I et car1;

FIN BOU1;

MOD2   = MODE S1 MECANIQUE ELASTIQUE ISOTROPE
DKT COQ4 CONS ACI1;

MOD3   = MODE S1 MECANIQUE ELASTIQUE ISOTROPE
DKT COQ4 CONS ACI2;

MODTOT = MOD2 ET MOD3;

mat2 = MATE mod2 YOUN EAN  NU NUAN;
car2 = CARA MOD2 EPAI XIA EXCE (-1 * EPR);
mat2 = mat2 et car2;

mat3 = MATE mod3 YOUN EAN  NU NUAN;
car3 = CARA MOD3 EPAI XIA EXCE EPR;
mat3 = mat3 et car3;

mattot = mat2 et mat3;

I=0;
REPETER BOU1 NCOUCH;
I=I+1;
modtot = modtot et mod1.I;
FIN BOU1;

I=0;
REPETER BOU1 NCOUCH;
I=I+1;
mattot = mattot et mat1.I;
FIN BOU1;

FINSI;

*******************************************************
* Choix des cas de charge
*******************************************************
SI (EGA NCAS 1);
LI1  = PROG 0. 1.   2.  3.   4.;
LI2  = PROG 0. 3E-4 0. -3E-4 0.;
LIS1 = PROG 0. pas 0.05 4;
FINSI;

SI (EGA NCAS 2);
LI1  = PROG 0. 1.   2.  3.   4.;
LI2  = PROG 0. -3E-4 0. 3E-4 0.;
LIS1 = PROG 0. pas 0.05 4;
FINSI;

SI (EGA NCAS 3);
LI1  = PROG 0. 1.   2.  3.   4.;
LI2  = PROG 0. 6E-3 0. -6E-3 0.;
LIS1 = PROG 0. pas 0.05 4;
FINSI;

SI (EGA NCAS 4);
LI1  = PROG 0. 1.   2.  3.   4.;
LI2  = PROG 0. -6E-3 0. 6E-3 0.;
LIS1 = PROG 0. pas 0.05 4;
FINSI;

SI (EGA NCAS 5);
LI1  = PROG 0. PAS 1 8;
LI2  = PROG 0. -6E-3 0. 6E-3 0. -6E-3 0. 6E-3 0.;
LIS1 = PROG 0. pas 0.05 8;
FINSI;

SI (EGA NCAS 6);
LI1  = PROG 0. 1. 2.  3. 4.;
LI2  = PROG 0. -1. 0. 1. 0.;
LIS1 = PROG 0. pas 0.05 4;
FINSI;

SI (EGA NCAS 7);
LI1  = PROG 0. 1. 2.  3. 4.;
LI2  = PROG 0. 1. 0. -1. 0.;
LIS1 = PROG 0. pas 0.05 4;
EV   = EVOL MANU LI1  LI2;
CHA1 = CHAR MECA DTOT EV;
CHATOT = CHA1;
FINSI;

SI (EGA NCAS 8);
LI1  = PROG 0. 1. 2.  3. 4.;
LI2  = PROG 0. -1. 0. 1. 0.;
LIS1 = PROG 0. pas 0.05 4;
EV   = EVOL MANU LI1  LI2;
CHA1 = CHAR MECA DTOT EV;
CHATOT = CHA1;
FINSI;

SI (EGA NCAS 9);
LI1  = PROG 0. PAS 1 8;
LI2  = PROG 0. 1 0. -1 0. 1 0. -1 0.;
LIS1 = PROG 0. pas 0.05 8;
EV   = EVOL MANU LI1  LI2;
CHA1 = CHAR MECA DTOT EV;
CHATOT = CHA1;
FINSI;

SI (< ncas 6);
EV   = EVOL MANU LI1 LI2 ;
CHA1 = CHAR 'DIMP' D1 EV ;
CHATOT = CHA1;
FINSI;

SI (ET (> ncas 5) (< ncas 7));
EV   = EVOL MANU LI1 LI2 ;
CHA1 = CHAR 'DIMP' DTOT EV ;
CHA2 = CHAR 'MECA' DFT  EV ;
CHATOT = CHA1 ET CHA2;
FINSI;

*******************************************************
* Preparation au calcul
*******************************************************
TAB1                      = TABLE  ;
TAB1.BLOCAGES_MECANIQUES  = CLTOT  ;
TAB1.MODELE               = MODTOT ;
TAB1.MOVA                 = RIEN   ;
TAB1.CHARGEMENT           = CHATOT ;
TAB1.CARACTERISTIQUES     = MATTOT ;
TAB1.TEMPS_CALCULES       = LIS1   ;

*******************************************************
* Calcul
*******************************************************
TAB1 . 'PERF_RAID' = VPSW ; TAB1 . 'PERF_RAID_NIVEAU' = VNIV ; PASAPAS TAB1 ; FPREC TAB1 VTFPR ;

*******************************************************
* Post traitement
*******************************************************
nn=dime tab1.deplacements;
nn=nn-1;

SI (EGA graph0 'O');
SI (ric0);
trac modtot (exco tab1.variables_internes.nn 'XD1 ');
trac modtot (exco tab1.variables_internes.nn 'XD2 ');
FINSI;

SI (sme0);
trac modtot (exco tab1.variables_internes.nn 'DT  ');
FINSI;
FINSI;

SI (OU (EGA ncas 1) (EGA ncas 2));
ev2=@global tab1 CL3 EV FX;
SI (EGA graph0 'O');
DESS EV2;

* [valid] @excel1 ev2 (chaine 'f_delta_' nfat '.txt');

FINSI;
FINSI;

SI (ET ( ET (> ncas 2) (< ncas 6)) (EGA nfat 1));
evm = prog 0;

REPETER BOU3 nn;
TPS = &bou3;
CHPS1 = TABLE;
CHPS2 = TABLE;
CHPS3 = TABLE;
CHPS4 = TABLE;
I=0;

REPE BOU1 NCOUCH;
I=I+1;
CHPS1.I = REDU (TAB1.CONTRAINTES.TPS) (mod1.I);
CHPS1.I = CHAN CHPO CHPS1.I MOD1.I;
CHPS2.I = @TOTAL CHPS1.I S1 'N11 ';
*CHPS3.I = REDU TAB1.REACTIONS.TPS (mod1.I);
CHPS4.I = @TOTAL TAB1.REACTIONS.TPS L4 'MY  ';
list CHPS4.I;
FIN BOU1;

I=0;
REPE BOU1 NCOUCH;
I=I+1;
EXCN = (4.0 * EPI) + (I - 1) * EPI;
TOT=0;
TOT=TOT+(CHPS2.I * EXCN) * 0.0 + CHPS4.I;
FIN BOU1;


evm = evm ET (prog TOT);

fin bou3;

evg=@global tab1 CL3 EV FX;
lis1 = extr evg 'ABSC';
ev2 = evol manu lis1 evm;
* [valid] @excel1 ev2 (chaine 'f_delta_' nfat '.txt');
SI (ega graph0 'O');
dess ev2;
FINSI;
FINSI;

SI (ET (ega ncas 6) (EGA nfat 0));
evm = prog 0;
I = 1;
REPETER BOU1 nn;
*var0 = tab1.contraintes.I;
*tot  = EXTR VAR0 'N12 ' 1 1 1;
var0 = tab1.reactions.I;
PPP = MANU P1 POI1;
tot=@total var0 PPP 'FX  ';
evm = evm et (prog tot);
I = I + 1;
FIN BOU1;
ev2 = evol manu lis1 evm;
SI (ega graph0 'O');
dess ev2;
FINSI;
* [valid] @excel1 ev2 (chaine 'f_delta_' nfat '.txt');
FINSI;


SI (ET (ega ncas 6) (EGA nfat 1));
evm = prog 0;
I = 1;
REPETER BOU1 nn;
var0 = tab1.reactions.I;
*tot  = EXTR VAR0 'N12 ' 1 1 1;
PPP = MANU P1 POI1;
tot=@total var0 PPP 'FY  ';
evm = evm et (prog tot);
I = I + 1;
FIN BOU1;
ev2 = evol manu lis1 evm;
SI (EGA graph0 'O');
dess ev2;
FINSI;
* [valid] @excel1 ev2 (chaine 'f_delta_' nfat '.txt');
FINSI;


SI (ET ( ET (> ncas 2) (< ncas 6)) (EGA nfat 0));
evm = prog 0;
I=1;

REPETER BOU1 nn;
var0=tab1.reactions.I;
tot=@total var0 L4 'MY  ';
evm=evm et (prog tot);
i=i+1;
fin bou1;

evg=@global tab1 cl3 ev fx;
lis1=extr evg absc;
ev2=evol manu lis1 evm;
* [valid] @excel1 ev2 (chaine 'f_delta_' nfat '.txt');
SI (EGA graph0 'O');
dess ev2;
FINSI;
FINSI;

SI (ET (> ncas 6) (< ncas 10));
EVG1 = @GLOBAL TAB1 EV CL4 FX;
LISG1 = EXTR EVG1 ABSC;
LISG1 = (LISG1 * 2.0E-4);

EVG2 = @GLOBAL TAB1 EV CL3 FX;
LISG2 = EXTR EVG2 ABSC;
LISG2 = (LISG2 * 6E-3);

evm1 = prog 0;
I = 1;
REPETER BOU1 nn;
var0 = tab1.reactions.I;
tot  = @total var0 L4 'FX  ';
evm1 = evm1 et (prog tot);
I = I + 1;
FIN BOU1;

evm2 = prog 0;
I = 1;
REPETER BOU1 nn;
var0 = tab1.reactions.I;
tot  = @total var0 L4 'MY  ';
evm2 = evm2 et (prog tot);
I = I + 1;
FIN BOU1;

EV21 = EVOL MANU LISG1 evm1;
EV22 = EVOL MANU LISG2 evm2;

SI (EGA graph0 'O');
DESS EV21;
DESS EV22;
FINSI;

FINSI;

SI (EGA graph0 'O');
def0 = defo s1 tab1.deplacements.nn 1 bleu;
def1 = defo s1 tab1.deplacements.nn   rouge;
trac (def0 et def1);
FINSI;

ee=tab1.variables_internes.nn;
aa=extr ee 'XD1 ' 1 1 1;

message 'erreur relative';
err = (aa - 1.9650) / 1.9650;
list err;

si (> err 1.0E-3);
erreur(5);
finsi;

*******************************************************
* FIN DE L ANALYSE
*******************************************************
* [valid] FIN final


* ----- fin du cas GLRC_DM
FINPROC ;
*
* ---------------------------------------------------------------------
* Cas 16 : GLRC_DM (coque + endommagement (HOOK conserve))
* ---------------------------------------------------------------------
SI ((IDEB0 '<EG' 16) 'ET' (IFIN0 '>EG' 16) 'ET' ('NON' ('EXIS' TSKIP 16))) ;
    MENAGE 'OBLI' ;
    MESS ' ' ;
    VMSG = CHAI '>>> Cas' ' ' '16' ' ' 'sur' ' ' NTOT0 ' ' ':' ' ' 'GLRC_DM' ' ' '(coque + endommagement (HOOK conserve))' ;
    MESS VMSG ;
    NPASS = 2 ;
    SI IPASS3 ;
        NPASS = 3 ;
    FINSI ;
    VTH1 = 0 ;
    VTH2 = 0 ;
    VTH3 = 0 ;
    VNE51 = 0 ;
    VNE01 = 0 ;
    VNE52 = 0 ;
    VNE02 = 0 ;
    VNE53 = 0 ;
    VNE03 = 0 ;
    REPETER ZVRUN NPASS ;
* ordre des passes alterne d'un cas a l'autre (derive des temps en session)
        VIP = NPASS + 1 - &ZVRUN ;
        VPSW = (VIP '>' 1) ;
        VNIV = 1 ;
        VMPS = 'inactif' ;
        SI (VIP 'EGA' 2) ;
            VMPS = 'actif niveau 1' ;
        FINSI ;
        SI (VIP 'EGA' 3) ;
            VNIV = 2 ;
            VMPS = 'actif niveau 2' ;
        FINSI ;
        AVANCE VRES 16 NTOT0 'GLRC_DM' VIP 'en_cours' ;
        VMSG = CHAI '    passe' ' ' VIP ' ' 'sur' ' ' NPASS ' ' ': optimisations' ' ' VMPS ;
        MESS VMSG ;
        SI ITRACE0 ;
            OPTI 'IMPR' 'valid_trace.log' ;
        FINSI ;
        OPTI 'DIME' 3 'MODE' 'TRID' 'ELEM' 'CUB8' 'ECHO' IECHO0 ;
        VTHM = 0 ;
        REPETER ZVREP NREP0 ;
            VIR = &ZVREP ;
            VTFPR = TABL ;
            VTCT = TABL ;
            VTCT . 'N0' = 0 ;
            VTCT . 'N5' = 0 ;
            SI ITEMPS0 ;
                TEMP 'ZERO' ;
            FINSI ;
* Le cas s'execute dans une procedure (variables locales) : les variables
* d'un cas precedent ne peuvent pas masquer un mot-cle ou un operateur
            VC16 VPSW VNIV VTFPR VTCT IECHO0 ;
            VTHR = 0 ;
            SI ITEMPS0 ;
                VTHR = CHRONO ;
            FINSI ;
            SI (VIR 'EGA' 1) ;
                VTHM = VTHR ;
            SINON ;
                SI (VTHR '<' VTHM) ;
                    VTHM = VTHR ;
                FINSI ;
            FINSI ;
        FIN ZVREP ;
        VNER5 = VTCT . 'N5' ;
        VNER0 = VTCT . 'N0' ;
        SI (VIP 'EGA' 1) ;
            VTF1 = VTFPR ;
            VTH1 = VTHM ;
            VNE51 = VNER5 ;
            VNE01 = VNER0 ;
        FINSI ;
        SI (VIP 'EGA' 2) ;
            VTF2 = VTFPR ;
            VTH2 = VTHM ;
            VNE52 = VNER5 ;
            VNE02 = VNER0 ;
        FINSI ;
        SI (VIP 'EGA' 3) ;
            VTF3 = VTFPR ;
            VTH3 = VTHM ;
            VNE53 = VNER5 ;
            VNE03 = VNER0 ;
        FINSI ;
    FIN ZVRUN ;
*   comparaison des empreintes avec la passe 1
    VER2 VNL2 VNC2 = COMPAR VTF1 VTF2 ;
    VMOK2 = 'OK' ;
    SI ((VER2 '>' TOLV0) 'OU' (VNL2 '>' 0) 'OU' ('NON' (VNE52 'EGA' VNE51))) ;
        VMOK2 = 'ECART' ;
        VNBK2 = VNBK2 + 1 ;
    FINSI ;
    VER3 = 0. ;
    VNC3 = 0 ;
    VMOK3 = 'sans_objet' ;
    SI IPASS3 ;
        VER3 VNL3 VNC3 = COMPAR VTF1 VTF3 ;
        VMOK3 = 'OK' ;
        SI ((VER3 '>' TOLV3) 'OU' (VNL3 '>' 0) 'OU' ('NON' (VNE53 'EGA' VNE51))) ;
            VMOK3 = 'ECART' ;
            VNBK3 = VNBK3 + 1 ;
        FINSI ;
    FINSI ;
*   accelerations (temps de la passe 1 / temps de la passe)
    VSP2 = 0. ;
    VSP3 = 0. ;
    SI ((VTH1 '>' 0) 'ET' (VTH2 '>' 0)) ;
        VSP2 = (FLOT VTH1) '/' (FLOT VTH2) ;
    FINSI ;
    SI ((VTH1 '>' 0) 'ET' (VTH3 '>' 0)) ;
        VSP3 = (FLOT VTH1) '/' (FLOT VTH3) ;
    FINSI ;
    VSUM1 = VSUM1 + VTH1 ;
    VSUM2 = VSUM2 + VTH2 ;
    VSUM3 = VSUM3 + VTH3 ;
    VCLA = VTF2 . 'CL' ;
    VR2 = VTF2 . 'NRE' ;
    VC2 = VTF2 . 'NCA' ;
    VH2 = VTF2 . 'NHK' ;
    VM2 = VTF2 . 'NMA' ;
    VR3 = -1 ;
    VC3 = -1 ;
    VH3 = -1 ;
    VM3 = -1 ;
    SI IPASS3 ;
        VR3 = VTF3 . 'NRE' ;
        VC3 = VTF3 . 'NCA' ;
        VH3 = VTF3 . 'NHK' ;
        VM3 = VTF3 . 'NMA' ;
    FINSI ;
    VSE2 = CHAI 'FORMAT' '(1PE10.3)' VER2 ;
    VSE3 = CHAI 'FORMAT' '(1PE10.3)' VER3 ;
    VSS2 = CHAI 'FORMAT' '(F6.2)' VSP2 ;
    VSS3 = CHAI 'FORMAT' '(F6.2)' VSP3 ;
*   fichier de resultat du cas (SORT) et affichage console (MESS)
    OPTI 'SORT' 'valid_GLRC_DM.log' ;
    VMSG = CHAI '=== Cas' ' ' '16' ' ' ':' ' ' 'GLRC_DM' ' ' '(coque + endommagement (HOOK conserve))' ' ' '===' ;
    MESS VMSG ;
    SORT 'CHAI' VMSG ;
    VMSG = CHAI 'Valeurs comparees :' ' ' VNC2 ;
    MESS VMSG ;
    SORT 'CHAI' VMSG ;
    VMSG = CHAI 'Temps horloge (ms) : origine' ' ' VTH1 ' ' '; niveau 1' ' ' VTH2 ' ' '; niveau 2' ' ' VTH3 ;
    MESS VMSG ;
    SORT 'CHAI' VMSG ;
    VMSG = CHAI 'Acceleration par rapport a l origine : niveau 1' ' ' VSS2 ' ' '; niveau 2' ' ' VSS3 ;
    MESS VMSG ;
    SORT 'CHAI' VMSG ;
    VMSG = CHAI 'Controles internes du cas : echecs origine' ' ' VNE51 ' ' '; niveau 1' ' ' VNE52 ' ' '; niveau 2' ' ' VNE53 ' ' '- reussites origine' ' ' VNE01 ' ' '; niveau 1' ' ' VNE02 ' ' '; niveau 2' ' ' VNE03 ;
    MESS VMSG ;
    SORT 'CHAI' VMSG ;
    VMSG = CHAI 'Classes exercees (1 MATVAR, 10 ENDOM, 20 VISCODOM, 100 GD) :' ' ' VCLA ;
    MESS VMSG ;
    SORT 'CHAI' VMSG ;
    VMSG = CHAI 'Niveau 1 : raideur reutilisee' ' ' VR2 ' ' 'fois, recalculee' ' ' VC2 ' ' 'fois ; HOOK evite' ' ' VH2 ' ' 'fois ; caracteristiques reutilisees' ' ' VM2 ' ' 'fois' ;
    MESS VMSG ;
    SORT 'CHAI' VMSG ;
    VMSG = CHAI 'Niveau 2 : raideur reutilisee' ' ' VR3 ' ' 'fois, recalculee' ' ' VC3 ' ' 'fois ; HOOK evite' ' ' VH3 ' ' 'fois ; caracteristiques reutilisees' ' ' VM3 ' ' 'fois' ;
    MESS VMSG ;
    SORT 'CHAI' VMSG ;
    VMSG = CHAI 'Ecart relatif maximal : niveau 1' ' ' VSE2 ' ' '; niveau 2' ' ' VSE3 ;
    MESS VMSG ;
    SORT 'CHAI' VMSG ;
    VMSG = CHAI 'RESULTAT : niveau 1' ' ' VMOK2 ' ' '; niveau 2' ' ' VMOK3 ;
    MESS VMSG ;
    SORT 'CHAI' VMSG ;
    SI (('EGA' VNC2 0) ) ;
        VMSG = CHAI 'ATTENTION : aucune valeur comparee (resultats non stockes ?)' ;
        MESS VMSG ;
        SORT 'CHAI' VMSG ;
    FINSI ;
    OPTI 'SORT' 'valid_inutile.tmp' ;
    VRES . 16 = TABL ;
    VRES . 16 . 'NOM' = 'GLRC_DM' ;
    VRES . 16 . 'OKM' = VMOK2 ;
    VRES . 16 . 'OK3' = VMOK3 ;
    VRES . 16 . 'ERR2' = VER2 ;
    VRES . 16 . 'ERR3' = VER3 ;
    VRES . 16 . 'TH1' = VTH1 ;
    VRES . 16 . 'TH2' = VTH2 ;
    VRES . 16 . 'TH3' = VTH3 ;
    VRES . 16 . 'SP2F' = VSP2 ;
    VRES . 16 . 'SP3F' = VSP3 ;
    VRES . 16 . 'NRE2' = VR2 ;
    VRES . 16 . 'NCA2' = VC2 ;
    VRES . 16 . 'NHK2' = VH2 ;
    VRES . 16 . 'NMA2' = VM2 ;
    VRES . 16 . 'NRE3' = VR3 ;
    VRES . 16 . 'NCA3' = VC3 ;
    VRES . 16 . 'NHK3' = VH3 ;
    VRES . 16 . 'CL' = VCLA ;
    VRES . 16 . 'NCMP' = VNC2 ;
    VMSG = CHAI '<<< Cas' ' ' '16' ' ' 'sur' ' ' NTOT0 ' ' ':' ' ' 'GLRC_DM' ' ' ':' ' ' 'niveau 1' ' ' VMOK2 ', niveau 2' ' ' VMOK3 ' ' '- ecart' ' ' VSE2 ', acceleration' ' ' VSS2 ' ' 'et' ' ' VSS3 ;
    MESS VMSG ;
    AVANCE VRES 16 NTOT0 'GLRC_DM' NPASS 'termine' ;
    MENAGE 'OBLI' ;
FINSI ;

*
* ---------------------------------------------------------------------
* Procedure du cas 17 : traction316L (T uniforme, E(T))
* Variables locales : le cas ne voit aucune variable des cas precedents
* ---------------------------------------------------------------------
DEBPROC VC17 VPSW*'LOGIQUE' VNIV*'ENTIER' VTFPR*'TABLE' VTCT*'TABLE' IECHO0*'ENTIER' ;
* ----- debut du cas traction316L

* fichier : traction316L.dgibi
* section : Mecanique, Plastique
*----------------------------------------------------------------------*
* Essai de traction cyclique sur de l'acier 316L a 20 degC.            *
*                                                                      *
* Validation des donnees materiaux integrees dans la procedure BIBLIO. *
* Reproduction de la courbe de traction presentee dans la reference,   *
* Fig. 2. (a).                                                         *
*                                                                      *
* Description :                                                        *
* -------------                                                        *
*                                                                      *
* Type de calcul : mecanique, plastique                                *
* Mode de calcul : 3D                                                  *
* Type d'element : CUB8                                                *
* Chargement     : Deplacement impose                                  *
* Reference      :                                                     *
* ----------------                                                     *
* O. Muransky, C.J. Hamelin, M.C. Smith, P.J. Bendeich, L. Edwards,
* "The effect of plasticity theory on predicted residual stress fields
*  in numerical weld analyses",
* Computational Materials Science 54 (2012) 125â€“134.
*                                                                      *
*----------------------------------------------------------------------*
*
opti dime 3 elem cub8 ;

* Pour affichages, mettre IG1 a VRAI :
ig1      = faux ;

* Pour calcul complet, mettre icomplet a vrai :
icomplet = faux ;

*opti trac psc eptr 5 ;

ig1      = ig1 ou (ega (vale trac) 'PSC') ;

*------------------------------ Modele EF -----------------------------*

* Temperature essai :
T0      = 20. ;

* Maillage cube unite :
L1      = (0 0 0) droi 1 (1 0 0) ;
S1      = L1 tran 1 (0 1 0) ;
V1      = S1 volu tran 1 (0 0 1) ;

si ig1 ;
  trac V1 titr 'Traction sur un cube unite' ;
fins ;

* Donnees 316L :
t316L   = biblio '316L' refe 4 ;

* Modele et Caracteristiques :
mod1    = mode V1 mecanique elastique plastique chaboche2 ;
mat1    = mate mod1 'YOUN' t316L.'YOUN' 'NU' t316L.'NU' 'ALPH' t316L.'ALPH'
                    'R0'   t316L.'R0'   'RM' t316L.'RM' 'B' t316L.'B'
                    'A1'   t316L.'A1'   'C1' t316L.'C1' 'A2' t316L.'A2' 'C2' t316L.'C2'
                    'PSI'  1. 'OMEG' 0. 'TREF' T0 'TALP' T0 ;

* CL (blocages) :
Sx0     = (V1 coor 1) poin infe 1.e-3 ;
Sy0     = (V1 coor 2) poin infe 1.e-3 ;
S2      = V1 face 2 ;
CLUS1   = bloq S1 uz ;
CLUX0   = bloq Sx0 ux ;
CLUY0   = bloq Sy0 uy ;
CLUS2   = bloq S2 uz ;
cl0     = CLUS1 et CLUX0 et CLUY0 et CLUS2 ;

* Deplacement impose :
DCLS2   = depi CLUS2 1. ;

* Evolution temporelle :
epoint1 = 1.e-3 ;
emax1   = 0.015 ;
temax1  = emax1 / epoint1 ;
lamp1   = prog 0.  1.  -1.  1.  -1.  1.  -1.  1.  -1.  0. ;
ltps1   = prog 0.  1.   3.  5.   7.  9.  11. 13.  15. 16. ;
lamp1   = emax1 * lamp1 ;
ltps1   = temax1 * ltps1 ;
ev1     = evol manu temp ltps1 lamp1 ;

* Chargement mecanique :
cg1     = char dimp DCLS2 ev1 ;

* Chargement thermique :
cht1    = manu chpo V1 1 'T' T0 ;
cgt1    = char t cht1 ;

si ig1 ;
  dess ev1 titr 'Evolution temporelle du deplacement impose.' ;;
fins ;

*------------------------- Resolution PASAPAS -------------------------*

tpas1    = table ;
tpas1.modele = mod1 ;
tpas1.caracteristiques = mat1 ;
tpas1.chargement = cg1 et cgt1 ;
tpas1.blocages_mecaniques = cl0 ;
si icomplet ;
  tpas1.temps_calcules = ltps1 raff (0.05*temax1) ;
sino ;
  tpas1.temps_calcules = (ltps1 raff (0.05*temax1)) extr (lect 1 pas 1 10) ;
fins ;

list tpas1.temps_calcules ;

tpas1 . 'PERF_RAID' = VPSW ; tpas1 . 'PERF_RAID_NIVEAU' = VNIV ; PASAPAS tpas1 ; FPREC tpas1 VTFPR ;

*----------------------- Visualisation resultat -----------------------*

* Courbe de traction a la temperature courante :
pz1      = S2 poin proc (0 0 1) ;
lu1      = prog 0. ;
lf1      = prog 0. ;
nb1      = (dime tpas1.temps) - 1 ;
repe b1 nb1 ;
  i1       = &b1 ;
  ui1      = (tpas1.deplacements.i1) extr 'UZ' pz1 ;
  fi1      = ((tpas1.reactions.i1) redu s2) resu ;
  fi1      = extr fi1 'FZ' ((extr fi1 mail) poin 1) ;
  lu1      = lu1 et ui1 ;
  lf1      = lf1 et fi1 ;
fin B1 ;
evfu1    = evol vert manu 'dL/L (%)' (100.*lu1) 'F/So (MPa)' (1.e-6*lf1) ;

si ig1 ;
  dess evfu1 gril point titr 'Courbe de traction cyclique 316L a 20. degC.' logo posy exce ;
fins ;
* [valid] FIN final


* ----- fin du cas traction316L
FINPROC ;
*
* ---------------------------------------------------------------------
* Cas 17 : traction316L (T uniforme, E(T))
* ---------------------------------------------------------------------
SI ((IDEB0 '<EG' 17) 'ET' (IFIN0 '>EG' 17) 'ET' ('NON' ('EXIS' TSKIP 17))) ;
    MENAGE 'OBLI' ;
    MESS ' ' ;
    VMSG = CHAI '>>> Cas' ' ' '17' ' ' 'sur' ' ' NTOT0 ' ' ':' ' ' 'traction316L' ' ' '(T uniforme, E(T))' ;
    MESS VMSG ;
    NPASS = 2 ;
    SI IPASS3 ;
        NPASS = 3 ;
    FINSI ;
    VTH1 = 0 ;
    VTH2 = 0 ;
    VTH3 = 0 ;
    VNE51 = 0 ;
    VNE01 = 0 ;
    VNE52 = 0 ;
    VNE02 = 0 ;
    VNE53 = 0 ;
    VNE03 = 0 ;
    REPETER ZVRUN NPASS ;
* ordre des passes alterne d'un cas a l'autre (derive des temps en session)
        VIP = &ZVRUN ;
        VPSW = (VIP '>' 1) ;
        VNIV = 1 ;
        VMPS = 'inactif' ;
        SI (VIP 'EGA' 2) ;
            VMPS = 'actif niveau 1' ;
        FINSI ;
        SI (VIP 'EGA' 3) ;
            VNIV = 2 ;
            VMPS = 'actif niveau 2' ;
        FINSI ;
        AVANCE VRES 17 NTOT0 'traction316L' VIP 'en_cours' ;
        VMSG = CHAI '    passe' ' ' VIP ' ' 'sur' ' ' NPASS ' ' ': optimisations' ' ' VMPS ;
        MESS VMSG ;
        SI ITRACE0 ;
            OPTI 'IMPR' 'valid_trace.log' ;
        FINSI ;
        OPTI 'DIME' 3 'MODE' 'TRID' 'ELEM' 'CUB8' 'ECHO' IECHO0 ;
        VTHM = 0 ;
        REPETER ZVREP NREP0 ;
            VIR = &ZVREP ;
            VTFPR = TABL ;
            VTCT = TABL ;
            VTCT . 'N0' = 0 ;
            VTCT . 'N5' = 0 ;
            SI ITEMPS0 ;
                TEMP 'ZERO' ;
            FINSI ;
* Le cas s'execute dans une procedure (variables locales) : les variables
* d'un cas precedent ne peuvent pas masquer un mot-cle ou un operateur
            VC17 VPSW VNIV VTFPR VTCT IECHO0 ;
            VTHR = 0 ;
            SI ITEMPS0 ;
                VTHR = CHRONO ;
            FINSI ;
            SI (VIR 'EGA' 1) ;
                VTHM = VTHR ;
            SINON ;
                SI (VTHR '<' VTHM) ;
                    VTHM = VTHR ;
                FINSI ;
            FINSI ;
        FIN ZVREP ;
        VNER5 = VTCT . 'N5' ;
        VNER0 = VTCT . 'N0' ;
        SI (VIP 'EGA' 1) ;
            VTF1 = VTFPR ;
            VTH1 = VTHM ;
            VNE51 = VNER5 ;
            VNE01 = VNER0 ;
        FINSI ;
        SI (VIP 'EGA' 2) ;
            VTF2 = VTFPR ;
            VTH2 = VTHM ;
            VNE52 = VNER5 ;
            VNE02 = VNER0 ;
        FINSI ;
        SI (VIP 'EGA' 3) ;
            VTF3 = VTFPR ;
            VTH3 = VTHM ;
            VNE53 = VNER5 ;
            VNE03 = VNER0 ;
        FINSI ;
    FIN ZVRUN ;
*   comparaison des empreintes avec la passe 1
    VER2 VNL2 VNC2 = COMPAR VTF1 VTF2 ;
    VMOK2 = 'OK' ;
    SI ((VER2 '>' TOLV0) 'OU' (VNL2 '>' 0) 'OU' ('NON' (VNE52 'EGA' VNE51))) ;
        VMOK2 = 'ECART' ;
        VNBK2 = VNBK2 + 1 ;
    FINSI ;
    VER3 = 0. ;
    VNC3 = 0 ;
    VMOK3 = 'sans_objet' ;
    SI IPASS3 ;
        VER3 VNL3 VNC3 = COMPAR VTF1 VTF3 ;
        VMOK3 = 'OK' ;
        SI ((VER3 '>' TOLV3) 'OU' (VNL3 '>' 0) 'OU' ('NON' (VNE53 'EGA' VNE51))) ;
            VMOK3 = 'ECART' ;
            VNBK3 = VNBK3 + 1 ;
        FINSI ;
    FINSI ;
*   accelerations (temps de la passe 1 / temps de la passe)
    VSP2 = 0. ;
    VSP3 = 0. ;
    SI ((VTH1 '>' 0) 'ET' (VTH2 '>' 0)) ;
        VSP2 = (FLOT VTH1) '/' (FLOT VTH2) ;
    FINSI ;
    SI ((VTH1 '>' 0) 'ET' (VTH3 '>' 0)) ;
        VSP3 = (FLOT VTH1) '/' (FLOT VTH3) ;
    FINSI ;
    VSUM1 = VSUM1 + VTH1 ;
    VSUM2 = VSUM2 + VTH2 ;
    VSUM3 = VSUM3 + VTH3 ;
    VCLA = VTF2 . 'CL' ;
    VR2 = VTF2 . 'NRE' ;
    VC2 = VTF2 . 'NCA' ;
    VH2 = VTF2 . 'NHK' ;
    VM2 = VTF2 . 'NMA' ;
    VR3 = -1 ;
    VC3 = -1 ;
    VH3 = -1 ;
    VM3 = -1 ;
    SI IPASS3 ;
        VR3 = VTF3 . 'NRE' ;
        VC3 = VTF3 . 'NCA' ;
        VH3 = VTF3 . 'NHK' ;
        VM3 = VTF3 . 'NMA' ;
    FINSI ;
    VSE2 = CHAI 'FORMAT' '(1PE10.3)' VER2 ;
    VSE3 = CHAI 'FORMAT' '(1PE10.3)' VER3 ;
    VSS2 = CHAI 'FORMAT' '(F6.2)' VSP2 ;
    VSS3 = CHAI 'FORMAT' '(F6.2)' VSP3 ;
*   fichier de resultat du cas (SORT) et affichage console (MESS)
    OPTI 'SORT' 'valid_traction316L.log' ;
    VMSG = CHAI '=== Cas' ' ' '17' ' ' ':' ' ' 'traction316L' ' ' '(T uniforme, E(T))' ' ' '===' ;
    MESS VMSG ;
    SORT 'CHAI' VMSG ;
    VMSG = CHAI 'Valeurs comparees :' ' ' VNC2 ;
    MESS VMSG ;
    SORT 'CHAI' VMSG ;
    VMSG = CHAI 'Temps horloge (ms) : origine' ' ' VTH1 ' ' '; niveau 1' ' ' VTH2 ' ' '; niveau 2' ' ' VTH3 ;
    MESS VMSG ;
    SORT 'CHAI' VMSG ;
    VMSG = CHAI 'Acceleration par rapport a l origine : niveau 1' ' ' VSS2 ' ' '; niveau 2' ' ' VSS3 ;
    MESS VMSG ;
    SORT 'CHAI' VMSG ;
    VMSG = CHAI 'Controles internes du cas : echecs origine' ' ' VNE51 ' ' '; niveau 1' ' ' VNE52 ' ' '; niveau 2' ' ' VNE53 ' ' '- reussites origine' ' ' VNE01 ' ' '; niveau 1' ' ' VNE02 ' ' '; niveau 2' ' ' VNE03 ;
    MESS VMSG ;
    SORT 'CHAI' VMSG ;
    VMSG = CHAI 'Classes exercees (1 MATVAR, 10 ENDOM, 20 VISCODOM, 100 GD) :' ' ' VCLA ;
    MESS VMSG ;
    SORT 'CHAI' VMSG ;
    VMSG = CHAI 'Niveau 1 : raideur reutilisee' ' ' VR2 ' ' 'fois, recalculee' ' ' VC2 ' ' 'fois ; HOOK evite' ' ' VH2 ' ' 'fois ; caracteristiques reutilisees' ' ' VM2 ' ' 'fois' ;
    MESS VMSG ;
    SORT 'CHAI' VMSG ;
    VMSG = CHAI 'Niveau 2 : raideur reutilisee' ' ' VR3 ' ' 'fois, recalculee' ' ' VC3 ' ' 'fois ; HOOK evite' ' ' VH3 ' ' 'fois ; caracteristiques reutilisees' ' ' VM3 ' ' 'fois' ;
    MESS VMSG ;
    SORT 'CHAI' VMSG ;
    VMSG = CHAI 'Ecart relatif maximal : niveau 1' ' ' VSE2 ' ' '; niveau 2' ' ' VSE3 ;
    MESS VMSG ;
    SORT 'CHAI' VMSG ;
    VMSG = CHAI 'RESULTAT : niveau 1' ' ' VMOK2 ' ' '; niveau 2' ' ' VMOK3 ;
    MESS VMSG ;
    SORT 'CHAI' VMSG ;
    SI (('EGA' VNC2 0) ) ;
        VMSG = CHAI 'ATTENTION : aucune valeur comparee (resultats non stockes ?)' ;
        MESS VMSG ;
        SORT 'CHAI' VMSG ;
    FINSI ;
    OPTI 'SORT' 'valid_inutile.tmp' ;
    VRES . 17 = TABL ;
    VRES . 17 . 'NOM' = 'traction316L' ;
    VRES . 17 . 'OKM' = VMOK2 ;
    VRES . 17 . 'OK3' = VMOK3 ;
    VRES . 17 . 'ERR2' = VER2 ;
    VRES . 17 . 'ERR3' = VER3 ;
    VRES . 17 . 'TH1' = VTH1 ;
    VRES . 17 . 'TH2' = VTH2 ;
    VRES . 17 . 'TH3' = VTH3 ;
    VRES . 17 . 'SP2F' = VSP2 ;
    VRES . 17 . 'SP3F' = VSP3 ;
    VRES . 17 . 'NRE2' = VR2 ;
    VRES . 17 . 'NCA2' = VC2 ;
    VRES . 17 . 'NHK2' = VH2 ;
    VRES . 17 . 'NMA2' = VM2 ;
    VRES . 17 . 'NRE3' = VR3 ;
    VRES . 17 . 'NCA3' = VC3 ;
    VRES . 17 . 'NHK3' = VH3 ;
    VRES . 17 . 'CL' = VCLA ;
    VRES . 17 . 'NCMP' = VNC2 ;
    VMSG = CHAI '<<< Cas' ' ' '17' ' ' 'sur' ' ' NTOT0 ' ' ':' ' ' 'traction316L' ' ' ':' ' ' 'niveau 1' ' ' VMOK2 ', niveau 2' ' ' VMOK3 ' ' '- ecart' ' ' VSE2 ', acceleration' ' ' VSS2 ' ' 'et' ' ' VSS3 ;
    MESS VMSG ;
    AVANCE VRES 17 NTOT0 'traction316L' NPASS 'termine' ;
    MENAGE 'OBLI' ;
FINSI ;

*
* ---------------------------------------------------------------------
* Procedure du cas 18 : test_vari_props (proprietes variables)
* Variables locales : le cas ne voit aucune variable des cas precedents
* ---------------------------------------------------------------------
DEBPROC VC18 VPSW*'LOGIQUE' VNIV*'ENTIER' VTFPR*'TABLE' VTCT*'TABLE' IECHO0*'ENTIER' ;
* ----- debut du cas test_vari_props

* fichier : test_vari_props.dgibi
************************************************************************
* Section : Thermique ProprietesVariables
************************************************************************

*-----------------------------------------------------------------------
*FRA  Exemple simple de definition d'une proriete thermique variable
*     fonction de 1 parametre (EVOL) ou plusieurs parametres (NUAGE)
*     Simulation axisymetrique d'une trempe sur un cylindre avec echange
*     convectif avec l'air ambient. Il s'agit de la conductivite du tube
*     est variable : evolution de T ou nuage de T et ETAT.
*-----------------------------------------------------------------------
*ENG  Easy example of a variable thermal property, function of 1
*     parameter (EVOL) or of several parameters (NUAGE)
*     Axisymetric modelisation of a tube quenching with convective heat
*     exchange with ambient atmosphere. The tube heat conductivity is a
*     function of the temperature T or a function of T and ETAT.
*-----------------------------------------------------------------------
'OPTION' 'ECHO' IECHO0 ;
OPTI DEBU 1;

* *****        *********************         *******************
* * 1 *  (FRA) Definitions generales - (ENG) General definitions
* *****        *********************         *******************

'OPTION' 'DIME' 2 'ELEM' QUA4 'MODE' AXIS ;

* (FRA) Definition du maillage - (ENG) Mesh definition
*       ----------------------         ---------------
PD =  0.  0. ;
PC = 0.1  0. ;
PB = 0.1 0.02 ;
PA =  0. 0.02 ;
D1 = 'DROITE' 20 PD PC ;
Tube = 'TRANSLATION' 1 D1 (0. 0.02) ;

D2 = 'COTE' 2 Tube ;
D3 = 'COTE' 3 Tube ;
D4 = 'COTE' 4 Tube ;

pt_TC2 = Tube 'POINT' 'PROC' (0.095 0.) ;
pt_TC1 = Tube 'POINT' 'PROC' (0.05 0.) ;
** 'TRACER' Tube ;

* (FRA) Definition des modeles thermiques (conduction et convection)
* (ENG) Thermic models definition (conduction and convective exchange)
*       --------------------------------------------------------------
Mod_Tube = 'MODELISER' Tube 'THERMIQUE' 'ISOTROPE' ;
Mod_Teco = 'MODELISER' D2 'THERMIQUE' 'CONVECTION' ;
ModTot = Mod_Tube 'ET' Mod_Teco ;

* (FRA) Defintion du modele de convection
* (ENG) Convective model definition
*       ---------------------------------
Mat_Teco = 'MATERIAU' Mod_TECO 'H   ' 1515. ;

* (FRA) Chargement convectif - Temperature constante de l'air ambient
* (ENG) Convective loading - The temperature room is constant
*       -------------------------------------------------------------
T_air = 25. ;
EvTECO = 'EVOL' 'MANU' 'TEMPS' ('PROG' 0. 1.E+9)
                       'T'     ('PROG' 1. 1.)  ;
ChpTECO  = 'MANU' 'CHPO' D2 1 'T' T_air ;
CharTECO = 'CHARGEMENT' 'TECO' ChpTECO EvTECO ;

* (FRA) Temperature initiale du tube uniforme
* (ENG) The initial temperature of the tube is uniform
*       ----------------------------------------------
T_ini = 800. ;
ChpT0 = 'MANU' 'CHPO' Tube 1 'T   ' T_ini ;

* (FRA) Instants calcules et sauves - (ENG) Calculated and saved times
*       --------------------------------------------------------------
l_tcalc = 'PROG' 0. 'PAS' 10. 400. ;
l_tsauv = 'PROG' 0. 10. 20. 30. 40. 50. 'PAS' 50. 400. ;

* *****        ******************************************
* * 2 *  (FRA) Calcul PASAPAS - Conductivite fonction de T
* *   *  (ENG) PASAPAS call - Conductivity function of temperature
* *****        ******************************************

* (FRA) Defintion de la conductivite du tube (fonction de T)
* (ENG) Conductivity tube definition (temperature function)
*       ----------------------------------------------------
EvK = 'EVOL' 'MANU' 'T   ' ('PROG' 0. 2000.) 'K   ' ('PROG' 10. 30.) ;
Mat_Tube = 'MATERIAU' Mod_Tube 'K   ' EvK 'C   ' 400. 'RHO ' 7800. ;
MatTot = Mat_Tube 'ET' Mat_Teco ;

* (FRA) Appel a PASAPAS-TRANSNON - (ENG) PASAPAS-TRANSNON call
*       ------------------------         ---------------------
ETAB1 = 'TABLE' ;
ETAB1.'MODELE' = ModTot ;
ETAB1.'CARACTERISTIQUES' = MatTot ;
ETAB1.'CHARGEMENT' = CharTECO ;
ETAB1.'TEMPERATURES' = 'TABLE' ;
ETAB1.'TEMPERATURES'. 0 = ChpT0 ;
ETAB1.'TEMPS_SAUVES' = l_tsauv ;
ETAB1.'TEMPS_CALCULES' = l_tcalc ;

ETAB1 . 'PERF_RAID' = VPSW ; ETAB1 . 'PERF_RAID_NIVEAU' = VNIV ; PASAPAS ETAB1 ; FPREC ETAB1 VTFPR ;

* (FRA) Depouillement des resultats - (ENG) Results extraction
*       ---------------------------         ------------------
TEMP1_1 = 'PROG' ;  TEMP2_1 = 'PROG' ;
I = 0 ;
'REPETER' Boucle ('DIMENSION' ETAB1.'TEMPS') ;
  Tps = ETAB1.'TEMPS'.I ;
  T1 = 'EXTRAIRE' (ETAB1.'TEMPERATURES'.I) 'T  ' pt_TC1 ;
  T2 = 'EXTRAIRE' (ETAB1.'TEMPERATURES'.I) 'T  ' pt_TC2 ;
  TEMP1_1 = TEMP1_1 'ET' ('PROG' T1) ;
  TEMP2_1 = TEMP2_1 'ET' ('PROG' T2) ;
  I = I + 1 ;
'FIN' Boucle ;

* *****        *******************************
* * 3 *  (FRA) Calcul PASAPAS - Conductivite fonction de T et de ETAT
* *   *  (ENG) PASAPAS call - Conductivity function of temperature and ETAT parameter
* *****        *******************************

* (FRA) Defintion de la conductivite du tube : K est une fonction de T et ETAT
* (ENG) Conductivity tube definition : K is function of T and ETAT
*       -----------------------------------------------------
EvK = 'EVOL' 'MANU' 'T   ' ('PROG' 0. 2000.) 'K   ' ('PROG' 10. 30.) ;
NuagK = 'NUAGE' 'ETAT'*'FLOTTANT' 'K   '*'EVOLUTION'  0.  EvK    10. EvK ;
* (FRA) Ici ETAT n'a aucune influence sur K (ENG) Here ETAT plays no role on K
Mat_Tube = 'MATERIAU' Mod_Tube 'K   ' NuagK 'C   ' 400. 'RHO ' 7800. ;
MatTot = Mat_Tube 'ET' Mat_Teco ;

* (FRA) Evolution du parametre externe 'ETAT'
* (ENG) Evolution of the external parameter 'ETAT'
*       --------------------------------------------------------------
EvEtat = 'EVOL' 'MANU' 'TEMPS' ('PROG' 0. 1.E+9)
                       'ETAT'  ('PROG' 2. 2.) ;
Chp_E1 = 'MANU' 'CHPO' Tube 1 'ETAT' 1. ;
CharEtat = 'CHARGEMENT' 'ETAT' Chp_E1 EvEtat ;

* (FRA) Appel a PASAPAS-TRANSNON - (ENG) PASAPAS-TRANSNON call
*       ------------------------         ---------------------
ETAB2 = 'TABLE' ;
ETAB2.'MODELE' = ModTot ;
ETAB2.'CARACTERISTIQUES' = MatTot ;
ETAB2.'CHARGEMENT' = CharTECO 'ET' CharEtat ;
ETAB2.'TEMPERATURES' = 'TABLE' ;
ETAB2.'TEMPERATURES'. 0 = ChpT0 ;
ETAB2.'TEMPS_SAUVES' = l_tsauv ;
ETAB2.'TEMPS_CALCULES' = l_tcalc ;

ETAB2 . 'PERF_RAID' = VPSW ; ETAB2 . 'PERF_RAID_NIVEAU' = VNIV ; PASAPAS ETAB2 ; FPREC ETAB2 VTFPR ;

* (FRA) Depouillement des resultats - (ENG) Results extraction
*       ---------------------------         ------------------
TEMP1_2 = 'PROG' ;  TEMP2_2 = 'PROG' ;
I = 0 ;
'REPETER' Boucle ('DIMENSION' ETAB2.'TEMPS') ;
  Tps = ETAB2.'TEMPS'.I ;
  T1 = 'EXTRAIRE' (ETAB2.'TEMPERATURES'.I) 'T  ' pt_TC1 ;
  T2 = 'EXTRAIRE' (ETAB2.'TEMPERATURES'.I) 'T  ' pt_TC2 ;
  TEMP1_2 = TEMP1_2 'ET' ('PROG' T1) ;
  TEMP2_2 = TEMP2_2 'ET' ('PROG' T2) ;
  I = I + 1 ;
'FIN' Boucle ;


* *****        ******************************************
* * 4 *  (FRA) Comparaison des resultats - Tests d'erreur
* *   *  (ENG) Results comparison - Error tests
* *****        ******************************************

EcT_1 = 100. * ('MAXIMUM' ('ABS' (TEMP1_2 - TEMP1_1))) ;
EcT_2 = 100. * ('MAXIMUM' ('ABS' (TEMP2_2 - TEMP2_1))) ;

'MESS' ;
'MESS' 'Ecart Point 1 : ' EcT_1 ' %' ;
'MESS' 'Ecart Point 2 : ' EcT_2 ' %' ;
'MESS' ;
*
'SI' (('>' EcT_1 1.E-3) 'OU' ('>' EcT_2 1.E-3)) ;
  'ERREUR' 5 ;
'FINSI' ;
* [valid] FIN final


* ----- fin du cas test_vari_props
FINPROC ;
*
* ---------------------------------------------------------------------
* Cas 18 : test_vari_props (proprietes variables)
* ---------------------------------------------------------------------
SI ((IDEB0 '<EG' 18) 'ET' (IFIN0 '>EG' 18) 'ET' ('NON' ('EXIS' TSKIP 18))) ;
    MENAGE 'OBLI' ;
    MESS ' ' ;
    VMSG = CHAI '>>> Cas' ' ' '18' ' ' 'sur' ' ' NTOT0 ' ' ':' ' ' 'test_vari_props' ' ' '(proprietes variables)' ;
    MESS VMSG ;
    NPASS = 2 ;
    SI IPASS3 ;
        NPASS = 3 ;
    FINSI ;
    VTH1 = 0 ;
    VTH2 = 0 ;
    VTH3 = 0 ;
    VNE51 = 0 ;
    VNE01 = 0 ;
    VNE52 = 0 ;
    VNE02 = 0 ;
    VNE53 = 0 ;
    VNE03 = 0 ;
    REPETER ZVRUN NPASS ;
* ordre des passes alterne d'un cas a l'autre (derive des temps en session)
        VIP = NPASS + 1 - &ZVRUN ;
        VPSW = (VIP '>' 1) ;
        VNIV = 1 ;
        VMPS = 'inactif' ;
        SI (VIP 'EGA' 2) ;
            VMPS = 'actif niveau 1' ;
        FINSI ;
        SI (VIP 'EGA' 3) ;
            VNIV = 2 ;
            VMPS = 'actif niveau 2' ;
        FINSI ;
        AVANCE VRES 18 NTOT0 'test_vari_props' VIP 'en_cours' ;
        VMSG = CHAI '    passe' ' ' VIP ' ' 'sur' ' ' NPASS ' ' ': optimisations' ' ' VMPS ;
        MESS VMSG ;
        SI ITRACE0 ;
            OPTI 'IMPR' 'valid_trace.log' ;
        FINSI ;
        OPTI 'DIME' 3 'MODE' 'TRID' 'ELEM' 'CUB8' 'ECHO' IECHO0 ;
        VTHM = 0 ;
        REPETER ZVREP NREP0 ;
            VIR = &ZVREP ;
            VTFPR = TABL ;
            VTCT = TABL ;
            VTCT . 'N0' = 0 ;
            VTCT . 'N5' = 0 ;
            SI ITEMPS0 ;
                TEMP 'ZERO' ;
            FINSI ;
* Le cas s'execute dans une procedure (variables locales) : les variables
* d'un cas precedent ne peuvent pas masquer un mot-cle ou un operateur
            VC18 VPSW VNIV VTFPR VTCT IECHO0 ;
            VTHR = 0 ;
            SI ITEMPS0 ;
                VTHR = CHRONO ;
            FINSI ;
            SI (VIR 'EGA' 1) ;
                VTHM = VTHR ;
            SINON ;
                SI (VTHR '<' VTHM) ;
                    VTHM = VTHR ;
                FINSI ;
            FINSI ;
        FIN ZVREP ;
        VNER5 = VTCT . 'N5' ;
        VNER0 = VTCT . 'N0' ;
        SI (VIP 'EGA' 1) ;
            VTF1 = VTFPR ;
            VTH1 = VTHM ;
            VNE51 = VNER5 ;
            VNE01 = VNER0 ;
        FINSI ;
        SI (VIP 'EGA' 2) ;
            VTF2 = VTFPR ;
            VTH2 = VTHM ;
            VNE52 = VNER5 ;
            VNE02 = VNER0 ;
        FINSI ;
        SI (VIP 'EGA' 3) ;
            VTF3 = VTFPR ;
            VTH3 = VTHM ;
            VNE53 = VNER5 ;
            VNE03 = VNER0 ;
        FINSI ;
    FIN ZVRUN ;
*   comparaison des empreintes avec la passe 1
    VER2 VNL2 VNC2 = COMPAR VTF1 VTF2 ;
    VMOK2 = 'OK' ;
    SI ((VER2 '>' TOLV0) 'OU' (VNL2 '>' 0) 'OU' ('NON' (VNE52 'EGA' VNE51))) ;
        VMOK2 = 'ECART' ;
        VNBK2 = VNBK2 + 1 ;
    FINSI ;
    VER3 = 0. ;
    VNC3 = 0 ;
    VMOK3 = 'sans_objet' ;
    SI IPASS3 ;
        VER3 VNL3 VNC3 = COMPAR VTF1 VTF3 ;
        VMOK3 = 'OK' ;
        SI ((VER3 '>' TOLV3) 'OU' (VNL3 '>' 0) 'OU' ('NON' (VNE53 'EGA' VNE51))) ;
            VMOK3 = 'ECART' ;
            VNBK3 = VNBK3 + 1 ;
        FINSI ;
    FINSI ;
*   accelerations (temps de la passe 1 / temps de la passe)
    VSP2 = 0. ;
    VSP3 = 0. ;
    SI ((VTH1 '>' 0) 'ET' (VTH2 '>' 0)) ;
        VSP2 = (FLOT VTH1) '/' (FLOT VTH2) ;
    FINSI ;
    SI ((VTH1 '>' 0) 'ET' (VTH3 '>' 0)) ;
        VSP3 = (FLOT VTH1) '/' (FLOT VTH3) ;
    FINSI ;
    VSUM1 = VSUM1 + VTH1 ;
    VSUM2 = VSUM2 + VTH2 ;
    VSUM3 = VSUM3 + VTH3 ;
    VCLA = VTF2 . 'CL' ;
    VR2 = VTF2 . 'NRE' ;
    VC2 = VTF2 . 'NCA' ;
    VH2 = VTF2 . 'NHK' ;
    VM2 = VTF2 . 'NMA' ;
    VR3 = -1 ;
    VC3 = -1 ;
    VH3 = -1 ;
    VM3 = -1 ;
    SI IPASS3 ;
        VR3 = VTF3 . 'NRE' ;
        VC3 = VTF3 . 'NCA' ;
        VH3 = VTF3 . 'NHK' ;
        VM3 = VTF3 . 'NMA' ;
    FINSI ;
    VSE2 = CHAI 'FORMAT' '(1PE10.3)' VER2 ;
    VSE3 = CHAI 'FORMAT' '(1PE10.3)' VER3 ;
    VSS2 = CHAI 'FORMAT' '(F6.2)' VSP2 ;
    VSS3 = CHAI 'FORMAT' '(F6.2)' VSP3 ;
*   fichier de resultat du cas (SORT) et affichage console (MESS)
    OPTI 'SORT' 'valid_test_vari_props.log' ;
    VMSG = CHAI '=== Cas' ' ' '18' ' ' ':' ' ' 'test_vari_props' ' ' '(proprietes variables)' ' ' '===' ;
    MESS VMSG ;
    SORT 'CHAI' VMSG ;
    VMSG = CHAI 'Valeurs comparees :' ' ' VNC2 ;
    MESS VMSG ;
    SORT 'CHAI' VMSG ;
    VMSG = CHAI 'Temps horloge (ms) : origine' ' ' VTH1 ' ' '; niveau 1' ' ' VTH2 ' ' '; niveau 2' ' ' VTH3 ;
    MESS VMSG ;
    SORT 'CHAI' VMSG ;
    VMSG = CHAI 'Acceleration par rapport a l origine : niveau 1' ' ' VSS2 ' ' '; niveau 2' ' ' VSS3 ;
    MESS VMSG ;
    SORT 'CHAI' VMSG ;
    VMSG = CHAI 'Controles internes du cas : echecs origine' ' ' VNE51 ' ' '; niveau 1' ' ' VNE52 ' ' '; niveau 2' ' ' VNE53 ' ' '- reussites origine' ' ' VNE01 ' ' '; niveau 1' ' ' VNE02 ' ' '; niveau 2' ' ' VNE03 ;
    MESS VMSG ;
    SORT 'CHAI' VMSG ;
    VMSG = CHAI 'Classes exercees (1 MATVAR, 10 ENDOM, 20 VISCODOM, 100 GD) :' ' ' VCLA ;
    MESS VMSG ;
    SORT 'CHAI' VMSG ;
    VMSG = CHAI 'Niveau 1 : raideur reutilisee' ' ' VR2 ' ' 'fois, recalculee' ' ' VC2 ' ' 'fois ; HOOK evite' ' ' VH2 ' ' 'fois ; caracteristiques reutilisees' ' ' VM2 ' ' 'fois' ;
    MESS VMSG ;
    SORT 'CHAI' VMSG ;
    VMSG = CHAI 'Niveau 2 : raideur reutilisee' ' ' VR3 ' ' 'fois, recalculee' ' ' VC3 ' ' 'fois ; HOOK evite' ' ' VH3 ' ' 'fois ; caracteristiques reutilisees' ' ' VM3 ' ' 'fois' ;
    MESS VMSG ;
    SORT 'CHAI' VMSG ;
    VMSG = CHAI 'Ecart relatif maximal : niveau 1' ' ' VSE2 ' ' '; niveau 2' ' ' VSE3 ;
    MESS VMSG ;
    SORT 'CHAI' VMSG ;
    VMSG = CHAI 'RESULTAT : niveau 1' ' ' VMOK2 ' ' '; niveau 2' ' ' VMOK3 ;
    MESS VMSG ;
    SORT 'CHAI' VMSG ;
    SI (('EGA' VNC2 0) ) ;
        VMSG = CHAI 'ATTENTION : aucune valeur comparee (resultats non stockes ?)' ;
        MESS VMSG ;
        SORT 'CHAI' VMSG ;
    FINSI ;
    OPTI 'SORT' 'valid_inutile.tmp' ;
    VRES . 18 = TABL ;
    VRES . 18 . 'NOM' = 'test_vari_props' ;
    VRES . 18 . 'OKM' = VMOK2 ;
    VRES . 18 . 'OK3' = VMOK3 ;
    VRES . 18 . 'ERR2' = VER2 ;
    VRES . 18 . 'ERR3' = VER3 ;
    VRES . 18 . 'TH1' = VTH1 ;
    VRES . 18 . 'TH2' = VTH2 ;
    VRES . 18 . 'TH3' = VTH3 ;
    VRES . 18 . 'SP2F' = VSP2 ;
    VRES . 18 . 'SP3F' = VSP3 ;
    VRES . 18 . 'NRE2' = VR2 ;
    VRES . 18 . 'NCA2' = VC2 ;
    VRES . 18 . 'NHK2' = VH2 ;
    VRES . 18 . 'NMA2' = VM2 ;
    VRES . 18 . 'NRE3' = VR3 ;
    VRES . 18 . 'NCA3' = VC3 ;
    VRES . 18 . 'NHK3' = VH3 ;
    VRES . 18 . 'CL' = VCLA ;
    VRES . 18 . 'NCMP' = VNC2 ;
    VMSG = CHAI '<<< Cas' ' ' '18' ' ' 'sur' ' ' NTOT0 ' ' ':' ' ' 'test_vari_props' ' ' ':' ' ' 'niveau 1' ' ' VMOK2 ', niveau 2' ' ' VMOK3 ' ' '- ecart' ' ' VSE2 ', acceleration' ' ' VSS2 ' ' 'et' ' ' VSS3 ;
    MESS VMSG ;
    AVANCE VRES 18 NTOT0 'test_vari_props' NPASS 'termine' ;
    MENAGE 'OBLI' ;
FINSI ;

*
* ---------------------------------------------------------------------
* Procedure du cas 19 : dilthe (dilatation thermique)
* Variables locales : le cas ne voit aucune variable des cas precedents
* ---------------------------------------------------------------------
DEBPROC VC19 VPSW*'LOGIQUE' VNIV*'ENTIER' VTFPR*'TABLE' VTCT*'TABLE' IECHO0*'ENTIER' ;
* ----- debut du cas dilthe

* fichier dilthe.dgibi
************************************************************************
* Section : Thermique Mecanique
* Section : Mecanique Elastique
* Section : Mecanique Plastique
************************************************************************
'OPTION' 'ECHO' IECHO0 ;
************************************************************************
* NOM         : DILTHE
* DESCRIPTION : Dilatation thermique d'un cube encastre sur deux faces
*               opposees
*
*               Ce cas-test sortait en erreur de non-convergence dans
*               les iterations internes au refroidissement pour cause
*               de critere de convergence trop serre dans ccoin0.eso
*               (< precision machine).
*               Correction faite en fiche anomalie 9553
*
*
*
* LANGAGE     : GIBIANE-CAST3M
* AUTEURS     : Harry POMMIER (CEA/DEN/DM2S/SEMT/LTA)
*                + modifs StÃ©phane GOUNAND (CEA/DEN/DM2S/SEMT/LTA)
*                mÃ©l : stephane.gounand@cea.fr
**********************************************************************
* VERSION    : v1, 20/09/2017, version initiale
* HISTORIQUE : v1, 20/09/2017, crÃ©ation
* HISTORIQUE :
* HISTORIQUE :
************************************************************************
*
interact = faux ;
graph = faux ;
*
*Dilatation thermique d'un cube encastre sur deux faces opposees
*
'OPTI'  'DIME' 3 ;
'OPTI'  'ELEM' 'CUB8' ;
*
*MAILLAGE
ne = 2 ;
P1 = 0. 0. 0. ;
P2 = 0. 0.01 0. ;
P3 = 0. 0.01 0.01 ;
P4 = 0. 0. 0.01 ;
L12 = 'DROI' ne P1 P2 ;
L23 = 'DROI' ne P2 P3 ;
L34 = 'DROI' ne P3 P4 ;
L41 = 'DROI' ne P4 P1 ;
S1  = 'DALL' L12 L23 L34 L41 ;
MAILT = 'VOLU' 'TRAN' ne S1 (0.01 0. 0.) ;
*TRAC MAILT ;

*MODELES
MODTHER = 'MODE' MAILT 'THERMIQUE' 'CONDUCTION' ;
MODMECA = 'MODE' MAILT 'MECANIQUE' 'ELASTIQUE' 'ISOTROPE'
                       'PLASTIQUE' 'CHABOCHE1' ;

*MATERIAUX
*THER
LTK   = 'PROG' 20. 100. 200. 300. 400. 500. 600. 700.
   800. 900. 1000. 1200. 1400. 10000. ;
LK    = 'PROG' 14.7 15.8 17.2 18.6 20. 21.1 22.2 23.2
   24.1 24.8 25.5 26.9 28.3 28.3 ;
LTRHO = 'PROG' 20. 200. 400. 600. 800.
   1000. 1200. 1400. 1500. 10000. ;
LRHO  = 'PROG' 8000. 7930. 7840. 7750. 7650.
   7550. 7450. 7350. 7300. 7300. ;
LTCP  = 'PROG' 20. 100. 200. 300. 400. 600. 800.
   1000. 1200. 1500. 10000. ;
LCP   = 'PROG' 450. 490. 525. 545. 560. 580. 625. 660. 670. 690. 690. ;
EVK   = 'EVOL' 'MANU' 'T' LTK 'K' LK ;
EVRHO = 'EVOL' 'MANU' 'T' LTRHO 'RHO' LRHO ;
EVCP  = 'EVOL' 'MANU' 'T' LTCP 'C' LCP ;
*MECA
LTSIGY = 'PROG' 20. 200. 300. 400. 500. 600. 700.
   800. 900. 1000. 1500. 10000. ;
LSIGY  = 'PROG' 287.e6 198.e6 172.e6 157.e6 152.e6 145.e6 136.e6 127.e6
   115.e6 79.e6 5.e6 1.e6 ;
LTEMPER = 'PROG' 20. 200. 300. 400. 500. 600. 700. 800.
   900. 1000. 1500. 10000. ;
LRM    = 'PROG' 900.e6 800.e6 725.e6 440.e6 400.e6 360.e6 260.e6
   225.e6 60.e6 25.e6 5.e6 4.e6 ;
EVRM   = 'EVOL' 'MANU' 'T' LTEMPER 'RM'   LRM ;
LB     = 'PROG' 2. 2. 2. 5. 5. 5. 5. 5. 20. 20. 2. 2. ;
EVB    = 'EVOL' 'MANU' 'T' LTEMPER 'B'   LB ;
EVSIGY = 'EVOL' 'MANU' 'T' LTSIGY 'R0' LSIGY ;

MATHE = 'MATE' MODTHER 'K' EVK 'RHO' EVRHO 'C' EVCP ;
MAMEC = 'MATE' MODMECA 'YOUN' 200.e6 'NU' 0.3 'RHO' EVRHO 'ALPH' 20.e-6 'TALP' 0. 'TREF' 20.
                   'A' 0. 'C' 0. PSI 1. OMEG 0. 'R0' EVSIGY
                   'RM' EVRM 'B' EVB ;

*CLS
PTFIX1 = MAILT 'POIN' 'PLAN' (0. 0. 0.)
(1. 0. 0.) (0. 0. 1.) 1.e-5 ;
PTFIX2 = MAILT 'POIN' 'PLAN' (0. 0.01 0.)
(1. 0.01 0.) (0. 0.01 1.) 1.e-5 ;
PTFIXT = PTFIX1 'ET' PTFIX2 ;
BLOQM = 'BLOQ' PTFIXT 'UX' 'UY' 'UZ' ;

*CHARGEMENT THERMIQUE
SRC1 = 'SOUR' MODTHER 2.e9 MAILT                          ;
EVO1 = 'EVOL' 'MANU' 'TEMPS' (PROG 0. 5. 10. 10000.)
              'Q' ('PROG' 0. 1. 0. 0.)                    ;
CHA1 = 'CHAR' 'Q' SRC1 EVO1                               ;

*PASAPAS
LTCAL = 'PROG' 0.5 'PAS' 0.5 10. 'PAS' 10. 100. 'PAS' 1000. 10000. ;
CHPTINI = 'MANU' 'CHPO' MAILT 1 'T'  20.     'NATU' 'DIFFUS' ;
MODTOT = MODMECA 'ET' MODTHER ;
MATTOT = MATHE 'ET' MAMEC ;

HTAB                                   ='TABL'   ;
HTAB . 'MODELE'                        = MODTOT  ;
HTAB . 'CARACTERISTIQUES'              = MATTOT  ;
HTAB . 'BLOCAGES_MECANIQUES'           = BLOQM   ;
HTAB . 'CHARGEMENT'                    = CHA1    ;
HTAB . 'TEMPS_CALCULES'                = LTCAL   ;

HTAB . 'TEMPERATURES'                  = 'TABL'  ;
HTAB . 'TEMPERATURES'              . 0 = CHPTINI ;
HTAB . 'CELSIUS'                       = VRAI    ;
HTAB . 'PRECISION'                     = 1e-6    ;
HTAB . 'PROCESSEURS'                   = 'MOT' 'MONOPROCESSEUR' ;
HTAB . 'PROCEDURE_CHARTHER'            = VRAI    ;

HTAB . 'PERF_RAID' = VPSW ; HTAB . 'PERF_RAID_NIVEAU' = VNIV ; PASAPAS HTAB ; FPREC HTAB VTFPR ;
*
* Tests
* (pas de test pertinent pour l'instant, on ctrole juste
* l'execution sans erreur)
*
lok = vrai ;
*
* Test final
*
'SI' ('NON' lok) ;
   'ERREUR' 5 ;
'SINON' ;
   'SAUT' 1 'LIGN' ;
   'MESSAGE' ('CHAINE' 'Tout sest bien passe !') ;
'FINSI' ;
*
'SI' interact ;
   'OPTION' 'ECHO' IECHO0 ;
   'OPTION' 'DONN' 5 ;
'FINSI' ;
* [valid] FIN final


* ----- fin du cas dilthe
FINPROC ;
*
* ---------------------------------------------------------------------
* Cas 19 : dilthe (dilatation thermique)
* ---------------------------------------------------------------------
SI ((IDEB0 '<EG' 19) 'ET' (IFIN0 '>EG' 19) 'ET' ('NON' ('EXIS' TSKIP 19))) ;
    MENAGE 'OBLI' ;
    MESS ' ' ;
    VMSG = CHAI '>>> Cas' ' ' '19' ' ' 'sur' ' ' NTOT0 ' ' ':' ' ' 'dilthe' ' ' '(dilatation thermique)' ;
    MESS VMSG ;
    NPASS = 2 ;
    SI IPASS3 ;
        NPASS = 3 ;
    FINSI ;
    VTH1 = 0 ;
    VTH2 = 0 ;
    VTH3 = 0 ;
    VNE51 = 0 ;
    VNE01 = 0 ;
    VNE52 = 0 ;
    VNE02 = 0 ;
    VNE53 = 0 ;
    VNE03 = 0 ;
    REPETER ZVRUN NPASS ;
* ordre des passes alterne d'un cas a l'autre (derive des temps en session)
        VIP = &ZVRUN ;
        VPSW = (VIP '>' 1) ;
        VNIV = 1 ;
        VMPS = 'inactif' ;
        SI (VIP 'EGA' 2) ;
            VMPS = 'actif niveau 1' ;
        FINSI ;
        SI (VIP 'EGA' 3) ;
            VNIV = 2 ;
            VMPS = 'actif niveau 2' ;
        FINSI ;
        AVANCE VRES 19 NTOT0 'dilthe' VIP 'en_cours' ;
        VMSG = CHAI '    passe' ' ' VIP ' ' 'sur' ' ' NPASS ' ' ': optimisations' ' ' VMPS ;
        MESS VMSG ;
        SI ITRACE0 ;
            OPTI 'IMPR' 'valid_trace.log' ;
        FINSI ;
        OPTI 'DIME' 3 'MODE' 'TRID' 'ELEM' 'CUB8' 'ECHO' IECHO0 ;
        VTHM = 0 ;
        REPETER ZVREP NREP0 ;
            VIR = &ZVREP ;
            VTFPR = TABL ;
            VTCT = TABL ;
            VTCT . 'N0' = 0 ;
            VTCT . 'N5' = 0 ;
            SI ITEMPS0 ;
                TEMP 'ZERO' ;
            FINSI ;
* Le cas s'execute dans une procedure (variables locales) : les variables
* d'un cas precedent ne peuvent pas masquer un mot-cle ou un operateur
            VC19 VPSW VNIV VTFPR VTCT IECHO0 ;
            VTHR = 0 ;
            SI ITEMPS0 ;
                VTHR = CHRONO ;
            FINSI ;
            SI (VIR 'EGA' 1) ;
                VTHM = VTHR ;
            SINON ;
                SI (VTHR '<' VTHM) ;
                    VTHM = VTHR ;
                FINSI ;
            FINSI ;
        FIN ZVREP ;
        VNER5 = VTCT . 'N5' ;
        VNER0 = VTCT . 'N0' ;
        SI (VIP 'EGA' 1) ;
            VTF1 = VTFPR ;
            VTH1 = VTHM ;
            VNE51 = VNER5 ;
            VNE01 = VNER0 ;
        FINSI ;
        SI (VIP 'EGA' 2) ;
            VTF2 = VTFPR ;
            VTH2 = VTHM ;
            VNE52 = VNER5 ;
            VNE02 = VNER0 ;
        FINSI ;
        SI (VIP 'EGA' 3) ;
            VTF3 = VTFPR ;
            VTH3 = VTHM ;
            VNE53 = VNER5 ;
            VNE03 = VNER0 ;
        FINSI ;
    FIN ZVRUN ;
*   comparaison des empreintes avec la passe 1
    VER2 VNL2 VNC2 = COMPAR VTF1 VTF2 ;
    VMOK2 = 'OK' ;
    SI ((VER2 '>' TOLV0) 'OU' (VNL2 '>' 0) 'OU' ('NON' (VNE52 'EGA' VNE51))) ;
        VMOK2 = 'ECART' ;
        VNBK2 = VNBK2 + 1 ;
    FINSI ;
    VER3 = 0. ;
    VNC3 = 0 ;
    VMOK3 = 'sans_objet' ;
    SI IPASS3 ;
        VER3 VNL3 VNC3 = COMPAR VTF1 VTF3 ;
        VMOK3 = 'OK' ;
        SI ((VER3 '>' TOLV3) 'OU' (VNL3 '>' 0) 'OU' ('NON' (VNE53 'EGA' VNE51))) ;
            VMOK3 = 'ECART' ;
            VNBK3 = VNBK3 + 1 ;
        FINSI ;
    FINSI ;
*   accelerations (temps de la passe 1 / temps de la passe)
    VSP2 = 0. ;
    VSP3 = 0. ;
    SI ((VTH1 '>' 0) 'ET' (VTH2 '>' 0)) ;
        VSP2 = (FLOT VTH1) '/' (FLOT VTH2) ;
    FINSI ;
    SI ((VTH1 '>' 0) 'ET' (VTH3 '>' 0)) ;
        VSP3 = (FLOT VTH1) '/' (FLOT VTH3) ;
    FINSI ;
    VSUM1 = VSUM1 + VTH1 ;
    VSUM2 = VSUM2 + VTH2 ;
    VSUM3 = VSUM3 + VTH3 ;
    VCLA = VTF2 . 'CL' ;
    VR2 = VTF2 . 'NRE' ;
    VC2 = VTF2 . 'NCA' ;
    VH2 = VTF2 . 'NHK' ;
    VM2 = VTF2 . 'NMA' ;
    VR3 = -1 ;
    VC3 = -1 ;
    VH3 = -1 ;
    VM3 = -1 ;
    SI IPASS3 ;
        VR3 = VTF3 . 'NRE' ;
        VC3 = VTF3 . 'NCA' ;
        VH3 = VTF3 . 'NHK' ;
        VM3 = VTF3 . 'NMA' ;
    FINSI ;
    VSE2 = CHAI 'FORMAT' '(1PE10.3)' VER2 ;
    VSE3 = CHAI 'FORMAT' '(1PE10.3)' VER3 ;
    VSS2 = CHAI 'FORMAT' '(F6.2)' VSP2 ;
    VSS3 = CHAI 'FORMAT' '(F6.2)' VSP3 ;
*   fichier de resultat du cas (SORT) et affichage console (MESS)
    OPTI 'SORT' 'valid_dilthe.log' ;
    VMSG = CHAI '=== Cas' ' ' '19' ' ' ':' ' ' 'dilthe' ' ' '(dilatation thermique)' ' ' '===' ;
    MESS VMSG ;
    SORT 'CHAI' VMSG ;
    VMSG = CHAI 'Valeurs comparees :' ' ' VNC2 ;
    MESS VMSG ;
    SORT 'CHAI' VMSG ;
    VMSG = CHAI 'Temps horloge (ms) : origine' ' ' VTH1 ' ' '; niveau 1' ' ' VTH2 ' ' '; niveau 2' ' ' VTH3 ;
    MESS VMSG ;
    SORT 'CHAI' VMSG ;
    VMSG = CHAI 'Acceleration par rapport a l origine : niveau 1' ' ' VSS2 ' ' '; niveau 2' ' ' VSS3 ;
    MESS VMSG ;
    SORT 'CHAI' VMSG ;
    VMSG = CHAI 'Controles internes du cas : echecs origine' ' ' VNE51 ' ' '; niveau 1' ' ' VNE52 ' ' '; niveau 2' ' ' VNE53 ' ' '- reussites origine' ' ' VNE01 ' ' '; niveau 1' ' ' VNE02 ' ' '; niveau 2' ' ' VNE03 ;
    MESS VMSG ;
    SORT 'CHAI' VMSG ;
    VMSG = CHAI 'Classes exercees (1 MATVAR, 10 ENDOM, 20 VISCODOM, 100 GD) :' ' ' VCLA ;
    MESS VMSG ;
    SORT 'CHAI' VMSG ;
    VMSG = CHAI 'Niveau 1 : raideur reutilisee' ' ' VR2 ' ' 'fois, recalculee' ' ' VC2 ' ' 'fois ; HOOK evite' ' ' VH2 ' ' 'fois ; caracteristiques reutilisees' ' ' VM2 ' ' 'fois' ;
    MESS VMSG ;
    SORT 'CHAI' VMSG ;
    VMSG = CHAI 'Niveau 2 : raideur reutilisee' ' ' VR3 ' ' 'fois, recalculee' ' ' VC3 ' ' 'fois ; HOOK evite' ' ' VH3 ' ' 'fois ; caracteristiques reutilisees' ' ' VM3 ' ' 'fois' ;
    MESS VMSG ;
    SORT 'CHAI' VMSG ;
    VMSG = CHAI 'Ecart relatif maximal : niveau 1' ' ' VSE2 ' ' '; niveau 2' ' ' VSE3 ;
    MESS VMSG ;
    SORT 'CHAI' VMSG ;
    VMSG = CHAI 'RESULTAT : niveau 1' ' ' VMOK2 ' ' '; niveau 2' ' ' VMOK3 ;
    MESS VMSG ;
    SORT 'CHAI' VMSG ;
    SI (('EGA' VNC2 0) ) ;
        VMSG = CHAI 'ATTENTION : aucune valeur comparee (resultats non stockes ?)' ;
        MESS VMSG ;
        SORT 'CHAI' VMSG ;
    FINSI ;
    OPTI 'SORT' 'valid_inutile.tmp' ;
    VRES . 19 = TABL ;
    VRES . 19 . 'NOM' = 'dilthe' ;
    VRES . 19 . 'OKM' = VMOK2 ;
    VRES . 19 . 'OK3' = VMOK3 ;
    VRES . 19 . 'ERR2' = VER2 ;
    VRES . 19 . 'ERR3' = VER3 ;
    VRES . 19 . 'TH1' = VTH1 ;
    VRES . 19 . 'TH2' = VTH2 ;
    VRES . 19 . 'TH3' = VTH3 ;
    VRES . 19 . 'SP2F' = VSP2 ;
    VRES . 19 . 'SP3F' = VSP3 ;
    VRES . 19 . 'NRE2' = VR2 ;
    VRES . 19 . 'NCA2' = VC2 ;
    VRES . 19 . 'NHK2' = VH2 ;
    VRES . 19 . 'NMA2' = VM2 ;
    VRES . 19 . 'NRE3' = VR3 ;
    VRES . 19 . 'NCA3' = VC3 ;
    VRES . 19 . 'NHK3' = VH3 ;
    VRES . 19 . 'CL' = VCLA ;
    VRES . 19 . 'NCMP' = VNC2 ;
    VMSG = CHAI '<<< Cas' ' ' '19' ' ' 'sur' ' ' NTOT0 ' ' ':' ' ' 'dilthe' ' ' ':' ' ' 'niveau 1' ' ' VMOK2 ', niveau 2' ' ' VMOK3 ' ' '- ecart' ' ' VSE2 ', acceleration' ' ' VSS2 ' ' 'et' ' ' VSS3 ;
    MESS VMSG ;
    AVANCE VRES 19 NTOT0 'dilthe' NPASS 'termine' ;
    MENAGE 'OBLI' ;
FINSI ;

*
* ---------------------------------------------------------------------
* Procedure du cas 20 : char_constant (chargement constant, thermique)
* Variables locales : le cas ne voit aucune variable des cas precedents
* ---------------------------------------------------------------------
DEBPROC VC20 VPSW*'LOGIQUE' VNIV*'ENTIER' VTFPR*'TABLE' VTCT*'TABLE' IECHO0*'ENTIER' ;
* ----- debut du cas char_constant

* fichier : char_constant.dgibi
*
************************************************************************
*           Test de fonctionnement des CHARGEMEnts constants           *
* Calcul thermo-mecanique d'une portion de cylindre en dilatation avec *
* PASAPAS en grands deplacements                                       *
*                                                                      *
* - comparaison du resultat avec un calcul en utilisant la syntaxe     *
*   generale des chargements variables                                 *
* - test sur la valeur nulle des contraintes finale                    *
************************************************************************

** Options generales
OPTI 'DIME' 2 'MODE' 'AXIS' 'ELEM' 'QUA4' 'DENS' 0.1 'ECHO' IECHO0 ;
itrac = FAUX ;

** Instant final du calcul transitoire
tpsf = 1.E6 ;

** Maillage
l1 = DROI (1. 0.) (1.5 0.) ;
s1 = l1 TRAN (0. 2.) ;
p1 = l1 POIN 'PROC' (1.25 0.) ;
p2 = s1 POIN 'PROC' (1.25 2.) ;
p3 = s1 POIN 'PROC' (BARY s1) ;

** Modeles et materiaux
mot = MODE s1 'THERMIQUE' ;
mat = MATE mot 'K' 50. 'RHO' 7500. 'C' 400. 'TINI' 25. ;
mom = MODE s1 'MECANIQUE' ;
mam = MATE mom 'YOUN' 200.E9 'NU' 0.3 'ALPH' 1.E-5 'TREF' 25. 'TALP' 25. ;

** BLocages
bl1 = BLOQ 'T'  l1 ;
bl2 = BLOQ 'UZ' l1 ;

** Chargements
f1 = DEPI bl1 100. ;
ev1 = EVOL 'MANU' (PROG 0. tpsf) (PROG 1. 1.) ;
cha1 = CHAR 'TIMP' f1 ev1 ;
cha2 = CHAR 'TIMP' f1 ;

** Resolutions
t1 = TABL ;
t1 . 'MODELE'              = mot ET mom ;
t1 . 'CARACTERISTIQUES'    = mat ET mam ;
t1 . 'BLOCAGES_THERMIQUES' = bl1 ;
t1 . 'BLOCAGES_MECANIQUES' = bl2 ;
t1 . 'CHARGEMENT'          = cha1 ;
xpas = tpsf / 50. ;
t1 . 'TEMPS_CALCULES'      = PROG 0. 1. xpas 'PAS' xpas tpsf ;
t1 . 'GRANDS_DEPLACEMENTS' = VRAI ;
t2 = COPI t1 ;
t2 . 'CHARGEMENT'          = cha2 ;
t1 . 'PERF_RAID' = VPSW ; t1 . 'PERF_RAID_NIVEAU' = VNIV ; PASAPAS t1 ; FPREC t1 VTFPR ;
t2 . 'PERF_RAID' = VPSW ; t2 . 'PERF_RAID_NIVEAU' = VNIV ; PASAPAS t2 ; FPREC t2 VTFPR ;

** Post tratitement
** --temperature vs temps
ev11 = EVOL 'ROUG' 'TEMP' t1 'TEMPERATURES' 'T' p1 ;
ev12 = EVOL 'BLEU' 'TEMP' t1 'TEMPERATURES' 'T' p2 ;
ev13 = EVOL 'VERT' 'TEMP' t1 'TEMPERATURES' 'T' p3 ;
ev21 = EVOL 'ORAN' 'TEMP' t2 'TEMPERATURES' 'T' p1 ;
ev22 = EVOL 'TURQ' 'TEMP' t2 'TEMPERATURES' 'T' p2 ;
ev23 = EVOL 'OLIV' 'TEMP' t2 'TEMPERATURES' 'T' p3 ;
tleg = TABL ;
tleg . 1 = 'MARQ LOSA' ;
tleg . 2 = 'MARQ LOSA' ;
tleg . 3 = 'MARQ LOSA' ;
tleg . 'TITRE' = TABL ;
tleg . 'TITRE' . 1 = 'T en p1 - Chargement avec EVOL' ;
tleg . 'TITRE' . 2 = 'T en p2 - Chargement avec EVOL' ;
tleg . 'TITRE' . 3 = 'T en p3 - Chargement avec EVOL' ;
tleg . 'TITRE' . 4 = 'T en p1 - Chargement constant' ;
tleg . 'TITRE' . 5 = 'T en p2 - Chargement constant' ;
tleg . 'TITRE' . 6 = 'T en p3 - Chargement constant' ;
SI itrac ;
  DESS (ev11 ET ev12 ET ev13 ET ev21 ET ev22 ET ev23) 'TITR' 'Temperature vs Temps' 'LEGE' tleg ;
FINSI ;
** --contraintes mini et maxi vs temps
lis11 = PROG ;
lis12 = PROG ;
lis21 = PROG ;
lis22 = PROG ;
REPE b1 (DIME (t1 . 'TEMPS')) ;
  sig1  = t1 . 'CONTRAINTES'  . (&b1 - 1) ;
  lis11 = lis11 ET (MINI sig1) ;
  lis12 = lis12 ET (MAXI sig1) ;
  sig2  = t2 . 'CONTRAINTES'  . (&b1 - 1) ;
  lis21 = lis21 ET (MINI sig2) ;
  lis22 = lis22 ET (MAXI sig2) ;
FIN  b1 ;
lis0 = t1 . 'TEMPS_CALCULES' ;
ev11 = EVOL 'ROUG' 'MANU' 'Temps' lis0 'Contrainte min' lis11 ;
ev12 = EVOL 'BLEU' 'MANU' 'Temps' lis0 'Contrainte max' lis12 ;
ev21 = EVOL 'ORAN' 'MANU' 'Temps' lis0 'Contrainte min' lis21 ;
ev22 = EVOL 'TURQ' 'MANU' 'Temps' lis0 'Contrainte max' lis22 ;
tleg = TABL ;
tleg . 1 = 'MARQ LOSA' ;
tleg . 2 = 'MARQ LOSA' ;
tleg . 'TITRE' = TABL ;
tleg . 'TITRE' . 1 = 'Sig min - Chargement avec EVOL' ;
tleg . 'TITRE' . 2 = 'Sig max - Chargement avec EVOL' ;
tleg . 'TITRE' . 3 = 'Sig min - Chargement constant' ;
tleg . 'TITRE' . 4 = 'Sig max - Chargement constant' ;
SI itrac ;
  DESS (ev11 ET ev12 ET ev21 ET ev22) 'TITR' 'Contrainte vs Temps' 'LEGE' tleg 'SE' ;
FINSI ;

** Comparaison des solutions des tables t1 et t2
lsig = PROG (MAXI 'ABS' (lis11 - lis21)) (MAXI 'ABS' (lis12 - lis22)) ;
dsig = MAXI lsig ;
MESS 'Ecart maxi entre les 2 calculs =' dsig ;
SI (dsig > 1.) ;
  VTCT . 'N5' = (VTCT . 'N5') + 1 ;
FINSI ;

** Comparaison a la solution de reference (contrainte nulle au regime permanent)
lsf = PROG (EXTR lis21 (DIME lis21)) (EXTR lis22 (DIME lis22)) ;
sigf = MAXI 'ABS' lsf ;
MESS 'Contrainte finale max          =' sigf ;
SI (sigf > 2.E5) ;
  VTCT . 'N5' = (VTCT . 'N5') + 1 ;
FINSI ;
* [valid] FIN final


* ----- fin du cas char_constant
FINPROC ;
*
* ---------------------------------------------------------------------
* Cas 20 : char_constant (chargement constant, thermique)
* ---------------------------------------------------------------------
SI ((IDEB0 '<EG' 20) 'ET' (IFIN0 '>EG' 20) 'ET' ('NON' ('EXIS' TSKIP 20))) ;
    MENAGE 'OBLI' ;
    MESS ' ' ;
    VMSG = CHAI '>>> Cas' ' ' '20' ' ' 'sur' ' ' NTOT0 ' ' ':' ' ' 'char_constant' ' ' '(chargement constant, thermique)' ;
    MESS VMSG ;
    NPASS = 2 ;
    SI IPASS3 ;
        NPASS = 3 ;
    FINSI ;
    VTH1 = 0 ;
    VTH2 = 0 ;
    VTH3 = 0 ;
    VNE51 = 0 ;
    VNE01 = 0 ;
    VNE52 = 0 ;
    VNE02 = 0 ;
    VNE53 = 0 ;
    VNE03 = 0 ;
    REPETER ZVRUN NPASS ;
* ordre des passes alterne d'un cas a l'autre (derive des temps en session)
        VIP = NPASS + 1 - &ZVRUN ;
        VPSW = (VIP '>' 1) ;
        VNIV = 1 ;
        VMPS = 'inactif' ;
        SI (VIP 'EGA' 2) ;
            VMPS = 'actif niveau 1' ;
        FINSI ;
        SI (VIP 'EGA' 3) ;
            VNIV = 2 ;
            VMPS = 'actif niveau 2' ;
        FINSI ;
        AVANCE VRES 20 NTOT0 'char_constant' VIP 'en_cours' ;
        VMSG = CHAI '    passe' ' ' VIP ' ' 'sur' ' ' NPASS ' ' ': optimisations' ' ' VMPS ;
        MESS VMSG ;
        SI ITRACE0 ;
            OPTI 'IMPR' 'valid_trace.log' ;
        FINSI ;
        OPTI 'DIME' 3 'MODE' 'TRID' 'ELEM' 'CUB8' 'ECHO' IECHO0 ;
        VTHM = 0 ;
        REPETER ZVREP NREP0 ;
            VIR = &ZVREP ;
            VTFPR = TABL ;
            VTCT = TABL ;
            VTCT . 'N0' = 0 ;
            VTCT . 'N5' = 0 ;
            SI ITEMPS0 ;
                TEMP 'ZERO' ;
            FINSI ;
* Le cas s'execute dans une procedure (variables locales) : les variables
* d'un cas precedent ne peuvent pas masquer un mot-cle ou un operateur
            VC20 VPSW VNIV VTFPR VTCT IECHO0 ;
            VTHR = 0 ;
            SI ITEMPS0 ;
                VTHR = CHRONO ;
            FINSI ;
            SI (VIR 'EGA' 1) ;
                VTHM = VTHR ;
            SINON ;
                SI (VTHR '<' VTHM) ;
                    VTHM = VTHR ;
                FINSI ;
            FINSI ;
        FIN ZVREP ;
        VNER5 = VTCT . 'N5' ;
        VNER0 = VTCT . 'N0' ;
        SI (VIP 'EGA' 1) ;
            VTF1 = VTFPR ;
            VTH1 = VTHM ;
            VNE51 = VNER5 ;
            VNE01 = VNER0 ;
        FINSI ;
        SI (VIP 'EGA' 2) ;
            VTF2 = VTFPR ;
            VTH2 = VTHM ;
            VNE52 = VNER5 ;
            VNE02 = VNER0 ;
        FINSI ;
        SI (VIP 'EGA' 3) ;
            VTF3 = VTFPR ;
            VTH3 = VTHM ;
            VNE53 = VNER5 ;
            VNE03 = VNER0 ;
        FINSI ;
    FIN ZVRUN ;
*   comparaison des empreintes avec la passe 1
    VER2 VNL2 VNC2 = COMPAR VTF1 VTF2 ;
    VMOK2 = 'OK' ;
    SI ((VER2 '>' TOLV0) 'OU' (VNL2 '>' 0) 'OU' ('NON' (VNE52 'EGA' VNE51))) ;
        VMOK2 = 'ECART' ;
        VNBK2 = VNBK2 + 1 ;
    FINSI ;
    VER3 = 0. ;
    VNC3 = 0 ;
    VMOK3 = 'sans_objet' ;
    SI IPASS3 ;
        VER3 VNL3 VNC3 = COMPAR VTF1 VTF3 ;
        VMOK3 = 'OK' ;
        SI ((VER3 '>' TOLV3) 'OU' (VNL3 '>' 0) 'OU' ('NON' (VNE53 'EGA' VNE51))) ;
            VMOK3 = 'ECART' ;
            VNBK3 = VNBK3 + 1 ;
        FINSI ;
    FINSI ;
*   accelerations (temps de la passe 1 / temps de la passe)
    VSP2 = 0. ;
    VSP3 = 0. ;
    SI ((VTH1 '>' 0) 'ET' (VTH2 '>' 0)) ;
        VSP2 = (FLOT VTH1) '/' (FLOT VTH2) ;
    FINSI ;
    SI ((VTH1 '>' 0) 'ET' (VTH3 '>' 0)) ;
        VSP3 = (FLOT VTH1) '/' (FLOT VTH3) ;
    FINSI ;
    VSUM1 = VSUM1 + VTH1 ;
    VSUM2 = VSUM2 + VTH2 ;
    VSUM3 = VSUM3 + VTH3 ;
    VCLA = VTF2 . 'CL' ;
    VR2 = VTF2 . 'NRE' ;
    VC2 = VTF2 . 'NCA' ;
    VH2 = VTF2 . 'NHK' ;
    VM2 = VTF2 . 'NMA' ;
    VR3 = -1 ;
    VC3 = -1 ;
    VH3 = -1 ;
    VM3 = -1 ;
    SI IPASS3 ;
        VR3 = VTF3 . 'NRE' ;
        VC3 = VTF3 . 'NCA' ;
        VH3 = VTF3 . 'NHK' ;
        VM3 = VTF3 . 'NMA' ;
    FINSI ;
    VSE2 = CHAI 'FORMAT' '(1PE10.3)' VER2 ;
    VSE3 = CHAI 'FORMAT' '(1PE10.3)' VER3 ;
    VSS2 = CHAI 'FORMAT' '(F6.2)' VSP2 ;
    VSS3 = CHAI 'FORMAT' '(F6.2)' VSP3 ;
*   fichier de resultat du cas (SORT) et affichage console (MESS)
    OPTI 'SORT' 'valid_char_constant.log' ;
    VMSG = CHAI '=== Cas' ' ' '20' ' ' ':' ' ' 'char_constant' ' ' '(chargement constant, thermique)' ' ' '===' ;
    MESS VMSG ;
    SORT 'CHAI' VMSG ;
    VMSG = CHAI 'Valeurs comparees :' ' ' VNC2 ;
    MESS VMSG ;
    SORT 'CHAI' VMSG ;
    VMSG = CHAI 'Temps horloge (ms) : origine' ' ' VTH1 ' ' '; niveau 1' ' ' VTH2 ' ' '; niveau 2' ' ' VTH3 ;
    MESS VMSG ;
    SORT 'CHAI' VMSG ;
    VMSG = CHAI 'Acceleration par rapport a l origine : niveau 1' ' ' VSS2 ' ' '; niveau 2' ' ' VSS3 ;
    MESS VMSG ;
    SORT 'CHAI' VMSG ;
    VMSG = CHAI 'Controles internes du cas : echecs origine' ' ' VNE51 ' ' '; niveau 1' ' ' VNE52 ' ' '; niveau 2' ' ' VNE53 ' ' '- reussites origine' ' ' VNE01 ' ' '; niveau 1' ' ' VNE02 ' ' '; niveau 2' ' ' VNE03 ;
    MESS VMSG ;
    SORT 'CHAI' VMSG ;
    VMSG = CHAI 'Classes exercees (1 MATVAR, 10 ENDOM, 20 VISCODOM, 100 GD) :' ' ' VCLA ;
    MESS VMSG ;
    SORT 'CHAI' VMSG ;
    VMSG = CHAI 'Niveau 1 : raideur reutilisee' ' ' VR2 ' ' 'fois, recalculee' ' ' VC2 ' ' 'fois ; HOOK evite' ' ' VH2 ' ' 'fois ; caracteristiques reutilisees' ' ' VM2 ' ' 'fois' ;
    MESS VMSG ;
    SORT 'CHAI' VMSG ;
    VMSG = CHAI 'Niveau 2 : raideur reutilisee' ' ' VR3 ' ' 'fois, recalculee' ' ' VC3 ' ' 'fois ; HOOK evite' ' ' VH3 ' ' 'fois ; caracteristiques reutilisees' ' ' VM3 ' ' 'fois' ;
    MESS VMSG ;
    SORT 'CHAI' VMSG ;
    VMSG = CHAI 'Ecart relatif maximal : niveau 1' ' ' VSE2 ' ' '; niveau 2' ' ' VSE3 ;
    MESS VMSG ;
    SORT 'CHAI' VMSG ;
    VMSG = CHAI 'RESULTAT : niveau 1' ' ' VMOK2 ' ' '; niveau 2' ' ' VMOK3 ;
    MESS VMSG ;
    SORT 'CHAI' VMSG ;
    SI (('EGA' VNC2 0) ) ;
        VMSG = CHAI 'ATTENTION : aucune valeur comparee (resultats non stockes ?)' ;
        MESS VMSG ;
        SORT 'CHAI' VMSG ;
    FINSI ;
    OPTI 'SORT' 'valid_inutile.tmp' ;
    VRES . 20 = TABL ;
    VRES . 20 . 'NOM' = 'char_constant' ;
    VRES . 20 . 'OKM' = VMOK2 ;
    VRES . 20 . 'OK3' = VMOK3 ;
    VRES . 20 . 'ERR2' = VER2 ;
    VRES . 20 . 'ERR3' = VER3 ;
    VRES . 20 . 'TH1' = VTH1 ;
    VRES . 20 . 'TH2' = VTH2 ;
    VRES . 20 . 'TH3' = VTH3 ;
    VRES . 20 . 'SP2F' = VSP2 ;
    VRES . 20 . 'SP3F' = VSP3 ;
    VRES . 20 . 'NRE2' = VR2 ;
    VRES . 20 . 'NCA2' = VC2 ;
    VRES . 20 . 'NHK2' = VH2 ;
    VRES . 20 . 'NMA2' = VM2 ;
    VRES . 20 . 'NRE3' = VR3 ;
    VRES . 20 . 'NCA3' = VC3 ;
    VRES . 20 . 'NHK3' = VH3 ;
    VRES . 20 . 'CL' = VCLA ;
    VRES . 20 . 'NCMP' = VNC2 ;
    VMSG = CHAI '<<< Cas' ' ' '20' ' ' 'sur' ' ' NTOT0 ' ' ':' ' ' 'char_constant' ' ' ':' ' ' 'niveau 1' ' ' VMOK2 ', niveau 2' ' ' VMOK3 ' ' '- ecart' ' ' VSE2 ', acceleration' ' ' VSS2 ' ' 'et' ' ' VSS3 ;
    MESS VMSG ;
    AVANCE VRES 20 NTOT0 'char_constant' NPASS 'termine' ;
    MENAGE 'OBLI' ;
FINSI ;

*
* ---------------------------------------------------------------------
* Procedure du cas 21 : thgdep1 (thermique + grands deplacements)
* Variables locales : le cas ne voit aucune variable des cas precedents
* ---------------------------------------------------------------------
DEBPROC VC21 VPSW*'LOGIQUE' VNIV*'ENTIER' VTFPR*'TABLE' VTCT*'TABLE' IECHO0*'ENTIER' ;
* ----- debut du cas thgdep1

* fichier : thgdep1.dgibi
IG1      = FAUX ;
*----------------------------------------------------------------------*
* Cas-test de calcul thermomecanique en grands deplacements, avec      *
* convergence thermique-mÃ©canique.                                     *
* On teste egalement la reprise en fournissant une liste des temps     *
* calcules qui debute au temps suivant.                                *
*----------------------------------------------------------------------*
'OPTI' 'DIME' 2 'ELEM' 'QUA4' ;
*                                                                      *
O1       = 0. 0. ;
X1       = 1. 0. ;
Y1       = 0. 1. ;
*                                                                      *
L1       = O1 'DROI' 5 X1 ;
S1       = L1 'TRAN' 3 Y1 ;
L2       = S1 'COTE' 2 ;
L3       = S1 'COTE' 3 ;
L4       = S1 'COTE' 4 ;
'SI' IG1 ;
  'TRAC' 'QUAL' S1 ;
'FINS' ;
*                                                                      *
MODT1    = 'MODE' S1 'THERMIQUE' ;
MODM1    = 'MODE' S1 'MECANIQUE' ;
*                                                                      *
MATT1    = 'MATE' MODT1 'K' 100. 'RHO' 0. 'C' 1. ;
MATM1    = 'MATE' MODM1 'YOUN' 2.E9 'NU' 0.25 'ALPH' 1.E-6 'TALP' 0. 'TREF' 0.;
*                                                                      *
MOD1     = MODT1 'ET' MODM1 ;
MAT1     = MATT1 'ET' MATM1 ;
*                                                                      *
CLM1     = ('BLOQ' L1 'UY') 'ET' ('BLOQ' L4 'UX') ;
CLT1     = 'BLOQ' L1 'T' ;
*
F1       = 'PRES' 'MASS' MODM1 L3 (-1.E8) ;
Q1       = 'FLUX' MODT1 L3 300. ;
QREF1    = 'FLUX' MODT1 L3 1. ;
*                                                                      *
LTPS1    = 'PROG' 0. 1.0 2. ;
LAMP1    = 'PROG' 0. 0.5 1. ;
EV1      = 'EVOL' 'MANU' 'TEMP' LTPS1 'AMPL' LAMP1 ;
*                                                                      *
CGM1     = 'CHAR' 'MECA' F1 EV1 ;
CGT1     = 'CHAR' 'Q'    Q1 EV1 ;
*                                                                      *
TAB1                         = 'TABL' ;
TAB1 . 'MODELE'              = MOD1 ;
TAB1 . 'CARACTERISTIQUES'    = MAT1 ;
TAB1 . 'BLOCAGES_MECANIQUES' = CLM1 ;
TAB1 . 'BLOCAGES_THERMIQUES' = CLT1 ;
TAB1 . 'CHARGEMENT'          = CGM1 'ET' CGT1 ;
TAB1 . 'TEMPS_CALCULES'      = 'PROG' 0. 1. ;
TAB1 . 'GRANDS_DEPLACEMENTS' = VRAI ;
TAB1 . 'RELAXATION_THETA'    = 1. ;
TAB1 . 'CONVERGENCE_MEC_THE'    = VRAI ;
*                                                                      *
TAB1 . 'PERF_RAID' = VPSW ; TAB1 . 'PERF_RAID_NIVEAU' = VNIV ; PASAPAS TAB1 ; FPREC TAB1 VTFPR ;
*                                                                      *
CHT1     = TAB1 . 'TEMPERATURES' . 1 ;
DEP1     = TAB1 . 'DEPLACEMENTS' . 1 ;
*                                                                      *
UXM1    = 'MINI' ('EXCO' DEP1 'UX') ;
UYM1    = 'MAXI' ('EXCO' DEP1 'UY') ;
TM1     = 'MAXI' ('ENLE' CHT1 'LX') ;
FLU1    = ('MAXI' ('TIRE' CGT1 'Q' 1.)) / ('MAXI' QREF1) ;
TREF1   = FLU1 / ('EXTR' MATT1 'K' 1 1 1) * (1. + UYM1) / (1. + UXM1) ;
ERR1    = 'ABS' (TM1 - TREF1) ;
*                                                                      *
TAB1 . 'TEMPS_CALCULES'      = 'PROG' 2. ;
*                                                                      *
TAB1 . 'PERF_RAID' = VPSW ; TAB1 . 'PERF_RAID_NIVEAU' = VNIV ; PASAPAS TAB1 ; FPREC TAB1 VTFPR ;
*                                                                      *
IFIN1    = ('DIME' TAB1 . 'TEMPERATURES') - 1 ;
CHT2     = TAB1 . 'TEMPERATURES' . IFIN1 ;
DEP2     = TAB1 . 'DEPLACEMENTS' . IFIN1 ;
*                                                                      *
UXM2    = 'MINI' ('EXCO' DEP2 'UX') ;
UYM2    = 'MAXI' ('EXCO' DEP2 'UY') ;
TM2     = 'MAXI' ('ENLE' CHT2 'LX') ;
FLU2    = ('MAXI' ('TIRE' CGT1 'Q' 2.)) / ('MAXI' QREF1) ;
TREF2   = FLU2 / ('EXTR' MATT1 'K' 1 1 1) * (1. + UYM2) / (1. + UXM2) ;
ERR2    = 'ABS' (TM2 - TREF2) ;
*                                                                      *
'SI' ((ERR1 > 1.E-4) 'OU' (ERR2 > 1.E-4)) ;
  VTCT . 'N5' = (VTCT . 'N5') + 1 ;
'SINO' ;
  'OPTI' 'ECHO' IECHO0 ;
  'SAUT' 1 'LIGN' ;
  'MESS' ' ****** Erreur max. = ' ('MAXI' ('PROG' err1 err2)) ;
  'MESS' ' ' ;
  'MESS' ('CHAI' '    -'
'----------------------------- TEST REUSSI ----------------------------'
  '-') ;
'FINS' ;
* [valid] FIN final
'OPTI' 'ECHO' IECHO0 ;


* ----- fin du cas thgdep1
FINPROC ;
*
* ---------------------------------------------------------------------
* Cas 21 : thgdep1 (thermique + grands deplacements)
* ---------------------------------------------------------------------
SI ((IDEB0 '<EG' 21) 'ET' (IFIN0 '>EG' 21) 'ET' ('NON' ('EXIS' TSKIP 21))) ;
    MENAGE 'OBLI' ;
    MESS ' ' ;
    VMSG = CHAI '>>> Cas' ' ' '21' ' ' 'sur' ' ' NTOT0 ' ' ':' ' ' 'thgdep1' ' ' '(thermique + grands deplacements)' ;
    MESS VMSG ;
    NPASS = 2 ;
    SI IPASS3 ;
        NPASS = 3 ;
    FINSI ;
    VTH1 = 0 ;
    VTH2 = 0 ;
    VTH3 = 0 ;
    VNE51 = 0 ;
    VNE01 = 0 ;
    VNE52 = 0 ;
    VNE02 = 0 ;
    VNE53 = 0 ;
    VNE03 = 0 ;
    REPETER ZVRUN NPASS ;
* ordre des passes alterne d'un cas a l'autre (derive des temps en session)
        VIP = &ZVRUN ;
        VPSW = (VIP '>' 1) ;
        VNIV = 1 ;
        VMPS = 'inactif' ;
        SI (VIP 'EGA' 2) ;
            VMPS = 'actif niveau 1' ;
        FINSI ;
        SI (VIP 'EGA' 3) ;
            VNIV = 2 ;
            VMPS = 'actif niveau 2' ;
        FINSI ;
        AVANCE VRES 21 NTOT0 'thgdep1' VIP 'en_cours' ;
        VMSG = CHAI '    passe' ' ' VIP ' ' 'sur' ' ' NPASS ' ' ': optimisations' ' ' VMPS ;
        MESS VMSG ;
        SI ITRACE0 ;
            OPTI 'IMPR' 'valid_trace.log' ;
        FINSI ;
        OPTI 'DIME' 3 'MODE' 'TRID' 'ELEM' 'CUB8' 'ECHO' IECHO0 ;
        VTHM = 0 ;
        REPETER ZVREP NREP0 ;
            VIR = &ZVREP ;
            VTFPR = TABL ;
            VTCT = TABL ;
            VTCT . 'N0' = 0 ;
            VTCT . 'N5' = 0 ;
            SI ITEMPS0 ;
                TEMP 'ZERO' ;
            FINSI ;
* Le cas s'execute dans une procedure (variables locales) : les variables
* d'un cas precedent ne peuvent pas masquer un mot-cle ou un operateur
            VC21 VPSW VNIV VTFPR VTCT IECHO0 ;
            VTHR = 0 ;
            SI ITEMPS0 ;
                VTHR = CHRONO ;
            FINSI ;
            SI (VIR 'EGA' 1) ;
                VTHM = VTHR ;
            SINON ;
                SI (VTHR '<' VTHM) ;
                    VTHM = VTHR ;
                FINSI ;
            FINSI ;
        FIN ZVREP ;
        VNER5 = VTCT . 'N5' ;
        VNER0 = VTCT . 'N0' ;
        SI (VIP 'EGA' 1) ;
            VTF1 = VTFPR ;
            VTH1 = VTHM ;
            VNE51 = VNER5 ;
            VNE01 = VNER0 ;
        FINSI ;
        SI (VIP 'EGA' 2) ;
            VTF2 = VTFPR ;
            VTH2 = VTHM ;
            VNE52 = VNER5 ;
            VNE02 = VNER0 ;
        FINSI ;
        SI (VIP 'EGA' 3) ;
            VTF3 = VTFPR ;
            VTH3 = VTHM ;
            VNE53 = VNER5 ;
            VNE03 = VNER0 ;
        FINSI ;
    FIN ZVRUN ;
*   comparaison des empreintes avec la passe 1
    VER2 VNL2 VNC2 = COMPAR VTF1 VTF2 ;
    VMOK2 = 'OK' ;
    SI ((VER2 '>' TOLV0) 'OU' (VNL2 '>' 0) 'OU' ('NON' (VNE52 'EGA' VNE51))) ;
        VMOK2 = 'ECART' ;
        VNBK2 = VNBK2 + 1 ;
    FINSI ;
    VER3 = 0. ;
    VNC3 = 0 ;
    VMOK3 = 'sans_objet' ;
    SI IPASS3 ;
        VER3 VNL3 VNC3 = COMPAR VTF1 VTF3 ;
        VMOK3 = 'OK' ;
        SI ((VER3 '>' TOLV3) 'OU' (VNL3 '>' 0) 'OU' ('NON' (VNE53 'EGA' VNE51))) ;
            VMOK3 = 'ECART' ;
            VNBK3 = VNBK3 + 1 ;
        FINSI ;
    FINSI ;
*   accelerations (temps de la passe 1 / temps de la passe)
    VSP2 = 0. ;
    VSP3 = 0. ;
    SI ((VTH1 '>' 0) 'ET' (VTH2 '>' 0)) ;
        VSP2 = (FLOT VTH1) '/' (FLOT VTH2) ;
    FINSI ;
    SI ((VTH1 '>' 0) 'ET' (VTH3 '>' 0)) ;
        VSP3 = (FLOT VTH1) '/' (FLOT VTH3) ;
    FINSI ;
    VSUM1 = VSUM1 + VTH1 ;
    VSUM2 = VSUM2 + VTH2 ;
    VSUM3 = VSUM3 + VTH3 ;
    VCLA = VTF2 . 'CL' ;
    VR2 = VTF2 . 'NRE' ;
    VC2 = VTF2 . 'NCA' ;
    VH2 = VTF2 . 'NHK' ;
    VM2 = VTF2 . 'NMA' ;
    VR3 = -1 ;
    VC3 = -1 ;
    VH3 = -1 ;
    VM3 = -1 ;
    SI IPASS3 ;
        VR3 = VTF3 . 'NRE' ;
        VC3 = VTF3 . 'NCA' ;
        VH3 = VTF3 . 'NHK' ;
        VM3 = VTF3 . 'NMA' ;
    FINSI ;
    VSE2 = CHAI 'FORMAT' '(1PE10.3)' VER2 ;
    VSE3 = CHAI 'FORMAT' '(1PE10.3)' VER3 ;
    VSS2 = CHAI 'FORMAT' '(F6.2)' VSP2 ;
    VSS3 = CHAI 'FORMAT' '(F6.2)' VSP3 ;
*   fichier de resultat du cas (SORT) et affichage console (MESS)
    OPTI 'SORT' 'valid_thgdep1.log' ;
    VMSG = CHAI '=== Cas' ' ' '21' ' ' ':' ' ' 'thgdep1' ' ' '(thermique + grands deplacements)' ' ' '===' ;
    MESS VMSG ;
    SORT 'CHAI' VMSG ;
    VMSG = CHAI 'Valeurs comparees :' ' ' VNC2 ;
    MESS VMSG ;
    SORT 'CHAI' VMSG ;
    VMSG = CHAI 'Temps horloge (ms) : origine' ' ' VTH1 ' ' '; niveau 1' ' ' VTH2 ' ' '; niveau 2' ' ' VTH3 ;
    MESS VMSG ;
    SORT 'CHAI' VMSG ;
    VMSG = CHAI 'Acceleration par rapport a l origine : niveau 1' ' ' VSS2 ' ' '; niveau 2' ' ' VSS3 ;
    MESS VMSG ;
    SORT 'CHAI' VMSG ;
    VMSG = CHAI 'Controles internes du cas : echecs origine' ' ' VNE51 ' ' '; niveau 1' ' ' VNE52 ' ' '; niveau 2' ' ' VNE53 ' ' '- reussites origine' ' ' VNE01 ' ' '; niveau 1' ' ' VNE02 ' ' '; niveau 2' ' ' VNE03 ;
    MESS VMSG ;
    SORT 'CHAI' VMSG ;
    VMSG = CHAI 'Classes exercees (1 MATVAR, 10 ENDOM, 20 VISCODOM, 100 GD) :' ' ' VCLA ;
    MESS VMSG ;
    SORT 'CHAI' VMSG ;
    VMSG = CHAI 'Niveau 1 : raideur reutilisee' ' ' VR2 ' ' 'fois, recalculee' ' ' VC2 ' ' 'fois ; HOOK evite' ' ' VH2 ' ' 'fois ; caracteristiques reutilisees' ' ' VM2 ' ' 'fois' ;
    MESS VMSG ;
    SORT 'CHAI' VMSG ;
    VMSG = CHAI 'Niveau 2 : raideur reutilisee' ' ' VR3 ' ' 'fois, recalculee' ' ' VC3 ' ' 'fois ; HOOK evite' ' ' VH3 ' ' 'fois ; caracteristiques reutilisees' ' ' VM3 ' ' 'fois' ;
    MESS VMSG ;
    SORT 'CHAI' VMSG ;
    VMSG = CHAI 'Ecart relatif maximal : niveau 1' ' ' VSE2 ' ' '; niveau 2' ' ' VSE3 ;
    MESS VMSG ;
    SORT 'CHAI' VMSG ;
    VMSG = CHAI 'RESULTAT : niveau 1' ' ' VMOK2 ' ' '; niveau 2' ' ' VMOK3 ;
    MESS VMSG ;
    SORT 'CHAI' VMSG ;
    SI (('EGA' VNC2 0) ) ;
        VMSG = CHAI 'ATTENTION : aucune valeur comparee (resultats non stockes ?)' ;
        MESS VMSG ;
        SORT 'CHAI' VMSG ;
    FINSI ;
    OPTI 'SORT' 'valid_inutile.tmp' ;
    VRES . 21 = TABL ;
    VRES . 21 . 'NOM' = 'thgdep1' ;
    VRES . 21 . 'OKM' = VMOK2 ;
    VRES . 21 . 'OK3' = VMOK3 ;
    VRES . 21 . 'ERR2' = VER2 ;
    VRES . 21 . 'ERR3' = VER3 ;
    VRES . 21 . 'TH1' = VTH1 ;
    VRES . 21 . 'TH2' = VTH2 ;
    VRES . 21 . 'TH3' = VTH3 ;
    VRES . 21 . 'SP2F' = VSP2 ;
    VRES . 21 . 'SP3F' = VSP3 ;
    VRES . 21 . 'NRE2' = VR2 ;
    VRES . 21 . 'NCA2' = VC2 ;
    VRES . 21 . 'NHK2' = VH2 ;
    VRES . 21 . 'NMA2' = VM2 ;
    VRES . 21 . 'NRE3' = VR3 ;
    VRES . 21 . 'NCA3' = VC3 ;
    VRES . 21 . 'NHK3' = VH3 ;
    VRES . 21 . 'CL' = VCLA ;
    VRES . 21 . 'NCMP' = VNC2 ;
    VMSG = CHAI '<<< Cas' ' ' '21' ' ' 'sur' ' ' NTOT0 ' ' ':' ' ' 'thgdep1' ' ' ':' ' ' 'niveau 1' ' ' VMOK2 ', niveau 2' ' ' VMOK3 ' ' '- ecart' ' ' VSE2 ', acceleration' ' ' VSS2 ' ' 'et' ' ' VSS3 ;
    MESS VMSG ;
    AVANCE VRES 21 NTOT0 'thgdep1' NPASS 'termine' ;
    MENAGE 'OBLI' ;
FINSI ;

*
* ---------------------------------------------------------------------
* Procedure du cas 22 : ther_meca_coque (thermomecanique coque)
* Variables locales : le cas ne voit aucune variable des cas precedents
* ---------------------------------------------------------------------
DEBPROC VC22 VPSW*'LOGIQUE' VNIV*'ENTIER' VTFPR*'TABLE' VTCT*'TABLE' IECHO0*'ENTIER' ;
* ----- debut du cas ther_meca_coque

************************************************************************
*          Exemple de calcul thermo-mÃ©canique avec des coques          *
*                                                                      *
* On modÃ©lise une plaque trouÃ©e encastrÃ©e sur les bords et soumise Ã    *
* une Ã©lÃ©vation de tempÃ©rature sur le trou. La dilatation contrariÃ©e   *
* induit des contraintes et la flexion de la plaque                    *
************************************************************************


** Options gÃ©nÃ©rales
OPTI 'DIME' 3 'MODE' 'TRID' 'ELEM' 'TRI6' ;
itrac = FAUX ;
ray = 0.1 ;
lon = 1. ;
epa = 0.01 ;

** Maillage
p0 = 0. 0. 0. ;
pz = 0. 0. 1. ;
p1 = ray 0. 0. ;
ce = CERC 20 'ROTA' 360. p1 p0 pz 'ELIM' ;
p2 = lon lon 0. ;
p3 = lon (-1. * lon) 0. ;
p4 = -1. * (lon lon 0.) ;
p5 = (-1. * lon) lon 0. ;
ld = DROI 10 p2 p3 ;
lb = DROI 10 p3 p4 ;
lg = DROI 10 p4 p5 ;
lh = DROI 10 p5 p2 ;
co = ld ET lb ET lg ET lh ;
mail = SURF (co ET ce) 'PLAN' ;

** ModÃ¨les
mot = MODE mail 'THERMIQUE' 'COQ6' ;
mat = MATE mot 'K' 50. 'C' 500. 'RHO' 7800. 'TINI' 0. 'EPAI' epa ;
mom = MODE mail 'MECANIQUE' 'COQ6' ;
mam = MATE mom 'YOUN' 200.E9 'NU' 0.3 'ALPH' 5.E-5 'TREF' 0. 'TALP' 0. 'EPAI' epa ;

** Blocages
clt1 = BLOQ 'TINF' 'T' 'TSUP' co ;
clt2 = BLOQ 'TINF' 'T' 'TSUP' ce ;
clm = BLOQ 'DEPL' co ;

** Chargement
ft = DEPI clt2 200. ;
ev = EVOL 'MANU' (PROG 0. 2.5E4 5.E4 10.E4) (PROG 0. 1. 0. 0.) ;
cha = CHAR 'TIMP' ft ev ;

** RÃ©solution
t                         = TABL ;
t . 'MODELE'              = mot ET mom ;
t . 'CARACTERISTIQUES'    = mat ET mam ;
t . 'BLOCAGES_THERMIQUES' = clt1 ET clt2 ;
t . 'BLOCAGES_MECANIQUES' = clm ;
t . 'CHARGEMENT'          = cha ;
t . 'TEMPS_CALCULES'      = PROG 1.E3 'PAS' 1.E3 10.E4 ;
t . 'PERF_RAID' = VPSW ; t . 'PERF_RAID_NIVEAU' = VNIV ; PASAPAS t ; FPREC t VTFPR ;

** Post-traitement
tt = t . 'TEMPS' ;
tp = t . 'TEMPERATURES' ;
td = t . 'DEPLACEMENTS' ;
* 1) tracÃ© de la tempÃ©rature sur la configuration dÃ©formÃ©e Ã  chaque instant
nt = DIME tt ;
REPE bt nt ;
  tpsi = tt . (&bt - 1) ;
  defi = DEFO mail (td . (&bt - 1)) 100. ;
  ti = EXCO 'T' (tp . (&bt - 1)) ;
  titi = CHAI 'Temperatures au temps' ' ' tpsi ;
  SI itrac ;
    TRAC ti mail defi 'TITR' titi ;
  FINSI ;
FIN bt ;
* 2) Ã©volutions temporelles de T et UZ en quelques points
lcoul = MOTS 'DEFA' 'ROUG' 'ORAN' 'JAUN' 'VERT' 'OLIV' 'TURQ' 'BLEU' 'VIOL' ;
ncour = DIME lcoul ;
tvst = VIDE 'EVOLUTION' ;
uvst = VIDE 'EVOLUTION' ;
tleg = TABL ;
tleg . 'TITRE' = TABL ;
REPE bcour ncour ;
  couli = EXTR lcoul &bcour ;
  xi = ray + ((lon - ray) * (((FLOT &bcour) - 1.)) / ((FLOT ncour) - 1.)) ;
  pti = mail POIN 'PROC' (xi 0. 0.) ;
  tvst = tvst ET (EVOL couli 'TEMP' t 'TEMPERATURES' 'T'  pti) ;
  uvst = uvst ET (EVOL couli 'TEMP' t 'DEPLACEMENTS' 'UZ' pti) ;
  tleg . 'TITRE' . &bcour = CHAI 'En x =' xi ;
FIN bcour ;
SI itrac ;
  DESS tvst 'TITR' 'Temperature VS temps' 'LEGE' tleg ;
  DESS uvst 'TITR' 'Deplacement VS temps' 'LEGE' tleg ;
FINSI ;
* [valid] FIN final


* ----- fin du cas ther_meca_coque
FINPROC ;
*
* ---------------------------------------------------------------------
* Cas 22 : ther_meca_coque (thermomecanique coque)
* ---------------------------------------------------------------------
SI ((IDEB0 '<EG' 22) 'ET' (IFIN0 '>EG' 22) 'ET' ('NON' ('EXIS' TSKIP 22))) ;
    MENAGE 'OBLI' ;
    MESS ' ' ;
    VMSG = CHAI '>>> Cas' ' ' '22' ' ' 'sur' ' ' NTOT0 ' ' ':' ' ' 'ther_meca_coque' ' ' '(thermomecanique coque)' ;
    MESS VMSG ;
    NPASS = 2 ;
    SI IPASS3 ;
        NPASS = 3 ;
    FINSI ;
    VTH1 = 0 ;
    VTH2 = 0 ;
    VTH3 = 0 ;
    VNE51 = 0 ;
    VNE01 = 0 ;
    VNE52 = 0 ;
    VNE02 = 0 ;
    VNE53 = 0 ;
    VNE03 = 0 ;
    REPETER ZVRUN NPASS ;
* ordre des passes alterne d'un cas a l'autre (derive des temps en session)
        VIP = NPASS + 1 - &ZVRUN ;
        VPSW = (VIP '>' 1) ;
        VNIV = 1 ;
        VMPS = 'inactif' ;
        SI (VIP 'EGA' 2) ;
            VMPS = 'actif niveau 1' ;
        FINSI ;
        SI (VIP 'EGA' 3) ;
            VNIV = 2 ;
            VMPS = 'actif niveau 2' ;
        FINSI ;
        AVANCE VRES 22 NTOT0 'ther_meca_coque' VIP 'en_cours' ;
        VMSG = CHAI '    passe' ' ' VIP ' ' 'sur' ' ' NPASS ' ' ': optimisations' ' ' VMPS ;
        MESS VMSG ;
        SI ITRACE0 ;
            OPTI 'IMPR' 'valid_trace.log' ;
        FINSI ;
        OPTI 'DIME' 3 'MODE' 'TRID' 'ELEM' 'CUB8' 'ECHO' IECHO0 ;
        VTHM = 0 ;
        REPETER ZVREP NREP0 ;
            VIR = &ZVREP ;
            VTFPR = TABL ;
            VTCT = TABL ;
            VTCT . 'N0' = 0 ;
            VTCT . 'N5' = 0 ;
            SI ITEMPS0 ;
                TEMP 'ZERO' ;
            FINSI ;
* Le cas s'execute dans une procedure (variables locales) : les variables
* d'un cas precedent ne peuvent pas masquer un mot-cle ou un operateur
            VC22 VPSW VNIV VTFPR VTCT IECHO0 ;
            VTHR = 0 ;
            SI ITEMPS0 ;
                VTHR = CHRONO ;
            FINSI ;
            SI (VIR 'EGA' 1) ;
                VTHM = VTHR ;
            SINON ;
                SI (VTHR '<' VTHM) ;
                    VTHM = VTHR ;
                FINSI ;
            FINSI ;
        FIN ZVREP ;
        VNER5 = VTCT . 'N5' ;
        VNER0 = VTCT . 'N0' ;
        SI (VIP 'EGA' 1) ;
            VTF1 = VTFPR ;
            VTH1 = VTHM ;
            VNE51 = VNER5 ;
            VNE01 = VNER0 ;
        FINSI ;
        SI (VIP 'EGA' 2) ;
            VTF2 = VTFPR ;
            VTH2 = VTHM ;
            VNE52 = VNER5 ;
            VNE02 = VNER0 ;
        FINSI ;
        SI (VIP 'EGA' 3) ;
            VTF3 = VTFPR ;
            VTH3 = VTHM ;
            VNE53 = VNER5 ;
            VNE03 = VNER0 ;
        FINSI ;
    FIN ZVRUN ;
*   comparaison des empreintes avec la passe 1
    VER2 VNL2 VNC2 = COMPAR VTF1 VTF2 ;
    VMOK2 = 'OK' ;
    SI ((VER2 '>' TOLV0) 'OU' (VNL2 '>' 0) 'OU' ('NON' (VNE52 'EGA' VNE51))) ;
        VMOK2 = 'ECART' ;
        VNBK2 = VNBK2 + 1 ;
    FINSI ;
    VER3 = 0. ;
    VNC3 = 0 ;
    VMOK3 = 'sans_objet' ;
    SI IPASS3 ;
        VER3 VNL3 VNC3 = COMPAR VTF1 VTF3 ;
        VMOK3 = 'OK' ;
        SI ((VER3 '>' TOLV3) 'OU' (VNL3 '>' 0) 'OU' ('NON' (VNE53 'EGA' VNE51))) ;
            VMOK3 = 'ECART' ;
            VNBK3 = VNBK3 + 1 ;
        FINSI ;
    FINSI ;
*   accelerations (temps de la passe 1 / temps de la passe)
    VSP2 = 0. ;
    VSP3 = 0. ;
    SI ((VTH1 '>' 0) 'ET' (VTH2 '>' 0)) ;
        VSP2 = (FLOT VTH1) '/' (FLOT VTH2) ;
    FINSI ;
    SI ((VTH1 '>' 0) 'ET' (VTH3 '>' 0)) ;
        VSP3 = (FLOT VTH1) '/' (FLOT VTH3) ;
    FINSI ;
    VSUM1 = VSUM1 + VTH1 ;
    VSUM2 = VSUM2 + VTH2 ;
    VSUM3 = VSUM3 + VTH3 ;
    VCLA = VTF2 . 'CL' ;
    VR2 = VTF2 . 'NRE' ;
    VC2 = VTF2 . 'NCA' ;
    VH2 = VTF2 . 'NHK' ;
    VM2 = VTF2 . 'NMA' ;
    VR3 = -1 ;
    VC3 = -1 ;
    VH3 = -1 ;
    VM3 = -1 ;
    SI IPASS3 ;
        VR3 = VTF3 . 'NRE' ;
        VC3 = VTF3 . 'NCA' ;
        VH3 = VTF3 . 'NHK' ;
        VM3 = VTF3 . 'NMA' ;
    FINSI ;
    VSE2 = CHAI 'FORMAT' '(1PE10.3)' VER2 ;
    VSE3 = CHAI 'FORMAT' '(1PE10.3)' VER3 ;
    VSS2 = CHAI 'FORMAT' '(F6.2)' VSP2 ;
    VSS3 = CHAI 'FORMAT' '(F6.2)' VSP3 ;
*   fichier de resultat du cas (SORT) et affichage console (MESS)
    OPTI 'SORT' 'valid_ther_meca_coque.log' ;
    VMSG = CHAI '=== Cas' ' ' '22' ' ' ':' ' ' 'ther_meca_coque' ' ' '(thermomecanique coque)' ' ' '===' ;
    MESS VMSG ;
    SORT 'CHAI' VMSG ;
    VMSG = CHAI 'Valeurs comparees :' ' ' VNC2 ;
    MESS VMSG ;
    SORT 'CHAI' VMSG ;
    VMSG = CHAI 'Temps horloge (ms) : origine' ' ' VTH1 ' ' '; niveau 1' ' ' VTH2 ' ' '; niveau 2' ' ' VTH3 ;
    MESS VMSG ;
    SORT 'CHAI' VMSG ;
    VMSG = CHAI 'Acceleration par rapport a l origine : niveau 1' ' ' VSS2 ' ' '; niveau 2' ' ' VSS3 ;
    MESS VMSG ;
    SORT 'CHAI' VMSG ;
    VMSG = CHAI 'Controles internes du cas : echecs origine' ' ' VNE51 ' ' '; niveau 1' ' ' VNE52 ' ' '; niveau 2' ' ' VNE53 ' ' '- reussites origine' ' ' VNE01 ' ' '; niveau 1' ' ' VNE02 ' ' '; niveau 2' ' ' VNE03 ;
    MESS VMSG ;
    SORT 'CHAI' VMSG ;
    VMSG = CHAI 'Classes exercees (1 MATVAR, 10 ENDOM, 20 VISCODOM, 100 GD) :' ' ' VCLA ;
    MESS VMSG ;
    SORT 'CHAI' VMSG ;
    VMSG = CHAI 'Niveau 1 : raideur reutilisee' ' ' VR2 ' ' 'fois, recalculee' ' ' VC2 ' ' 'fois ; HOOK evite' ' ' VH2 ' ' 'fois ; caracteristiques reutilisees' ' ' VM2 ' ' 'fois' ;
    MESS VMSG ;
    SORT 'CHAI' VMSG ;
    VMSG = CHAI 'Niveau 2 : raideur reutilisee' ' ' VR3 ' ' 'fois, recalculee' ' ' VC3 ' ' 'fois ; HOOK evite' ' ' VH3 ' ' 'fois ; caracteristiques reutilisees' ' ' VM3 ' ' 'fois' ;
    MESS VMSG ;
    SORT 'CHAI' VMSG ;
    VMSG = CHAI 'Ecart relatif maximal : niveau 1' ' ' VSE2 ' ' '; niveau 2' ' ' VSE3 ;
    MESS VMSG ;
    SORT 'CHAI' VMSG ;
    VMSG = CHAI 'RESULTAT : niveau 1' ' ' VMOK2 ' ' '; niveau 2' ' ' VMOK3 ;
    MESS VMSG ;
    SORT 'CHAI' VMSG ;
    SI (('EGA' VNC2 0) ) ;
        VMSG = CHAI 'ATTENTION : aucune valeur comparee (resultats non stockes ?)' ;
        MESS VMSG ;
        SORT 'CHAI' VMSG ;
    FINSI ;
    OPTI 'SORT' 'valid_inutile.tmp' ;
    VRES . 22 = TABL ;
    VRES . 22 . 'NOM' = 'ther_meca_coque' ;
    VRES . 22 . 'OKM' = VMOK2 ;
    VRES . 22 . 'OK3' = VMOK3 ;
    VRES . 22 . 'ERR2' = VER2 ;
    VRES . 22 . 'ERR3' = VER3 ;
    VRES . 22 . 'TH1' = VTH1 ;
    VRES . 22 . 'TH2' = VTH2 ;
    VRES . 22 . 'TH3' = VTH3 ;
    VRES . 22 . 'SP2F' = VSP2 ;
    VRES . 22 . 'SP3F' = VSP3 ;
    VRES . 22 . 'NRE2' = VR2 ;
    VRES . 22 . 'NCA2' = VC2 ;
    VRES . 22 . 'NHK2' = VH2 ;
    VRES . 22 . 'NMA2' = VM2 ;
    VRES . 22 . 'NRE3' = VR3 ;
    VRES . 22 . 'NCA3' = VC3 ;
    VRES . 22 . 'NHK3' = VH3 ;
    VRES . 22 . 'CL' = VCLA ;
    VRES . 22 . 'NCMP' = VNC2 ;
    VMSG = CHAI '<<< Cas' ' ' '22' ' ' 'sur' ' ' NTOT0 ' ' ':' ' ' 'ther_meca_coque' ' ' ':' ' ' 'niveau 1' ' ' VMOK2 ', niveau 2' ' ' VMOK3 ' ' '- ecart' ' ' VSE2 ', acceleration' ' ' VSS2 ' ' 'et' ' ' VSS3 ;
    MESS VMSG ;
    AVANCE VRES 22 NTOT0 'ther_meca_coque' NPASS 'termine' ;
    MENAGE 'OBLI' ;
FINSI ;

*
* ---------------------------------------------------------------------
* Procedure du cas 23 : dependance (dependance parametres, coque)
* Variables locales : le cas ne voit aucune variable des cas precedents
* ---------------------------------------------------------------------
DEBPROC VC23 VPSW*'LOGIQUE' VNIV*'ENTIER' VTFPR*'TABLE' VTCT*'TABLE' IECHO0*'ENTIER' ;
* ----- debut du cas dependance

* fichier :  dependance.dgibi
************************************************************************
* Section : Mecanique Plastique
************************************************************************
********************************************************************
*    TEST  DE  CONDENSATION
*
*       poutre des section rectangulaire en appui simples
*       face inferieure renforcee par une plaque en acier
*       un renfort interne de type  poutre
*       un renfort interne de type  barr
*
*   les renforts sont disjoints  du maillage massif
*
*   comparaison des solutions obtenues par :

*                       rela accro /  resou
*                       dependance /  resou
*                       cmct       /  resou + mrem
*
*                       test de fonctionnement dans pasapas
*
*********************************************************************
opti echo IECHO0;
graph='N'    ;
opti dime 3 elem cub8 ;
*
* GEOMETRIE
*
long = 10.0;
*---BETON
h =  1.;
h1= .9 ;
*h1 = 1. -  (1./6.1);
pa=0.0 0. 0.0;
pb=long 0. 0.0;
pc=long 0. h ;
pd=0.0 0. h;pn = 0. 0. (h - h1)  ;

*---ARMATURE
prof = 1. ;
pm = long (prof/2) (h - h1)  ;
pn = 0.   (prof/2) (h - h1)  ;
nb1 = 20;
nb2 = 4 ;
nb3=17 ;
c1=pa droi nb1 pb;
c2=pb droi nb2 pc;
c3=pc droi nb1 pd;
c4=pd droi nb2 pa;
sur1=(dall c1 c2 c3 c4) ;


sur1 = sur1 volu 2 tran (0 prof 0)  ;
d1 = d nb3 pm pn coul roug ;
d2 = d1 plus ( 0 0 h1 ) ;
   finf = sur1 points plan pa pb (pa plus (0 1 0)) .01 ;
   finf = (( sur1 envel) elem appu stric finf ) ;
   fsup = finf plus (0 0 h) ;
   elim .1 sur1 fsup ;
*-----   on decolle la plaque pour  pouvoir l ACCROCHER
 plaq = finf plus ( 0  0 0 ) coul bleu ;

'SI' ( 'NEG' graph  'N' ) ;
 trac (1000 1000  1000 )  ( sur1 et d1)   ;
'FINSI' ;

*
* MODELE
*------------------------- beton ---------------------------------
Eb = 0.4e11 ;
modb= 'MODE' sur1 mecanique elastique ;
matb= 'MATE' modb youn Eb  nu 0.3;
ribe = rigi modb matb;

*-----------------------  barre  ----------------------------
YOUCAB = 1495.D6/0.718D-2 ;                      ;
leps1  = 1.D-2 * (PROG 0. .718 .804 .890 1.00 1.278 2.957) ;
lsig1  = 1.D6 *  (PROG 0. 1495. 1553. 1623. 1669. 1727. 1855.) ;
TRACAB = EVOL MANU  'EPS' leps1 'SIG' lsig1 ;
ym1    = (extr lsig1 2) / (extr leps1 2) ;
lsig1  = lsig1 enle 1 ;
lepsp1 = (leps1 enle 1) - (lsig1 / ym1) ;
trecro = evol vert manu 'EPS' lepsp1 'SIG' lsig1 ;
'SI' ( 'NEG' graph  'N' ) ;
  dess (TRACAB et trecro) titr ' Courbes de traction et d ecrouissage (vert)' ;
fins ;
mod1 = MODE d1 MECANIQUE ELASTIQUE ISOTROPE PLASTIQUE ISOTROPE BARR ;
mat1= MATE mod1   YOUN youcab NU 0.3 SECT 0.04 'ECRO' trecro ALPH 12.5E-6 ;
riba = rigi mod1 mat1 ;

*------------------- -    poutre -----------------------

mod2= 'MODE' d2   mecanique elastique pout  ;
mat2=( 'MATE' mod2 youn Eb  nu 0.0 INRY  10. INRZ 10. TORS 3.)
      et ( cara mod2 sect .02) ;
ripo = rigi mod2 mat2 ;

*---------------------   coque  -------------------------

*---- Courbe d'écrouissage de l'acier A42
EPS1   = PROG 0. 0.002 0.018 0.02 0.036 0.05 0.068 0.084 0.102    ;
SIG1   = PROG 0. 312.  325.  335. 400.  425. 450.  465.  475.     ;
SIG1   = SIG1*1.E6                                                ;
EVSIG  = EVOL MANU 'EPS' EPS1 'SIG' SIG1                            ;
ym1    = (extr sig1 2) / (extr eps1 2) ;
sig1   = sig1 enle 1 ;
eps1   = (eps1 enle 1) - (sig1 / ym1) ;
EVECR  = EVOL vert MANU 'EPS' EPS1 'SIG' SIG1 ;
'SI' ( 'NEG' graph  'N' ) ;
  dess (EVSIG et EVECR) titr ' Courbes de traction et d ecrouissage (vert)' ;
fins ;
*---- Module de Young de la Peau d'étanchéité
YOUNT  = 312.E6 / 0.002  ;
mod3 = mode plaq MECANIQUE ELASTIQUE ISOTROPE
     PLASTIQUE ISOTROPE   coq4 ;
Mat3  = MATE mod3   YOUN YOUNT NU 0.3 EPAI  0.03 ecro EVecr ALPH 12.5E-6 ;
rico = rigi mod3 mat3 ;
*----------------------------------------------------------
*
* CONDITIONS AUX LIMITES
*
aa = sur1 points droite pa ( pa plus (0 1 0)) .01 ;
bb = sur1 points droite pb ( pb plus (0 1 0)) .01 ;
cl1 = bloq aa ux ;
cl2 = bloq aa uz ;
cl3 = bloq bb uz ;
cl4 = bloquer uy ( pa et pb) ;
clb = cl1 et cl2 et cl3 et cl4 ;
*
*  on veut bloquer la rotation sur elle meme  de la poutre
*
       dp2 = d2 elem ( lect 1 pas 1 ( nb3 - 1)) ;
       pf = d2 point final ;
 conf  pf ( sur1 point proche pf ) ;
*
 clt = clb et ( bloquer RX  pf ) ;
*

 racc = rela accro (plaq  et d1 et dp2 ) sur1  ;
 radd = chan DEPE racc ;

* ------     concatenation des raideurs  ------------
 rign = ribe et riba et ripo et rico ;
 riga = rign et racc  et clt ;
 rigd = rign et radd  et clt ;
*
* --- pression sur face superieure + force sur la plaque -----
MOP = 'MODE' fsup 'CHARGEMENT' 'PRESSION' ;
PRZ = 'PRES' MOP pres 1.e8 ;
f1 = bsig mop PRZ ;
   f2 = force  1.E8  FZ  plaq       ;
   ff = f1 + f2 ;
*-------------- solution  par depend-------------------------
   dep2 = resou rigd   ff ;
*-------------- solution  par accro -------------------------
   dep1 = resou riga  ff ;
*--------------------------------------------------------
*-------------  solution par cmct  puis mrem ------------
* ---  condensation des   matrices liees aux noeuds esclaves   ---
   rige = cmct (rign et clt ) radd ;
* ---  condensation des la force  liees aux noeuds esclaves  -----
   racd radu = chan COND racc ;
   fad = f1  et ( radu * f2 ) ;
* -----  solution reduite ---------------------------------------
*  dep30 = resou  rige   fad   ;
*--   remeontee a la solution complete  --------------------------
*  on n'utilise plus tout cela, c'est intégré dans résou
*  dep3  = mrem  dep30  (rign et clt et radd ) ff ;
   dep3  = resou  rige   fad   ;
*--------------------------------------------------------------
   mde1 = mini dep1 avec ( mots UZ) ;
   mde2 = mini dep2 avec ( mots UZ) ;
   mde3 = mini dep3 avec ( mots UZ) ;
   surd = (sur1 envel ) et d1 et d2 ;

* ----------- reactions aux appuis et liaisons ---------------------
 rea1 = reac (clt et racc ) dep1 ;
 rea2 = reac (clt et radd ) dep2 ;
*----------examen des differences entre les deux methodes ----------
aaa  = rea1 -  rea2 ;
reamo1 = (psca rea1 rea1 ( mots FX FY FZ) ( mots FX FY FZ)) ** .5 ;
reamo2 = (psca rea2 rea2 ( mots FX FY FZ) ( mots FX FY FZ)) ** .5 ;
depmod = (psca dep1 dep1 ( mots UX UY UZ) ( mots UX UY UZ)) ** .5 ;
    si ( neg GRAPH N) ;
 av = maxi ( abs rea1 ) avec (mots FZ) ;
 amv = 4./av ;
 vr1 = vecteur rea1 amv FX FY FZ  roug ;
 vr2 = vecteur rea2 amv FX FY FZ  vert ;
 amp = .3/ ( maxi depmod) ;
 amd = 4./(maxi reamo1) ;
 vd1 = vecteur rea1 amd FX FY FZ  roug ;
 vd2 = vecteur rea2 amd FX FY FZ  vert ;
 titre 'UZ mini accro ' mde1 ' dependence ' mde2 'cmct' mde3 ;
 dde0 = defo surd dep1 0.   blan  ;
 dde1 = defo surd dep1 amp vr1 roug  ;
 dde2 = defo surd dep2 amp vr2 vert  ;
 trac ( dde1  et dde2  )  ;
 dur1 = defo surd dep1 amp vd1 roug  ;
 dur2 = defo surd dep2 amp vd2 vert  ;
  trac ( dur1 et dur2 ) ;
vdif = vecteur aaa  FX FY FZ  amd  vert   ;
titre  '  difference  sur reactions  accro depen ' ;
trac surd vdif ;
    finsi ;
rdif =   reamo1 - reamo2 ;
a3= rdif   point maxi  ;
av1 = (abs (maxi rdif)) /( extr reamo1 SCAL (a3 point 1 )) ;
ruz = abs (((mde1 - mde2) * 100 ) / mde2 )  ;

mess ' differences relatives max sur la fleche maximum '  ruz '%'  ;
mess ' differences relatives max sur les reactions     '  av1 '%'  ;
 'SI' (( ruz > 1.e-7)  OU ( av1 > 1.e-7));
 VTCT . 'N5' = (VTCT . 'N5') + 1 ;
 'FINSI' ;

* suite uniquement pour tester que tout se passe correctement ds pasapas

evf = EVOL MANU 'Sec.' (prog  0.  1000.) 'Pa' (prog 1. 1. ) ;
chforce = char meca f2 evf ;
*
chpress = char pres prz evf ;

TABMC = TABLE ;
TABMC.MODELE      = modb et mod1  et mod2  et mod3 et mop  ;
TABMC.BLOCAGES_MECANIQUES =  radd et   clt  ;
TABMC.CARACTERISTIQUES    = matb et mat1  et mat2 et mat3 ;
TABMC.CHARGEMENT  = chpress et chforce ;
evtt = prog 0. pas 1. 5.;
TABMC.TEMPS_CALCULES = evtt ;
TABMC.TEMPS_SAUVES   = evtt ;
TABMC.'HYPOTHESE_DEFORMATIONS' = 'LINEAIRE' ;
TABMC . 'PERF_RAID' = VPSW ; TABMC . 'PERF_RAID_NIVEAU' = VNIV ; PASAPAS TABMC ; FPREC TABMC VTFPR ;

ttt = tabmc.'DEPLACEMENTS'  ;
i1 = index ttt ;nt = dime i1 ;
dep = ttt . (i1.nt ) ;uref = -8.94153E-02 ;
uymi = mini dep avec (mots UZ) ;
* fleche attendue   5 iterations =-8.94153E-02 ;
ruz = abs (((uref  - uymi) * 100 ) / (abs uymi ))  ;
mess  ' difference relative ' ruz '%' ;

 'SI' ( ruz > 5.e-1) ;
 VTCT . 'N5' = (VTCT . 'N5') + 1 ;
 'FINSI' ;
* [valid] FIN final


* ----- fin du cas dependance
FINPROC ;
*
* ---------------------------------------------------------------------
* Cas 23 : dependance (dependance parametres, coque)
* ---------------------------------------------------------------------
SI ((IDEB0 '<EG' 23) 'ET' (IFIN0 '>EG' 23) 'ET' ('NON' ('EXIS' TSKIP 23))) ;
    MENAGE 'OBLI' ;
    MESS ' ' ;
    VMSG = CHAI '>>> Cas' ' ' '23' ' ' 'sur' ' ' NTOT0 ' ' ':' ' ' 'dependance' ' ' '(dependance parametres, coque)' ;
    MESS VMSG ;
    NPASS = 2 ;
    SI IPASS3 ;
        NPASS = 3 ;
    FINSI ;
    VTH1 = 0 ;
    VTH2 = 0 ;
    VTH3 = 0 ;
    VNE51 = 0 ;
    VNE01 = 0 ;
    VNE52 = 0 ;
    VNE02 = 0 ;
    VNE53 = 0 ;
    VNE03 = 0 ;
    REPETER ZVRUN NPASS ;
* ordre des passes alterne d'un cas a l'autre (derive des temps en session)
        VIP = &ZVRUN ;
        VPSW = (VIP '>' 1) ;
        VNIV = 1 ;
        VMPS = 'inactif' ;
        SI (VIP 'EGA' 2) ;
            VMPS = 'actif niveau 1' ;
        FINSI ;
        SI (VIP 'EGA' 3) ;
            VNIV = 2 ;
            VMPS = 'actif niveau 2' ;
        FINSI ;
        AVANCE VRES 23 NTOT0 'dependance' VIP 'en_cours' ;
        VMSG = CHAI '    passe' ' ' VIP ' ' 'sur' ' ' NPASS ' ' ': optimisations' ' ' VMPS ;
        MESS VMSG ;
        SI ITRACE0 ;
            OPTI 'IMPR' 'valid_trace.log' ;
        FINSI ;
        OPTI 'DIME' 3 'MODE' 'TRID' 'ELEM' 'CUB8' 'ECHO' IECHO0 ;
        VTHM = 0 ;
        REPETER ZVREP NREP0 ;
            VIR = &ZVREP ;
            VTFPR = TABL ;
            VTCT = TABL ;
            VTCT . 'N0' = 0 ;
            VTCT . 'N5' = 0 ;
            SI ITEMPS0 ;
                TEMP 'ZERO' ;
            FINSI ;
* Le cas s'execute dans une procedure (variables locales) : les variables
* d'un cas precedent ne peuvent pas masquer un mot-cle ou un operateur
            VC23 VPSW VNIV VTFPR VTCT IECHO0 ;
            VTHR = 0 ;
            SI ITEMPS0 ;
                VTHR = CHRONO ;
            FINSI ;
            SI (VIR 'EGA' 1) ;
                VTHM = VTHR ;
            SINON ;
                SI (VTHR '<' VTHM) ;
                    VTHM = VTHR ;
                FINSI ;
            FINSI ;
        FIN ZVREP ;
        VNER5 = VTCT . 'N5' ;
        VNER0 = VTCT . 'N0' ;
        SI (VIP 'EGA' 1) ;
            VTF1 = VTFPR ;
            VTH1 = VTHM ;
            VNE51 = VNER5 ;
            VNE01 = VNER0 ;
        FINSI ;
        SI (VIP 'EGA' 2) ;
            VTF2 = VTFPR ;
            VTH2 = VTHM ;
            VNE52 = VNER5 ;
            VNE02 = VNER0 ;
        FINSI ;
        SI (VIP 'EGA' 3) ;
            VTF3 = VTFPR ;
            VTH3 = VTHM ;
            VNE53 = VNER5 ;
            VNE03 = VNER0 ;
        FINSI ;
    FIN ZVRUN ;
*   comparaison des empreintes avec la passe 1
    VER2 VNL2 VNC2 = COMPAR VTF1 VTF2 ;
    VMOK2 = 'OK' ;
    SI ((VER2 '>' TOLV0) 'OU' (VNL2 '>' 0) 'OU' ('NON' (VNE52 'EGA' VNE51))) ;
        VMOK2 = 'ECART' ;
        VNBK2 = VNBK2 + 1 ;
    FINSI ;
    VER3 = 0. ;
    VNC3 = 0 ;
    VMOK3 = 'sans_objet' ;
    SI IPASS3 ;
        VER3 VNL3 VNC3 = COMPAR VTF1 VTF3 ;
        VMOK3 = 'OK' ;
        SI ((VER3 '>' TOLV3) 'OU' (VNL3 '>' 0) 'OU' ('NON' (VNE53 'EGA' VNE51))) ;
            VMOK3 = 'ECART' ;
            VNBK3 = VNBK3 + 1 ;
        FINSI ;
    FINSI ;
*   accelerations (temps de la passe 1 / temps de la passe)
    VSP2 = 0. ;
    VSP3 = 0. ;
    SI ((VTH1 '>' 0) 'ET' (VTH2 '>' 0)) ;
        VSP2 = (FLOT VTH1) '/' (FLOT VTH2) ;
    FINSI ;
    SI ((VTH1 '>' 0) 'ET' (VTH3 '>' 0)) ;
        VSP3 = (FLOT VTH1) '/' (FLOT VTH3) ;
    FINSI ;
    VSUM1 = VSUM1 + VTH1 ;
    VSUM2 = VSUM2 + VTH2 ;
    VSUM3 = VSUM3 + VTH3 ;
    VCLA = VTF2 . 'CL' ;
    VR2 = VTF2 . 'NRE' ;
    VC2 = VTF2 . 'NCA' ;
    VH2 = VTF2 . 'NHK' ;
    VM2 = VTF2 . 'NMA' ;
    VR3 = -1 ;
    VC3 = -1 ;
    VH3 = -1 ;
    VM3 = -1 ;
    SI IPASS3 ;
        VR3 = VTF3 . 'NRE' ;
        VC3 = VTF3 . 'NCA' ;
        VH3 = VTF3 . 'NHK' ;
        VM3 = VTF3 . 'NMA' ;
    FINSI ;
    VSE2 = CHAI 'FORMAT' '(1PE10.3)' VER2 ;
    VSE3 = CHAI 'FORMAT' '(1PE10.3)' VER3 ;
    VSS2 = CHAI 'FORMAT' '(F6.2)' VSP2 ;
    VSS3 = CHAI 'FORMAT' '(F6.2)' VSP3 ;
*   fichier de resultat du cas (SORT) et affichage console (MESS)
    OPTI 'SORT' 'valid_dependance.log' ;
    VMSG = CHAI '=== Cas' ' ' '23' ' ' ':' ' ' 'dependance' ' ' '(dependance parametres, coque)' ' ' '===' ;
    MESS VMSG ;
    SORT 'CHAI' VMSG ;
    VMSG = CHAI 'Valeurs comparees :' ' ' VNC2 ;
    MESS VMSG ;
    SORT 'CHAI' VMSG ;
    VMSG = CHAI 'Temps horloge (ms) : origine' ' ' VTH1 ' ' '; niveau 1' ' ' VTH2 ' ' '; niveau 2' ' ' VTH3 ;
    MESS VMSG ;
    SORT 'CHAI' VMSG ;
    VMSG = CHAI 'Acceleration par rapport a l origine : niveau 1' ' ' VSS2 ' ' '; niveau 2' ' ' VSS3 ;
    MESS VMSG ;
    SORT 'CHAI' VMSG ;
    VMSG = CHAI 'Controles internes du cas : echecs origine' ' ' VNE51 ' ' '; niveau 1' ' ' VNE52 ' ' '; niveau 2' ' ' VNE53 ' ' '- reussites origine' ' ' VNE01 ' ' '; niveau 1' ' ' VNE02 ' ' '; niveau 2' ' ' VNE03 ;
    MESS VMSG ;
    SORT 'CHAI' VMSG ;
    VMSG = CHAI 'Classes exercees (1 MATVAR, 10 ENDOM, 20 VISCODOM, 100 GD) :' ' ' VCLA ;
    MESS VMSG ;
    SORT 'CHAI' VMSG ;
    VMSG = CHAI 'Niveau 1 : raideur reutilisee' ' ' VR2 ' ' 'fois, recalculee' ' ' VC2 ' ' 'fois ; HOOK evite' ' ' VH2 ' ' 'fois ; caracteristiques reutilisees' ' ' VM2 ' ' 'fois' ;
    MESS VMSG ;
    SORT 'CHAI' VMSG ;
    VMSG = CHAI 'Niveau 2 : raideur reutilisee' ' ' VR3 ' ' 'fois, recalculee' ' ' VC3 ' ' 'fois ; HOOK evite' ' ' VH3 ' ' 'fois ; caracteristiques reutilisees' ' ' VM3 ' ' 'fois' ;
    MESS VMSG ;
    SORT 'CHAI' VMSG ;
    VMSG = CHAI 'Ecart relatif maximal : niveau 1' ' ' VSE2 ' ' '; niveau 2' ' ' VSE3 ;
    MESS VMSG ;
    SORT 'CHAI' VMSG ;
    VMSG = CHAI 'RESULTAT : niveau 1' ' ' VMOK2 ' ' '; niveau 2' ' ' VMOK3 ;
    MESS VMSG ;
    SORT 'CHAI' VMSG ;
    SI (('EGA' VNC2 0) ) ;
        VMSG = CHAI 'ATTENTION : aucune valeur comparee (resultats non stockes ?)' ;
        MESS VMSG ;
        SORT 'CHAI' VMSG ;
    FINSI ;
    OPTI 'SORT' 'valid_inutile.tmp' ;
    VRES . 23 = TABL ;
    VRES . 23 . 'NOM' = 'dependance' ;
    VRES . 23 . 'OKM' = VMOK2 ;
    VRES . 23 . 'OK3' = VMOK3 ;
    VRES . 23 . 'ERR2' = VER2 ;
    VRES . 23 . 'ERR3' = VER3 ;
    VRES . 23 . 'TH1' = VTH1 ;
    VRES . 23 . 'TH2' = VTH2 ;
    VRES . 23 . 'TH3' = VTH3 ;
    VRES . 23 . 'SP2F' = VSP2 ;
    VRES . 23 . 'SP3F' = VSP3 ;
    VRES . 23 . 'NRE2' = VR2 ;
    VRES . 23 . 'NCA2' = VC2 ;
    VRES . 23 . 'NHK2' = VH2 ;
    VRES . 23 . 'NMA2' = VM2 ;
    VRES . 23 . 'NRE3' = VR3 ;
    VRES . 23 . 'NCA3' = VC3 ;
    VRES . 23 . 'NHK3' = VH3 ;
    VRES . 23 . 'CL' = VCLA ;
    VRES . 23 . 'NCMP' = VNC2 ;
    VMSG = CHAI '<<< Cas' ' ' '23' ' ' 'sur' ' ' NTOT0 ' ' ':' ' ' 'dependance' ' ' ':' ' ' 'niveau 1' ' ' VMOK2 ', niveau 2' ' ' VMOK3 ' ' '- ecart' ' ' VSE2 ', acceleration' ' ' VSS2 ' ' 'et' ' ' VSS3 ;
    MESS VMSG ;
    AVANCE VRES 23 NTOT0 'dependance' NPASS 'termine' ;
    MENAGE 'OBLI' ;
FINSI ;

*
* ---------------------------------------------------------------------
* Procedure du cas 24 : thme1 (thermo-mecanique)
* Variables locales : le cas ne voit aucune variable des cas precedents
* ---------------------------------------------------------------------
DEBPROC VC24 VPSW*'LOGIQUE' VNIV*'ENTIER' VTFPR*'TABLE' VTCT*'TABLE' IECHO0*'ENTIER' ;
* ----- debut du cas thme1

* fichier :  thme1.dgibi
*           Test Thme1.dgibi: Jeux de données         *
*           ---------------------------------         *
*                                                     *
complet = faux;
*
*************************************************
*  pour calcul complet mettre complet à : vrai;
*************************************************
*------------------------------------------------------
*
* Calcul thermo-mécanique ( mécanique et thermique
* linéaire ). Utilisation de la procédure PASAPAS
*
*
*   |
*   |_____________________________________
*   |                                     |
*   |            T_initial = 20°C         | x1 = 0.1 m
*   |_____________________________________| T1 = 500°C
*   | x0 = 0 m
*   | T0 = 20°C
*     Encastrement
*
*   on étudie la diffusion thermique dans le barreau
*   et sa dilatation
*
*   caracteristiques du barreau :
*
*         l = 0.1m
*         K = 14.6
*         C = 460
*         RHO = 7800
*         ALPHA = 1E-5
*         YOUNG = 2.E11
*         NU = 0.00001
*
*
*   Mailles de 0.01 m de cote
*
*   On compare les résultats à une solution analytique
*
*------------------------------------------------------

OPTION ECHO IECHO0;
OPTION DIME 2 ELEM QUA8 MODE PLAN DEFO;
*
*-------------------- Creation du maillage ------------
*
dens 1;
PA = 0.   0.  ;
PB = 0.1   0.  ;
PC = 0.1   0.01 ;
PD = 0.   0.01 ;
pp8 = 0.08 0.;
D1 = DROI 10 PA PB ;
D2 = DROI 1  PB PC ;
D3 = DROI 10 PC PD ;
D4 = DROI 1  PD PA ;
L1 = D1 ET D2 ET D3 ET D4;
SU1 = SURF L1 PLANE ;
pp8 = su1 point proc pp8;
*
*-------------------- Définition du modèle ------------
*
MOD1 = MODE SU1 THERMIQUE ISOTROPE CONS UN;
MOD2 = MODE SU1 MECANIQUE ELASTIQUE ISOTROPE CONS DEUX;
MOD = MOD1 ET MOD2 ;
*
*------------------- Définition des matériaux ---------
*
MAT1 = MATE MOD1 K 14.6 'C' 460. RHO 7800.  ;
MAT2 = MATE MOD2 ALPHA 1E-5 YOUN 2E+11 NU 0.00001 'TALP' 20. 'TREF' 20. ;
MAT = MAT1 ET MAT2 ;
*
*------------------- blocages mécaniques --------------
*
CL1 = BLOQ UY SU1 ;
CL2 = BLOQ UX D4 ;
CL_ME = CL1 ET CL2;
*
*------------------- blocages thermiques --------------
*
CL3 = BLOQ T D2;
CL4 = BLOQ T D4;
CL_TH = CL3 ET CL4;
*
*------------------- températures imposées ------------
*
TEM1 = DEPI CL3 500.;
TEM2 = DEPI CL4 20.;
EV1 = EVOL MANU x (PROG 0. 200.) y (prog 1. 1.);
CHA = CHAR TIMP (TEM1 + TEM2) EV1;
*
*------------------- température initiale -------------
*
TEM0 = MANU CHPO SU1 1 T 20.;
*
*--------------- creation de la table pour pasapas ----
*
ta = table;
ta.modele = mod;
ta.caracteristiques = mat;
ta.blocages_mecaniques = cl_me;
ta.blocages_thermiques = cl_th;
ta.temperatures = table;
ta.temperatures . 0 = tem0;
ta.chargement = cha;
ta.procedure_thermique = LINEAIRE;
ta.temps_calcules = prog 0. pas 5. 150.;
*
ta . 'PERF_RAID' = VPSW ; ta . 'PERF_RAID_NIVEAU' = VNIV ; PASAPAS ta ; FPREC ta VTFPR ;
*
*----------------------- Depouillement ----------------
*
ltref1 = prog 10. pas 10. 150.;
a = (14.6 / 7800.)/460.;
x = 0.08;
er1 = 0.;
er2 = 0.;
nb = 0;
tpr1 = prog;
tpr2 = prog;
tpr3 = prog;
tep_th = prog;
dep_th = prog;
idim = 'DIME' ltref1 ;
solteenr = prog
   32.779       76.142       116.26       148.47
   174.30       195.40       212.98       227.88
   240.70       251.85       261.65       270.33
   278.08       285.03       291.30  ;
 soldeenr = prog
 4.51064E-07  3.18778E-06  7.26909E-06  1.18402E-05
 1.65525E-05  2.12583E-05  2.58885E-05  3.04069E-05
 3.47909E-05  3.90251E-05  4.30987E-05  4.70048E-05
 5.07398E-05  5.43030E-05  5.76962E-05;
repeter bou idim;
   ite = &bou;
   te = 'EXTR' ltref1 ite ;
   dep = PECHE ta deplacements te ;
   tem = PECHE ta temperatures te ;
   tep1 = extr tem T pp8;
   dep1 = extr dep UX pp8;
   tpr1 = tpr1 et (prog tep1);
   tpr2 = tpr2 et (prog dep1);
   tpr3 = tpr3 et (prog te);
si complet;
   co1 = erf((0.1 - x)/(2 * (( a * te )**0.5)));
   co2 = erf(0.1/(2.*(( a * te )**0.5)));
   sol_te = 500. - ((500. - 20.)*co1/co2);
sinon;
    sol_te = extr solteenr ite;
finsi;
   tep_th = tep_th et (prog sol_te);
si complet;
   mi = prog;
   mi1 = prog ;
   repeter bou2  21;
      ite2 = &bou2 - 1;
      te1 = x * ite2 / 20;
      mi = mi et (prog te1);
      y1 = erf((0.1 - te1)/(2.*(( a * te )**0.5)));
      mi1 = mi1 et (prog y1);
   fin bou2;
   ev5 = evol manu xx mi y mi1;
   res = extr (INTG ev5) 1;
   sol_de = 1E-5*(500. - 20.)/co2*((x * co2) - res);
sinon;
    sol_de = extr soldeenr ite;
finsi;
   dep_th = dep_th et (prog sol_de);
   si ((flot ite) >  ((flot idim)/2) );
     er1 = er1 + (abs ((sol_te - tep1)/sol_te) * 100.);
     er2 = er2 + (abs ((sol_de - dep1)/sol_de) * 100.);
      nb = nb + 1;
   finsi;
fin bou;
*
er1 = er1/nb;
er2 = er2/nb;
mess 'erreur sur la température :'er1'%';
mess 'erreur sur le deplacement :'er2'%';
*
*lvar =text 'EVOLUTION DE LA TEMPERATURE AU POINT'x'm';
*titre lvar;
*ev_te = evol manu temps tpr3 temperature tpr1;
*ev_tet = evol manu temps tpr3 temperature tep_th;
*dess (ev_te et ev_tet);
*lvar = text 'EVOLUTION DU DEPLACEMENT AU POINT'x'm';
*titre lvar;
*ev_de = evol manu temps tpr3 deplacement tpr2;
*ev_det = evol manu temps tpr3 deplacement dep_th;
*dess (ev_de et ev_det);
*
si ( er1 > 2. ) ;
  mess 'Résultat incorrect' ;
  erreur 5 ;
finsi ;
si ( er2 > 5. ) ;
  mess 'Résultat incorrect' ;
  erreur 5 ;
finsi ;
*
* [valid] FIN final


* ----- fin du cas thme1
FINPROC ;
*
* ---------------------------------------------------------------------
* Cas 24 : thme1 (thermo-mecanique)
* ---------------------------------------------------------------------
SI ((IDEB0 '<EG' 24) 'ET' (IFIN0 '>EG' 24) 'ET' ('NON' ('EXIS' TSKIP 24))) ;
    MENAGE 'OBLI' ;
    MESS ' ' ;
    VMSG = CHAI '>>> Cas' ' ' '24' ' ' 'sur' ' ' NTOT0 ' ' ':' ' ' 'thme1' ' ' '(thermo-mecanique)' ;
    MESS VMSG ;
    NPASS = 2 ;
    SI IPASS3 ;
        NPASS = 3 ;
    FINSI ;
    VTH1 = 0 ;
    VTH2 = 0 ;
    VTH3 = 0 ;
    VNE51 = 0 ;
    VNE01 = 0 ;
    VNE52 = 0 ;
    VNE02 = 0 ;
    VNE53 = 0 ;
    VNE03 = 0 ;
    REPETER ZVRUN NPASS ;
* ordre des passes alterne d'un cas a l'autre (derive des temps en session)
        VIP = NPASS + 1 - &ZVRUN ;
        VPSW = (VIP '>' 1) ;
        VNIV = 1 ;
        VMPS = 'inactif' ;
        SI (VIP 'EGA' 2) ;
            VMPS = 'actif niveau 1' ;
        FINSI ;
        SI (VIP 'EGA' 3) ;
            VNIV = 2 ;
            VMPS = 'actif niveau 2' ;
        FINSI ;
        AVANCE VRES 24 NTOT0 'thme1' VIP 'en_cours' ;
        VMSG = CHAI '    passe' ' ' VIP ' ' 'sur' ' ' NPASS ' ' ': optimisations' ' ' VMPS ;
        MESS VMSG ;
        SI ITRACE0 ;
            OPTI 'IMPR' 'valid_trace.log' ;
        FINSI ;
        OPTI 'DIME' 3 'MODE' 'TRID' 'ELEM' 'CUB8' 'ECHO' IECHO0 ;
        VTHM = 0 ;
        REPETER ZVREP NREP0 ;
            VIR = &ZVREP ;
            VTFPR = TABL ;
            VTCT = TABL ;
            VTCT . 'N0' = 0 ;
            VTCT . 'N5' = 0 ;
            SI ITEMPS0 ;
                TEMP 'ZERO' ;
            FINSI ;
* Le cas s'execute dans une procedure (variables locales) : les variables
* d'un cas precedent ne peuvent pas masquer un mot-cle ou un operateur
            VC24 VPSW VNIV VTFPR VTCT IECHO0 ;
            VTHR = 0 ;
            SI ITEMPS0 ;
                VTHR = CHRONO ;
            FINSI ;
            SI (VIR 'EGA' 1) ;
                VTHM = VTHR ;
            SINON ;
                SI (VTHR '<' VTHM) ;
                    VTHM = VTHR ;
                FINSI ;
            FINSI ;
        FIN ZVREP ;
        VNER5 = VTCT . 'N5' ;
        VNER0 = VTCT . 'N0' ;
        SI (VIP 'EGA' 1) ;
            VTF1 = VTFPR ;
            VTH1 = VTHM ;
            VNE51 = VNER5 ;
            VNE01 = VNER0 ;
        FINSI ;
        SI (VIP 'EGA' 2) ;
            VTF2 = VTFPR ;
            VTH2 = VTHM ;
            VNE52 = VNER5 ;
            VNE02 = VNER0 ;
        FINSI ;
        SI (VIP 'EGA' 3) ;
            VTF3 = VTFPR ;
            VTH3 = VTHM ;
            VNE53 = VNER5 ;
            VNE03 = VNER0 ;
        FINSI ;
    FIN ZVRUN ;
*   comparaison des empreintes avec la passe 1
    VER2 VNL2 VNC2 = COMPAR VTF1 VTF2 ;
    VMOK2 = 'OK' ;
    SI ((VER2 '>' TOLV0) 'OU' (VNL2 '>' 0) 'OU' ('NON' (VNE52 'EGA' VNE51))) ;
        VMOK2 = 'ECART' ;
        VNBK2 = VNBK2 + 1 ;
    FINSI ;
    VER3 = 0. ;
    VNC3 = 0 ;
    VMOK3 = 'sans_objet' ;
    SI IPASS3 ;
        VER3 VNL3 VNC3 = COMPAR VTF1 VTF3 ;
        VMOK3 = 'OK' ;
        SI ((VER3 '>' TOLV3) 'OU' (VNL3 '>' 0) 'OU' ('NON' (VNE53 'EGA' VNE51))) ;
            VMOK3 = 'ECART' ;
            VNBK3 = VNBK3 + 1 ;
        FINSI ;
    FINSI ;
*   accelerations (temps de la passe 1 / temps de la passe)
    VSP2 = 0. ;
    VSP3 = 0. ;
    SI ((VTH1 '>' 0) 'ET' (VTH2 '>' 0)) ;
        VSP2 = (FLOT VTH1) '/' (FLOT VTH2) ;
    FINSI ;
    SI ((VTH1 '>' 0) 'ET' (VTH3 '>' 0)) ;
        VSP3 = (FLOT VTH1) '/' (FLOT VTH3) ;
    FINSI ;
    VSUM1 = VSUM1 + VTH1 ;
    VSUM2 = VSUM2 + VTH2 ;
    VSUM3 = VSUM3 + VTH3 ;
    VCLA = VTF2 . 'CL' ;
    VR2 = VTF2 . 'NRE' ;
    VC2 = VTF2 . 'NCA' ;
    VH2 = VTF2 . 'NHK' ;
    VM2 = VTF2 . 'NMA' ;
    VR3 = -1 ;
    VC3 = -1 ;
    VH3 = -1 ;
    VM3 = -1 ;
    SI IPASS3 ;
        VR3 = VTF3 . 'NRE' ;
        VC3 = VTF3 . 'NCA' ;
        VH3 = VTF3 . 'NHK' ;
        VM3 = VTF3 . 'NMA' ;
    FINSI ;
    VSE2 = CHAI 'FORMAT' '(1PE10.3)' VER2 ;
    VSE3 = CHAI 'FORMAT' '(1PE10.3)' VER3 ;
    VSS2 = CHAI 'FORMAT' '(F6.2)' VSP2 ;
    VSS3 = CHAI 'FORMAT' '(F6.2)' VSP3 ;
*   fichier de resultat du cas (SORT) et affichage console (MESS)
    OPTI 'SORT' 'valid_thme1.log' ;
    VMSG = CHAI '=== Cas' ' ' '24' ' ' ':' ' ' 'thme1' ' ' '(thermo-mecanique)' ' ' '===' ;
    MESS VMSG ;
    SORT 'CHAI' VMSG ;
    VMSG = CHAI 'Valeurs comparees :' ' ' VNC2 ;
    MESS VMSG ;
    SORT 'CHAI' VMSG ;
    VMSG = CHAI 'Temps horloge (ms) : origine' ' ' VTH1 ' ' '; niveau 1' ' ' VTH2 ' ' '; niveau 2' ' ' VTH3 ;
    MESS VMSG ;
    SORT 'CHAI' VMSG ;
    VMSG = CHAI 'Acceleration par rapport a l origine : niveau 1' ' ' VSS2 ' ' '; niveau 2' ' ' VSS3 ;
    MESS VMSG ;
    SORT 'CHAI' VMSG ;
    VMSG = CHAI 'Controles internes du cas : echecs origine' ' ' VNE51 ' ' '; niveau 1' ' ' VNE52 ' ' '; niveau 2' ' ' VNE53 ' ' '- reussites origine' ' ' VNE01 ' ' '; niveau 1' ' ' VNE02 ' ' '; niveau 2' ' ' VNE03 ;
    MESS VMSG ;
    SORT 'CHAI' VMSG ;
    VMSG = CHAI 'Classes exercees (1 MATVAR, 10 ENDOM, 20 VISCODOM, 100 GD) :' ' ' VCLA ;
    MESS VMSG ;
    SORT 'CHAI' VMSG ;
    VMSG = CHAI 'Niveau 1 : raideur reutilisee' ' ' VR2 ' ' 'fois, recalculee' ' ' VC2 ' ' 'fois ; HOOK evite' ' ' VH2 ' ' 'fois ; caracteristiques reutilisees' ' ' VM2 ' ' 'fois' ;
    MESS VMSG ;
    SORT 'CHAI' VMSG ;
    VMSG = CHAI 'Niveau 2 : raideur reutilisee' ' ' VR3 ' ' 'fois, recalculee' ' ' VC3 ' ' 'fois ; HOOK evite' ' ' VH3 ' ' 'fois ; caracteristiques reutilisees' ' ' VM3 ' ' 'fois' ;
    MESS VMSG ;
    SORT 'CHAI' VMSG ;
    VMSG = CHAI 'Ecart relatif maximal : niveau 1' ' ' VSE2 ' ' '; niveau 2' ' ' VSE3 ;
    MESS VMSG ;
    SORT 'CHAI' VMSG ;
    VMSG = CHAI 'RESULTAT : niveau 1' ' ' VMOK2 ' ' '; niveau 2' ' ' VMOK3 ;
    MESS VMSG ;
    SORT 'CHAI' VMSG ;
    SI (('EGA' VNC2 0) ) ;
        VMSG = CHAI 'ATTENTION : aucune valeur comparee (resultats non stockes ?)' ;
        MESS VMSG ;
        SORT 'CHAI' VMSG ;
    FINSI ;
    OPTI 'SORT' 'valid_inutile.tmp' ;
    VRES . 24 = TABL ;
    VRES . 24 . 'NOM' = 'thme1' ;
    VRES . 24 . 'OKM' = VMOK2 ;
    VRES . 24 . 'OK3' = VMOK3 ;
    VRES . 24 . 'ERR2' = VER2 ;
    VRES . 24 . 'ERR3' = VER3 ;
    VRES . 24 . 'TH1' = VTH1 ;
    VRES . 24 . 'TH2' = VTH2 ;
    VRES . 24 . 'TH3' = VTH3 ;
    VRES . 24 . 'SP2F' = VSP2 ;
    VRES . 24 . 'SP3F' = VSP3 ;
    VRES . 24 . 'NRE2' = VR2 ;
    VRES . 24 . 'NCA2' = VC2 ;
    VRES . 24 . 'NHK2' = VH2 ;
    VRES . 24 . 'NMA2' = VM2 ;
    VRES . 24 . 'NRE3' = VR3 ;
    VRES . 24 . 'NCA3' = VC3 ;
    VRES . 24 . 'NHK3' = VH3 ;
    VRES . 24 . 'CL' = VCLA ;
    VRES . 24 . 'NCMP' = VNC2 ;
    VMSG = CHAI '<<< Cas' ' ' '24' ' ' 'sur' ' ' NTOT0 ' ' ':' ' ' 'thme1' ' ' ':' ' ' 'niveau 1' ' ' VMOK2 ', niveau 2' ' ' VMOK3 ' ' '- ecart' ' ' VSE2 ', acceleration' ' ' VSS2 ' ' 'et' ' ' VSS3 ;
    MESS VMSG ;
    AVANCE VRES 24 NTOT0 'thme1' NPASS 'termine' ;
    MENAGE 'OBLI' ;
FINSI ;

*
* ---------------------------------------------------------------------
* Procedure du cas 25 : phase_03 (metallurgie/phases)
* Variables locales : le cas ne voit aucune variable des cas precedents
* ---------------------------------------------------------------------
DEBPROC VC25 VPSW*'LOGIQUE' VNIV*'ENTIER' VTFPR*'TABLE' VTCT*'TABLE' IECHO0*'ENTIER' ;
* ----- debut du cas phase_03

* fichier :  phase2d_02.dgibi
************************************************************************
* Section : Changement_De_Phase Changement_De_Phase
* Section : Thermique Conduction
************************************************************************
graph= FAUX;
*
************************************************************************
*  Cas test :  phase2d_02.dgibi
*  Type     :  Verification & Validation analytique
*
*  Barreau ayant un materiau constant et un changement de phase a 100Â°C
*  Il est chauffe uniformement sur la surface S1
*  Le test consiste a s'assurer que la chaleur injectee est bien egale
*  a la chaleur specifique accumulee plus la chaleur de changement de
*  phase
*
************************************************************************

OPTI DIME 2 ELEM QUA4 TRAC 'PSC';

DT = 20. ;

P1 = (0. 0.) ;
P2 = P1 'PLUS' (0. 0.01) ;

L1 = 'DROI' 1 P1 P2 ;
L2 = L1 'PLUS' (0.1 0.) ;
L3 = L2 'PLUS' (0.1 0.) ;

P3 = POIN 1 L3 ;

NBEX = 10 ;
S1   = L1 'REGL' NBEX L2 ;
S2   = L2 'REGL' NBEX L3 ;
STOT = S1 'ET' S2 ;

rho1 = 1000. ;
C1   = 4180. ;
K1   = 100.  ;
QL1  = rho1*2257000. ;

MOD1  = MODE STOT 'THERMIQUE';
MOD2  = MODE STOT 'CHANGEMENT_PHASE' 'PARFAIT' 'INCO' 'T' 'Q';
MAT1  = MATE MOD1 'RHO' rho1 'C' C1 'K' K1 ;
MAT2  = MATE MOD2 'DUAL' QL1 'PRIM' 100. ;

Tps_fin = 5000.D0 ;

Qsour = 1D6 ;
CHA1  = CHAR 'Q' ('SOUR' MOD1 Qsour S1) (EVOL 'MANU' 'TEMP' (PROG 0. Tps_fin) 'AMPL' (PROG 1. 1.));

TAB1 = 'TABL';
TAB1.'TEMPS_CALCULES'     ='PROG' 0. 'PAS' 10. (Tps_fin / 2.D0) 'PAS' 150. Tps_fin ;
TAB1.'MODELE'             = MOD1 ET MOD2 ;
TAB1.'CARACTERISTIQUES'   = MAT1 ET MAT2 ;
TAB1.'CHARGEMENT'         = CHA1 ;
TAB1.'PRECISION'          = 1.D-8 ;

TAB1 . 'PERF_RAID' = VPSW ; TAB1 . 'PERF_RAID_NIVEAU' = VNIV ; PASAPAS TAB1 ; FPREC TAB1 VTFPR ;

EVTP0 = EVOL 'ROUG' 'TEMP' TAB1 'TEMPERATURES' 'T' P1 ;
SI GRAPH ;
  DESS EVTP0 'XBOR' 0. Tps_fin 'YBOR' 0. 200. ;
FINS;

LIG_PROI = DROI 1000 P1 P3;

DIM1 = DIME TAB1.'TEMPS' ;
REPE SURI DIM1 ;
  ii = &SURI;
  PROPi = TAB1.'PROPORTIONS_PHASE'. (ii - 1) ;
  PROIi = PROI LIG_PROI PROPi;
  EVOLi = EVOL 'CHPO' PROIi 'PPHA'  LIG_PROI;
FIN SURI;

SI GRAPH ;
 'TRAC' PROPi MOD2 ;
 'DESS' EVOLi;
'FINS';

* Bilan de chaleur
  T_0 ='CHAN' 'CHAM' ('EXCO' TAB1.'TEMPERATURES'. 0         'T' ) MOD2 'STRESSES' 'CARACTERISTIQUES' ;
  T_0 ='NOMC' T_0 'SCAL';
  T_1 ='CHAN' 'CHAM' ('EXCO' TAB1.'TEMPERATURES'.(DIM1 - 1) 'T' ) MOD2 'STRESSES' 'CARACTERISTIQUES' ;
  T_1 ='NOMC' T_1 'SCAL';

  ENE1='INTG' (rho1* C1 * (T_1 - T_0)) MOD2 ;

* Chaleur Latente consommee
  Prop0='CHAN' 'STRESSES' TAB1.'PROPORTIONS_PHASE'. 0         MOD2 'CARACTERISTIQUES' ;
  Prop0='NOMC'  Prop0 'SCAL' ;
  Prop1='CHAN' 'STRESSES' TAB1.'PROPORTIONS_PHASE'.(DIM1 - 1) MOD2 'CARACTERISTIQUES' ;
  Prop1='NOMC'  Prop1 'SCAL' ;
  ENE2 ='INTG' (QL1 * (Prop1 - Prop0)) MOD2 ;
  Pfin = ENE2/('INTG' (QL1 * (Prop1 ** 0)) MOD2) * 100. ;

* Integration temporelle
  ENE3 =('MAXI' ('RESU' ('TIRE' CHA1 0.D0))) * (Tps_fin - 0.D0) ;

 'OPTI' ECHO IECHO0;
 'MESS' 'Energie calorifique reguliere :' ENE1              ;
 'MESS' 'Energie de chaleur latente    :' ENE2 '|' Pfin '%' ;
 'MESS' 'Energie totale                :'(ENE1+ENE2)        ;
 'MESS' 'Energie injectee              :' ENE3              ;

  ERR_ABS ='ABS' (ENE3 - ENE1 - ENE2) ;
  ERR_REL = ERR_ABS / ENE3 * 100.     ;
 'MESS' 'Erreur de bilan               :' ERR_ABS '|' ERR_REL '%' ;

 'OPTI' ECHO IECHO0 ;
* [valid] FIN final


* ----- fin du cas phase_03
FINPROC ;
*
* ---------------------------------------------------------------------
* Cas 25 : phase_03 (metallurgie/phases)
* ---------------------------------------------------------------------
SI ((IDEB0 '<EG' 25) 'ET' (IFIN0 '>EG' 25) 'ET' ('NON' ('EXIS' TSKIP 25))) ;
    MENAGE 'OBLI' ;
    MESS ' ' ;
    VMSG = CHAI '>>> Cas' ' ' '25' ' ' 'sur' ' ' NTOT0 ' ' ':' ' ' 'phase_03' ' ' '(metallurgie/phases)' ;
    MESS VMSG ;
    NPASS = 2 ;
    SI IPASS3 ;
        NPASS = 3 ;
    FINSI ;
    VTH1 = 0 ;
    VTH2 = 0 ;
    VTH3 = 0 ;
    VNE51 = 0 ;
    VNE01 = 0 ;
    VNE52 = 0 ;
    VNE02 = 0 ;
    VNE53 = 0 ;
    VNE03 = 0 ;
    REPETER ZVRUN NPASS ;
* ordre des passes alterne d'un cas a l'autre (derive des temps en session)
        VIP = &ZVRUN ;
        VPSW = (VIP '>' 1) ;
        VNIV = 1 ;
        VMPS = 'inactif' ;
        SI (VIP 'EGA' 2) ;
            VMPS = 'actif niveau 1' ;
        FINSI ;
        SI (VIP 'EGA' 3) ;
            VNIV = 2 ;
            VMPS = 'actif niveau 2' ;
        FINSI ;
        AVANCE VRES 25 NTOT0 'phase_03' VIP 'en_cours' ;
        VMSG = CHAI '    passe' ' ' VIP ' ' 'sur' ' ' NPASS ' ' ': optimisations' ' ' VMPS ;
        MESS VMSG ;
        SI ITRACE0 ;
            OPTI 'IMPR' 'valid_trace.log' ;
        FINSI ;
        OPTI 'DIME' 3 'MODE' 'TRID' 'ELEM' 'CUB8' 'ECHO' IECHO0 ;
        VTHM = 0 ;
        REPETER ZVREP NREP0 ;
            VIR = &ZVREP ;
            VTFPR = TABL ;
            VTCT = TABL ;
            VTCT . 'N0' = 0 ;
            VTCT . 'N5' = 0 ;
            SI ITEMPS0 ;
                TEMP 'ZERO' ;
            FINSI ;
* Le cas s'execute dans une procedure (variables locales) : les variables
* d'un cas precedent ne peuvent pas masquer un mot-cle ou un operateur
            VC25 VPSW VNIV VTFPR VTCT IECHO0 ;
            VTHR = 0 ;
            SI ITEMPS0 ;
                VTHR = CHRONO ;
            FINSI ;
            SI (VIR 'EGA' 1) ;
                VTHM = VTHR ;
            SINON ;
                SI (VTHR '<' VTHM) ;
                    VTHM = VTHR ;
                FINSI ;
            FINSI ;
        FIN ZVREP ;
        VNER5 = VTCT . 'N5' ;
        VNER0 = VTCT . 'N0' ;
        SI (VIP 'EGA' 1) ;
            VTF1 = VTFPR ;
            VTH1 = VTHM ;
            VNE51 = VNER5 ;
            VNE01 = VNER0 ;
        FINSI ;
        SI (VIP 'EGA' 2) ;
            VTF2 = VTFPR ;
            VTH2 = VTHM ;
            VNE52 = VNER5 ;
            VNE02 = VNER0 ;
        FINSI ;
        SI (VIP 'EGA' 3) ;
            VTF3 = VTFPR ;
            VTH3 = VTHM ;
            VNE53 = VNER5 ;
            VNE03 = VNER0 ;
        FINSI ;
    FIN ZVRUN ;
*   comparaison des empreintes avec la passe 1
    VER2 VNL2 VNC2 = COMPAR VTF1 VTF2 ;
    VMOK2 = 'OK' ;
    SI ((VER2 '>' TOLV0) 'OU' (VNL2 '>' 0) 'OU' ('NON' (VNE52 'EGA' VNE51))) ;
        VMOK2 = 'ECART' ;
        VNBK2 = VNBK2 + 1 ;
    FINSI ;
    VER3 = 0. ;
    VNC3 = 0 ;
    VMOK3 = 'sans_objet' ;
    SI IPASS3 ;
        VER3 VNL3 VNC3 = COMPAR VTF1 VTF3 ;
        VMOK3 = 'OK' ;
        SI ((VER3 '>' TOLV3) 'OU' (VNL3 '>' 0) 'OU' ('NON' (VNE53 'EGA' VNE51))) ;
            VMOK3 = 'ECART' ;
            VNBK3 = VNBK3 + 1 ;
        FINSI ;
    FINSI ;
*   accelerations (temps de la passe 1 / temps de la passe)
    VSP2 = 0. ;
    VSP3 = 0. ;
    SI ((VTH1 '>' 0) 'ET' (VTH2 '>' 0)) ;
        VSP2 = (FLOT VTH1) '/' (FLOT VTH2) ;
    FINSI ;
    SI ((VTH1 '>' 0) 'ET' (VTH3 '>' 0)) ;
        VSP3 = (FLOT VTH1) '/' (FLOT VTH3) ;
    FINSI ;
    VSUM1 = VSUM1 + VTH1 ;
    VSUM2 = VSUM2 + VTH2 ;
    VSUM3 = VSUM3 + VTH3 ;
    VCLA = VTF2 . 'CL' ;
    VR2 = VTF2 . 'NRE' ;
    VC2 = VTF2 . 'NCA' ;
    VH2 = VTF2 . 'NHK' ;
    VM2 = VTF2 . 'NMA' ;
    VR3 = -1 ;
    VC3 = -1 ;
    VH3 = -1 ;
    VM3 = -1 ;
    SI IPASS3 ;
        VR3 = VTF3 . 'NRE' ;
        VC3 = VTF3 . 'NCA' ;
        VH3 = VTF3 . 'NHK' ;
        VM3 = VTF3 . 'NMA' ;
    FINSI ;
    VSE2 = CHAI 'FORMAT' '(1PE10.3)' VER2 ;
    VSE3 = CHAI 'FORMAT' '(1PE10.3)' VER3 ;
    VSS2 = CHAI 'FORMAT' '(F6.2)' VSP2 ;
    VSS3 = CHAI 'FORMAT' '(F6.2)' VSP3 ;
*   fichier de resultat du cas (SORT) et affichage console (MESS)
    OPTI 'SORT' 'valid_phase_03.log' ;
    VMSG = CHAI '=== Cas' ' ' '25' ' ' ':' ' ' 'phase_03' ' ' '(metallurgie/phases)' ' ' '===' ;
    MESS VMSG ;
    SORT 'CHAI' VMSG ;
    VMSG = CHAI 'Valeurs comparees :' ' ' VNC2 ;
    MESS VMSG ;
    SORT 'CHAI' VMSG ;
    VMSG = CHAI 'Temps horloge (ms) : origine' ' ' VTH1 ' ' '; niveau 1' ' ' VTH2 ' ' '; niveau 2' ' ' VTH3 ;
    MESS VMSG ;
    SORT 'CHAI' VMSG ;
    VMSG = CHAI 'Acceleration par rapport a l origine : niveau 1' ' ' VSS2 ' ' '; niveau 2' ' ' VSS3 ;
    MESS VMSG ;
    SORT 'CHAI' VMSG ;
    VMSG = CHAI 'Controles internes du cas : echecs origine' ' ' VNE51 ' ' '; niveau 1' ' ' VNE52 ' ' '; niveau 2' ' ' VNE53 ' ' '- reussites origine' ' ' VNE01 ' ' '; niveau 1' ' ' VNE02 ' ' '; niveau 2' ' ' VNE03 ;
    MESS VMSG ;
    SORT 'CHAI' VMSG ;
    VMSG = CHAI 'Classes exercees (1 MATVAR, 10 ENDOM, 20 VISCODOM, 100 GD) :' ' ' VCLA ;
    MESS VMSG ;
    SORT 'CHAI' VMSG ;
    VMSG = CHAI 'Niveau 1 : raideur reutilisee' ' ' VR2 ' ' 'fois, recalculee' ' ' VC2 ' ' 'fois ; HOOK evite' ' ' VH2 ' ' 'fois ; caracteristiques reutilisees' ' ' VM2 ' ' 'fois' ;
    MESS VMSG ;
    SORT 'CHAI' VMSG ;
    VMSG = CHAI 'Niveau 2 : raideur reutilisee' ' ' VR3 ' ' 'fois, recalculee' ' ' VC3 ' ' 'fois ; HOOK evite' ' ' VH3 ' ' 'fois ; caracteristiques reutilisees' ' ' VM3 ' ' 'fois' ;
    MESS VMSG ;
    SORT 'CHAI' VMSG ;
    VMSG = CHAI 'Ecart relatif maximal : niveau 1' ' ' VSE2 ' ' '; niveau 2' ' ' VSE3 ;
    MESS VMSG ;
    SORT 'CHAI' VMSG ;
    VMSG = CHAI 'RESULTAT : niveau 1' ' ' VMOK2 ' ' '; niveau 2' ' ' VMOK3 ;
    MESS VMSG ;
    SORT 'CHAI' VMSG ;
    SI (('EGA' VNC2 0) ) ;
        VMSG = CHAI 'ATTENTION : aucune valeur comparee (resultats non stockes ?)' ;
        MESS VMSG ;
        SORT 'CHAI' VMSG ;
    FINSI ;
    OPTI 'SORT' 'valid_inutile.tmp' ;
    VRES . 25 = TABL ;
    VRES . 25 . 'NOM' = 'phase_03' ;
    VRES . 25 . 'OKM' = VMOK2 ;
    VRES . 25 . 'OK3' = VMOK3 ;
    VRES . 25 . 'ERR2' = VER2 ;
    VRES . 25 . 'ERR3' = VER3 ;
    VRES . 25 . 'TH1' = VTH1 ;
    VRES . 25 . 'TH2' = VTH2 ;
    VRES . 25 . 'TH3' = VTH3 ;
    VRES . 25 . 'SP2F' = VSP2 ;
    VRES . 25 . 'SP3F' = VSP3 ;
    VRES . 25 . 'NRE2' = VR2 ;
    VRES . 25 . 'NCA2' = VC2 ;
    VRES . 25 . 'NHK2' = VH2 ;
    VRES . 25 . 'NMA2' = VM2 ;
    VRES . 25 . 'NRE3' = VR3 ;
    VRES . 25 . 'NCA3' = VC3 ;
    VRES . 25 . 'NHK3' = VH3 ;
    VRES . 25 . 'CL' = VCLA ;
    VRES . 25 . 'NCMP' = VNC2 ;
    VMSG = CHAI '<<< Cas' ' ' '25' ' ' 'sur' ' ' NTOT0 ' ' ':' ' ' 'phase_03' ' ' ':' ' ' 'niveau 1' ' ' VMOK2 ', niveau 2' ' ' VMOK3 ' ' '- ecart' ' ' VSE2 ', acceleration' ' ' VSS2 ' ' 'et' ' ' VSS3 ;
    MESS VMSG ;
    AVANCE VRES 25 NTOT0 'phase_03' NPASS 'termine' ;
    MENAGE 'OBLI' ;
FINSI ;

*
* ---------------------------------------------------------------------
* Procedure du cas 26 : plas5 (plasticite)
* Variables locales : le cas ne voit aucune variable des cas precedents
* ---------------------------------------------------------------------
DEBPROC VC26 VPSW*'LOGIQUE' VNIV*'ENTIER' VTFPR*'TABLE' VTCT*'TABLE' IECHO0*'ENTIER' ;
* ----- debut du cas plas5

* fichier :  plas5.dgibi
************************************************************************
* Section : Mecanique Plastique
************************************************************************
*           Test Plas5.dgibi: Jeux de données         *
*           ---------------------------------         *
*                                                     *

*******************************************************
*           Test plas5.dgibi: Jeux de données         *
*           ---------------------------------         *
*******************************************************

* SI GRAPH = N PAS DE GRAPHIQUE AFFICHE
* SINON SI GRAPH DIFFERENT DE N TOUS
* LES GRAPHIQUES SONT AFFICHES

GRAPH = 'N' ;

SAUT PAGE;
SI (NEG GRAPH 'N') ;
  OPTI ECHO IECHO0   ;
  OPTI TRAC PSC   ;
SINO ;
  OPTI ECHO IECHO0   ;
FINSI ;

SAUT PAGE;
*******************************************************
*  TEST PLAS5
*
* Sortie du domaine élastique et phase plastique
* (comportement élasto-plastique modèle DRUCKER-PRAGER)
*
* Une plaque carrée est soumise à un déplacement imposé
* sur deux de ses bords et fixée sur les deux autres.
* On compare les contraintes à la solution exacte.
*
*******************************************************
*
*       ^    ^
*       |    |  d(t)
*       |    |
*
*     D .____. C    ----> d(t)
*       |    |
*       |    |
*     A .____. B    ----> d(t)
*
*
*******************************************************

TITRE 'PLAQUE CARRE EN BI-TRACTION PURE ';
OPTION ECHO IECHO0 ;
OPTION DIME 2 ELEM QUA4 MODE PLAN CONT ;
* [valid] TEMPS ;
*------------------------------------------------------
*           DEFINITION DE LA GEOMETRIE
*------------------------------------------------------
A = 0. 0. ;
B = 1.5 0. ;
C = 1.5 1.5 ;
D = 0. 1.5 ;
*
L1 = A DROIT 1 B  ;
L2 = B  DROIT 1 C  ;
L3 = C  DROIT 1 D  ;
L4 = D  DROIT 1 A  ;
LL = L1 ET L2 ET L3 ET L4 ;
SU = SURF LL PLAN ;
SI(NEG GRAPH 'N');
   TRACE  QUAL SU ;
FINSI;
*------------------------------------------------------
*         DEFINITION DES CONDITIONS AUX LIMITES
*              ET DES DEPLACEMENTS IMPOSES
*------------------------------------------------------
CL4 = BLOQ L4 UX  ;
CL2 = BLOQ L2 UX  ;
CL3 = BLOQ L3 UY  ;
CL1 = BLOQ L1 UY  ;
CL = CL1 ET CL2 ET CL3 ET CL4 ;
*
D3 = DEPI CL3 1.5E-4 ;
D2 = DEPI CL2 1.5E-4 ;
DEP = D2 ET D3 ;
*
*-------- Utilisation de la procedure PASAPAS ---------
*-- Les objets utilisés par la procédure PASAPAS sont -
*-------- définis dans les lignes qui suivent ---------
*
MO = MODE SU MECANIQUE ELASTIQUE PLASTIQUE DRUCKER_PRAGER QUA4 ;

KLL= 3.56 ;
ETT= 0.441;
MUU= 1.02 ;
MAT1 = MATE MO YOUN 40000  NU 0.21 ALFA 0.441 BETA 1.02 K 4.1 GAMM 0.441 DELT 1.02 ETA ETT  MU MUU KL KLL  H 0. ;
*
*------- Création d'une relation linéaire entre -------
*----------- le déplacement et le temps ---------------
* Remarque : au temps T, le déplacement vaut F(T)*D .
*
LI1 = PROG 0. 1. 2. 3. 4. 5.  ;
LI2 = PROG 0. 1. 2. 3. 4. 5.  ;
EV = EVOL MANU T LI1 F(T) LI2 ;
CHA1 = CHAR DIMP  DEP EV ;
*
*------- Création de la liste des pas de calcul -------
*
LIS1 = PROG 0. 1. 2.;
TAB1 = TABLE ;
TAB1.'CARACTERISTIQUES' = MAT1;
TAB1.'CHARGEMENT' = CHA1;
TAB1.'MODELE' = MO;
TAB1.'TEMPS_CALCULES' = LIS1;
TAB1.'BLOCAGES_MECANIQUES' = CL;
*
*---------- Calcul par la procedure PASAPAS -----------
*
TAB1 . 'PERF_RAID' = VPSW ; TAB1 . 'PERF_RAID_NIVEAU' = VNIV ; PASAPAS TAB1 ; FPREC TAB1 VTFPR ;
*
*    recherche des contraintes resultats
*    par la procedure PECHE
*
SIG1 = PECHE TAB1 CONTRAINTES 1.;
SIG2 = PECHE TAB1 CONTRAINTES 2.;


SI(NEG GRAPH 'N');
   TITR 'Contrainte SMYY increment 2 en MPa';
   TRAC (EXCO SMYY SIG2) MO;
FINSI;

*
*  extraction d'une valeur d'une composante
*  en un point de gauss
*
SXX = EXTR SIG2 'SMXX' 1 1 1 ;
SYY = EXTR SIG2 'SMYY' 1 1 1 ;
*
*   calcul de la valeur th{orique
*
VALTH = KLL / ( ( 2. * ETT ) +  MUU );
RESI1=100 * (ABS((SXX-VALTH)/VALTH));
RESI2=100 * (ABS((SYY-VALTH)/VALTH));
SAUT PAGE ; SAUT 2 LIGN ;
*
MESS '        CONTRAINTE THEORIQUE CONTRAINTES CALCULEES   ';
SAUT 1 LIGN ;
MESS '           SIG = '  VALTH  ' SMXX=' SXX '  SMYY=' SYY ;
MESS ' SOIT UN ECART DE  ' RESI1 '%  SUR SMXX'   ;
MESS ' SOIT UN ECART DE  ' RESI2 '%  SUR SMYY'   ;
*
* [valid] TEMPS ;
*             CODE FONCTIONNEMENT

SI((RESI1 <EG 1e-10) ET (RESI2 <EG 1e-10));
  VTCT . 'N0' = (VTCT . 'N0') + 1 ;
SINO;
  VTCT . 'N5' = (VTCT . 'N5') + 1 ;
FINSI;
* [valid] FIN final


* ----- fin du cas plas5
FINPROC ;
*
* ---------------------------------------------------------------------
* Cas 26 : plas5 (plasticite)
* ---------------------------------------------------------------------
SI ((IDEB0 '<EG' 26) 'ET' (IFIN0 '>EG' 26) 'ET' ('NON' ('EXIS' TSKIP 26))) ;
    MENAGE 'OBLI' ;
    MESS ' ' ;
    VMSG = CHAI '>>> Cas' ' ' '26' ' ' 'sur' ' ' NTOT0 ' ' ':' ' ' 'plas5' ' ' '(plasticite)' ;
    MESS VMSG ;
    NPASS = 2 ;
    SI IPASS3 ;
        NPASS = 3 ;
    FINSI ;
    VTH1 = 0 ;
    VTH2 = 0 ;
    VTH3 = 0 ;
    VNE51 = 0 ;
    VNE01 = 0 ;
    VNE52 = 0 ;
    VNE02 = 0 ;
    VNE53 = 0 ;
    VNE03 = 0 ;
    REPETER ZVRUN NPASS ;
* ordre des passes alterne d'un cas a l'autre (derive des temps en session)
        VIP = NPASS + 1 - &ZVRUN ;
        VPSW = (VIP '>' 1) ;
        VNIV = 1 ;
        VMPS = 'inactif' ;
        SI (VIP 'EGA' 2) ;
            VMPS = 'actif niveau 1' ;
        FINSI ;
        SI (VIP 'EGA' 3) ;
            VNIV = 2 ;
            VMPS = 'actif niveau 2' ;
        FINSI ;
        AVANCE VRES 26 NTOT0 'plas5' VIP 'en_cours' ;
        VMSG = CHAI '    passe' ' ' VIP ' ' 'sur' ' ' NPASS ' ' ': optimisations' ' ' VMPS ;
        MESS VMSG ;
        SI ITRACE0 ;
            OPTI 'IMPR' 'valid_trace.log' ;
        FINSI ;
        OPTI 'DIME' 3 'MODE' 'TRID' 'ELEM' 'CUB8' 'ECHO' IECHO0 ;
        VTHM = 0 ;
        REPETER ZVREP NREP0 ;
            VIR = &ZVREP ;
            VTFPR = TABL ;
            VTCT = TABL ;
            VTCT . 'N0' = 0 ;
            VTCT . 'N5' = 0 ;
            SI ITEMPS0 ;
                TEMP 'ZERO' ;
            FINSI ;
* Le cas s'execute dans une procedure (variables locales) : les variables
* d'un cas precedent ne peuvent pas masquer un mot-cle ou un operateur
            VC26 VPSW VNIV VTFPR VTCT IECHO0 ;
            VTHR = 0 ;
            SI ITEMPS0 ;
                VTHR = CHRONO ;
            FINSI ;
            SI (VIR 'EGA' 1) ;
                VTHM = VTHR ;
            SINON ;
                SI (VTHR '<' VTHM) ;
                    VTHM = VTHR ;
                FINSI ;
            FINSI ;
        FIN ZVREP ;
        VNER5 = VTCT . 'N5' ;
        VNER0 = VTCT . 'N0' ;
        SI (VIP 'EGA' 1) ;
            VTF1 = VTFPR ;
            VTH1 = VTHM ;
            VNE51 = VNER5 ;
            VNE01 = VNER0 ;
        FINSI ;
        SI (VIP 'EGA' 2) ;
            VTF2 = VTFPR ;
            VTH2 = VTHM ;
            VNE52 = VNER5 ;
            VNE02 = VNER0 ;
        FINSI ;
        SI (VIP 'EGA' 3) ;
            VTF3 = VTFPR ;
            VTH3 = VTHM ;
            VNE53 = VNER5 ;
            VNE03 = VNER0 ;
        FINSI ;
    FIN ZVRUN ;
*   comparaison des empreintes avec la passe 1
    VER2 VNL2 VNC2 = COMPAR VTF1 VTF2 ;
    VMOK2 = 'OK' ;
    SI ((VER2 '>' TOLV0) 'OU' (VNL2 '>' 0) 'OU' ('NON' (VNE52 'EGA' VNE51))) ;
        VMOK2 = 'ECART' ;
        VNBK2 = VNBK2 + 1 ;
    FINSI ;
    VER3 = 0. ;
    VNC3 = 0 ;
    VMOK3 = 'sans_objet' ;
    SI IPASS3 ;
        VER3 VNL3 VNC3 = COMPAR VTF1 VTF3 ;
        VMOK3 = 'OK' ;
        SI ((VER3 '>' TOLV3) 'OU' (VNL3 '>' 0) 'OU' ('NON' (VNE53 'EGA' VNE51))) ;
            VMOK3 = 'ECART' ;
            VNBK3 = VNBK3 + 1 ;
        FINSI ;
    FINSI ;
*   accelerations (temps de la passe 1 / temps de la passe)
    VSP2 = 0. ;
    VSP3 = 0. ;
    SI ((VTH1 '>' 0) 'ET' (VTH2 '>' 0)) ;
        VSP2 = (FLOT VTH1) '/' (FLOT VTH2) ;
    FINSI ;
    SI ((VTH1 '>' 0) 'ET' (VTH3 '>' 0)) ;
        VSP3 = (FLOT VTH1) '/' (FLOT VTH3) ;
    FINSI ;
    VSUM1 = VSUM1 + VTH1 ;
    VSUM2 = VSUM2 + VTH2 ;
    VSUM3 = VSUM3 + VTH3 ;
    VCLA = VTF2 . 'CL' ;
    VR2 = VTF2 . 'NRE' ;
    VC2 = VTF2 . 'NCA' ;
    VH2 = VTF2 . 'NHK' ;
    VM2 = VTF2 . 'NMA' ;
    VR3 = -1 ;
    VC3 = -1 ;
    VH3 = -1 ;
    VM3 = -1 ;
    SI IPASS3 ;
        VR3 = VTF3 . 'NRE' ;
        VC3 = VTF3 . 'NCA' ;
        VH3 = VTF3 . 'NHK' ;
        VM3 = VTF3 . 'NMA' ;
    FINSI ;
    VSE2 = CHAI 'FORMAT' '(1PE10.3)' VER2 ;
    VSE3 = CHAI 'FORMAT' '(1PE10.3)' VER3 ;
    VSS2 = CHAI 'FORMAT' '(F6.2)' VSP2 ;
    VSS3 = CHAI 'FORMAT' '(F6.2)' VSP3 ;
*   fichier de resultat du cas (SORT) et affichage console (MESS)
    OPTI 'SORT' 'valid_plas5.log' ;
    VMSG = CHAI '=== Cas' ' ' '26' ' ' ':' ' ' 'plas5' ' ' '(plasticite)' ' ' '===' ;
    MESS VMSG ;
    SORT 'CHAI' VMSG ;
    VMSG = CHAI 'Valeurs comparees :' ' ' VNC2 ;
    MESS VMSG ;
    SORT 'CHAI' VMSG ;
    VMSG = CHAI 'Temps horloge (ms) : origine' ' ' VTH1 ' ' '; niveau 1' ' ' VTH2 ' ' '; niveau 2' ' ' VTH3 ;
    MESS VMSG ;
    SORT 'CHAI' VMSG ;
    VMSG = CHAI 'Acceleration par rapport a l origine : niveau 1' ' ' VSS2 ' ' '; niveau 2' ' ' VSS3 ;
    MESS VMSG ;
    SORT 'CHAI' VMSG ;
    VMSG = CHAI 'Controles internes du cas : echecs origine' ' ' VNE51 ' ' '; niveau 1' ' ' VNE52 ' ' '; niveau 2' ' ' VNE53 ' ' '- reussites origine' ' ' VNE01 ' ' '; niveau 1' ' ' VNE02 ' ' '; niveau 2' ' ' VNE03 ;
    MESS VMSG ;
    SORT 'CHAI' VMSG ;
    VMSG = CHAI 'Classes exercees (1 MATVAR, 10 ENDOM, 20 VISCODOM, 100 GD) :' ' ' VCLA ;
    MESS VMSG ;
    SORT 'CHAI' VMSG ;
    VMSG = CHAI 'Niveau 1 : raideur reutilisee' ' ' VR2 ' ' 'fois, recalculee' ' ' VC2 ' ' 'fois ; HOOK evite' ' ' VH2 ' ' 'fois ; caracteristiques reutilisees' ' ' VM2 ' ' 'fois' ;
    MESS VMSG ;
    SORT 'CHAI' VMSG ;
    VMSG = CHAI 'Niveau 2 : raideur reutilisee' ' ' VR3 ' ' 'fois, recalculee' ' ' VC3 ' ' 'fois ; HOOK evite' ' ' VH3 ' ' 'fois ; caracteristiques reutilisees' ' ' VM3 ' ' 'fois' ;
    MESS VMSG ;
    SORT 'CHAI' VMSG ;
    VMSG = CHAI 'Ecart relatif maximal : niveau 1' ' ' VSE2 ' ' '; niveau 2' ' ' VSE3 ;
    MESS VMSG ;
    SORT 'CHAI' VMSG ;
    VMSG = CHAI 'RESULTAT : niveau 1' ' ' VMOK2 ' ' '; niveau 2' ' ' VMOK3 ;
    MESS VMSG ;
    SORT 'CHAI' VMSG ;
    SI (('EGA' VNC2 0) ) ;
        VMSG = CHAI 'ATTENTION : aucune valeur comparee (resultats non stockes ?)' ;
        MESS VMSG ;
        SORT 'CHAI' VMSG ;
    FINSI ;
    OPTI 'SORT' 'valid_inutile.tmp' ;
    VRES . 26 = TABL ;
    VRES . 26 . 'NOM' = 'plas5' ;
    VRES . 26 . 'OKM' = VMOK2 ;
    VRES . 26 . 'OK3' = VMOK3 ;
    VRES . 26 . 'ERR2' = VER2 ;
    VRES . 26 . 'ERR3' = VER3 ;
    VRES . 26 . 'TH1' = VTH1 ;
    VRES . 26 . 'TH2' = VTH2 ;
    VRES . 26 . 'TH3' = VTH3 ;
    VRES . 26 . 'SP2F' = VSP2 ;
    VRES . 26 . 'SP3F' = VSP3 ;
    VRES . 26 . 'NRE2' = VR2 ;
    VRES . 26 . 'NCA2' = VC2 ;
    VRES . 26 . 'NHK2' = VH2 ;
    VRES . 26 . 'NMA2' = VM2 ;
    VRES . 26 . 'NRE3' = VR3 ;
    VRES . 26 . 'NCA3' = VC3 ;
    VRES . 26 . 'NHK3' = VH3 ;
    VRES . 26 . 'CL' = VCLA ;
    VRES . 26 . 'NCMP' = VNC2 ;
    VMSG = CHAI '<<< Cas' ' ' '26' ' ' 'sur' ' ' NTOT0 ' ' ':' ' ' 'plas5' ' ' ':' ' ' 'niveau 1' ' ' VMOK2 ', niveau 2' ' ' VMOK3 ' ' '- ecart' ' ' VSE2 ', acceleration' ' ' VSS2 ' ' 'et' ' ' VSS3 ;
    MESS VMSG ;
    AVANCE VRES 26 NTOT0 'plas5' NPASS 'termine' ;
    MENAGE 'OBLI' ;
FINSI ;

*
* ---------------------------------------------------------------------
* Procedure du cas 27 : plas_incomp (plasticite incompressible)
* Variables locales : le cas ne voit aucune variable des cas precedents
* ---------------------------------------------------------------------
DEBPROC VC27 VPSW*'LOGIQUE' VNIV*'ENTIER' VTFPR*'TABLE' VTCT*'TABLE' IECHO0*'ENTIER' ;
* ----- debut du cas plas_incomp

* fichier :  plas_incomp.dgibi
************************************************************************
* Section : Mecanique Plastique
************************************************************************
SAUT PAGE;
************************************************************************
*     CUBE EN TRACTION UNIAXIALE
*     Plastique parfait
*     verification de l'incompressibilite de l'ecoulement plastique
*
*
optio elem cub8;

SAUT PAGE;
TITRE 'CUBE EN TRACTION UNIAXIALE';
OPTION DIME 3 ;

graph = 'N';

* [valid] TEMPS ;
DENS 1;
*-----------------------------------------------------------------------
***** DEFINITION DE LA GEOMETRIE
*-----------------------------------------------------------------------

p1 = 0 0 0; p2 = 0 1 0; l1 = p1 d 1 p2; s1 = l1 tran 1 (0 0 1);
s2 = s1 plus (1 0 0);   v1 = volu  1 s1 s2;
en = enve v1;
e1 = en elem 1; e2 = en elem 2; e3 = en elem 3; e4 = en elem 4; e5 = en elem 5; e6 = en elem 6;

bl1 = bloq ux s1; bl2 = bloq ux s2;
bl3 = bloq uy uz p1; bl4 = bloq uz p2;
bl5 = bloq uz (e2 et e5);
blt = bl1 et bl2 et bl3 et bl4 et bl5;


*-----------------------------------------------------------------------
* VALEURS IMPOSEES DES DEPLACEMENTS
*-----------------------------------------------------------------------
di = depi bl1 -1 ;
*-----------------------------------------------------------------------
***** CALCUL MODELE
*-----------------------------------------------------------------------
MO = MODE V1  'MECANIQUE' 'ELASTIQUE' 'PLASTIQUE' 'PARFAIT' CUB8;
MAT1 = MATE MO YOUN 2.5E11 SIGY 5.0E6 NU .499  ;


*-----------------------------------------------------------------------
***** CHAMPS RELATIFS A L'OPERATEUR PASAPAS
*-----------------------------------------------------------------------
LP1 = PROG 0. 20.;
LP2 = PROG 0. 20.;
EV = EVOL MANU T LP1 F(T) LP2;
CHA1 = CHAR 'DIMP' Di EV;
LIS1 = PROG 0. PAS 1d-1 2                                    ;
*-----------------------------------------------------------------------
*****  CALCUL NON LINEAIRE
*-----------------------------------------------------------------------
TAB1 = TABLE;
TAB1.'BLOCAGES_MECANIQUES' = blt;
TAB1.'CARACTERISTIQUES' = MAT1;
TAB1.'TEMPS_CALCULES' = LIS1;
TAB1.'MODELE' = MO;
TAB1.'CHARGEMENT' = CHA1;
TAB1.'GRANDS_DEPLACEMENTS' = VRAI ;
*TAB1.'LAGRANGIEN' = 'MOT' 'FIN_PAS';
TAB1.'LAGRANGIEN' = 'MOT' 'REACTUALISE';
TAB1.'PRECISION' = 1d-9 ;
TAB1 . 'PERF_RAID' = VPSW ; TAB1 . 'PERF_RAID_NIVEAU' = VNIV ; PASAPAS TAB1 ; FPREC TAB1 VTFPR ;

form tab1.wtable.for0;
repete bou (dime  tab1.deplacements - 2)  ;
dd = tab1.deplacements.&bou;
form dd;
mes = mesu volu v1;
list mes;
form tab1.wtable.for0;
fin bou;

list (mes - 1);
si (abs (mes - 1) > 1d-7) ; erreur 5; finsi;
* [valid] FIN final


* ----- fin du cas plas_incomp
FINPROC ;
*
* ---------------------------------------------------------------------
* Cas 27 : plas_incomp (plasticite incompressible)
* ---------------------------------------------------------------------
SI ((IDEB0 '<EG' 27) 'ET' (IFIN0 '>EG' 27) 'ET' ('NON' ('EXIS' TSKIP 27))) ;
    MENAGE 'OBLI' ;
    MESS ' ' ;
    VMSG = CHAI '>>> Cas' ' ' '27' ' ' 'sur' ' ' NTOT0 ' ' ':' ' ' 'plas_incomp' ' ' '(plasticite incompressible)' ;
    MESS VMSG ;
    NPASS = 2 ;
    SI IPASS3 ;
        NPASS = 3 ;
    FINSI ;
    VTH1 = 0 ;
    VTH2 = 0 ;
    VTH3 = 0 ;
    VNE51 = 0 ;
    VNE01 = 0 ;
    VNE52 = 0 ;
    VNE02 = 0 ;
    VNE53 = 0 ;
    VNE03 = 0 ;
    REPETER ZVRUN NPASS ;
* ordre des passes alterne d'un cas a l'autre (derive des temps en session)
        VIP = &ZVRUN ;
        VPSW = (VIP '>' 1) ;
        VNIV = 1 ;
        VMPS = 'inactif' ;
        SI (VIP 'EGA' 2) ;
            VMPS = 'actif niveau 1' ;
        FINSI ;
        SI (VIP 'EGA' 3) ;
            VNIV = 2 ;
            VMPS = 'actif niveau 2' ;
        FINSI ;
        AVANCE VRES 27 NTOT0 'plas_incomp' VIP 'en_cours' ;
        VMSG = CHAI '    passe' ' ' VIP ' ' 'sur' ' ' NPASS ' ' ': optimisations' ' ' VMPS ;
        MESS VMSG ;
        SI ITRACE0 ;
            OPTI 'IMPR' 'valid_trace.log' ;
        FINSI ;
        OPTI 'DIME' 3 'MODE' 'TRID' 'ELEM' 'CUB8' 'ECHO' IECHO0 ;
        VTHM = 0 ;
        REPETER ZVREP NREP0 ;
            VIR = &ZVREP ;
            VTFPR = TABL ;
            VTCT = TABL ;
            VTCT . 'N0' = 0 ;
            VTCT . 'N5' = 0 ;
            SI ITEMPS0 ;
                TEMP 'ZERO' ;
            FINSI ;
* Le cas s'execute dans une procedure (variables locales) : les variables
* d'un cas precedent ne peuvent pas masquer un mot-cle ou un operateur
            VC27 VPSW VNIV VTFPR VTCT IECHO0 ;
            VTHR = 0 ;
            SI ITEMPS0 ;
                VTHR = CHRONO ;
            FINSI ;
            SI (VIR 'EGA' 1) ;
                VTHM = VTHR ;
            SINON ;
                SI (VTHR '<' VTHM) ;
                    VTHM = VTHR ;
                FINSI ;
            FINSI ;
        FIN ZVREP ;
        VNER5 = VTCT . 'N5' ;
        VNER0 = VTCT . 'N0' ;
        SI (VIP 'EGA' 1) ;
            VTF1 = VTFPR ;
            VTH1 = VTHM ;
            VNE51 = VNER5 ;
            VNE01 = VNER0 ;
        FINSI ;
        SI (VIP 'EGA' 2) ;
            VTF2 = VTFPR ;
            VTH2 = VTHM ;
            VNE52 = VNER5 ;
            VNE02 = VNER0 ;
        FINSI ;
        SI (VIP 'EGA' 3) ;
            VTF3 = VTFPR ;
            VTH3 = VTHM ;
            VNE53 = VNER5 ;
            VNE03 = VNER0 ;
        FINSI ;
    FIN ZVRUN ;
*   comparaison des empreintes avec la passe 1
    VER2 VNL2 VNC2 = COMPAR VTF1 VTF2 ;
    VMOK2 = 'OK' ;
    SI ((VER2 '>' TOLV0) 'OU' (VNL2 '>' 0) 'OU' ('NON' (VNE52 'EGA' VNE51))) ;
        VMOK2 = 'ECART' ;
        VNBK2 = VNBK2 + 1 ;
    FINSI ;
    VER3 = 0. ;
    VNC3 = 0 ;
    VMOK3 = 'sans_objet' ;
    SI IPASS3 ;
        VER3 VNL3 VNC3 = COMPAR VTF1 VTF3 ;
        VMOK3 = 'OK' ;
        SI ((VER3 '>' TOLV3) 'OU' (VNL3 '>' 0) 'OU' ('NON' (VNE53 'EGA' VNE51))) ;
            VMOK3 = 'ECART' ;
            VNBK3 = VNBK3 + 1 ;
        FINSI ;
    FINSI ;
*   accelerations (temps de la passe 1 / temps de la passe)
    VSP2 = 0. ;
    VSP3 = 0. ;
    SI ((VTH1 '>' 0) 'ET' (VTH2 '>' 0)) ;
        VSP2 = (FLOT VTH1) '/' (FLOT VTH2) ;
    FINSI ;
    SI ((VTH1 '>' 0) 'ET' (VTH3 '>' 0)) ;
        VSP3 = (FLOT VTH1) '/' (FLOT VTH3) ;
    FINSI ;
    VSUM1 = VSUM1 + VTH1 ;
    VSUM2 = VSUM2 + VTH2 ;
    VSUM3 = VSUM3 + VTH3 ;
    VCLA = VTF2 . 'CL' ;
    VR2 = VTF2 . 'NRE' ;
    VC2 = VTF2 . 'NCA' ;
    VH2 = VTF2 . 'NHK' ;
    VM2 = VTF2 . 'NMA' ;
    VR3 = -1 ;
    VC3 = -1 ;
    VH3 = -1 ;
    VM3 = -1 ;
    SI IPASS3 ;
        VR3 = VTF3 . 'NRE' ;
        VC3 = VTF3 . 'NCA' ;
        VH3 = VTF3 . 'NHK' ;
        VM3 = VTF3 . 'NMA' ;
    FINSI ;
    VSE2 = CHAI 'FORMAT' '(1PE10.3)' VER2 ;
    VSE3 = CHAI 'FORMAT' '(1PE10.3)' VER3 ;
    VSS2 = CHAI 'FORMAT' '(F6.2)' VSP2 ;
    VSS3 = CHAI 'FORMAT' '(F6.2)' VSP3 ;
*   fichier de resultat du cas (SORT) et affichage console (MESS)
    OPTI 'SORT' 'valid_plas_incomp.log' ;
    VMSG = CHAI '=== Cas' ' ' '27' ' ' ':' ' ' 'plas_incomp' ' ' '(plasticite incompressible)' ' ' '===' ;
    MESS VMSG ;
    SORT 'CHAI' VMSG ;
    VMSG = CHAI 'Valeurs comparees :' ' ' VNC2 ;
    MESS VMSG ;
    SORT 'CHAI' VMSG ;
    VMSG = CHAI 'Temps horloge (ms) : origine' ' ' VTH1 ' ' '; niveau 1' ' ' VTH2 ' ' '; niveau 2' ' ' VTH3 ;
    MESS VMSG ;
    SORT 'CHAI' VMSG ;
    VMSG = CHAI 'Acceleration par rapport a l origine : niveau 1' ' ' VSS2 ' ' '; niveau 2' ' ' VSS3 ;
    MESS VMSG ;
    SORT 'CHAI' VMSG ;
    VMSG = CHAI 'Controles internes du cas : echecs origine' ' ' VNE51 ' ' '; niveau 1' ' ' VNE52 ' ' '; niveau 2' ' ' VNE53 ' ' '- reussites origine' ' ' VNE01 ' ' '; niveau 1' ' ' VNE02 ' ' '; niveau 2' ' ' VNE03 ;
    MESS VMSG ;
    SORT 'CHAI' VMSG ;
    VMSG = CHAI 'Classes exercees (1 MATVAR, 10 ENDOM, 20 VISCODOM, 100 GD) :' ' ' VCLA ;
    MESS VMSG ;
    SORT 'CHAI' VMSG ;
    VMSG = CHAI 'Niveau 1 : raideur reutilisee' ' ' VR2 ' ' 'fois, recalculee' ' ' VC2 ' ' 'fois ; HOOK evite' ' ' VH2 ' ' 'fois ; caracteristiques reutilisees' ' ' VM2 ' ' 'fois' ;
    MESS VMSG ;
    SORT 'CHAI' VMSG ;
    VMSG = CHAI 'Niveau 2 : raideur reutilisee' ' ' VR3 ' ' 'fois, recalculee' ' ' VC3 ' ' 'fois ; HOOK evite' ' ' VH3 ' ' 'fois ; caracteristiques reutilisees' ' ' VM3 ' ' 'fois' ;
    MESS VMSG ;
    SORT 'CHAI' VMSG ;
    VMSG = CHAI 'Ecart relatif maximal : niveau 1' ' ' VSE2 ' ' '; niveau 2' ' ' VSE3 ;
    MESS VMSG ;
    SORT 'CHAI' VMSG ;
    VMSG = CHAI 'RESULTAT : niveau 1' ' ' VMOK2 ' ' '; niveau 2' ' ' VMOK3 ;
    MESS VMSG ;
    SORT 'CHAI' VMSG ;
    SI (('EGA' VNC2 0) ) ;
        VMSG = CHAI 'ATTENTION : aucune valeur comparee (resultats non stockes ?)' ;
        MESS VMSG ;
        SORT 'CHAI' VMSG ;
    FINSI ;
    OPTI 'SORT' 'valid_inutile.tmp' ;
    VRES . 27 = TABL ;
    VRES . 27 . 'NOM' = 'plas_incomp' ;
    VRES . 27 . 'OKM' = VMOK2 ;
    VRES . 27 . 'OK3' = VMOK3 ;
    VRES . 27 . 'ERR2' = VER2 ;
    VRES . 27 . 'ERR3' = VER3 ;
    VRES . 27 . 'TH1' = VTH1 ;
    VRES . 27 . 'TH2' = VTH2 ;
    VRES . 27 . 'TH3' = VTH3 ;
    VRES . 27 . 'SP2F' = VSP2 ;
    VRES . 27 . 'SP3F' = VSP3 ;
    VRES . 27 . 'NRE2' = VR2 ;
    VRES . 27 . 'NCA2' = VC2 ;
    VRES . 27 . 'NHK2' = VH2 ;
    VRES . 27 . 'NMA2' = VM2 ;
    VRES . 27 . 'NRE3' = VR3 ;
    VRES . 27 . 'NCA3' = VC3 ;
    VRES . 27 . 'NHK3' = VH3 ;
    VRES . 27 . 'CL' = VCLA ;
    VRES . 27 . 'NCMP' = VNC2 ;
    VMSG = CHAI '<<< Cas' ' ' '27' ' ' 'sur' ' ' NTOT0 ' ' ':' ' ' 'plas_incomp' ' ' ':' ' ' 'niveau 1' ' ' VMOK2 ', niveau 2' ' ' VMOK3 ' ' '- ecart' ' ' VSE2 ', acceleration' ' ' VSS2 ' ' 'et' ' ' VSS3 ;
    MESS VMSG ;
    AVANCE VRES 27 NTOT0 'plas_incomp' NPASS 'termine' ;
    MENAGE 'OBLI' ;
FINSI ;

*
* ---------------------------------------------------------------------
* Procedure du cas 28 : chaboche1 (viscoplasticite Chaboche/Onera)
* Variables locales : le cas ne voit aucune variable des cas precedents
* ---------------------------------------------------------------------
DEBPROC VC28 VPSW*'LOGIQUE' VNIV*'ENTIER' VTFPR*'TABLE' VTCT*'TABLE' IECHO0*'ENTIER' ;
* ----- debut du cas chaboche1

* fichier : chaboche1.dgibi
* section : Mecanique Viscoplastique
*----------------------------------------------------------------------*
*                          CHABOCHE1.DGIBI                             *
*----------------------------------------------------------------------*
*
* Objet :
* -------
*
* Test de validation d'une loi de comportement de materiau.
* Loi de comportement elastoviscoplastique de Chaboche.
*
*
* Description :
* -------------
* Essai de traction-compression.
*
* Type de calcul : Mecanique
* Mode de calcul : 2D contraintes planes
* Type d'element : QUA8 BBAR
* Chargement     : Deplacement impose
* Reference      : solution comparee a la loi ONERA
* Objectif       : Ecart relatif sur la contrainte SMZZ < 1.e-4
*
* Reference :
* -----------
* L&M : J. Lemaitre, J.-L. Chaboche, "Mecanique des materiaux solides",
*       Dunod, 2e edition, 1996.
*
*----------------------------------------------------------------------*
*
* Pour afficher les traces, mettre IGRAPH a vrai :
IGRAPH = faux ;
*
*------------------------ Maillage (1 element) ------------------------*
*
opti dime 2 elem qua8 mode plan cont ;

ne1 = 1 ;
l1  = (0 0) droi ne1 (1. 0.) ;
S1  =    l1 tran ne1 (0. 1.) ;

l2  = s1 cote 2 ;
l3  = S1 cote 3 ;
l4  = S1 cote 4 ;

si IGRAPH ;
  trac qual S1 titr ' Maillage ' ;
fins ;
*
*---------------------- Modele & Carateristiques ----------------------*
*
* Par rapport aux parametres du modele presentes dans le L&M, p. 310 :
*   - CLM : coefficient C d'ecrouissage cinematique du L&M
*   - Gam : coefficient gamma d'ecrouissage cinematique du L&M
* les coefficients d'ecrouissage du modele de Cast3M sont :
*   - C = Gam
*   - A = CLM / Gam
* Valeurs des parametres du modele pour acier 316L a 20 degC (L&M, p. 319) :
SIGY1 = 82.e6 ;
N1    = 24. ;
K1    = 151.e6 ;
CLM   = 162400.e6 ;
Gam   = 2800. ;
A1    = CLM / Gam ;
C1    = Gam   ;
Q1    = 142.e6 - SIGY1 ;
B1    = 8. ;

* Module d'Young, coeff. de Poisson et epaisseur (DIM3) :
YM1   = 200.e9 ;
NU1   = 0.3 ;
E1    = 1.e-3 ;

* Modeles & Caracteristiques :
mo1 = mode s1 mecanique elastique isotrope viscoplastique chaboche bbar ;
ma1 = mate mo1 'YOUN' YM1 'NU' NU1 'SIGY' SIGY1 'DIM3' E1
               'K'    K1  'N'  N1  'A'    A1    'C'    C1 'B' B1 'Q' Q1 ;

mo2 = 'MODE' S1 'MECANIQUE' 'ELASTIQUE' 'ISOTROPE' 'VISCOPLASTIQUE' 'ONERA' 'BBAR' ;
ma2 = 'MATE' mo2 'YOUN' YM1 'NU' NU1 'KK' SIGY1 'DIM3' E1
       'K0'   K1 'N'    N1 'B'    B1
       'ALFK' 0. 'ALFR' 1. 'ALF'  0.
       'A1'   A1 'C1'   C1 'BET1' 0. 'R1'   0.
       'A2'   0. 'C2'   0. 'BET2' 0. 'R2'   0.
       'PHI'  1. 'GAMA' 0. 'M'    0.
       'QMAX' 1. 'QSTA' 0. 'MU'   0. 'ETA'  0. ;

*-------------------------- CL & Chargement ---------------------------*
*
cl1 = bloq uy l1 ;
cl2 = bloq ux l4 ;
cl3 = bloq uy l3 ;

u1  = 0.002 ;
f1  = depi cl3 u1 ;

xt1  = 100. ;
ev1  = evol manu temp (xt1 * (prog 0. 1. 2.  3. 4. 6.))
                      (prog 0. 1. 0. -1. 0. 2.) ;
cgu1 = char dimp f1 ev1 ;

si IGRAPH ;
  trac qual (S1 et (l1 coul roug) et (l3 coul vert) et (l4 coul bleu))
    titr ' CL : Uy=0 en L1 (rouge), Ux=0 en L4 (bleu) et Uy impose sur L3 (vert)' ;
  dess (u1*ev1) titre ' Evolution temporelle du deplacement impose ';
fins ;

*------------------------- Resolution PASAPAS -------------------------*
*
* Modele de Chaboche :
ta1 = tabl ;
ta1.modele = mo1 ;
ta1.caracteristiques = ma1 ;
ta1.blocages_mecaniques = cl1 et cl2 et cl3 ;
ta1.chargement = cgu1 ;
ta1.temps_calcules = (prog 0. pas 0.1 6.) * xt1 ;
*ta1.temps_calcules = prog 0. 1.0 ;
ta1.hypothese_deformation = 'LINEAIRE' ;

ta1.mes_sauvegardes = tabl ;
ta1.mes_sauvegardes.defin = vrai ;

ta1 . 'PERF_RAID' = VPSW ; ta1 . 'PERF_RAID_NIVEAU' = VNIV ; PASAPAS ta1 ; FPREC ta1 VTFPR ;

* Modele ONERA :
ta2 = tabl ;
ta2.modele = mo2 ;
ta2.caracteristiques = ma2 ;
ta2.blocages_mecaniques = cl1 et cl2 et cl3 ;
ta2.chargement = cgu1 ;
ta2.temps_calcules = ta1.temps_calcules ;

ta2.mes_sauvegardes = tabl ;
ta2.mes_sauvegardes.defin = vrai ;

chq0 = manu chml mo2 epse 0. qqq Q1 stresses ;
ta2.variables_internes = tabl ;
ta2.variables_internes.0 = chq0 ;

ta2 . 'PERF_RAID' = VPSW ; ta2 . 'PERF_RAID_NIVEAU' = VNIV ; PASAPAS ta2 ; FPREC ta2 VTFPR ;

*-------------------- Postraitement des resultats ---------------------*

nb1   = dime ta1.temps ;
ltps1 = prog ;
leps1 = prog ;
lsig1 = prog ;
lsig2 = prog ;
i1    = 0 ;
repe bo1 nb1 ;
  tpsi1 = ta1.temps.i1 ;
  depi1 = ta1.deplacements.i1 ;
  epsi1 = (epsi mo1 ma1 depi1) exco epyy scal maxi ;
  sigi1 = ta1.contraintes.i1 exco smyy scal maxi ;
  sigi2 = ta2.contraintes.i1 exco smyy scal maxi ;
  ltps1 = ltps1 et (prog tpsi1) ;
  leps1 = leps1 et (prog epsi1) ;
  lsig1 = lsig1 et (prog sigi1) ;
  lsig2 = lsig2 et (prog sigi2) ;
  i1    = i1 + 1 ;
fin bo1 ;
lsig1  = 1.e-6 * lsig1 ;
lsig2  = 1.e-6 * lsig2 ;
evezz1 = evol manu temps ltps1 epzz leps1 ;
evszz1 = evol roug manu temps ltps1 smzz lsig1 ;
evszz2 = evol vert manu temps ltps1 smzz lsig2 ;
evsve1 = evol roug manu epzz  leps1 smzz lsig1 ;
evsve2 = evol vert manu epzz  leps1 smzz lsig2 ;

* Affichages :
si IGRAPH ;
  tl1 = table ;
  tl1 . 1 = 'NOLI MARQ CROI' ;
  tl1 . titre = table ;
  tl1 . titre . 1 = 'ONERA' ;
  tl1 . titre . 2 = 'CHABOCHE' ;
  dess (evszz1 et evszz2) lege tl1
    titre ' Evolution temporelle de la contrainte de traction ' ;
  dess (evsve1 et evsve2) lege tl1 titre ' Courbe de traction ' ;
fins ;

*------------------------- Test de validation -------------------------*
*
err0 = (maxi abs (lsig2 - lsig1)) / (maxi abs lsig2) ;

opti echo IECHO0 ;
saut 1 lign ;
mess '   Comparaison solution calculee / reference ' ;
mess '   ----------------------------------------- ' ;
mess '   Max.|SMZZ(cal.) - SMZZ(Ref.)| / Max.|SMZZ(cal.)| =' err0 ;
saut 1 lign ;
opti echo IECHO0 ;

si (err0 > 1.e-4) ;
  VTCT . 'N5' = (VTCT . 'N5') + 1 ;
fins ;
* [valid] FIN final


* ----- fin du cas chaboche1
FINPROC ;
*
* ---------------------------------------------------------------------
* Cas 28 : chaboche1 (viscoplasticite Chaboche/Onera)
* ---------------------------------------------------------------------
SI ((IDEB0 '<EG' 28) 'ET' (IFIN0 '>EG' 28) 'ET' ('NON' ('EXIS' TSKIP 28))) ;
    MENAGE 'OBLI' ;
    MESS ' ' ;
    VMSG = CHAI '>>> Cas' ' ' '28' ' ' 'sur' ' ' NTOT0 ' ' ':' ' ' 'chaboche1' ' ' '(viscoplasticite Chaboche/Onera)' ;
    MESS VMSG ;
    NPASS = 2 ;
    SI IPASS3 ;
        NPASS = 3 ;
    FINSI ;
    VTH1 = 0 ;
    VTH2 = 0 ;
    VTH3 = 0 ;
    VNE51 = 0 ;
    VNE01 = 0 ;
    VNE52 = 0 ;
    VNE02 = 0 ;
    VNE53 = 0 ;
    VNE03 = 0 ;
    REPETER ZVRUN NPASS ;
* ordre des passes alterne d'un cas a l'autre (derive des temps en session)
        VIP = NPASS + 1 - &ZVRUN ;
        VPSW = (VIP '>' 1) ;
        VNIV = 1 ;
        VMPS = 'inactif' ;
        SI (VIP 'EGA' 2) ;
            VMPS = 'actif niveau 1' ;
        FINSI ;
        SI (VIP 'EGA' 3) ;
            VNIV = 2 ;
            VMPS = 'actif niveau 2' ;
        FINSI ;
        AVANCE VRES 28 NTOT0 'chaboche1' VIP 'en_cours' ;
        VMSG = CHAI '    passe' ' ' VIP ' ' 'sur' ' ' NPASS ' ' ': optimisations' ' ' VMPS ;
        MESS VMSG ;
        SI ITRACE0 ;
            OPTI 'IMPR' 'valid_trace.log' ;
        FINSI ;
        OPTI 'DIME' 3 'MODE' 'TRID' 'ELEM' 'CUB8' 'ECHO' IECHO0 ;
        VTHM = 0 ;
        REPETER ZVREP NREP0 ;
            VIR = &ZVREP ;
            VTFPR = TABL ;
            VTCT = TABL ;
            VTCT . 'N0' = 0 ;
            VTCT . 'N5' = 0 ;
            SI ITEMPS0 ;
                TEMP 'ZERO' ;
            FINSI ;
* Le cas s'execute dans une procedure (variables locales) : les variables
* d'un cas precedent ne peuvent pas masquer un mot-cle ou un operateur
            VC28 VPSW VNIV VTFPR VTCT IECHO0 ;
            VTHR = 0 ;
            SI ITEMPS0 ;
                VTHR = CHRONO ;
            FINSI ;
            SI (VIR 'EGA' 1) ;
                VTHM = VTHR ;
            SINON ;
                SI (VTHR '<' VTHM) ;
                    VTHM = VTHR ;
                FINSI ;
            FINSI ;
        FIN ZVREP ;
        VNER5 = VTCT . 'N5' ;
        VNER0 = VTCT . 'N0' ;
        SI (VIP 'EGA' 1) ;
            VTF1 = VTFPR ;
            VTH1 = VTHM ;
            VNE51 = VNER5 ;
            VNE01 = VNER0 ;
        FINSI ;
        SI (VIP 'EGA' 2) ;
            VTF2 = VTFPR ;
            VTH2 = VTHM ;
            VNE52 = VNER5 ;
            VNE02 = VNER0 ;
        FINSI ;
        SI (VIP 'EGA' 3) ;
            VTF3 = VTFPR ;
            VTH3 = VTHM ;
            VNE53 = VNER5 ;
            VNE03 = VNER0 ;
        FINSI ;
    FIN ZVRUN ;
*   comparaison des empreintes avec la passe 1
    VER2 VNL2 VNC2 = COMPAR VTF1 VTF2 ;
    VMOK2 = 'OK' ;
    SI ((VER2 '>' TOLV0) 'OU' (VNL2 '>' 0) 'OU' ('NON' (VNE52 'EGA' VNE51))) ;
        VMOK2 = 'ECART' ;
        VNBK2 = VNBK2 + 1 ;
    FINSI ;
    VER3 = 0. ;
    VNC3 = 0 ;
    VMOK3 = 'sans_objet' ;
    SI IPASS3 ;
        VER3 VNL3 VNC3 = COMPAR VTF1 VTF3 ;
        VMOK3 = 'OK' ;
        SI ((VER3 '>' TOLV3) 'OU' (VNL3 '>' 0) 'OU' ('NON' (VNE53 'EGA' VNE51))) ;
            VMOK3 = 'ECART' ;
            VNBK3 = VNBK3 + 1 ;
        FINSI ;
    FINSI ;
*   accelerations (temps de la passe 1 / temps de la passe)
    VSP2 = 0. ;
    VSP3 = 0. ;
    SI ((VTH1 '>' 0) 'ET' (VTH2 '>' 0)) ;
        VSP2 = (FLOT VTH1) '/' (FLOT VTH2) ;
    FINSI ;
    SI ((VTH1 '>' 0) 'ET' (VTH3 '>' 0)) ;
        VSP3 = (FLOT VTH1) '/' (FLOT VTH3) ;
    FINSI ;
    VSUM1 = VSUM1 + VTH1 ;
    VSUM2 = VSUM2 + VTH2 ;
    VSUM3 = VSUM3 + VTH3 ;
    VCLA = VTF2 . 'CL' ;
    VR2 = VTF2 . 'NRE' ;
    VC2 = VTF2 . 'NCA' ;
    VH2 = VTF2 . 'NHK' ;
    VM2 = VTF2 . 'NMA' ;
    VR3 = -1 ;
    VC3 = -1 ;
    VH3 = -1 ;
    VM3 = -1 ;
    SI IPASS3 ;
        VR3 = VTF3 . 'NRE' ;
        VC3 = VTF3 . 'NCA' ;
        VH3 = VTF3 . 'NHK' ;
        VM3 = VTF3 . 'NMA' ;
    FINSI ;
    VSE2 = CHAI 'FORMAT' '(1PE10.3)' VER2 ;
    VSE3 = CHAI 'FORMAT' '(1PE10.3)' VER3 ;
    VSS2 = CHAI 'FORMAT' '(F6.2)' VSP2 ;
    VSS3 = CHAI 'FORMAT' '(F6.2)' VSP3 ;
*   fichier de resultat du cas (SORT) et affichage console (MESS)
    OPTI 'SORT' 'valid_chaboche1.log' ;
    VMSG = CHAI '=== Cas' ' ' '28' ' ' ':' ' ' 'chaboche1' ' ' '(viscoplasticite Chaboche/Onera)' ' ' '===' ;
    MESS VMSG ;
    SORT 'CHAI' VMSG ;
    VMSG = CHAI 'Valeurs comparees :' ' ' VNC2 ;
    MESS VMSG ;
    SORT 'CHAI' VMSG ;
    VMSG = CHAI 'Temps horloge (ms) : origine' ' ' VTH1 ' ' '; niveau 1' ' ' VTH2 ' ' '; niveau 2' ' ' VTH3 ;
    MESS VMSG ;
    SORT 'CHAI' VMSG ;
    VMSG = CHAI 'Acceleration par rapport a l origine : niveau 1' ' ' VSS2 ' ' '; niveau 2' ' ' VSS3 ;
    MESS VMSG ;
    SORT 'CHAI' VMSG ;
    VMSG = CHAI 'Controles internes du cas : echecs origine' ' ' VNE51 ' ' '; niveau 1' ' ' VNE52 ' ' '; niveau 2' ' ' VNE53 ' ' '- reussites origine' ' ' VNE01 ' ' '; niveau 1' ' ' VNE02 ' ' '; niveau 2' ' ' VNE03 ;
    MESS VMSG ;
    SORT 'CHAI' VMSG ;
    VMSG = CHAI 'Classes exercees (1 MATVAR, 10 ENDOM, 20 VISCODOM, 100 GD) :' ' ' VCLA ;
    MESS VMSG ;
    SORT 'CHAI' VMSG ;
    VMSG = CHAI 'Niveau 1 : raideur reutilisee' ' ' VR2 ' ' 'fois, recalculee' ' ' VC2 ' ' 'fois ; HOOK evite' ' ' VH2 ' ' 'fois ; caracteristiques reutilisees' ' ' VM2 ' ' 'fois' ;
    MESS VMSG ;
    SORT 'CHAI' VMSG ;
    VMSG = CHAI 'Niveau 2 : raideur reutilisee' ' ' VR3 ' ' 'fois, recalculee' ' ' VC3 ' ' 'fois ; HOOK evite' ' ' VH3 ' ' 'fois ; caracteristiques reutilisees' ' ' VM3 ' ' 'fois' ;
    MESS VMSG ;
    SORT 'CHAI' VMSG ;
    VMSG = CHAI 'Ecart relatif maximal : niveau 1' ' ' VSE2 ' ' '; niveau 2' ' ' VSE3 ;
    MESS VMSG ;
    SORT 'CHAI' VMSG ;
    VMSG = CHAI 'RESULTAT : niveau 1' ' ' VMOK2 ' ' '; niveau 2' ' ' VMOK3 ;
    MESS VMSG ;
    SORT 'CHAI' VMSG ;
    SI (('EGA' VNC2 0) ) ;
        VMSG = CHAI 'ATTENTION : aucune valeur comparee (resultats non stockes ?)' ;
        MESS VMSG ;
        SORT 'CHAI' VMSG ;
    FINSI ;
    OPTI 'SORT' 'valid_inutile.tmp' ;
    VRES . 28 = TABL ;
    VRES . 28 . 'NOM' = 'chaboche1' ;
    VRES . 28 . 'OKM' = VMOK2 ;
    VRES . 28 . 'OK3' = VMOK3 ;
    VRES . 28 . 'ERR2' = VER2 ;
    VRES . 28 . 'ERR3' = VER3 ;
    VRES . 28 . 'TH1' = VTH1 ;
    VRES . 28 . 'TH2' = VTH2 ;
    VRES . 28 . 'TH3' = VTH3 ;
    VRES . 28 . 'SP2F' = VSP2 ;
    VRES . 28 . 'SP3F' = VSP3 ;
    VRES . 28 . 'NRE2' = VR2 ;
    VRES . 28 . 'NCA2' = VC2 ;
    VRES . 28 . 'NHK2' = VH2 ;
    VRES . 28 . 'NMA2' = VM2 ;
    VRES . 28 . 'NRE3' = VR3 ;
    VRES . 28 . 'NCA3' = VC3 ;
    VRES . 28 . 'NHK3' = VH3 ;
    VRES . 28 . 'CL' = VCLA ;
    VRES . 28 . 'NCMP' = VNC2 ;
    VMSG = CHAI '<<< Cas' ' ' '28' ' ' 'sur' ' ' NTOT0 ' ' ':' ' ' 'chaboche1' ' ' ':' ' ' 'niveau 1' ' ' VMOK2 ', niveau 2' ' ' VMOK3 ' ' '- ecart' ' ' VSE2 ', acceleration' ' ' VSS2 ' ' 'et' ' ' VSS3 ;
    MESS VMSG ;
    AVANCE VRES 28 NTOT0 'chaboche1' NPASS 'termine' ;
    MENAGE 'OBLI' ;
FINSI ;

*
* ---------------------------------------------------------------------
* Procedure du cas 29 : chaboche2 (viscoplasticite)
* Variables locales : le cas ne voit aucune variable des cas precedents
* ---------------------------------------------------------------------
DEBPROC VC29 VPSW*'LOGIQUE' VNIV*'ENTIER' VTFPR*'TABLE' VTCT*'TABLE' IECHO0*'ENTIER' ;
* ----- debut du cas chaboche2

* fichier : chaboche2.dgibi
* section : Mecanique Viscoplastique
*----------------------------------------------------------------------*
*                           CHABOCHE2.DGIBI                            *
*----------------------------------------------------------------------*
*
* Objet :
* -------
*
* Test de validation d'une loi de comportement de materiau.
* Loi de comportement elastoviscoplastique de Chaboche.
*
*
* Description :
* -------------
* Essai de traction-compression.
*
* Type de calcul : Mecanique
* Mode de calcul : 2D axisymetrique
* Type d'element : QUA4
* Chargement     : Deplacement impose
* Reference      : solution comparee a la loi ONERA
* Objectif       : Ecart relatif sur la contrainte SMZZ < 1.e-4
*
* Reference :
* -----------
* L&M : J. Lemaitre, J.-L. Chaboche, "Mecanique des materiaux solides",
*       Dunod, 2e edition, 1996.
*
*----------------------------------------------------------------------*
*
* Pour afficher les traces, mettre IGRAPH a vrai :
IGRAPH = faux ;
*
*------------------------ Maillage (1 element) ------------------------*
*
opti dime 2 elem qua8 mode axis ;

ne1 = 1 ;
l1  = (0 0) droi ne1 (1. 0.) ;
S1  =    l1 tran ne1 (0. 1.) ;

l2  = s1 cote 2 ;
l3  = S1 cote 3 ;
l4  = S1 cote 4 ;

si IGRAPH ;
  trac qual S1 titr ' Maillage ' ;
fins ;
*
*---------------------- Modele & Carateristiques ----------------------*
*
* Par rapport aux parametres du modele presentes dans le L&M, p. 310 :
*   - CLM : coefficient C d'ecrouissage cinematique du L&M
*   - Gam : coefficient gamma d'ecrouissage cinematique du L&M
* les coefficients d'ecrouissage du modele de Cast3M sont :
*   - C = Gam
*   - A = CLM / Gam
* Valeurs des parametres du modele pour acier 316L a 20 degC (L&M, p. 319) :
SIGY1 = 82.e6 ;
N1    = 24. ;
K1    = 151.e6 ;
CLM   = 162400.e6 ;
Gam   = 2800. ;
A1    = CLM / Gam ;
C1    = Gam   ;
Q1    = 142.e6 - SIGY1 ;
B1    = 8. ;

* Module d'Young et coeff. de Poisson :
YM1   = 200.e9 ;
NU1   = 0.3 ;

* Modeles & Caracteristiques :
mo1 = mode s1 mecanique elastique isotrope viscoplastique chaboche bbar ;
ma1 = mate mo1 'YOUN' YM1 'NU' NU1 'SIGY' SIGY1
               'K'    K1  'N'  N1  'A'    A1    'C'    C1 'B' B1 'Q' Q1 ;

mo2 = 'MODE' S1 'MECANIQUE' 'ELASTIQUE' 'ISOTROPE' 'VISCOPLASTIQUE' 'ONERA' 'BBAR' ;
ma2 = 'MATE' mo2 'YOUN' YM1 'NU' NU1 'KK' SIGY1
       'K0'   K1 'N'    N1 'B'    B1
       'ALFK' 0. 'ALFR' 1. 'ALF'  0.
       'A1'   A1 'C1'   C1 'BET1' 0. 'R1'   0.
       'A2'   0. 'C2'   0. 'BET2' 0. 'R2'   0.
       'PHI'  1. 'GAMA' 0. 'M'    0.
       'QMAX' 1. 'QSTA' 0. 'MU'   0. 'ETA'  0. ;

*-------------------------- CL & Chargement ---------------------------*
*
cl1 = bloq uz l1 ;
cl2 = bloq ur l4 ;
cl3 = bloq uz l3 ;

u1  = 0.002 ;
f1  = depi cl3 u1 ;

xt1  = 100. ;
ev1  = evol manu temp (xt1 * (prog 0. 1. 2.  3. 4. 6.))
                      (prog 0. 1. 0. -1. 0. 2.) ;
cgu1 = char dimp f1 ev1 ;

si IGRAPH ;
  trac qual (S1 et (l1 coul roug) et (l3 coul vert) et (l4 coul bleu))
    titr ' CL : Uz=0 en L1 (rouge), Ur=0 en L4 (bleu) et Uz impose sur L3 (vert)' ;
  dess (u1*ev1) titre ' Evolution temporelle du deplacement impose ';
fins ;

*------------------------- Resolution PASAPAS -------------------------*
*
* Modele de Chaboche :
ta1 = tabl ;
ta1.modele = mo1 ;
ta1.caracteristiques = ma1 ;
ta1.blocages_mecaniques = cl1 et cl2 et cl3 ;
ta1.chargement = cgu1 ;
ta1.temps_calcules = (prog 0. pas 0.1 6.) * xt1 ;

ta1.mes_sauvegardes = tabl ;
ta1.mes_sauvegardes.defin = vrai ;

ta1 . 'PERF_RAID' = VPSW ; ta1 . 'PERF_RAID_NIVEAU' = VNIV ; PASAPAS ta1 ; FPREC ta1 VTFPR ;

* Modele ONERA :
ta2 = tabl ;
ta2.modele = mo2 ;
ta2.caracteristiques = ma2 ;
ta2.blocages_mecaniques = cl1 et cl2 et cl3 ;
ta2.chargement = cgu1 ;
ta2.temps_calcules = ta1.temps_calcules ;
ta2.hypothese_deformations = 'LINEAIRE' ;

ta2.mes_sauvegardes = tabl ;
ta2.mes_sauvegardes.defin = vrai ;

chq0 = manu chml mo2 epse 0. qqq Q1 stresses ;
ta2.variables_internes = tabl ;
ta2.variables_internes.0 = chq0 ;

ta2 . 'PERF_RAID' = VPSW ; ta2 . 'PERF_RAID_NIVEAU' = VNIV ; PASAPAS ta2 ; FPREC ta2 VTFPR ;

*-------------------- Postraitement des resultats ---------------------*

nb1   = dime ta1.temps ;
ltps1 = prog ;
leps1 = prog ;
lsig1 = prog ;
lsig2 = prog ;
i1    = 0 ;
repe bo1 nb1 ;
  tpsi1 = ta1.temps.i1 ;
  depi1 = ta1.deplacements.i1 ;
  epsi1 = (epsi mo1 ma1 depi1) exco epzz scal maxi ;
  sigi1 = ta1.contraintes.i1 exco smzz scal maxi ;
  sigi2 = ta2.contraintes.i1 exco smzz scal maxi ;
  ltps1 = ltps1 et (prog tpsi1) ;
  leps1 = leps1 et (prog epsi1) ;
  lsig1 = lsig1 et (prog sigi1) ;
  lsig2 = lsig2 et (prog sigi2) ;
  i1    = i1 + 1 ;
fin bo1 ;
lsig1  = 1.e-6 * lsig1 ;
lsig2  = 1.e-6 * lsig2 ;
evezz1 = evol manu temps ltps1 epzz leps1 ;
evszz1 = evol roug manu temps ltps1 smzz lsig1 ;
evszz2 = evol vert manu temps ltps1 smzz lsig2 ;
evsve1 = evol roug manu epzz  leps1 smzz lsig1 ;
evsve2 = evol vert manu epzz  leps1 smzz lsig2 ;

* Affichages :
si IGRAPH ;
  tl1 = table ;
  tl1 . 1 = 'NOLI MARQ CROI' ;
  tl1 . titre = table ;
  tl1 . titre . 1 = 'ONERA' ;
  tl1 . titre . 2 = 'CHABOCHE' ;
  dess (evszz1 et evszz2) lege tl1
    titre ' Evolution temporelle de la contrainte de traction ' ;
  dess (evsve1 et evsve2) lege tl1 titre ' Courbe de traction ' ;
fins ;

*------------------------- Test de validation -------------------------*
*
err0 = (maxi abs (lsig2 - lsig1)) / (maxi abs lsig2) ;

opti echo IECHO0 ;
saut 1 lign ;
mess '   Comparaison solution calculee / reference ' ;
mess '   ----------------------------------------- ' ;
mess '   Max.|SMZZ(cal.) - SMZZ(Ref.)| / Max.|SMZZ(cal.)| =' err0 ;
saut 1 lign ;
opti echo IECHO0 ;

si (err0 > 1.e-4) ;
  VTCT . 'N5' = (VTCT . 'N5') + 1 ;
fins ;
* [valid] FIN final


* ----- fin du cas chaboche2
FINPROC ;
*
* ---------------------------------------------------------------------
* Cas 29 : chaboche2 (viscoplasticite)
* ---------------------------------------------------------------------
SI ((IDEB0 '<EG' 29) 'ET' (IFIN0 '>EG' 29) 'ET' ('NON' ('EXIS' TSKIP 29))) ;
    MENAGE 'OBLI' ;
    MESS ' ' ;
    VMSG = CHAI '>>> Cas' ' ' '29' ' ' 'sur' ' ' NTOT0 ' ' ':' ' ' 'chaboche2' ' ' '(viscoplasticite)' ;
    MESS VMSG ;
    NPASS = 2 ;
    SI IPASS3 ;
        NPASS = 3 ;
    FINSI ;
    VTH1 = 0 ;
    VTH2 = 0 ;
    VTH3 = 0 ;
    VNE51 = 0 ;
    VNE01 = 0 ;
    VNE52 = 0 ;
    VNE02 = 0 ;
    VNE53 = 0 ;
    VNE03 = 0 ;
    REPETER ZVRUN NPASS ;
* ordre des passes alterne d'un cas a l'autre (derive des temps en session)
        VIP = &ZVRUN ;
        VPSW = (VIP '>' 1) ;
        VNIV = 1 ;
        VMPS = 'inactif' ;
        SI (VIP 'EGA' 2) ;
            VMPS = 'actif niveau 1' ;
        FINSI ;
        SI (VIP 'EGA' 3) ;
            VNIV = 2 ;
            VMPS = 'actif niveau 2' ;
        FINSI ;
        AVANCE VRES 29 NTOT0 'chaboche2' VIP 'en_cours' ;
        VMSG = CHAI '    passe' ' ' VIP ' ' 'sur' ' ' NPASS ' ' ': optimisations' ' ' VMPS ;
        MESS VMSG ;
        SI ITRACE0 ;
            OPTI 'IMPR' 'valid_trace.log' ;
        FINSI ;
        OPTI 'DIME' 3 'MODE' 'TRID' 'ELEM' 'CUB8' 'ECHO' IECHO0 ;
        VTHM = 0 ;
        REPETER ZVREP NREP0 ;
            VIR = &ZVREP ;
            VTFPR = TABL ;
            VTCT = TABL ;
            VTCT . 'N0' = 0 ;
            VTCT . 'N5' = 0 ;
            SI ITEMPS0 ;
                TEMP 'ZERO' ;
            FINSI ;
* Le cas s'execute dans une procedure (variables locales) : les variables
* d'un cas precedent ne peuvent pas masquer un mot-cle ou un operateur
            VC29 VPSW VNIV VTFPR VTCT IECHO0 ;
            VTHR = 0 ;
            SI ITEMPS0 ;
                VTHR = CHRONO ;
            FINSI ;
            SI (VIR 'EGA' 1) ;
                VTHM = VTHR ;
            SINON ;
                SI (VTHR '<' VTHM) ;
                    VTHM = VTHR ;
                FINSI ;
            FINSI ;
        FIN ZVREP ;
        VNER5 = VTCT . 'N5' ;
        VNER0 = VTCT . 'N0' ;
        SI (VIP 'EGA' 1) ;
            VTF1 = VTFPR ;
            VTH1 = VTHM ;
            VNE51 = VNER5 ;
            VNE01 = VNER0 ;
        FINSI ;
        SI (VIP 'EGA' 2) ;
            VTF2 = VTFPR ;
            VTH2 = VTHM ;
            VNE52 = VNER5 ;
            VNE02 = VNER0 ;
        FINSI ;
        SI (VIP 'EGA' 3) ;
            VTF3 = VTFPR ;
            VTH3 = VTHM ;
            VNE53 = VNER5 ;
            VNE03 = VNER0 ;
        FINSI ;
    FIN ZVRUN ;
*   comparaison des empreintes avec la passe 1
    VER2 VNL2 VNC2 = COMPAR VTF1 VTF2 ;
    VMOK2 = 'OK' ;
    SI ((VER2 '>' TOLV0) 'OU' (VNL2 '>' 0) 'OU' ('NON' (VNE52 'EGA' VNE51))) ;
        VMOK2 = 'ECART' ;
        VNBK2 = VNBK2 + 1 ;
    FINSI ;
    VER3 = 0. ;
    VNC3 = 0 ;
    VMOK3 = 'sans_objet' ;
    SI IPASS3 ;
        VER3 VNL3 VNC3 = COMPAR VTF1 VTF3 ;
        VMOK3 = 'OK' ;
        SI ((VER3 '>' TOLV3) 'OU' (VNL3 '>' 0) 'OU' ('NON' (VNE53 'EGA' VNE51))) ;
            VMOK3 = 'ECART' ;
            VNBK3 = VNBK3 + 1 ;
        FINSI ;
    FINSI ;
*   accelerations (temps de la passe 1 / temps de la passe)
    VSP2 = 0. ;
    VSP3 = 0. ;
    SI ((VTH1 '>' 0) 'ET' (VTH2 '>' 0)) ;
        VSP2 = (FLOT VTH1) '/' (FLOT VTH2) ;
    FINSI ;
    SI ((VTH1 '>' 0) 'ET' (VTH3 '>' 0)) ;
        VSP3 = (FLOT VTH1) '/' (FLOT VTH3) ;
    FINSI ;
    VSUM1 = VSUM1 + VTH1 ;
    VSUM2 = VSUM2 + VTH2 ;
    VSUM3 = VSUM3 + VTH3 ;
    VCLA = VTF2 . 'CL' ;
    VR2 = VTF2 . 'NRE' ;
    VC2 = VTF2 . 'NCA' ;
    VH2 = VTF2 . 'NHK' ;
    VM2 = VTF2 . 'NMA' ;
    VR3 = -1 ;
    VC3 = -1 ;
    VH3 = -1 ;
    VM3 = -1 ;
    SI IPASS3 ;
        VR3 = VTF3 . 'NRE' ;
        VC3 = VTF3 . 'NCA' ;
        VH3 = VTF3 . 'NHK' ;
        VM3 = VTF3 . 'NMA' ;
    FINSI ;
    VSE2 = CHAI 'FORMAT' '(1PE10.3)' VER2 ;
    VSE3 = CHAI 'FORMAT' '(1PE10.3)' VER3 ;
    VSS2 = CHAI 'FORMAT' '(F6.2)' VSP2 ;
    VSS3 = CHAI 'FORMAT' '(F6.2)' VSP3 ;
*   fichier de resultat du cas (SORT) et affichage console (MESS)
    OPTI 'SORT' 'valid_chaboche2.log' ;
    VMSG = CHAI '=== Cas' ' ' '29' ' ' ':' ' ' 'chaboche2' ' ' '(viscoplasticite)' ' ' '===' ;
    MESS VMSG ;
    SORT 'CHAI' VMSG ;
    VMSG = CHAI 'Valeurs comparees :' ' ' VNC2 ;
    MESS VMSG ;
    SORT 'CHAI' VMSG ;
    VMSG = CHAI 'Temps horloge (ms) : origine' ' ' VTH1 ' ' '; niveau 1' ' ' VTH2 ' ' '; niveau 2' ' ' VTH3 ;
    MESS VMSG ;
    SORT 'CHAI' VMSG ;
    VMSG = CHAI 'Acceleration par rapport a l origine : niveau 1' ' ' VSS2 ' ' '; niveau 2' ' ' VSS3 ;
    MESS VMSG ;
    SORT 'CHAI' VMSG ;
    VMSG = CHAI 'Controles internes du cas : echecs origine' ' ' VNE51 ' ' '; niveau 1' ' ' VNE52 ' ' '; niveau 2' ' ' VNE53 ' ' '- reussites origine' ' ' VNE01 ' ' '; niveau 1' ' ' VNE02 ' ' '; niveau 2' ' ' VNE03 ;
    MESS VMSG ;
    SORT 'CHAI' VMSG ;
    VMSG = CHAI 'Classes exercees (1 MATVAR, 10 ENDOM, 20 VISCODOM, 100 GD) :' ' ' VCLA ;
    MESS VMSG ;
    SORT 'CHAI' VMSG ;
    VMSG = CHAI 'Niveau 1 : raideur reutilisee' ' ' VR2 ' ' 'fois, recalculee' ' ' VC2 ' ' 'fois ; HOOK evite' ' ' VH2 ' ' 'fois ; caracteristiques reutilisees' ' ' VM2 ' ' 'fois' ;
    MESS VMSG ;
    SORT 'CHAI' VMSG ;
    VMSG = CHAI 'Niveau 2 : raideur reutilisee' ' ' VR3 ' ' 'fois, recalculee' ' ' VC3 ' ' 'fois ; HOOK evite' ' ' VH3 ' ' 'fois ; caracteristiques reutilisees' ' ' VM3 ' ' 'fois' ;
    MESS VMSG ;
    SORT 'CHAI' VMSG ;
    VMSG = CHAI 'Ecart relatif maximal : niveau 1' ' ' VSE2 ' ' '; niveau 2' ' ' VSE3 ;
    MESS VMSG ;
    SORT 'CHAI' VMSG ;
    VMSG = CHAI 'RESULTAT : niveau 1' ' ' VMOK2 ' ' '; niveau 2' ' ' VMOK3 ;
    MESS VMSG ;
    SORT 'CHAI' VMSG ;
    SI (('EGA' VNC2 0) ) ;
        VMSG = CHAI 'ATTENTION : aucune valeur comparee (resultats non stockes ?)' ;
        MESS VMSG ;
        SORT 'CHAI' VMSG ;
    FINSI ;
    OPTI 'SORT' 'valid_inutile.tmp' ;
    VRES . 29 = TABL ;
    VRES . 29 . 'NOM' = 'chaboche2' ;
    VRES . 29 . 'OKM' = VMOK2 ;
    VRES . 29 . 'OK3' = VMOK3 ;
    VRES . 29 . 'ERR2' = VER2 ;
    VRES . 29 . 'ERR3' = VER3 ;
    VRES . 29 . 'TH1' = VTH1 ;
    VRES . 29 . 'TH2' = VTH2 ;
    VRES . 29 . 'TH3' = VTH3 ;
    VRES . 29 . 'SP2F' = VSP2 ;
    VRES . 29 . 'SP3F' = VSP3 ;
    VRES . 29 . 'NRE2' = VR2 ;
    VRES . 29 . 'NCA2' = VC2 ;
    VRES . 29 . 'NHK2' = VH2 ;
    VRES . 29 . 'NMA2' = VM2 ;
    VRES . 29 . 'NRE3' = VR3 ;
    VRES . 29 . 'NCA3' = VC3 ;
    VRES . 29 . 'NHK3' = VH3 ;
    VRES . 29 . 'CL' = VCLA ;
    VRES . 29 . 'NCMP' = VNC2 ;
    VMSG = CHAI '<<< Cas' ' ' '29' ' ' 'sur' ' ' NTOT0 ' ' ':' ' ' 'chaboche2' ' ' ':' ' ' 'niveau 1' ' ' VMOK2 ', niveau 2' ' ' VMOK3 ' ' '- ecart' ' ' VSE2 ', acceleration' ' ' VSS2 ' ' 'et' ' ' VSS3 ;
    MESS VMSG ;
    AVANCE VRES 29 NTOT0 'chaboche2' NPASS 'termine' ;
    MENAGE 'OBLI' ;
FINSI ;

*
* ---------------------------------------------------------------------
* Procedure du cas 30 : norton_tra1 (fluage Norton)
* Variables locales : le cas ne voit aucune variable des cas precedents
* ---------------------------------------------------------------------
DEBPROC VC30 VPSW*'LOGIQUE' VNIV*'ENTIER' VTFPR*'TABLE' VTCT*'TABLE' IECHO0*'ENTIER' ;
* ----- debut du cas norton_tra1

* fichier :  norton_tra1.dgibi
************************************************************************
* Section : Mecanique Fluage
************************************************************************
**************************************************
*                                                *
*  TEST DE VALIDATION D'UNE LOI DE COMPORTEMENT  *
*  --------------------------------------------  *
*              DE MATERIAU                       *
*              -----------                       *
*                                                *
*  LOI DE COMPORTEMENT DE FLUAGE DE :            *
*              NORTON                            *
*                                                *
*  TEST POUR DES ELEMENTS MASSIFS                *
*  ------------------------------                *
*                                                *
*  MAILLAGE:                                     *
*   UNE CUBE DE COTE L=1 M                       *
*                                                *
*  CHARGEMENT:                                   *
*   ESSAI DE TRACTION                            *
*   FORCES IMPOSEES                              *
*                                                *
**************************************************
opti echo IECHO0 dime 3 elem cub8 ;
*
*  Maillage
*
l1 = 1. ;
l2 = .1 ;
p1 = 0. 0. 0. ;
p2 = l2 0. 0. ;
p3 = l2 l2 0. ;
p4 = 0. l2 0. ;
p10 = 0. 0. l1 ;
p20 = l2 0. l1 ;
p30 = l2 l2 l1 ;
p40 = 0. l2 l1 ;
li1 = d p1 1 p2 ;
li2 = d p2 1 p3 ;
li3 = d p3 1 p4 ;
li4 = d p4 1 p1 ;
li10 = d p10 1 p20 ;
li20 = d p20 1 p30 ;
li30 = d p30 1 p40 ;
li40 = d p40 1 p10 ;
sur1 = 'SURF' ( li1 'ET' li2 'ET' li3 'ET' li4 ) 'PLAN' ;
sur10 = 'SURF' ( li10 'ET' li20 'ET' li30 'ET' li40 ) 'PLAN' ;
mail1 = sur1 'VOLU' 1 sur10 ;
*
*  Modele
*
AF1 = 1.E-45 ;
AF2 = 5. ;
AF3 = 1.2 ;
SMAX = 2.1E8 ;
youn0 = 2.1E11 ;
nu0 = .3 ;
mod0 = 'MODE' mail1 'MECANIQUE' 'ELASTIQUE' 'ISOTROPE'
       'FLUAGE' 'NORTON' ;
mat0 = 'MATE' mod0 'YOUN' youn0 'NU' nu0 'AF1' AF1
       'AF2' AF2 'AF3' AF3 'SMAX' SMAX ;
*
*  Conditions aux limites
*
cl1 = 'BLOQ' sur1 'UZ' ;
cl2 = 'BLOQ' ( li1 'ET' li10 ) 'UY' ;
cl3 = 'BLOQ' ( li4 'ET' li40 ) 'UX' ;
cl0 = cl1 'ET' cl2 'ET' cl3 ;
*
*  Chargement
*
depmax = 5.E5 ;
dep2 = 'FORCE' sur10 'FX' 0. 'FY' 0. 'FZ' depmax ;
dep0 = dep2 ;
ev0 = 'EVOL' 'MANU' temps ( 'PROG' 0. 1.E-2 1000. )
y ( 'PROG' 0. 1. 1. ) ;
cha0 = 'CHAR' 'MECA' dep0 ev0 ;
*
dt0 = .05 ;
dt1 = 2. * dt0 ;
dt2 = 2. * dt1 ;
dt3 = 5. * dt2 ;
tfin0 = 50. ;
*
*  Appel à PASAPAS
*
ta1 = 'TABLE' ;
ta1 .'MODELE' = mod0 ;
ta1 .'CARACTERISTIQUES' = mat0 ;
ta1 .'CHARGEMENT' = cha0 ;
ta1 .'BLOCAGES_MECANIQUES' = cl0 ;
ta1 .'TEMPS_CALCULES' = ( 'PROG' 0. 'PAS' dt0 dt1 ) 'ET'
( 'PROG' ( dt1 + dt0 ) 'PAS' dt1 dt2 ) 'ET'
( 'PROG' ( dt2 + dt1 ) 'PAS' dt2 dt3 ) 'ET'
( 'PROG' ( dt3 + dt2 ) 'PAS' dt3 tfin0 ) ;
*
TMASAU=table;
ta1 . 'MES_SAUVEGARDES'=TMASAU;
TMASAU .'DEFTO'=VRAI;
TMASAU .'DEFIN'=VRAI;
ta1 . 'PERF_RAID' = VPSW ; ta1 . 'PERF_RAID_NIVEAU' = VNIV ; PASAPAS ta1 ; FPREC ta1 VTFPR ;
*
*  Post traitement
*
dim0 = 'DIME' ta1 .'TEMPS' ;
eps10 = 'PROG' 0. ;
sigm10 = 'PROG' 0. ;
def10 = 'PROG' 0. ;
def_th2 = 'PROG' 0. ;
sig_th2 = 'PROG' 0. ;
err_e2 = 'PROG' 0. ;
err_s2 = 'PROG' 0. ;
temp2 = 'PROG' 0. ;
rac0 = 1. ;
H0 = youn0 ;
*
prob0 = vrai ;
'REPETER' bloc0 ( dim0 - 1 ) ;
  i1 = &bloc0 ;
*
*  Résultats calculés
*
  def0 = ta1 .'DEFORMATIONS_INELASTIQUES'.i1 ;
  depl0 = ta1 .'DEPLACEMENTS'.i1 ;
  sigm0 = ta1 .'CONTRAINTES'.i1 ;
  temp0 = ta1 .'TEMPS'.i1 ;
  var0 = ta1 .'VARIABLES_INTERNES'.i1 ;
  eps0 = 'EPSI' mod0 depl0 ;
  eps1 = 'EXTR' ( 'EXCO' eps0 'EPZZ' 'SCAL' ) 'SCAL' 1 1 1 ;
  sigm1 = 'EXTR' ( 'EXCO' sigm0 'SMZZ' 'SCAL' ) 'SCAL' 1 1 1 ;
  def1 = 'EXTR' ( 'EXCO' def0 'EIZZ' 'SCAL' ) 'SCAL' 1 1 1 ;
  eps10 = eps10 'ET' ( 'PROG' eps1 ) ;
  sigm10 = sigm10 'ET' ( 'PROG' sigm1 ) ;
  sigeq0 = 'VMIS' sigm0 mod0 ;
  sigeq1 = 'EXTR' sigeq0 'SCAL' 1 1 1 ;
  def10 = def10 'ET' ( 'PROG' def1 ) ;
  temp2 = temp2 'ET' ( 'PROG' temp0 ) ;
  var1 = 'EXTR' ( 'EXCO' var0 'EPSE' 'SCAL' ) 'SCAL' 1 1 1 ;
  sig0 = 'CHAN' 'CHPO' sigm0 mod0 ;
  sigx = 'EXCO' sig0 'SMXX' ;
  sigy = 'EXCO' sig0 'SMYY' ;
  sigz = 'EXCO' sig0 'SMZZ' ;
*titr ' Contraintes suivant X' ;
*trace sigx mail1 ;
*titr ' Contraintes suivant Y' ;
*trace sigy mail1 ;
*titr ' Contraintes suivant Z' ;
*trace sigz mail1 ;
*
*  Résultats analytiques
*
y2 = ( ( rac0 * depmax / ( l2 * l2 ) ) ** ( AF2 ) ) ;
y2 = y2 * ( temp0 ** AF3 ) ;
x2 = y2 * AF1 * rac0 ;
*
def_th1 = x2 ;
sig_th1 = H0 * ( eps1 - x2 ) ;
*
def_th2 = def_th2 'ET' ( 'PROG' def_th1 ) ;
sig_th2 = sig_th2 'ET' ( 'PROG' sig_th1 ) ;
*mess ' sig calculée      =' sigm1 ;
*mess ' sig theorique     =' sig_th1 ;
*mess ' def calculée      =' def1 ;
*mess ' def théorique     =' def_th1 ;
*
*  Erreurs
*
'SI' ( def1 '>' ( 1.E-1 * eps1 ) ) ;
   err_e1 = ( 'ABS' ( def1 - def_th1 ) ) / def1 ;
   err_e1 = err_e1 * 100. ;
'SINON' ;
   err_e1 = 0. ;
'FINSI' ;
'SI' ( sigm1 '>' 0. ) ;
   err_s1 = ( 'ABS' ( sigm1 - sig_th1 ) ) / sigm1 ;
   err_s1 = err_s1 * 100. ;
'SINON' ;
   err_s1 = 0. ;
'FINSI' ;
*
err_e2 = err_e2 'ET' ( 'PROG' err_e1 ) ;
err_s2 = err_s2 'ET' ( 'PROG' err_s1 ) ;
*
'SI' ( ( err_e1 '>' .12 ) 'OU' ( err_s1 '>' .12 ) ) ;
   prob0 = faux ;
'FINSI' ;
*
'MESS' ' Fin du calcul de restitution au temps ' temp0 ;
*mess ' ' ;
*
'FIN' bloc0 ;
*
defo0 = 'DEFO' mail1 depl0 0. ;
defo1 = 'DEFO' mail1 depl0 10. 'ROUG' ;
*titr ' deformee finale' ;
*trace ( defo0 'ET' defo1 ) ;
*
'SI' ( prob0 'EGA' faux ) ;
   VTCT . 'N5' = (VTCT . 'N5') + 1 ;
'SINON' ;
   VTCT . 'N0' = (VTCT . 'N0') + 1 ;
'FINSI' ;
*
*  Tracés
*
evo1 = 'EVOL' 'MANU' 'epsp' def10 'sigm' sigm10 ;
evo2 = 'EVOL' 'MANU' 'epsp' def_th2 'sigm' sig_th2 ;
evo3 = 'EVOL' 'MANU' 'epsp' def10 'erreur_%' err_e2 ;
evo4 = 'EVOL' 'MANU' 'epsp' def10 'erreur_%' err_s2 ;
evo5 = 'EVOL' 'MANU' 'temps' temp2 'epsp' def10 ;
evo6 = 'EVOL' 'MANU' 'temps' temp2 'epsp' def_th2 ;
TAB = 'TABLE' ;
TAB. 1 = 'MARQ CROI ' ;
TAB. 2 = 'MARQ PLUS ' ;
TAB.'TITRE' = 'TABLE' ;
TAB.'TITRE'. 1 = MOT 'CALCUL' ;
TAB.'TITRE'. 2 = MOT 'THEORIE' ;
*'DESSIN' ( evo1 'ET' evo2 )
*'TITR' ' Comparaison calcul theorie'
*'LEGE' TAB ;
TAB = 'TABLE' ;
TAB. 1 = 'MARQ CROI ' ;
*TAB. 2 = 'MARQ PLUS ' ;
TAB.'TITRE' = 'TABLE' ;
TAB.'TITRE'. 1 = MOT 'DEFORMATION' ;
*TAB.'TITRE'. 2 = MOT 'CONTRAINTE' ;
*'DESSIN' ( evo3 )
*'TITR' ' Evolution des erreurs (en pourcentage) '
*'LEGE' TAB ;
TAB = 'TABLE' ;
TAB. 1 = 'MARQ CROI ' ;
TAB. 2 = 'MARQ PLUS ' ;
TAB.'TITRE' = 'TABLE' ;
TAB.'TITRE'. 1 = MOT 'CALCUL' ;
TAB.'TITRE'. 2 = MOT 'THEORIE' ;
*'DESSIN' ( evo5 'ET' evo6 )
*'TITR' ' Comparaison calcul theorie, deformation-temps'
*'LEGE' TAB ;
*
* [valid] FIN final


* ----- fin du cas norton_tra1
FINPROC ;
*
* ---------------------------------------------------------------------
* Cas 30 : norton_tra1 (fluage Norton)
* ---------------------------------------------------------------------
SI ((IDEB0 '<EG' 30) 'ET' (IFIN0 '>EG' 30) 'ET' ('NON' ('EXIS' TSKIP 30))) ;
    MENAGE 'OBLI' ;
    MESS ' ' ;
    VMSG = CHAI '>>> Cas' ' ' '30' ' ' 'sur' ' ' NTOT0 ' ' ':' ' ' 'norton_tra1' ' ' '(fluage Norton)' ;
    MESS VMSG ;
    NPASS = 2 ;
    SI IPASS3 ;
        NPASS = 3 ;
    FINSI ;
    VTH1 = 0 ;
    VTH2 = 0 ;
    VTH3 = 0 ;
    VNE51 = 0 ;
    VNE01 = 0 ;
    VNE52 = 0 ;
    VNE02 = 0 ;
    VNE53 = 0 ;
    VNE03 = 0 ;
    REPETER ZVRUN NPASS ;
* ordre des passes alterne d'un cas a l'autre (derive des temps en session)
        VIP = NPASS + 1 - &ZVRUN ;
        VPSW = (VIP '>' 1) ;
        VNIV = 1 ;
        VMPS = 'inactif' ;
        SI (VIP 'EGA' 2) ;
            VMPS = 'actif niveau 1' ;
        FINSI ;
        SI (VIP 'EGA' 3) ;
            VNIV = 2 ;
            VMPS = 'actif niveau 2' ;
        FINSI ;
        AVANCE VRES 30 NTOT0 'norton_tra1' VIP 'en_cours' ;
        VMSG = CHAI '    passe' ' ' VIP ' ' 'sur' ' ' NPASS ' ' ': optimisations' ' ' VMPS ;
        MESS VMSG ;
        SI ITRACE0 ;
            OPTI 'IMPR' 'valid_trace.log' ;
        FINSI ;
        OPTI 'DIME' 3 'MODE' 'TRID' 'ELEM' 'CUB8' 'ECHO' IECHO0 ;
        VTHM = 0 ;
        REPETER ZVREP NREP0 ;
            VIR = &ZVREP ;
            VTFPR = TABL ;
            VTCT = TABL ;
            VTCT . 'N0' = 0 ;
            VTCT . 'N5' = 0 ;
            SI ITEMPS0 ;
                TEMP 'ZERO' ;
            FINSI ;
* Le cas s'execute dans une procedure (variables locales) : les variables
* d'un cas precedent ne peuvent pas masquer un mot-cle ou un operateur
            VC30 VPSW VNIV VTFPR VTCT IECHO0 ;
            VTHR = 0 ;
            SI ITEMPS0 ;
                VTHR = CHRONO ;
            FINSI ;
            SI (VIR 'EGA' 1) ;
                VTHM = VTHR ;
            SINON ;
                SI (VTHR '<' VTHM) ;
                    VTHM = VTHR ;
                FINSI ;
            FINSI ;
        FIN ZVREP ;
        VNER5 = VTCT . 'N5' ;
        VNER0 = VTCT . 'N0' ;
        SI (VIP 'EGA' 1) ;
            VTF1 = VTFPR ;
            VTH1 = VTHM ;
            VNE51 = VNER5 ;
            VNE01 = VNER0 ;
        FINSI ;
        SI (VIP 'EGA' 2) ;
            VTF2 = VTFPR ;
            VTH2 = VTHM ;
            VNE52 = VNER5 ;
            VNE02 = VNER0 ;
        FINSI ;
        SI (VIP 'EGA' 3) ;
            VTF3 = VTFPR ;
            VTH3 = VTHM ;
            VNE53 = VNER5 ;
            VNE03 = VNER0 ;
        FINSI ;
    FIN ZVRUN ;
*   comparaison des empreintes avec la passe 1
    VER2 VNL2 VNC2 = COMPAR VTF1 VTF2 ;
    VMOK2 = 'OK' ;
    SI ((VER2 '>' TOLV0) 'OU' (VNL2 '>' 0) 'OU' ('NON' (VNE52 'EGA' VNE51))) ;
        VMOK2 = 'ECART' ;
        VNBK2 = VNBK2 + 1 ;
    FINSI ;
    VER3 = 0. ;
    VNC3 = 0 ;
    VMOK3 = 'sans_objet' ;
    SI IPASS3 ;
        VER3 VNL3 VNC3 = COMPAR VTF1 VTF3 ;
        VMOK3 = 'OK' ;
        SI ((VER3 '>' TOLV3) 'OU' (VNL3 '>' 0) 'OU' ('NON' (VNE53 'EGA' VNE51))) ;
            VMOK3 = 'ECART' ;
            VNBK3 = VNBK3 + 1 ;
        FINSI ;
    FINSI ;
*   accelerations (temps de la passe 1 / temps de la passe)
    VSP2 = 0. ;
    VSP3 = 0. ;
    SI ((VTH1 '>' 0) 'ET' (VTH2 '>' 0)) ;
        VSP2 = (FLOT VTH1) '/' (FLOT VTH2) ;
    FINSI ;
    SI ((VTH1 '>' 0) 'ET' (VTH3 '>' 0)) ;
        VSP3 = (FLOT VTH1) '/' (FLOT VTH3) ;
    FINSI ;
    VSUM1 = VSUM1 + VTH1 ;
    VSUM2 = VSUM2 + VTH2 ;
    VSUM3 = VSUM3 + VTH3 ;
    VCLA = VTF2 . 'CL' ;
    VR2 = VTF2 . 'NRE' ;
    VC2 = VTF2 . 'NCA' ;
    VH2 = VTF2 . 'NHK' ;
    VM2 = VTF2 . 'NMA' ;
    VR3 = -1 ;
    VC3 = -1 ;
    VH3 = -1 ;
    VM3 = -1 ;
    SI IPASS3 ;
        VR3 = VTF3 . 'NRE' ;
        VC3 = VTF3 . 'NCA' ;
        VH3 = VTF3 . 'NHK' ;
        VM3 = VTF3 . 'NMA' ;
    FINSI ;
    VSE2 = CHAI 'FORMAT' '(1PE10.3)' VER2 ;
    VSE3 = CHAI 'FORMAT' '(1PE10.3)' VER3 ;
    VSS2 = CHAI 'FORMAT' '(F6.2)' VSP2 ;
    VSS3 = CHAI 'FORMAT' '(F6.2)' VSP3 ;
*   fichier de resultat du cas (SORT) et affichage console (MESS)
    OPTI 'SORT' 'valid_norton_tra1.log' ;
    VMSG = CHAI '=== Cas' ' ' '30' ' ' ':' ' ' 'norton_tra1' ' ' '(fluage Norton)' ' ' '===' ;
    MESS VMSG ;
    SORT 'CHAI' VMSG ;
    VMSG = CHAI 'Valeurs comparees :' ' ' VNC2 ;
    MESS VMSG ;
    SORT 'CHAI' VMSG ;
    VMSG = CHAI 'Temps horloge (ms) : origine' ' ' VTH1 ' ' '; niveau 1' ' ' VTH2 ' ' '; niveau 2' ' ' VTH3 ;
    MESS VMSG ;
    SORT 'CHAI' VMSG ;
    VMSG = CHAI 'Acceleration par rapport a l origine : niveau 1' ' ' VSS2 ' ' '; niveau 2' ' ' VSS3 ;
    MESS VMSG ;
    SORT 'CHAI' VMSG ;
    VMSG = CHAI 'Controles internes du cas : echecs origine' ' ' VNE51 ' ' '; niveau 1' ' ' VNE52 ' ' '; niveau 2' ' ' VNE53 ' ' '- reussites origine' ' ' VNE01 ' ' '; niveau 1' ' ' VNE02 ' ' '; niveau 2' ' ' VNE03 ;
    MESS VMSG ;
    SORT 'CHAI' VMSG ;
    VMSG = CHAI 'Classes exercees (1 MATVAR, 10 ENDOM, 20 VISCODOM, 100 GD) :' ' ' VCLA ;
    MESS VMSG ;
    SORT 'CHAI' VMSG ;
    VMSG = CHAI 'Niveau 1 : raideur reutilisee' ' ' VR2 ' ' 'fois, recalculee' ' ' VC2 ' ' 'fois ; HOOK evite' ' ' VH2 ' ' 'fois ; caracteristiques reutilisees' ' ' VM2 ' ' 'fois' ;
    MESS VMSG ;
    SORT 'CHAI' VMSG ;
    VMSG = CHAI 'Niveau 2 : raideur reutilisee' ' ' VR3 ' ' 'fois, recalculee' ' ' VC3 ' ' 'fois ; HOOK evite' ' ' VH3 ' ' 'fois ; caracteristiques reutilisees' ' ' VM3 ' ' 'fois' ;
    MESS VMSG ;
    SORT 'CHAI' VMSG ;
    VMSG = CHAI 'Ecart relatif maximal : niveau 1' ' ' VSE2 ' ' '; niveau 2' ' ' VSE3 ;
    MESS VMSG ;
    SORT 'CHAI' VMSG ;
    VMSG = CHAI 'RESULTAT : niveau 1' ' ' VMOK2 ' ' '; niveau 2' ' ' VMOK3 ;
    MESS VMSG ;
    SORT 'CHAI' VMSG ;
    SI (('EGA' VNC2 0) ) ;
        VMSG = CHAI 'ATTENTION : aucune valeur comparee (resultats non stockes ?)' ;
        MESS VMSG ;
        SORT 'CHAI' VMSG ;
    FINSI ;
    OPTI 'SORT' 'valid_inutile.tmp' ;
    VRES . 30 = TABL ;
    VRES . 30 . 'NOM' = 'norton_tra1' ;
    VRES . 30 . 'OKM' = VMOK2 ;
    VRES . 30 . 'OK3' = VMOK3 ;
    VRES . 30 . 'ERR2' = VER2 ;
    VRES . 30 . 'ERR3' = VER3 ;
    VRES . 30 . 'TH1' = VTH1 ;
    VRES . 30 . 'TH2' = VTH2 ;
    VRES . 30 . 'TH3' = VTH3 ;
    VRES . 30 . 'SP2F' = VSP2 ;
    VRES . 30 . 'SP3F' = VSP3 ;
    VRES . 30 . 'NRE2' = VR2 ;
    VRES . 30 . 'NCA2' = VC2 ;
    VRES . 30 . 'NHK2' = VH2 ;
    VRES . 30 . 'NMA2' = VM2 ;
    VRES . 30 . 'NRE3' = VR3 ;
    VRES . 30 . 'NCA3' = VC3 ;
    VRES . 30 . 'NHK3' = VH3 ;
    VRES . 30 . 'CL' = VCLA ;
    VRES . 30 . 'NCMP' = VNC2 ;
    VMSG = CHAI '<<< Cas' ' ' '30' ' ' 'sur' ' ' NTOT0 ' ' ':' ' ' 'norton_tra1' ' ' ':' ' ' 'niveau 1' ' ' VMOK2 ', niveau 2' ' ' VMOK3 ' ' '- ecart' ' ' VSE2 ', acceleration' ' ' VSS2 ' ' 'et' ' ' VSS3 ;
    MESS VMSG ;
    AVANCE VRES 30 NTOT0 'norton_tra1' NPASS 'termine' ;
    MENAGE 'OBLI' ;
FINSI ;

*
* ---------------------------------------------------------------------
* Procedure du cas 31 : ddi (visco)
* Variables locales : le cas ne voit aucune variable des cas precedents
* ---------------------------------------------------------------------
DEBPROC VC31 VPSW*'LOGIQUE' VNIV*'ENTIER' VTFPR*'TABLE' VTCT*'TABLE' IECHO0*'ENTIER' ;
* ----- debut du cas ddi

* fichier :  ddi.dgibi
************************************************************************
* Section : Mecanique Endommagement
* Section : Mecanique Plastique
************************************************************************
*             Test Ddi.dgibi: Jeux de données         *
*             -------------------------------         *
*                                                     *
OPTI ECHO IECHO0 DIME 2 ELEM QUA8 MODE AXIS;
*
*******************************************************
*                TEST DE VALIDATION                   *
*                ------------------                   *
*        MATERIAU VISCO-PLASTIQUE ENDOMMAGEABLE       *
*     MODELE A DEUX DEFORMATIONS INELASTIQUES (DDI)   *
*                                                     *
*  MAILLAGE:                                          *
*     EPROUVETTE CYLINDRIQUE (AXISYMETRIQUE)          *
*                                                     *
*  CHARGEMENT:                                        *
*     DEPLACEMENT IMPOSE MONOTONE CROISSANT           *
*******************************************************
*
*
   P1 = 0 0;          P2 = 5E-3 0;
   P3 = 5E-3 50E-3;   P4 = 0 50E-3;
*
   L1 = P1 P2 DROIT 1  ;
   L2 = P2 P3 DROIT 1 ;
   L3 = P3 P4 DROIT 1  ;
   L4 = P4 P1 DROIT 1 ;
*
* Maillage
* --------
   EPROU = L1 L2 L3 L4 DALLER PLAN ;
*
* Conditions aux limites
* ----------------------
   CL1 = BLOQ L1 UZ ;
   CL2 = BLOQ L3 UZ;
   CL3 = BLOQ L4 UR ;
   CL = CL1 ET CL2 ET CL3 ;
*
* Modele de calcul
* ----------------
mo = 'MODE' eprou 'MECANIQUE' 'ELASTIQUE' 'ISOTROPE'
       'VISCOPLASTIQUE' 'DDI' ;
*
* Materiau: Zirconium alpha 200°C
* -------------------------------
ma = 'MATE' mo 'YOUN' 8.2D10 'NU' 0.36
       'RP0' 135.D6 'QP' -60.D6 'BP' 120
       'CP1' 34000.D6 'DP1' 250.
       'CP2' 60000.D6 'DP2' 3000. 'KS' 960.D6 'N' 3.4
       'RV0' 70.D6 'QV' -20.D6 'BV' 10.
       'CV1' 24000.D6 'DV1' 300.
       'CV2' 9000.D6 'DV2' 3000. 'CVP1' 0. 'CVP2' 0.;
*
* Temps
* -----
   EPSMAX=0.01;
   EPSPT=0.001;
   NCALC=20;
   TFIN=EPSMAX/EPSPT;
   DT0=TFIN/NCALC;
*
* Chargement
* ----------
   DEP0=DEPI CL2 (EPSMAX*0.05);
   LI1 = PROG 0. tfin ;
   LI2 = PROG 0. 1. ;
   EV = EVOL MANU T LI1 LOAD LI2 ;
   CHA = CHAR 'DIMP' DEP0 EV ;
*
* Calcul
* ------
   TAB = TABLE ;
   TAB.'BLOCAGES_MECANIQUES' = CL;
   TAB.'CARACTERISTIQUES' = MA;
   TAB.'MODELE' = MO;
   TAB.'CHARGEMENT' = CHA;
   LIS=PROG 0. pas dt0 tfin;
   TAB.'TEMPS_CALCULES' = LIS;
   TAB . 'PERF_RAID' = VPSW ; TAB . 'PERF_RAID_NIVEAU' = VNIV ; PASAPAS TAB ; FPREC TAB VTFPR ;
*
*  Comparaison avec les valeurs de reference
*  -----------------------------------------
  dim0 = 'DIME' ( tab .'TEMPS' ) - 1;
  var0 = tab .'VARIABLES_INTERNES'. dim0 ;
  sigm0= tab .'CONTRAINTES'.dim0;
  p0 =  MAXI (EXCO var0 'VIPW');
  v0 =  MAXI ( EXCO var0 'V');
  sig0 = MAXI ('EXCO' sigm0 'SMZZ');
*
  p_th = 4.17896E-03;
  v_th = 3.14432E-03;
  sig_th = 2.19491E+08;
  errp = 100. * (ABS((p_th - p0)/p_th));
  errv = 100. * (ABS((v_th - v0)/v_th));
  errsig = 100. * (ABS((sig_th - sig0)/sig_th));
*
  SI ( (errp > 0.1) OU (errv > 0.1) OU (errsig > 0.1));
    VTCT . 'N5' = (VTCT . 'N5') + 1 ;
  SINON;
    VTCT . 'N0' = (VTCT . 'N0') + 1 ;
  FINSI;
*
* [valid] FIN final


* ----- fin du cas ddi
FINPROC ;
*
* ---------------------------------------------------------------------
* Cas 31 : ddi (visco)
* ---------------------------------------------------------------------
SI ((IDEB0 '<EG' 31) 'ET' (IFIN0 '>EG' 31) 'ET' ('NON' ('EXIS' TSKIP 31))) ;
    MENAGE 'OBLI' ;
    MESS ' ' ;
    VMSG = CHAI '>>> Cas' ' ' '31' ' ' 'sur' ' ' NTOT0 ' ' ':' ' ' 'ddi' ' ' '(visco)' ;
    MESS VMSG ;
    NPASS = 2 ;
    SI IPASS3 ;
        NPASS = 3 ;
    FINSI ;
    VTH1 = 0 ;
    VTH2 = 0 ;
    VTH3 = 0 ;
    VNE51 = 0 ;
    VNE01 = 0 ;
    VNE52 = 0 ;
    VNE02 = 0 ;
    VNE53 = 0 ;
    VNE03 = 0 ;
    REPETER ZVRUN NPASS ;
* ordre des passes alterne d'un cas a l'autre (derive des temps en session)
        VIP = &ZVRUN ;
        VPSW = (VIP '>' 1) ;
        VNIV = 1 ;
        VMPS = 'inactif' ;
        SI (VIP 'EGA' 2) ;
            VMPS = 'actif niveau 1' ;
        FINSI ;
        SI (VIP 'EGA' 3) ;
            VNIV = 2 ;
            VMPS = 'actif niveau 2' ;
        FINSI ;
        AVANCE VRES 31 NTOT0 'ddi' VIP 'en_cours' ;
        VMSG = CHAI '    passe' ' ' VIP ' ' 'sur' ' ' NPASS ' ' ': optimisations' ' ' VMPS ;
        MESS VMSG ;
        SI ITRACE0 ;
            OPTI 'IMPR' 'valid_trace.log' ;
        FINSI ;
        OPTI 'DIME' 3 'MODE' 'TRID' 'ELEM' 'CUB8' 'ECHO' IECHO0 ;
        VTHM = 0 ;
        REPETER ZVREP NREP0 ;
            VIR = &ZVREP ;
            VTFPR = TABL ;
            VTCT = TABL ;
            VTCT . 'N0' = 0 ;
            VTCT . 'N5' = 0 ;
            SI ITEMPS0 ;
                TEMP 'ZERO' ;
            FINSI ;
* Le cas s'execute dans une procedure (variables locales) : les variables
* d'un cas precedent ne peuvent pas masquer un mot-cle ou un operateur
            VC31 VPSW VNIV VTFPR VTCT IECHO0 ;
            VTHR = 0 ;
            SI ITEMPS0 ;
                VTHR = CHRONO ;
            FINSI ;
            SI (VIR 'EGA' 1) ;
                VTHM = VTHR ;
            SINON ;
                SI (VTHR '<' VTHM) ;
                    VTHM = VTHR ;
                FINSI ;
            FINSI ;
        FIN ZVREP ;
        VNER5 = VTCT . 'N5' ;
        VNER0 = VTCT . 'N0' ;
        SI (VIP 'EGA' 1) ;
            VTF1 = VTFPR ;
            VTH1 = VTHM ;
            VNE51 = VNER5 ;
            VNE01 = VNER0 ;
        FINSI ;
        SI (VIP 'EGA' 2) ;
            VTF2 = VTFPR ;
            VTH2 = VTHM ;
            VNE52 = VNER5 ;
            VNE02 = VNER0 ;
        FINSI ;
        SI (VIP 'EGA' 3) ;
            VTF3 = VTFPR ;
            VTH3 = VTHM ;
            VNE53 = VNER5 ;
            VNE03 = VNER0 ;
        FINSI ;
    FIN ZVRUN ;
*   comparaison des empreintes avec la passe 1
    VER2 VNL2 VNC2 = COMPAR VTF1 VTF2 ;
    VMOK2 = 'OK' ;
    SI ((VER2 '>' TOLV0) 'OU' (VNL2 '>' 0) 'OU' ('NON' (VNE52 'EGA' VNE51))) ;
        VMOK2 = 'ECART' ;
        VNBK2 = VNBK2 + 1 ;
    FINSI ;
    VER3 = 0. ;
    VNC3 = 0 ;
    VMOK3 = 'sans_objet' ;
    SI IPASS3 ;
        VER3 VNL3 VNC3 = COMPAR VTF1 VTF3 ;
        VMOK3 = 'OK' ;
        SI ((VER3 '>' TOLV3) 'OU' (VNL3 '>' 0) 'OU' ('NON' (VNE53 'EGA' VNE51))) ;
            VMOK3 = 'ECART' ;
            VNBK3 = VNBK3 + 1 ;
        FINSI ;
    FINSI ;
*   accelerations (temps de la passe 1 / temps de la passe)
    VSP2 = 0. ;
    VSP3 = 0. ;
    SI ((VTH1 '>' 0) 'ET' (VTH2 '>' 0)) ;
        VSP2 = (FLOT VTH1) '/' (FLOT VTH2) ;
    FINSI ;
    SI ((VTH1 '>' 0) 'ET' (VTH3 '>' 0)) ;
        VSP3 = (FLOT VTH1) '/' (FLOT VTH3) ;
    FINSI ;
    VSUM1 = VSUM1 + VTH1 ;
    VSUM2 = VSUM2 + VTH2 ;
    VSUM3 = VSUM3 + VTH3 ;
    VCLA = VTF2 . 'CL' ;
    VR2 = VTF2 . 'NRE' ;
    VC2 = VTF2 . 'NCA' ;
    VH2 = VTF2 . 'NHK' ;
    VM2 = VTF2 . 'NMA' ;
    VR3 = -1 ;
    VC3 = -1 ;
    VH3 = -1 ;
    VM3 = -1 ;
    SI IPASS3 ;
        VR3 = VTF3 . 'NRE' ;
        VC3 = VTF3 . 'NCA' ;
        VH3 = VTF3 . 'NHK' ;
        VM3 = VTF3 . 'NMA' ;
    FINSI ;
    VSE2 = CHAI 'FORMAT' '(1PE10.3)' VER2 ;
    VSE3 = CHAI 'FORMAT' '(1PE10.3)' VER3 ;
    VSS2 = CHAI 'FORMAT' '(F6.2)' VSP2 ;
    VSS3 = CHAI 'FORMAT' '(F6.2)' VSP3 ;
*   fichier de resultat du cas (SORT) et affichage console (MESS)
    OPTI 'SORT' 'valid_ddi.log' ;
    VMSG = CHAI '=== Cas' ' ' '31' ' ' ':' ' ' 'ddi' ' ' '(visco)' ' ' '===' ;
    MESS VMSG ;
    SORT 'CHAI' VMSG ;
    VMSG = CHAI 'Valeurs comparees :' ' ' VNC2 ;
    MESS VMSG ;
    SORT 'CHAI' VMSG ;
    VMSG = CHAI 'Temps horloge (ms) : origine' ' ' VTH1 ' ' '; niveau 1' ' ' VTH2 ' ' '; niveau 2' ' ' VTH3 ;
    MESS VMSG ;
    SORT 'CHAI' VMSG ;
    VMSG = CHAI 'Acceleration par rapport a l origine : niveau 1' ' ' VSS2 ' ' '; niveau 2' ' ' VSS3 ;
    MESS VMSG ;
    SORT 'CHAI' VMSG ;
    VMSG = CHAI 'Controles internes du cas : echecs origine' ' ' VNE51 ' ' '; niveau 1' ' ' VNE52 ' ' '; niveau 2' ' ' VNE53 ' ' '- reussites origine' ' ' VNE01 ' ' '; niveau 1' ' ' VNE02 ' ' '; niveau 2' ' ' VNE03 ;
    MESS VMSG ;
    SORT 'CHAI' VMSG ;
    VMSG = CHAI 'Classes exercees (1 MATVAR, 10 ENDOM, 20 VISCODOM, 100 GD) :' ' ' VCLA ;
    MESS VMSG ;
    SORT 'CHAI' VMSG ;
    VMSG = CHAI 'Niveau 1 : raideur reutilisee' ' ' VR2 ' ' 'fois, recalculee' ' ' VC2 ' ' 'fois ; HOOK evite' ' ' VH2 ' ' 'fois ; caracteristiques reutilisees' ' ' VM2 ' ' 'fois' ;
    MESS VMSG ;
    SORT 'CHAI' VMSG ;
    VMSG = CHAI 'Niveau 2 : raideur reutilisee' ' ' VR3 ' ' 'fois, recalculee' ' ' VC3 ' ' 'fois ; HOOK evite' ' ' VH3 ' ' 'fois ; caracteristiques reutilisees' ' ' VM3 ' ' 'fois' ;
    MESS VMSG ;
    SORT 'CHAI' VMSG ;
    VMSG = CHAI 'Ecart relatif maximal : niveau 1' ' ' VSE2 ' ' '; niveau 2' ' ' VSE3 ;
    MESS VMSG ;
    SORT 'CHAI' VMSG ;
    VMSG = CHAI 'RESULTAT : niveau 1' ' ' VMOK2 ' ' '; niveau 2' ' ' VMOK3 ;
    MESS VMSG ;
    SORT 'CHAI' VMSG ;
    SI (('EGA' VNC2 0) ) ;
        VMSG = CHAI 'ATTENTION : aucune valeur comparee (resultats non stockes ?)' ;
        MESS VMSG ;
        SORT 'CHAI' VMSG ;
    FINSI ;
    OPTI 'SORT' 'valid_inutile.tmp' ;
    VRES . 31 = TABL ;
    VRES . 31 . 'NOM' = 'ddi' ;
    VRES . 31 . 'OKM' = VMOK2 ;
    VRES . 31 . 'OK3' = VMOK3 ;
    VRES . 31 . 'ERR2' = VER2 ;
    VRES . 31 . 'ERR3' = VER3 ;
    VRES . 31 . 'TH1' = VTH1 ;
    VRES . 31 . 'TH2' = VTH2 ;
    VRES . 31 . 'TH3' = VTH3 ;
    VRES . 31 . 'SP2F' = VSP2 ;
    VRES . 31 . 'SP3F' = VSP3 ;
    VRES . 31 . 'NRE2' = VR2 ;
    VRES . 31 . 'NCA2' = VC2 ;
    VRES . 31 . 'NHK2' = VH2 ;
    VRES . 31 . 'NMA2' = VM2 ;
    VRES . 31 . 'NRE3' = VR3 ;
    VRES . 31 . 'NCA3' = VC3 ;
    VRES . 31 . 'NHK3' = VH3 ;
    VRES . 31 . 'CL' = VCLA ;
    VRES . 31 . 'NCMP' = VNC2 ;
    VMSG = CHAI '<<< Cas' ' ' '31' ' ' 'sur' ' ' NTOT0 ' ' ':' ' ' 'ddi' ' ' ':' ' ' 'niveau 1' ' ' VMOK2 ', niveau 2' ' ' VMOK3 ' ' '- ecart' ' ' VSE2 ', acceleration' ' ' VSS2 ' ' 'et' ' ' VSS3 ;
    MESS VMSG ;
    AVANCE VRES 31 NTOT0 'ddi' NPASS 'termine' ;
    MENAGE 'OBLI' ;
FINSI ;

*
* ---------------------------------------------------------------------
* Procedure du cas 32 : tufi (plasticite tuyau fibre)
* Variables locales : le cas ne voit aucune variable des cas precedents
* ---------------------------------------------------------------------
DEBPROC VC32 VPSW*'LOGIQUE' VNIV*'ENTIER' VTFPR*'TABLE' VTCT*'TABLE' IECHO0*'ENTIER' ;
* ----- debut du cas tufi

* fichier :  tufi.dgibi
************************************************************************
* Section : Mecanique Endommagement
* Section : Mecanique Plastique
************************************************************************
OPTION ECHO IECHO0;
GRAPH = 'N';
SAUT PAGE;
*
*   TUYAU FISSURE SOLLICITE EN FLEXION PURE
*
OPTI DIME 3 ELEM SEG2 MODE TRID;
REXT1=52.73;T1=8.41;
E=13950;SY=14.47;SM=51.51;
P1=0. 0. 0.;P2=0. 0. 0.;
TUFSS=MANU SEG2 P1 P2;
*
*  COURBE DE TRACTION RENTREE = LOI MOMENT-COURBURE DE L ESSAI
*
LISTM0=PROG 0. 0.5 0.68 0.78 0.87 0.95 1.03 1.12 1.18;
LISTM0=LISTM0 * 1.E6;
LISTPHI0=PROG 0. 0.41 0.65 0.84 1.06 1.38 1.94 2.89 4.20;
LISTPHIC=2 * (LISTPHI0 * PI / 180.) ;
* calcul de la complaisance CMM pour calcul de la rotation
* elastique correspondant au 1er point de la courbe
OBJTUFI=MODE TUFSS  MECANIQUE ELASTIQUE TUFI;
MATTUFI=MATE OBJTUFI YOUN E NU 0.3;
CARTUFI= 'CARA' OBJTUFI RAYO REXT1 EPAI T1
VX 1. VY 0. VZ 0. VXF 0. VYF 0. VZF -1. ANGL 120.;
RITUFI=RIGI (MATTUFI et CARTUFI) OBJTUFI;
CDL1=BLOQ depla rota p1;CDL2=BLOQ RY p2;
RR=RITUFI ET CDL1 ET CDL2;
DF=DEPI CDL2 -1.;PHI=-1;
U=RESO RR DF;FEXT=REAC RR U;M=EXTR FEXT MY P2;
CMM=PHI / M;
phie=CMM * 0.5E6;remp LISTPHIC 2 phie;
*
EV0=evol manu LISTPHIC LISTM0;
COUTRA=EVOL BLEU MANU 'PHI' (LISTPHIC ET (PROG 1.))
 'MOMENT' (LISTM0 ET (PROG 1.18E6));
CJDA=evol manu 'da' (prog 0. 20.) 'f' (prog 3.5E6 3.5E6);
***********RESOLUTION******************
***********PLASTIQUE*******************
OBJAF=MODE TUFSS  MECANIQUE ELASTIQUE PLASTIQUE
 TUYAU_FISSURE TUFI;
MAT=MATE OBJAF YOUN E NU 0.3 JDA CJDA TRAC COUTRA;
CAR= 'CARA' OBJAF RAYO REXT1 EPAI T1
VX 1. VY 0. VZ 0. VXF 0. VYF 0. VZF -1. ANGL 120.;
CARTOT=MAT et CAR;
CDL1=BLOQ depla rota p1;
CDL2=BLOQ RY P2;
CL=CDL1 ET CDL2;
DF=DEPI CDL2 -0.005;
*
EVT=EVOL MANU T (PROG 0. 100.) DF(T) (PROG 0. 100.);
PGT=PROG 1. PAS 1 22.;
FDT=CHAR 'DIMP' DF EVT;
TENTR=TABLE;
TENTR.MAXITERATION=50;
TENTR.CARACTERISTIQUES=CARTOT;
TENTR.MODELE=OBJAF;
TENTR.CHARGEMENT=FDT;
TENTR.BLOCAGES_MECANIQUES=CL;
TENTR.TEMPS_CALCULES= PGT;

TENTR . 'PERF_RAID' = VPSW ; TENTR . 'PERF_RAID_NIVEAU' = VNIV ; PASAPAS TENTR ; FPREC TENTR VTFPR ;

pm=prog 0.;pphi=prog 0.;
REPETER BLO 22;
J=&BLO;
UF=TENTR.DEPLACEMENTS.J;
PHI=EXTR UF RY P2;
FEXT=TENTR.REACTIONS.J;M=EXTR FEXT MY P2;
pm=pm et (prog M);pphi=pphi et (prog PHI);
pm=abs pm;pphi=abs pphi;
SI (J EGA 22);
PHIR=IPOL (abs M) LISTM0 LISTPHIC;
ERR = abs ((PHIR - (abs PHI))/PHIR);
SI (ERR <  1.E-3);VTCT . 'N0' = (VTCT . 'N0') + 1 ;SINO;VTCT . 'N5' = (VTCT . 'N5') + 1 ;FINSI;
FINSI;
FIN BLO;

SI ( NEG GRAPH 'N' );
evcal=evol manu pphi pm;
t=tabl;t.1='MARQ CARR ';
t.2='MARQ ETOI ';
t.'TITRE' =tabl;
t.'TITRE'. 1 = MOT 'RENTREE';
t.'TITRE'. 2 = MOT 'CALCULEE';
titr 'comparaison des courbes (m,phi) rentree et calculee';
evt=EV0    et evcal;
dess evt lege t logo;
FINSI;
* [valid] FIN final


* ----- fin du cas tufi
FINPROC ;
*
* ---------------------------------------------------------------------
* Cas 32 : tufi (plasticite tuyau fibre)
* ---------------------------------------------------------------------
SI ((IDEB0 '<EG' 32) 'ET' (IFIN0 '>EG' 32) 'ET' ('NON' ('EXIS' TSKIP 32))) ;
    MENAGE 'OBLI' ;
    MESS ' ' ;
    VMSG = CHAI '>>> Cas' ' ' '32' ' ' 'sur' ' ' NTOT0 ' ' ':' ' ' 'tufi' ' ' '(plasticite tuyau fibre)' ;
    MESS VMSG ;
    NPASS = 2 ;
    SI IPASS3 ;
        NPASS = 3 ;
    FINSI ;
    VTH1 = 0 ;
    VTH2 = 0 ;
    VTH3 = 0 ;
    VNE51 = 0 ;
    VNE01 = 0 ;
    VNE52 = 0 ;
    VNE02 = 0 ;
    VNE53 = 0 ;
    VNE03 = 0 ;
    REPETER ZVRUN NPASS ;
* ordre des passes alterne d'un cas a l'autre (derive des temps en session)
        VIP = NPASS + 1 - &ZVRUN ;
        VPSW = (VIP '>' 1) ;
        VNIV = 1 ;
        VMPS = 'inactif' ;
        SI (VIP 'EGA' 2) ;
            VMPS = 'actif niveau 1' ;
        FINSI ;
        SI (VIP 'EGA' 3) ;
            VNIV = 2 ;
            VMPS = 'actif niveau 2' ;
        FINSI ;
        AVANCE VRES 32 NTOT0 'tufi' VIP 'en_cours' ;
        VMSG = CHAI '    passe' ' ' VIP ' ' 'sur' ' ' NPASS ' ' ': optimisations' ' ' VMPS ;
        MESS VMSG ;
        SI ITRACE0 ;
            OPTI 'IMPR' 'valid_trace.log' ;
        FINSI ;
        OPTI 'DIME' 3 'MODE' 'TRID' 'ELEM' 'CUB8' 'ECHO' IECHO0 ;
        VTHM = 0 ;
        REPETER ZVREP NREP0 ;
            VIR = &ZVREP ;
            VTFPR = TABL ;
            VTCT = TABL ;
            VTCT . 'N0' = 0 ;
            VTCT . 'N5' = 0 ;
            SI ITEMPS0 ;
                TEMP 'ZERO' ;
            FINSI ;
* Le cas s'execute dans une procedure (variables locales) : les variables
* d'un cas precedent ne peuvent pas masquer un mot-cle ou un operateur
            VC32 VPSW VNIV VTFPR VTCT IECHO0 ;
            VTHR = 0 ;
            SI ITEMPS0 ;
                VTHR = CHRONO ;
            FINSI ;
            SI (VIR 'EGA' 1) ;
                VTHM = VTHR ;
            SINON ;
                SI (VTHR '<' VTHM) ;
                    VTHM = VTHR ;
                FINSI ;
            FINSI ;
        FIN ZVREP ;
        VNER5 = VTCT . 'N5' ;
        VNER0 = VTCT . 'N0' ;
        SI (VIP 'EGA' 1) ;
            VTF1 = VTFPR ;
            VTH1 = VTHM ;
            VNE51 = VNER5 ;
            VNE01 = VNER0 ;
        FINSI ;
        SI (VIP 'EGA' 2) ;
            VTF2 = VTFPR ;
            VTH2 = VTHM ;
            VNE52 = VNER5 ;
            VNE02 = VNER0 ;
        FINSI ;
        SI (VIP 'EGA' 3) ;
            VTF3 = VTFPR ;
            VTH3 = VTHM ;
            VNE53 = VNER5 ;
            VNE03 = VNER0 ;
        FINSI ;
    FIN ZVRUN ;
*   comparaison des empreintes avec la passe 1
    VER2 VNL2 VNC2 = COMPAR VTF1 VTF2 ;
    VMOK2 = 'OK' ;
    SI ((VER2 '>' TOLV0) 'OU' (VNL2 '>' 0) 'OU' ('NON' (VNE52 'EGA' VNE51))) ;
        VMOK2 = 'ECART' ;
        VNBK2 = VNBK2 + 1 ;
    FINSI ;
    VER3 = 0. ;
    VNC3 = 0 ;
    VMOK3 = 'sans_objet' ;
    SI IPASS3 ;
        VER3 VNL3 VNC3 = COMPAR VTF1 VTF3 ;
        VMOK3 = 'OK' ;
        SI ((VER3 '>' TOLV3) 'OU' (VNL3 '>' 0) 'OU' ('NON' (VNE53 'EGA' VNE51))) ;
            VMOK3 = 'ECART' ;
            VNBK3 = VNBK3 + 1 ;
        FINSI ;
    FINSI ;
*   accelerations (temps de la passe 1 / temps de la passe)
    VSP2 = 0. ;
    VSP3 = 0. ;
    SI ((VTH1 '>' 0) 'ET' (VTH2 '>' 0)) ;
        VSP2 = (FLOT VTH1) '/' (FLOT VTH2) ;
    FINSI ;
    SI ((VTH1 '>' 0) 'ET' (VTH3 '>' 0)) ;
        VSP3 = (FLOT VTH1) '/' (FLOT VTH3) ;
    FINSI ;
    VSUM1 = VSUM1 + VTH1 ;
    VSUM2 = VSUM2 + VTH2 ;
    VSUM3 = VSUM3 + VTH3 ;
    VCLA = VTF2 . 'CL' ;
    VR2 = VTF2 . 'NRE' ;
    VC2 = VTF2 . 'NCA' ;
    VH2 = VTF2 . 'NHK' ;
    VM2 = VTF2 . 'NMA' ;
    VR3 = -1 ;
    VC3 = -1 ;
    VH3 = -1 ;
    VM3 = -1 ;
    SI IPASS3 ;
        VR3 = VTF3 . 'NRE' ;
        VC3 = VTF3 . 'NCA' ;
        VH3 = VTF3 . 'NHK' ;
        VM3 = VTF3 . 'NMA' ;
    FINSI ;
    VSE2 = CHAI 'FORMAT' '(1PE10.3)' VER2 ;
    VSE3 = CHAI 'FORMAT' '(1PE10.3)' VER3 ;
    VSS2 = CHAI 'FORMAT' '(F6.2)' VSP2 ;
    VSS3 = CHAI 'FORMAT' '(F6.2)' VSP3 ;
*   fichier de resultat du cas (SORT) et affichage console (MESS)
    OPTI 'SORT' 'valid_tufi.log' ;
    VMSG = CHAI '=== Cas' ' ' '32' ' ' ':' ' ' 'tufi' ' ' '(plasticite tuyau fibre)' ' ' '===' ;
    MESS VMSG ;
    SORT 'CHAI' VMSG ;
    VMSG = CHAI 'Valeurs comparees :' ' ' VNC2 ;
    MESS VMSG ;
    SORT 'CHAI' VMSG ;
    VMSG = CHAI 'Temps horloge (ms) : origine' ' ' VTH1 ' ' '; niveau 1' ' ' VTH2 ' ' '; niveau 2' ' ' VTH3 ;
    MESS VMSG ;
    SORT 'CHAI' VMSG ;
    VMSG = CHAI 'Acceleration par rapport a l origine : niveau 1' ' ' VSS2 ' ' '; niveau 2' ' ' VSS3 ;
    MESS VMSG ;
    SORT 'CHAI' VMSG ;
    VMSG = CHAI 'Controles internes du cas : echecs origine' ' ' VNE51 ' ' '; niveau 1' ' ' VNE52 ' ' '; niveau 2' ' ' VNE53 ' ' '- reussites origine' ' ' VNE01 ' ' '; niveau 1' ' ' VNE02 ' ' '; niveau 2' ' ' VNE03 ;
    MESS VMSG ;
    SORT 'CHAI' VMSG ;
    VMSG = CHAI 'Classes exercees (1 MATVAR, 10 ENDOM, 20 VISCODOM, 100 GD) :' ' ' VCLA ;
    MESS VMSG ;
    SORT 'CHAI' VMSG ;
    VMSG = CHAI 'Niveau 1 : raideur reutilisee' ' ' VR2 ' ' 'fois, recalculee' ' ' VC2 ' ' 'fois ; HOOK evite' ' ' VH2 ' ' 'fois ; caracteristiques reutilisees' ' ' VM2 ' ' 'fois' ;
    MESS VMSG ;
    SORT 'CHAI' VMSG ;
    VMSG = CHAI 'Niveau 2 : raideur reutilisee' ' ' VR3 ' ' 'fois, recalculee' ' ' VC3 ' ' 'fois ; HOOK evite' ' ' VH3 ' ' 'fois ; caracteristiques reutilisees' ' ' VM3 ' ' 'fois' ;
    MESS VMSG ;
    SORT 'CHAI' VMSG ;
    VMSG = CHAI 'Ecart relatif maximal : niveau 1' ' ' VSE2 ' ' '; niveau 2' ' ' VSE3 ;
    MESS VMSG ;
    SORT 'CHAI' VMSG ;
    VMSG = CHAI 'RESULTAT : niveau 1' ' ' VMOK2 ' ' '; niveau 2' ' ' VMOK3 ;
    MESS VMSG ;
    SORT 'CHAI' VMSG ;
    SI (('EGA' VNC2 0) ) ;
        VMSG = CHAI 'ATTENTION : aucune valeur comparee (resultats non stockes ?)' ;
        MESS VMSG ;
        SORT 'CHAI' VMSG ;
    FINSI ;
    OPTI 'SORT' 'valid_inutile.tmp' ;
    VRES . 32 = TABL ;
    VRES . 32 . 'NOM' = 'tufi' ;
    VRES . 32 . 'OKM' = VMOK2 ;
    VRES . 32 . 'OK3' = VMOK3 ;
    VRES . 32 . 'ERR2' = VER2 ;
    VRES . 32 . 'ERR3' = VER3 ;
    VRES . 32 . 'TH1' = VTH1 ;
    VRES . 32 . 'TH2' = VTH2 ;
    VRES . 32 . 'TH3' = VTH3 ;
    VRES . 32 . 'SP2F' = VSP2 ;
    VRES . 32 . 'SP3F' = VSP3 ;
    VRES . 32 . 'NRE2' = VR2 ;
    VRES . 32 . 'NCA2' = VC2 ;
    VRES . 32 . 'NHK2' = VH2 ;
    VRES . 32 . 'NMA2' = VM2 ;
    VRES . 32 . 'NRE3' = VR3 ;
    VRES . 32 . 'NCA3' = VC3 ;
    VRES . 32 . 'NHK3' = VH3 ;
    VRES . 32 . 'CL' = VCLA ;
    VRES . 32 . 'NCMP' = VNC2 ;
    VMSG = CHAI '<<< Cas' ' ' '32' ' ' 'sur' ' ' NTOT0 ' ' ':' ' ' 'tufi' ' ' ':' ' ' 'niveau 1' ' ' VMOK2 ', niveau 2' ' ' VMOK3 ' ' '- ecart' ' ' VSE2 ', acceleration' ' ' VSS2 ' ' 'et' ' ' VSS3 ;
    MESS VMSG ;
    AVANCE VRES 32 NTOT0 'tufi' NPASS 'termine' ;
    MENAGE 'OBLI' ;
FINSI ;

*
* ---------------------------------------------------------------------
* Procedure du cas 33 : fluage_maxwell_1 (fluage Maxwell)
* Variables locales : le cas ne voit aucune variable des cas precedents
* ---------------------------------------------------------------------
DEBPROC VC33 VPSW*'LOGIQUE' VNIV*'ENTIER' VTFPR*'TABLE' VTCT*'TABLE' IECHO0*'ENTIER' ;
* ----- debut du cas fluage_maxwell_1

* fichier :  fluage_maxwell_1.dgibi
************************************************************************
* Section : Mecanique Fluage
************************************************************************
*       Test fluage_maxwell_1.dgibi: Jeux de données  *
*       --------------------------------------------  *
*                                                     *
*
**************************************************
*                                                *
*  TEST DE VERIFICATION D'UNE LOI DE COMPORTEMENT*
*  --------------------------------------------  *
*              DE MATERIAU                       *
*              -----------                       *
*                                                *
*  LOI DE COMPORTEMENT DE FLUAGE DE :            *
*              MAXWELL                           *
*                                                *
*  TEST POUR DES ELEMENTS MASSIFS                *
*  ------------------------------                *
*                                                *
*  MAILLAGE:                                     *
*   UNE PLAQUE CARREE DE COTE L=1 M              *
*                                                *
*  CHARGEMENT:                                   *
*   CISAILLEMENT PUR                             *
*   FORCES IMPOSEES                              *
*   DEFORMATIONS PLANES                          *
*                                                *
**************************************************

opti dime 2 elem qua4 ;

*
* Maillage
*
p1 = 0. 0. ;
p2 = 1. 0. ;
p3 = 1. 1. ;
p4 = 0. 1. ;
li1 = d p1 1 p2 ;
li2 = d p2 1 p3 ;
li3 = d p3 1 p4 ;
li4 = d p4 1 p1 ;
mail1 = 'SURF' ( li1 'ET' li2 'ET' li3 'ET' li4 ) 'PLAN' ;
*
* Modele
*
AF1 = 1.E-45 ;
AF2 = 5. ;
AF3 = 1.2 ;
SMAX = 2.1E8;
youn0 = 1.5E+4;
nu0 = 0.3 ;

prog1=prog 0.    1.D12;
prog20=prog 1.5E+4 1.5E+4;
E0=evol manu prog1 prog20;

*prog1=prog 0. 1.D12;
prog21=prog 1.11E+6 1.11E+6;
E1=evol manu prog1 prog21;

*prog1=prog 0.    1.D12;
prog22=prog 1.12E+6 1.12E+6;
E2=evol manu prog1 prog22;

*prog1=prog 0. 1.D12;
prog23=prog 3.43E+5 3.43E+5;
E3=evol manu prog1 prog23;

*prog1=prog 0. 1.D12;
prog24=prog 4.14E+5 4.14E+5;
E4=evol manu prog1 prog24;

proyou= prog20 + prog21 + prog22 + prog23 + prog24 ;
youn0 = evol manu 'TEMP' prog1 'YOUN' proyou;

TRR1 = 0.46;
TRR2 = 0.45;
TRR3 = 3.62;
TRR4 = 45.1;

mod0 =MODE mail1 'MECANIQUE' 'ELASTIQUE' 'ISOTROPE' 'FLUAGE' 'MAXWELL';
mat0 =MATE mod0 'YOUN' youn0 'NU' nu0
'EM0' E0 'EM1' E1 'EM2' E2 'EM3' E3 'EM4' E4
'TR1' TRR1 'TR2' TRR2 'TR3' TRR3 'TR4' TRR4;

*
* Conditions aux limites
*
cl1 = 'BLOQ' mail1 'UY' ;
cl2 = 'BLOQ' li1 'UX' ;
cl0 = cl1 'ET' cl2 ;
*
* Chargement
*
depmax = 7.E-1 ;
*chp1 = 'COOR' 2 mail1 ;
*chp1 = chp1 * depmax / 1. ;
*chp1 = 'NOMC' chp1 'UX' ;
*titr ' Champ de forces impose' ;
**trace chp1 mail1 ;
*chp2 = 'MANU' 'CHPO' mail1 1 'UY' 0. ;
*chp0 = chp1 + chp2 ;
dep1 = 'FORCE' li1 'FX' ( -1. * depmax ) 'FY' 0. ;
dep2 = 'FORCE' li3 'FX' depmax 'FY' 0. ;
dep0 = dep1 'ET' dep2 ;
ev0 = 'EVOL' 'MANU' temps ( 'PROG' 0. 1.E-4 1000. )
y ( 'PROG' 0. 1. 1. ) ;
cha0 = 'CHAR' 'MECA' dep0 ev0 ;
*
dt0 = 0.020 ;
dt1 = 2. * dt0 ;
dt2 = 5. * dt1 ;
dt3 = 5. * dt2 ;
tfin0 = 20. ;
*
* Appel à PASAPAS
*
ta1 = 'TABLE' ;
ta1 .'MODELE' = mod0 ;
ta1 .'CARACTERISTIQUES' = mat0 ;
ta1 .'CHARGEMENT' = cha0 ;
ta1 .'BLOCAGES_MECANIQUES' = cl0 ;
ta1 .'TEMPS_CALCULES' = ( 'PROG' 0. 'PAS' 1.E-4 2.E-4 ) 'ET'
( 'PROG' 3.E-4 dt0 ) 'ET'
( 'PROG' dt1 'PAS' dt0 dt2 ) 'ET'
( 'PROG' ( dt2 + dt2 ) 'PAS' dt2 dt3 ) 'ET'
( 'PROG' ( dt3 + dt3 ) 'PAS' dt3 tfin0 ) ;
*
list ta1.'TEMPS_CALCULES';
TMASAU=table;
ta1. 'MES_SAUVEGARDES'=TMASAU;
TMASAU.'DEFTO'=VRAI;
TMASAU.'DEFIN'=VRAI;
*  pas de controle de positivite
ta1.'STABILITE' = faux;
*
ta1 . 'PERF_RAID' = VPSW ; ta1 . 'PERF_RAID_NIVEAU' = VNIV ; PASAPAS ta1 ; FPREC ta1 VTFPR ;
* [valid] FIN final


* ----- fin du cas fluage_maxwell_1
FINPROC ;
*
* ---------------------------------------------------------------------
* Cas 33 : fluage_maxwell_1 (fluage Maxwell)
* ---------------------------------------------------------------------
SI ((IDEB0 '<EG' 33) 'ET' (IFIN0 '>EG' 33) 'ET' ('NON' ('EXIS' TSKIP 33))) ;
    MENAGE 'OBLI' ;
    MESS ' ' ;
    VMSG = CHAI '>>> Cas' ' ' '33' ' ' 'sur' ' ' NTOT0 ' ' ':' ' ' 'fluage_maxwell_1' ' ' '(fluage Maxwell)' ;
    MESS VMSG ;
    NPASS = 2 ;
    SI IPASS3 ;
        NPASS = 3 ;
    FINSI ;
    VTH1 = 0 ;
    VTH2 = 0 ;
    VTH3 = 0 ;
    VNE51 = 0 ;
    VNE01 = 0 ;
    VNE52 = 0 ;
    VNE02 = 0 ;
    VNE53 = 0 ;
    VNE03 = 0 ;
    REPETER ZVRUN NPASS ;
* ordre des passes alterne d'un cas a l'autre (derive des temps en session)
        VIP = &ZVRUN ;
        VPSW = (VIP '>' 1) ;
        VNIV = 1 ;
        VMPS = 'inactif' ;
        SI (VIP 'EGA' 2) ;
            VMPS = 'actif niveau 1' ;
        FINSI ;
        SI (VIP 'EGA' 3) ;
            VNIV = 2 ;
            VMPS = 'actif niveau 2' ;
        FINSI ;
        AVANCE VRES 33 NTOT0 'fluage_maxwell_1' VIP 'en_cours' ;
        VMSG = CHAI '    passe' ' ' VIP ' ' 'sur' ' ' NPASS ' ' ': optimisations' ' ' VMPS ;
        MESS VMSG ;
        SI ITRACE0 ;
            OPTI 'IMPR' 'valid_trace.log' ;
        FINSI ;
        OPTI 'DIME' 3 'MODE' 'TRID' 'ELEM' 'CUB8' 'ECHO' IECHO0 ;
        VTHM = 0 ;
        REPETER ZVREP NREP0 ;
            VIR = &ZVREP ;
            VTFPR = TABL ;
            VTCT = TABL ;
            VTCT . 'N0' = 0 ;
            VTCT . 'N5' = 0 ;
            SI ITEMPS0 ;
                TEMP 'ZERO' ;
            FINSI ;
* Le cas s'execute dans une procedure (variables locales) : les variables
* d'un cas precedent ne peuvent pas masquer un mot-cle ou un operateur
            VC33 VPSW VNIV VTFPR VTCT IECHO0 ;
            VTHR = 0 ;
            SI ITEMPS0 ;
                VTHR = CHRONO ;
            FINSI ;
            SI (VIR 'EGA' 1) ;
                VTHM = VTHR ;
            SINON ;
                SI (VTHR '<' VTHM) ;
                    VTHM = VTHR ;
                FINSI ;
            FINSI ;
        FIN ZVREP ;
        VNER5 = VTCT . 'N5' ;
        VNER0 = VTCT . 'N0' ;
        SI (VIP 'EGA' 1) ;
            VTF1 = VTFPR ;
            VTH1 = VTHM ;
            VNE51 = VNER5 ;
            VNE01 = VNER0 ;
        FINSI ;
        SI (VIP 'EGA' 2) ;
            VTF2 = VTFPR ;
            VTH2 = VTHM ;
            VNE52 = VNER5 ;
            VNE02 = VNER0 ;
        FINSI ;
        SI (VIP 'EGA' 3) ;
            VTF3 = VTFPR ;
            VTH3 = VTHM ;
            VNE53 = VNER5 ;
            VNE03 = VNER0 ;
        FINSI ;
    FIN ZVRUN ;
*   comparaison des empreintes avec la passe 1
    VER2 VNL2 VNC2 = COMPAR VTF1 VTF2 ;
    VMOK2 = 'OK' ;
    SI ((VER2 '>' TOLV0) 'OU' (VNL2 '>' 0) 'OU' ('NON' (VNE52 'EGA' VNE51))) ;
        VMOK2 = 'ECART' ;
        VNBK2 = VNBK2 + 1 ;
    FINSI ;
    VER3 = 0. ;
    VNC3 = 0 ;
    VMOK3 = 'sans_objet' ;
    SI IPASS3 ;
        VER3 VNL3 VNC3 = COMPAR VTF1 VTF3 ;
        VMOK3 = 'OK' ;
        SI ((VER3 '>' TOLV3) 'OU' (VNL3 '>' 0) 'OU' ('NON' (VNE53 'EGA' VNE51))) ;
            VMOK3 = 'ECART' ;
            VNBK3 = VNBK3 + 1 ;
        FINSI ;
    FINSI ;
*   accelerations (temps de la passe 1 / temps de la passe)
    VSP2 = 0. ;
    VSP3 = 0. ;
    SI ((VTH1 '>' 0) 'ET' (VTH2 '>' 0)) ;
        VSP2 = (FLOT VTH1) '/' (FLOT VTH2) ;
    FINSI ;
    SI ((VTH1 '>' 0) 'ET' (VTH3 '>' 0)) ;
        VSP3 = (FLOT VTH1) '/' (FLOT VTH3) ;
    FINSI ;
    VSUM1 = VSUM1 + VTH1 ;
    VSUM2 = VSUM2 + VTH2 ;
    VSUM3 = VSUM3 + VTH3 ;
    VCLA = VTF2 . 'CL' ;
    VR2 = VTF2 . 'NRE' ;
    VC2 = VTF2 . 'NCA' ;
    VH2 = VTF2 . 'NHK' ;
    VM2 = VTF2 . 'NMA' ;
    VR3 = -1 ;
    VC3 = -1 ;
    VH3 = -1 ;
    VM3 = -1 ;
    SI IPASS3 ;
        VR3 = VTF3 . 'NRE' ;
        VC3 = VTF3 . 'NCA' ;
        VH3 = VTF3 . 'NHK' ;
        VM3 = VTF3 . 'NMA' ;
    FINSI ;
    VSE2 = CHAI 'FORMAT' '(1PE10.3)' VER2 ;
    VSE3 = CHAI 'FORMAT' '(1PE10.3)' VER3 ;
    VSS2 = CHAI 'FORMAT' '(F6.2)' VSP2 ;
    VSS3 = CHAI 'FORMAT' '(F6.2)' VSP3 ;
*   fichier de resultat du cas (SORT) et affichage console (MESS)
    OPTI 'SORT' 'valid_fluage_maxwell_1.log' ;
    VMSG = CHAI '=== Cas' ' ' '33' ' ' ':' ' ' 'fluage_maxwell_1' ' ' '(fluage Maxwell)' ' ' '===' ;
    MESS VMSG ;
    SORT 'CHAI' VMSG ;
    VMSG = CHAI 'Valeurs comparees :' ' ' VNC2 ;
    MESS VMSG ;
    SORT 'CHAI' VMSG ;
    VMSG = CHAI 'Temps horloge (ms) : origine' ' ' VTH1 ' ' '; niveau 1' ' ' VTH2 ' ' '; niveau 2' ' ' VTH3 ;
    MESS VMSG ;
    SORT 'CHAI' VMSG ;
    VMSG = CHAI 'Acceleration par rapport a l origine : niveau 1' ' ' VSS2 ' ' '; niveau 2' ' ' VSS3 ;
    MESS VMSG ;
    SORT 'CHAI' VMSG ;
    VMSG = CHAI 'Controles internes du cas : echecs origine' ' ' VNE51 ' ' '; niveau 1' ' ' VNE52 ' ' '; niveau 2' ' ' VNE53 ' ' '- reussites origine' ' ' VNE01 ' ' '; niveau 1' ' ' VNE02 ' ' '; niveau 2' ' ' VNE03 ;
    MESS VMSG ;
    SORT 'CHAI' VMSG ;
    VMSG = CHAI 'Classes exercees (1 MATVAR, 10 ENDOM, 20 VISCODOM, 100 GD) :' ' ' VCLA ;
    MESS VMSG ;
    SORT 'CHAI' VMSG ;
    VMSG = CHAI 'Niveau 1 : raideur reutilisee' ' ' VR2 ' ' 'fois, recalculee' ' ' VC2 ' ' 'fois ; HOOK evite' ' ' VH2 ' ' 'fois ; caracteristiques reutilisees' ' ' VM2 ' ' 'fois' ;
    MESS VMSG ;
    SORT 'CHAI' VMSG ;
    VMSG = CHAI 'Niveau 2 : raideur reutilisee' ' ' VR3 ' ' 'fois, recalculee' ' ' VC3 ' ' 'fois ; HOOK evite' ' ' VH3 ' ' 'fois ; caracteristiques reutilisees' ' ' VM3 ' ' 'fois' ;
    MESS VMSG ;
    SORT 'CHAI' VMSG ;
    VMSG = CHAI 'Ecart relatif maximal : niveau 1' ' ' VSE2 ' ' '; niveau 2' ' ' VSE3 ;
    MESS VMSG ;
    SORT 'CHAI' VMSG ;
    VMSG = CHAI 'RESULTAT : niveau 1' ' ' VMOK2 ' ' '; niveau 2' ' ' VMOK3 ;
    MESS VMSG ;
    SORT 'CHAI' VMSG ;
    SI (('EGA' VNC2 0) ) ;
        VMSG = CHAI 'ATTENTION : aucune valeur comparee (resultats non stockes ?)' ;
        MESS VMSG ;
        SORT 'CHAI' VMSG ;
    FINSI ;
    OPTI 'SORT' 'valid_inutile.tmp' ;
    VRES . 33 = TABL ;
    VRES . 33 . 'NOM' = 'fluage_maxwell_1' ;
    VRES . 33 . 'OKM' = VMOK2 ;
    VRES . 33 . 'OK3' = VMOK3 ;
    VRES . 33 . 'ERR2' = VER2 ;
    VRES . 33 . 'ERR3' = VER3 ;
    VRES . 33 . 'TH1' = VTH1 ;
    VRES . 33 . 'TH2' = VTH2 ;
    VRES . 33 . 'TH3' = VTH3 ;
    VRES . 33 . 'SP2F' = VSP2 ;
    VRES . 33 . 'SP3F' = VSP3 ;
    VRES . 33 . 'NRE2' = VR2 ;
    VRES . 33 . 'NCA2' = VC2 ;
    VRES . 33 . 'NHK2' = VH2 ;
    VRES . 33 . 'NMA2' = VM2 ;
    VRES . 33 . 'NRE3' = VR3 ;
    VRES . 33 . 'NCA3' = VC3 ;
    VRES . 33 . 'NHK3' = VH3 ;
    VRES . 33 . 'CL' = VCLA ;
    VRES . 33 . 'NCMP' = VNC2 ;
    VMSG = CHAI '<<< Cas' ' ' '33' ' ' 'sur' ' ' NTOT0 ' ' ':' ' ' 'fluage_maxwell_1' ' ' ':' ' ' 'niveau 1' ' ' VMOK2 ', niveau 2' ' ' VMOK3 ' ' '- ecart' ' ' VSE2 ', acceleration' ' ' VSS2 ' ' 'et' ' ' VSS3 ;
    MESS VMSG ;
    AVANCE VRES 33 NTOT0 'fluage_maxwell_1' NPASS 'termine' ;
    MENAGE 'OBLI' ;
FINSI ;

*
* ---------------------------------------------------------------------
* Procedure du cas 34 : poudre3 (poudre)
* Variables locales : le cas ne voit aucune variable des cas precedents
* ---------------------------------------------------------------------
DEBPROC VC34 VPSW*'LOGIQUE' VNIV*'ENTIER' VTFPR*'TABLE' VTCT*'TABLE' IECHO0*'ENTIER' ;
* ----- debut du cas poudre3

* fichier :  poudre3.dgibi
************************************************************************
* Section : Mecanique Viscoplastique
************************************************************************
*
************************************************************
*                                                          *
*    Cas test pour la loi poudre_A                         *
*                                                          *
*    par Christophe DELLIS   (CEREM)                       *
*                                                          *
************************************************************
*
*  cas dense
*
*
*opti echo IECHO0 ;
*
option dime 2 elem qua8 mode axis ;
*
*    parametres du maillage
*
rayon_1 = 10.0 ;
*
haute_1 = 15.0 ;
*
* definition des coordonnees des points
*
xa0 = 0.0 ;
ya0 = 0.0 ;
*
xa1 = rayon_1 ;
ya1 = ya0 ;
*
xa2 = xa1 ;
ya2 = ya1 + haute_1 ;
*
xa3 = 0.0 ;
ya3 = ya2 ;
*
* definition des densites
*
dena0 = 10.0 ;
dena1 = 10.0 ;
dena2 = 10.0 ;
dena3 = 10.0 ;
*
* definition des points
*
densite dena0 ;
a0 = xa0 ya0 ;
*
densite dena1 ;
a1 = xa1 ya1 ;
*
densite dena2 ;
a2 = xa2 ya2 ;
*
densite dena3 ;
a3 = xa3 ya3 ;
*
* definition des lignes
*
la0a1 = a0 droi 2 a1 ;
la1a2 = a1 droi 2 a2 ;
la2a3 = a2 droi 2 a3 ;
la3a0 = a3 droi 2 a0 ;
*
la3a2 = inve la2a3 ;
la2a1 = inve la1a2 ;
*
* lignes pour les conditions limites
*
l_symz = la0a1 ;
l_symx = la3a0 ;
l_ext1 = la1a2 ;
l_ext2 = la2a3 ;
*
* definition des surfaces
*
elmat1 = surf ( la0a1 et la1a2 et la2a3 et la3a0 ) plan ;
*
piece_1 = coul elmat1 bleu ;
*
tot = piece_1 ;
elim (tot et a2) 0.001 ;
*
*
************************************************************
*                                                          *
*       calcul                                             *
*                                                          *
************************************************************
*
T0TEMPE = 925.0 ;
T1TEMPE = 925.0 ;
T0TEMPS = 0.0 ;
T1TEMPS = 1200.0 ;
T2TEMPS = 2400.0 ;
T3TEMPS = 3600.0 ;
*
*******************************************
* Champ-point de temperature
*******************************************
*
clth0001 = BLOQ 'T' (l_ext1 et l_ext2) ;
p_bloth1 = DEPI clth0001 1. ;
p_temps1 = prog T0TEMPS T1TEMPS T2TEMPS T3TEMPS ;
p_theta1 = prog T0TEMPE T1TEMPE T1TEMPE T0TEMPE ;
ev_ther1 = EVOL MANU TEMPS p_temps1 'T' p_theta1 ;
ch_ther1 = CHAR TIMP p_bloth1 ev_ther1 ;
*
************************************************************
*                                                          *
*       materiau                                           *
*                                                          *
************************************************************
P1MODEL = MODE piece_1 MECANIQUE ELASTIQUE
VISCOPLASTIQUE POUDRE_A CONS DEUX;
*
V1YOUNG = 118.0E+03 ;
V1NU = 0.33 ;
V1ALPHA = 10.0E-20 ;
V1A = 7.76e-15 ;
V1N = 4.55 ;
V1QSRT = 0.0 ;
V1RHOR = 1.0 ;
V1F0 = 0.1098 ;
V1F1 = 1.0168 ;
V1F2 = -0.2591 ;
V1F3 = 0.0 ;
V1F4 = 0.0 ;
V1F5 = 0.66 ;
V1C0 = 2.10851 ;
V1C1 = 1.21767 ;
V1C2 = -0.43081 ;
V1C3 = 0.0 ;
V1C4 = 0.0 ;
V1C5 = 50.0 ;
*
P1MATER = MATER P1MODEL YOUNG V1YOUNG NU V1NU ALPH V1ALPHA TALP 20. TREF 0.
 A V1A N V1N QSRT V1QSRT F0 V1F0 F1 V1F1 F2 V1F2 F3 V1F3
 F4 V1F4 F5 V1F5 C0 V1C0 C1 V1C1 C2 V1C2 C3 V1C3 C4 V1C4
 C5 V1C5 RHOR V1RHOR ;
*
P2MODEL = MODE piece_1 THERMIQUE ISOTROPE CONS UN ;
*
P2MATER = MATER P2MODEL 'C' 460 'K' 14.6 'RHO' 4.54 ;
*
************************************************************
*                                                          *
*          chargement                                      *
*                                                          *
************************************************************
*
p0bloca = bloque uz l_symz ;
p1bloca = bloque ur l_symx ;
*
p_bloca = p0bloca et p1bloca ;
*
t0pres = 0.0 ;
t1pres = 100.0 ;
*
li_tps = prog t0temps t1temps t2temps t3temps ;
li_pres = prog t0pres t1pres t1pres t0pres ;
ev_pres = evol manu temps li_tps pression li_pres ;
*dess ev_pres titr 'Evolution du chargement en pression' nclk ;
*
p2force = pres mass p1model 1.0 l_ext1 ;
p3force = pres mass p1model 1.0 l_ext2 ;
titr 'Force appliquees' ;
vec1 = vect (p2force et p3force) 'FR' 'FZ' 0.1;
*trac vec1 piece_1 nclk ;
*
p2charg = char p2force ev_pres 'MECA';
p3charg = char p3force ev_pres 'MECA';
*
p_charg = p2charg et p3charg ;
*
************************************************************
*                                                          *
*        calcul                                            *
*                                                          *
************************************************************
*
p_model = p1model et p2model ;
p_mater = p1mater et p2mater ;
*
* Initialisation de la table pour la procedure PASAPAS
*
TAB1 = TABLE ;
TAB1 . 'CHARGEMENT' = (p_charg et ch_ther1) ;
TAB1 . 'MODELE' = p_model ;
TAB1 . 'CARACTERISTIQUES' = p_mater ;
TAB1 . 'BLOCAGES_MECANIQUES' = p_bloca ;
TAB1 . 'BLOCAGES_THERMIQUES' = clth0001 ;
TAB1 . 'TEMPS_CALCULES' = PROG 0.0
        PAS 50.0 2400.0 ;
TAB1 . 'TEMPS_SAUVES' = PROG 2400.0 ;
TAB1 . 'MAXITERATION' = 49 ;
TAB1 . 'MAXISOUSPAS' = 500 ;
TAB1 . 'MOVA' = 'MOT' 'VHOR' ;
TAB1 . 'PRECISION' = 1.0E-4 ;
TAB1 . 'PROCEDURE_THERMIQUE' = 'MOT' 'LINEAIRE' ;
*
TAB1 . 'PERF_RAID' = VPSW ; TAB1 . 'PERF_RAID_NIVEAU' = VNIV ; PASAPAS TAB1 ; FPREC TAB1 VTFPR ;
*
************************************************************
*                                                          *
*        Test de validation                                *
*                                                          *
************************************************************
*
ind1 = index (TAB1 . 'VARIABLES_INTERNES') ;
nb1 = dime ind1 ;
*
*   densite finale
*
vm1 = TAB1 . 'VARIABLES_INTERNES' .(ind1.nb1) ;
vm2 = exco VHOR vm1 ;
vm3 = redu vm2 piece_1 ;
rhof1 = maxi vm3 ;
*
* Calcul theorique analytique de la densite finale :
*
rhof2 = 1.0 ;
*
*
erho1 = abs ((rhof1 - rhof2 )/rhof2);
*
* Ecriture des erreurs a l'ecran :
*
opti echo IECHO0 ;
sauter 3 lignes ;
mess 'Erreur sur la densite finale:         '  erho1 ;
sauter 3 lignes ;

*
si ( (erho1 ) >eg 0.05 ) ;
   mess '---------RESULTATS INCORRECTS-------------' ;
   sauter 3 lignes ;
   erreur 5;
sinon ;
   mess '---------RESULTATS CORRECTS-------------' ;
   sauter 3 lignes ;
finsi ;
*
* [valid] FIN final


* ----- fin du cas poudre3
FINPROC ;
*
* ---------------------------------------------------------------------
* Cas 34 : poudre3 (poudre)
* ---------------------------------------------------------------------
SI ((IDEB0 '<EG' 34) 'ET' (IFIN0 '>EG' 34) 'ET' ('NON' ('EXIS' TSKIP 34))) ;
    MENAGE 'OBLI' ;
    MESS ' ' ;
    VMSG = CHAI '>>> Cas' ' ' '34' ' ' 'sur' ' ' NTOT0 ' ' ':' ' ' 'poudre3' ' ' '(poudre)' ;
    MESS VMSG ;
    NPASS = 2 ;
    SI IPASS3 ;
        NPASS = 3 ;
    FINSI ;
    VTH1 = 0 ;
    VTH2 = 0 ;
    VTH3 = 0 ;
    VNE51 = 0 ;
    VNE01 = 0 ;
    VNE52 = 0 ;
    VNE02 = 0 ;
    VNE53 = 0 ;
    VNE03 = 0 ;
    REPETER ZVRUN NPASS ;
* ordre des passes alterne d'un cas a l'autre (derive des temps en session)
        VIP = NPASS + 1 - &ZVRUN ;
        VPSW = (VIP '>' 1) ;
        VNIV = 1 ;
        VMPS = 'inactif' ;
        SI (VIP 'EGA' 2) ;
            VMPS = 'actif niveau 1' ;
        FINSI ;
        SI (VIP 'EGA' 3) ;
            VNIV = 2 ;
            VMPS = 'actif niveau 2' ;
        FINSI ;
        AVANCE VRES 34 NTOT0 'poudre3' VIP 'en_cours' ;
        VMSG = CHAI '    passe' ' ' VIP ' ' 'sur' ' ' NPASS ' ' ': optimisations' ' ' VMPS ;
        MESS VMSG ;
        SI ITRACE0 ;
            OPTI 'IMPR' 'valid_trace.log' ;
        FINSI ;
        OPTI 'DIME' 3 'MODE' 'TRID' 'ELEM' 'CUB8' 'ECHO' IECHO0 ;
        VTHM = 0 ;
        REPETER ZVREP NREP0 ;
            VIR = &ZVREP ;
            VTFPR = TABL ;
            VTCT = TABL ;
            VTCT . 'N0' = 0 ;
            VTCT . 'N5' = 0 ;
            SI ITEMPS0 ;
                TEMP 'ZERO' ;
            FINSI ;
* Le cas s'execute dans une procedure (variables locales) : les variables
* d'un cas precedent ne peuvent pas masquer un mot-cle ou un operateur
            VC34 VPSW VNIV VTFPR VTCT IECHO0 ;
            VTHR = 0 ;
            SI ITEMPS0 ;
                VTHR = CHRONO ;
            FINSI ;
            SI (VIR 'EGA' 1) ;
                VTHM = VTHR ;
            SINON ;
                SI (VTHR '<' VTHM) ;
                    VTHM = VTHR ;
                FINSI ;
            FINSI ;
        FIN ZVREP ;
        VNER5 = VTCT . 'N5' ;
        VNER0 = VTCT . 'N0' ;
        SI (VIP 'EGA' 1) ;
            VTF1 = VTFPR ;
            VTH1 = VTHM ;
            VNE51 = VNER5 ;
            VNE01 = VNER0 ;
        FINSI ;
        SI (VIP 'EGA' 2) ;
            VTF2 = VTFPR ;
            VTH2 = VTHM ;
            VNE52 = VNER5 ;
            VNE02 = VNER0 ;
        FINSI ;
        SI (VIP 'EGA' 3) ;
            VTF3 = VTFPR ;
            VTH3 = VTHM ;
            VNE53 = VNER5 ;
            VNE03 = VNER0 ;
        FINSI ;
    FIN ZVRUN ;
*   comparaison des empreintes avec la passe 1
    VER2 VNL2 VNC2 = COMPAR VTF1 VTF2 ;
    VMOK2 = 'OK' ;
    SI ((VER2 '>' TOLV0) 'OU' (VNL2 '>' 0) 'OU' ('NON' (VNE52 'EGA' VNE51))) ;
        VMOK2 = 'ECART' ;
        VNBK2 = VNBK2 + 1 ;
    FINSI ;
    VER3 = 0. ;
    VNC3 = 0 ;
    VMOK3 = 'sans_objet' ;
    SI IPASS3 ;
        VER3 VNL3 VNC3 = COMPAR VTF1 VTF3 ;
        VMOK3 = 'OK' ;
        SI ((VER3 '>' TOLV3) 'OU' (VNL3 '>' 0) 'OU' ('NON' (VNE53 'EGA' VNE51))) ;
            VMOK3 = 'ECART' ;
            VNBK3 = VNBK3 + 1 ;
        FINSI ;
    FINSI ;
*   accelerations (temps de la passe 1 / temps de la passe)
    VSP2 = 0. ;
    VSP3 = 0. ;
    SI ((VTH1 '>' 0) 'ET' (VTH2 '>' 0)) ;
        VSP2 = (FLOT VTH1) '/' (FLOT VTH2) ;
    FINSI ;
    SI ((VTH1 '>' 0) 'ET' (VTH3 '>' 0)) ;
        VSP3 = (FLOT VTH1) '/' (FLOT VTH3) ;
    FINSI ;
    VSUM1 = VSUM1 + VTH1 ;
    VSUM2 = VSUM2 + VTH2 ;
    VSUM3 = VSUM3 + VTH3 ;
    VCLA = VTF2 . 'CL' ;
    VR2 = VTF2 . 'NRE' ;
    VC2 = VTF2 . 'NCA' ;
    VH2 = VTF2 . 'NHK' ;
    VM2 = VTF2 . 'NMA' ;
    VR3 = -1 ;
    VC3 = -1 ;
    VH3 = -1 ;
    VM3 = -1 ;
    SI IPASS3 ;
        VR3 = VTF3 . 'NRE' ;
        VC3 = VTF3 . 'NCA' ;
        VH3 = VTF3 . 'NHK' ;
        VM3 = VTF3 . 'NMA' ;
    FINSI ;
    VSE2 = CHAI 'FORMAT' '(1PE10.3)' VER2 ;
    VSE3 = CHAI 'FORMAT' '(1PE10.3)' VER3 ;
    VSS2 = CHAI 'FORMAT' '(F6.2)' VSP2 ;
    VSS3 = CHAI 'FORMAT' '(F6.2)' VSP3 ;
*   fichier de resultat du cas (SORT) et affichage console (MESS)
    OPTI 'SORT' 'valid_poudre3.log' ;
    VMSG = CHAI '=== Cas' ' ' '34' ' ' ':' ' ' 'poudre3' ' ' '(poudre)' ' ' '===' ;
    MESS VMSG ;
    SORT 'CHAI' VMSG ;
    VMSG = CHAI 'Valeurs comparees :' ' ' VNC2 ;
    MESS VMSG ;
    SORT 'CHAI' VMSG ;
    VMSG = CHAI 'Temps horloge (ms) : origine' ' ' VTH1 ' ' '; niveau 1' ' ' VTH2 ' ' '; niveau 2' ' ' VTH3 ;
    MESS VMSG ;
    SORT 'CHAI' VMSG ;
    VMSG = CHAI 'Acceleration par rapport a l origine : niveau 1' ' ' VSS2 ' ' '; niveau 2' ' ' VSS3 ;
    MESS VMSG ;
    SORT 'CHAI' VMSG ;
    VMSG = CHAI 'Controles internes du cas : echecs origine' ' ' VNE51 ' ' '; niveau 1' ' ' VNE52 ' ' '; niveau 2' ' ' VNE53 ' ' '- reussites origine' ' ' VNE01 ' ' '; niveau 1' ' ' VNE02 ' ' '; niveau 2' ' ' VNE03 ;
    MESS VMSG ;
    SORT 'CHAI' VMSG ;
    VMSG = CHAI 'Classes exercees (1 MATVAR, 10 ENDOM, 20 VISCODOM, 100 GD) :' ' ' VCLA ;
    MESS VMSG ;
    SORT 'CHAI' VMSG ;
    VMSG = CHAI 'Niveau 1 : raideur reutilisee' ' ' VR2 ' ' 'fois, recalculee' ' ' VC2 ' ' 'fois ; HOOK evite' ' ' VH2 ' ' 'fois ; caracteristiques reutilisees' ' ' VM2 ' ' 'fois' ;
    MESS VMSG ;
    SORT 'CHAI' VMSG ;
    VMSG = CHAI 'Niveau 2 : raideur reutilisee' ' ' VR3 ' ' 'fois, recalculee' ' ' VC3 ' ' 'fois ; HOOK evite' ' ' VH3 ' ' 'fois ; caracteristiques reutilisees' ' ' VM3 ' ' 'fois' ;
    MESS VMSG ;
    SORT 'CHAI' VMSG ;
    VMSG = CHAI 'Ecart relatif maximal : niveau 1' ' ' VSE2 ' ' '; niveau 2' ' ' VSE3 ;
    MESS VMSG ;
    SORT 'CHAI' VMSG ;
    VMSG = CHAI 'RESULTAT : niveau 1' ' ' VMOK2 ' ' '; niveau 2' ' ' VMOK3 ;
    MESS VMSG ;
    SORT 'CHAI' VMSG ;
    SI (('EGA' VNC2 0) ) ;
        VMSG = CHAI 'ATTENTION : aucune valeur comparee (resultats non stockes ?)' ;
        MESS VMSG ;
        SORT 'CHAI' VMSG ;
    FINSI ;
    OPTI 'SORT' 'valid_inutile.tmp' ;
    VRES . 34 = TABL ;
    VRES . 34 . 'NOM' = 'poudre3' ;
    VRES . 34 . 'OKM' = VMOK2 ;
    VRES . 34 . 'OK3' = VMOK3 ;
    VRES . 34 . 'ERR2' = VER2 ;
    VRES . 34 . 'ERR3' = VER3 ;
    VRES . 34 . 'TH1' = VTH1 ;
    VRES . 34 . 'TH2' = VTH2 ;
    VRES . 34 . 'TH3' = VTH3 ;
    VRES . 34 . 'SP2F' = VSP2 ;
    VRES . 34 . 'SP3F' = VSP3 ;
    VRES . 34 . 'NRE2' = VR2 ;
    VRES . 34 . 'NCA2' = VC2 ;
    VRES . 34 . 'NHK2' = VH2 ;
    VRES . 34 . 'NMA2' = VM2 ;
    VRES . 34 . 'NRE3' = VR3 ;
    VRES . 34 . 'NCA3' = VC3 ;
    VRES . 34 . 'NHK3' = VH3 ;
    VRES . 34 . 'CL' = VCLA ;
    VRES . 34 . 'NCMP' = VNC2 ;
    VMSG = CHAI '<<< Cas' ' ' '34' ' ' 'sur' ' ' NTOT0 ' ' ':' ' ' 'poudre3' ' ' ':' ' ' 'niveau 1' ' ' VMOK2 ', niveau 2' ' ' VMOK3 ' ' '- ecart' ' ' VSE2 ', acceleration' ' ' VSS2 ' ' 'et' ' ' VSS3 ;
    MESS VMSG ;
    AVANCE VRES 34 NTOT0 'poudre3' NPASS 'termine' ;
    MENAGE 'OBLI' ;
FINSI ;

*
* ---------------------------------------------------------------------
* Procedure du cas 35 : gurson (Gurson)
* Variables locales : le cas ne voit aucune variable des cas precedents
* ---------------------------------------------------------------------
DEBPROC VC35 VPSW*'LOGIQUE' VNIV*'ENTIER' VTFPR*'TABLE' VTCT*'TABLE' IECHO0*'ENTIER' ;
* ----- debut du cas gurson

* fichier :  gurson.dgibi
************************************************************************
* Section : Mecanique Plastique
************************************************************************
***************************************************
****        Dilatation uniforme d'un cub8       ***
****    Test sur l'implementation de GURSON     ***
***************************************************
*
* Date 16/02/94
* Auteur A de Gayffier
* Reference rapport DMT/94-108
*
* Le test consiste à imposer une dillatation uniforme
* d'un cube à 8 noeuds et verifier la cohérence du champ
* de contrainte obtenu avec un modele Plastique de Gurson
*
* En effet l'etat de contrainte est hydrostatique et verifie la
* relation ln(poro) +1.5P/sbar =< 0
*
option dime 3 elem cub8;
opti echo IECHO0 ;
*
*maillage
*
densite  1. ;
p1 = 0. 0. 0.  ;
p2 = 1. 0. 0.  ;
p3 = 1. 1. 0.  ;
p4 = 0. 1. 0.  ;
p5 = 0. 0. 0.5 ;
p6 = 1. 0. 0.5 ;
p7 = 1. 1. 0.5 ;
p8 = 0. 1. 0.5 ;
vol = manu cub8 p1 p2 p3 p4 p5 p6 p7 p8 ;
*
*modele de calcul
*
K = 139.7e9 ;
G = 46.6e9 ;
poisson = (1.-(G/K*2./3.) ) / (2./3.*G/K + 2.) ;
E = 3.*K*(1.-(2.*poisson)) ;
list poisson ;
list E ;
phi0 = 3.e-4 ;
sigbar = 3.e8 ;
*
mo = MODE vol mecanique elastique plastique gurson cub8 ;
ma = MATE mo 'YOUNG' E 'NU' poisson 'SIGY' 2.6E8 'H' 2.5e8 'SBAR'
sigbar 'PORO' phi0 ;
*
*rigidite
*
ri = rigi mo ma;
*
*conditions aux limites
lambda = 10. ;
cl1 = bloqu ux ( p2 et p3 et p6 et p7 ) ;
cl2 = bloqu uy ( p3 et p4 et p7 et p8 )  ;
cl3 = bloqu uz ( p5 et p6 et p7 et p8 )  ;
cl4 = bloqu ux ( p1 et p4 et p5 et p8 ) ;
cl5 = bloqu uy ( p1 et p2 et p5 et p6 ) ;
cl6 = bloqu uz ( p1 et p2 et p3 et p4 ) ;
stf = ri et cl1 et cl2 et cl3 et cl4 et cl5 et cl6 ;
cl =  cl1 et cl2 et cl3 et cl4 et cl5 et cl6 ;
*
fo1 = depimp cl1 lambda ;
fo2 = depimp cl2 lambda ;
fo3 = depimp cl3 (lambda*0.5) ;
for = fo1 et fo2 et fo3 ;
dep = reso stf for ;
*
* table pour non lineaire
*
xtab = table ;
*
*   chronologie du chargement
ltime = prog 0. pas 1.  10. 11. ;
letir = prog  0. pas  0.1 1. 1.;
evau = evol manu time ltime etir letir ;
char1 = char dimp for evau;
*
* temps pour la sortie des resultats
tres = prog  1. pas 1. 10. ;
*
* Il est nécessaire de definir les variables internes au debut car elle
* ne sont pas nulles (l'operateur ZERO initialise par défaut à 0)
xtab.'VARIABLES_INTERNES' = TABLE;
xtab.'VARIABLES_INTERNES' . 0 = manu chml mo 'EPSE' 0. 'VPOR' 3.e-4
     'VHNS' 1.  'TYPE' 'VARIABLES INTERNES' 'STRESSES';
*
* iterations plastiques
xtab.blocages_mecaniques = cl;
xtab.caracteristiques = ma;
xtab.modele = mo;
xtab.chargement = char1;
xtab.temps_calcules = tres;
xtab . 'PERF_RAID' = VPSW ; xtab . 'PERF_RAID_NIVEAU' = VNIV ; PASAPAS xtab ; FPREC xtab VTFPR ;
*
*  controle des resultats
*
i = 1 ;
repeter boucle 10 ;
var1 =  xtab.variables_internes.i ;
phi = extr var1 vpor 1 1 1 ;
rho = extr var1 vhns  1 1 1 ;
sig1 = xtab.contraintes.i ;
sxx = extr sig1 SMXX 1 1 1 ;
syy = extr sig1 SMYY 1 1 1 ;
szz = extr sig1 SMZZ 1 1 1 ;
p = ( sxx + szz + syy ) /(-3.) ;
pp = K*(1.-phi)*(1.-((1-phi)/(1-phi0)/rho)) ;
conv1 =( 1.5 * p / sigbar) - (log phi) ;
conv2 =( 1.5 * pp / sigbar) - (log phi) ;
*
*  Tests
err1 = abs(conv1) > 1.e-6 ;
err2 = abs(conv2) > 1.e-6 ;
si err1 ;
  si (ou (phi > phi0) (conv1 < 0.));
    ERREUR 5 ;
  finsi ;
finsi;
si err2 ;
  si (ou (phi > phi0) (conv2 < 0.));
    ERREUR 5 ;
  finsi ;
finsi ;
i = i + 1 ;
fin boucle ;
* [valid] FIN final


* ----- fin du cas gurson
FINPROC ;
*
* ---------------------------------------------------------------------
* Cas 35 : gurson (Gurson)
* ---------------------------------------------------------------------
SI ((IDEB0 '<EG' 35) 'ET' (IFIN0 '>EG' 35) 'ET' ('NON' ('EXIS' TSKIP 35))) ;
    MENAGE 'OBLI' ;
    MESS ' ' ;
    VMSG = CHAI '>>> Cas' ' ' '35' ' ' 'sur' ' ' NTOT0 ' ' ':' ' ' 'gurson' ' ' '(Gurson)' ;
    MESS VMSG ;
    NPASS = 2 ;
    SI IPASS3 ;
        NPASS = 3 ;
    FINSI ;
    VTH1 = 0 ;
    VTH2 = 0 ;
    VTH3 = 0 ;
    VNE51 = 0 ;
    VNE01 = 0 ;
    VNE52 = 0 ;
    VNE02 = 0 ;
    VNE53 = 0 ;
    VNE03 = 0 ;
    REPETER ZVRUN NPASS ;
* ordre des passes alterne d'un cas a l'autre (derive des temps en session)
        VIP = &ZVRUN ;
        VPSW = (VIP '>' 1) ;
        VNIV = 1 ;
        VMPS = 'inactif' ;
        SI (VIP 'EGA' 2) ;
            VMPS = 'actif niveau 1' ;
        FINSI ;
        SI (VIP 'EGA' 3) ;
            VNIV = 2 ;
            VMPS = 'actif niveau 2' ;
        FINSI ;
        AVANCE VRES 35 NTOT0 'gurson' VIP 'en_cours' ;
        VMSG = CHAI '    passe' ' ' VIP ' ' 'sur' ' ' NPASS ' ' ': optimisations' ' ' VMPS ;
        MESS VMSG ;
        SI ITRACE0 ;
            OPTI 'IMPR' 'valid_trace.log' ;
        FINSI ;
        OPTI 'DIME' 3 'MODE' 'TRID' 'ELEM' 'CUB8' 'ECHO' IECHO0 ;
        VTHM = 0 ;
        REPETER ZVREP NREP0 ;
            VIR = &ZVREP ;
            VTFPR = TABL ;
            VTCT = TABL ;
            VTCT . 'N0' = 0 ;
            VTCT . 'N5' = 0 ;
            SI ITEMPS0 ;
                TEMP 'ZERO' ;
            FINSI ;
* Le cas s'execute dans une procedure (variables locales) : les variables
* d'un cas precedent ne peuvent pas masquer un mot-cle ou un operateur
            VC35 VPSW VNIV VTFPR VTCT IECHO0 ;
            VTHR = 0 ;
            SI ITEMPS0 ;
                VTHR = CHRONO ;
            FINSI ;
            SI (VIR 'EGA' 1) ;
                VTHM = VTHR ;
            SINON ;
                SI (VTHR '<' VTHM) ;
                    VTHM = VTHR ;
                FINSI ;
            FINSI ;
        FIN ZVREP ;
        VNER5 = VTCT . 'N5' ;
        VNER0 = VTCT . 'N0' ;
        SI (VIP 'EGA' 1) ;
            VTF1 = VTFPR ;
            VTH1 = VTHM ;
            VNE51 = VNER5 ;
            VNE01 = VNER0 ;
        FINSI ;
        SI (VIP 'EGA' 2) ;
            VTF2 = VTFPR ;
            VTH2 = VTHM ;
            VNE52 = VNER5 ;
            VNE02 = VNER0 ;
        FINSI ;
        SI (VIP 'EGA' 3) ;
            VTF3 = VTFPR ;
            VTH3 = VTHM ;
            VNE53 = VNER5 ;
            VNE03 = VNER0 ;
        FINSI ;
    FIN ZVRUN ;
*   comparaison des empreintes avec la passe 1
    VER2 VNL2 VNC2 = COMPAR VTF1 VTF2 ;
    VMOK2 = 'OK' ;
    SI ((VER2 '>' TOLV0) 'OU' (VNL2 '>' 0) 'OU' ('NON' (VNE52 'EGA' VNE51))) ;
        VMOK2 = 'ECART' ;
        VNBK2 = VNBK2 + 1 ;
    FINSI ;
    VER3 = 0. ;
    VNC3 = 0 ;
    VMOK3 = 'sans_objet' ;
    SI IPASS3 ;
        VER3 VNL3 VNC3 = COMPAR VTF1 VTF3 ;
        VMOK3 = 'OK' ;
        SI ((VER3 '>' TOLV3) 'OU' (VNL3 '>' 0) 'OU' ('NON' (VNE53 'EGA' VNE51))) ;
            VMOK3 = 'ECART' ;
            VNBK3 = VNBK3 + 1 ;
        FINSI ;
    FINSI ;
*   accelerations (temps de la passe 1 / temps de la passe)
    VSP2 = 0. ;
    VSP3 = 0. ;
    SI ((VTH1 '>' 0) 'ET' (VTH2 '>' 0)) ;
        VSP2 = (FLOT VTH1) '/' (FLOT VTH2) ;
    FINSI ;
    SI ((VTH1 '>' 0) 'ET' (VTH3 '>' 0)) ;
        VSP3 = (FLOT VTH1) '/' (FLOT VTH3) ;
    FINSI ;
    VSUM1 = VSUM1 + VTH1 ;
    VSUM2 = VSUM2 + VTH2 ;
    VSUM3 = VSUM3 + VTH3 ;
    VCLA = VTF2 . 'CL' ;
    VR2 = VTF2 . 'NRE' ;
    VC2 = VTF2 . 'NCA' ;
    VH2 = VTF2 . 'NHK' ;
    VM2 = VTF2 . 'NMA' ;
    VR3 = -1 ;
    VC3 = -1 ;
    VH3 = -1 ;
    VM3 = -1 ;
    SI IPASS3 ;
        VR3 = VTF3 . 'NRE' ;
        VC3 = VTF3 . 'NCA' ;
        VH3 = VTF3 . 'NHK' ;
        VM3 = VTF3 . 'NMA' ;
    FINSI ;
    VSE2 = CHAI 'FORMAT' '(1PE10.3)' VER2 ;
    VSE3 = CHAI 'FORMAT' '(1PE10.3)' VER3 ;
    VSS2 = CHAI 'FORMAT' '(F6.2)' VSP2 ;
    VSS3 = CHAI 'FORMAT' '(F6.2)' VSP3 ;
*   fichier de resultat du cas (SORT) et affichage console (MESS)
    OPTI 'SORT' 'valid_gurson.log' ;
    VMSG = CHAI '=== Cas' ' ' '35' ' ' ':' ' ' 'gurson' ' ' '(Gurson)' ' ' '===' ;
    MESS VMSG ;
    SORT 'CHAI' VMSG ;
    VMSG = CHAI 'Valeurs comparees :' ' ' VNC2 ;
    MESS VMSG ;
    SORT 'CHAI' VMSG ;
    VMSG = CHAI 'Temps horloge (ms) : origine' ' ' VTH1 ' ' '; niveau 1' ' ' VTH2 ' ' '; niveau 2' ' ' VTH3 ;
    MESS VMSG ;
    SORT 'CHAI' VMSG ;
    VMSG = CHAI 'Acceleration par rapport a l origine : niveau 1' ' ' VSS2 ' ' '; niveau 2' ' ' VSS3 ;
    MESS VMSG ;
    SORT 'CHAI' VMSG ;
    VMSG = CHAI 'Controles internes du cas : echecs origine' ' ' VNE51 ' ' '; niveau 1' ' ' VNE52 ' ' '; niveau 2' ' ' VNE53 ' ' '- reussites origine' ' ' VNE01 ' ' '; niveau 1' ' ' VNE02 ' ' '; niveau 2' ' ' VNE03 ;
    MESS VMSG ;
    SORT 'CHAI' VMSG ;
    VMSG = CHAI 'Classes exercees (1 MATVAR, 10 ENDOM, 20 VISCODOM, 100 GD) :' ' ' VCLA ;
    MESS VMSG ;
    SORT 'CHAI' VMSG ;
    VMSG = CHAI 'Niveau 1 : raideur reutilisee' ' ' VR2 ' ' 'fois, recalculee' ' ' VC2 ' ' 'fois ; HOOK evite' ' ' VH2 ' ' 'fois ; caracteristiques reutilisees' ' ' VM2 ' ' 'fois' ;
    MESS VMSG ;
    SORT 'CHAI' VMSG ;
    VMSG = CHAI 'Niveau 2 : raideur reutilisee' ' ' VR3 ' ' 'fois, recalculee' ' ' VC3 ' ' 'fois ; HOOK evite' ' ' VH3 ' ' 'fois ; caracteristiques reutilisees' ' ' VM3 ' ' 'fois' ;
    MESS VMSG ;
    SORT 'CHAI' VMSG ;
    VMSG = CHAI 'Ecart relatif maximal : niveau 1' ' ' VSE2 ' ' '; niveau 2' ' ' VSE3 ;
    MESS VMSG ;
    SORT 'CHAI' VMSG ;
    VMSG = CHAI 'RESULTAT : niveau 1' ' ' VMOK2 ' ' '; niveau 2' ' ' VMOK3 ;
    MESS VMSG ;
    SORT 'CHAI' VMSG ;
    SI (('EGA' VNC2 0) ) ;
        VMSG = CHAI 'ATTENTION : aucune valeur comparee (resultats non stockes ?)' ;
        MESS VMSG ;
        SORT 'CHAI' VMSG ;
    FINSI ;
    OPTI 'SORT' 'valid_inutile.tmp' ;
    VRES . 35 = TABL ;
    VRES . 35 . 'NOM' = 'gurson' ;
    VRES . 35 . 'OKM' = VMOK2 ;
    VRES . 35 . 'OK3' = VMOK3 ;
    VRES . 35 . 'ERR2' = VER2 ;
    VRES . 35 . 'ERR3' = VER3 ;
    VRES . 35 . 'TH1' = VTH1 ;
    VRES . 35 . 'TH2' = VTH2 ;
    VRES . 35 . 'TH3' = VTH3 ;
    VRES . 35 . 'SP2F' = VSP2 ;
    VRES . 35 . 'SP3F' = VSP3 ;
    VRES . 35 . 'NRE2' = VR2 ;
    VRES . 35 . 'NCA2' = VC2 ;
    VRES . 35 . 'NHK2' = VH2 ;
    VRES . 35 . 'NMA2' = VM2 ;
    VRES . 35 . 'NRE3' = VR3 ;
    VRES . 35 . 'NCA3' = VC3 ;
    VRES . 35 . 'NHK3' = VH3 ;
    VRES . 35 . 'CL' = VCLA ;
    VRES . 35 . 'NCMP' = VNC2 ;
    VMSG = CHAI '<<< Cas' ' ' '35' ' ' 'sur' ' ' NTOT0 ' ' ':' ' ' 'gurson' ' ' ':' ' ' 'niveau 1' ' ' VMOK2 ', niveau 2' ' ' VMOK3 ' ' '- ecart' ' ' VSE2 ', acceleration' ' ' VSS2 ' ' 'et' ' ' VSS3 ;
    MESS VMSG ;
    AVANCE VRES 35 NTOT0 'gurson' NPASS 'termine' ;
    MENAGE 'OBLI' ;
FINSI ;

*
* ---------------------------------------------------------------------
* Procedure du cas 36 : beton (beton)
* Variables locales : le cas ne voit aucune variable des cas precedents
* ---------------------------------------------------------------------
DEBPROC VC36 VPSW*'LOGIQUE' VNIV*'ENTIER' VTFPR*'TABLE' VTCT*'TABLE' IECHO0*'ENTIER' ;
* ----- debut du cas beton

* fichier :  beton.dgibi
************************************************************************
* Section : Mecanique Elastique
************************************************************************
*           Test Beton.dgibi: Jeux de données         *
*           ---------------------------------         *
*                                                     *
* CAS TEST DU 93/01/19     PROVENANCE : NAH
OPTION ECHO IECHO0;
GRAPH='N';
SAUT PAGE ;
*
*-----------------------------------------------------*
*                                                     *
*   Exemple simple de calcul mécanique élastique      *
*  plastique beton fonctionnant avec les nouvelles    *
*  structures MMODEL et MCHAMELEM                     *
*                                                     *
*  Un cube en béton soumis à un chargement de         *
*  traction uniaxial suivant l'axe OZ                 *
*                                                     *
*  La limite en traction simple du béton LTR1 est     *
*  égale à 4 MPa                                      *
*                                                     *
*-----------------------------------------------------*
* Définition des options
*
           OPTI DIME 3 ELEM CUB8 MODEL TRIDIM ;
*opti impi 9 ;
N = 1 ;
*
* Maillage d'un cube de N*N*N éléments CUB8
*
DENS N ;
*
A1 = 0 0 0 ;
A2 = N 0 0 ;
A3 = N N 0 ;
A4 = 0 N 0 ;
B1 = 0 0 N ;
B2 = N 0 N ;
B3 = N N N ;
B4 = 0 N N ;
*
A1A2 = A1 D N A2 ;
A2A3 = A2 D N A3 ;
A3A4 = A3 D N A4 ;
A4A1 = A4 D N A1 ;
B1B2 = B1 D N B2 ;
B2B3 = B2 D N B3 ;
B3B4 = B3 D N B4 ;
B4B1 = B4 D N B1 ;
A1B1 = A1 D N B1 ;
A2B2 = A2 D N B2 ;
A3B3 = A3 D N B3 ;
A4B4 = A4 D N B4 ;
*
A1A2A3A4 = A1A2 A2A3 A3A4 A4A1 DALLE PLAN ;
B1B2B3B4 = B1B2 B2B3 B3B4 B4B1 DALLE PLAN ;
*
A1A2B2B1 =       A1A2  A2B2 (INVE B1B2) (INVE A1B1)
                 DALLE PLAN ;
A4A3B3B4 = (INVE A3A4) A3B3       B3B4  (INVE A4B4)
           DALLE PLAN ;
*
A2A3B3B2 =       A2A3  A3B3       B2B3  (INVE A2B2)
                 DALLE PLAN ;
A1A4B4B1 = (INVE A4A1) A4B4       B4B1  (INVE A1B1)
           DALLE PLAN ;
*
TOTAL = PAVE A1A2A3A4 B1B2B3B4 A1A2B2B1 A4A3B3B4
             A2A3B3B2 A1A4B4B1 ;
*
*TRAC TOTAL CACH (1000 -2000 1000) ;
*
*
* Formulation, matériau défini à l'aide des
* opérateurs MODE et MATR
*
      MO = MODE TOTAL MECANIQUE ELASTIQUE PLASTIQUE
           BETON CUB8 ;
      MA = MATE MO YOUN 40000 NU 0.20 ALPH 1E-5
                          LTR1 4 ;
*
* Conditions de blocages
*
                        ENC1 = BLOQ UX A1A4B4B1 ;
                        ENC2 = BLOQ UY A1A2B2B1 ;
                        ENC3 = BLOQ UZ A1A2A3A4 ;
                        ENC = ENC1 ET ENC2 ET ENC3 ;
*
* Blocage pour déplacements imposés
*
*                       END1 = BLOQ UX A2A3B3B2 ;
*                       END2 = BLOQ UY A4A3B3B4 ;
                        END3 = BLOQ UZ B1B2B3B4 ;
*                       END = END1 ET END2 ET END3 ;
                        END = END3 ;
                        EN = ENC ET END ;
*
*
* Valeur des déplacements imposés
*
*                     FEXT1 = DEPI END1 1E-4  ;
*                     FEXT2 = DEPI END2 1E-4  ;
                      FEXT3 = DEPI END3 1E-4  ;
*                     FEXT = FEXT1 ET FEXT2 ET FEXT3 ;
                      FEXT = FEXT3 ;
*
* Force en fonction du temps
*
 lt1 = prog 0.  10. ;
 lt2 = prog 0.  10. ;
 ev  = evol rouge manu temps lt1 force lt2 ;
 chat  = char DIMP fext ev ;

*
* Préparation à nonlin
*
ltt = prog 0 1 2 ;
tab1 = table;
tab1.blocages_mecaniques = EN;
tab1.caracteristiques = ma;
tab1.modele = mo;
tab1.chargement = chat;
tab1.temps_calcules = ltt;
tab1.hypothese_deformations = lineaire;
tab1 . 'PERF_RAID' = VPSW ; tab1 . 'PERF_RAID_NIVEAU' = VNIV ; PASAPAS tab1 ; FPREC tab1 VTFPR ;
*
* Traitement des résultats
*
 ptt = prog 0 ;
 psz = prog 0 ;
   ic = 0 ;
 repeter mabou 2 ;
   ic = ic + 1 ;
   dd = tab1 . deplacements . ic;
   ptt = ptt et ( prog ( extr dd uz b3 ) ) ;
   ss = tab1.contraintes.ic ;
   sz = extr ( chan chpo mo ss ) smzz b3 ;
   psz = psz et ( prog sz ) ;
 fin mabou ;
*
evsz = evol vert manu deplacement ptt contrainte  psz ;
*dess evsz ;
*
* Code de fonctionnement
*
si ( (abs ( sz - 2. )) <  1.E-6  ) ;
   VTCT . 'N0' = (VTCT . 'N0') + 1 ;
sino ;
   list sz;
   VTCT . 'N5' = (VTCT . 'N5') + 1 ;
finsi ;
*
* [valid] FIN final


* ----- fin du cas beton
FINPROC ;
*
* ---------------------------------------------------------------------
* Cas 36 : beton (beton)
* ---------------------------------------------------------------------
SI ((IDEB0 '<EG' 36) 'ET' (IFIN0 '>EG' 36) 'ET' ('NON' ('EXIS' TSKIP 36))) ;
    MENAGE 'OBLI' ;
    MESS ' ' ;
    VMSG = CHAI '>>> Cas' ' ' '36' ' ' 'sur' ' ' NTOT0 ' ' ':' ' ' 'beton' ' ' '(beton)' ;
    MESS VMSG ;
    NPASS = 2 ;
    SI IPASS3 ;
        NPASS = 3 ;
    FINSI ;
    VTH1 = 0 ;
    VTH2 = 0 ;
    VTH3 = 0 ;
    VNE51 = 0 ;
    VNE01 = 0 ;
    VNE52 = 0 ;
    VNE02 = 0 ;
    VNE53 = 0 ;
    VNE03 = 0 ;
    REPETER ZVRUN NPASS ;
* ordre des passes alterne d'un cas a l'autre (derive des temps en session)
        VIP = NPASS + 1 - &ZVRUN ;
        VPSW = (VIP '>' 1) ;
        VNIV = 1 ;
        VMPS = 'inactif' ;
        SI (VIP 'EGA' 2) ;
            VMPS = 'actif niveau 1' ;
        FINSI ;
        SI (VIP 'EGA' 3) ;
            VNIV = 2 ;
            VMPS = 'actif niveau 2' ;
        FINSI ;
        AVANCE VRES 36 NTOT0 'beton' VIP 'en_cours' ;
        VMSG = CHAI '    passe' ' ' VIP ' ' 'sur' ' ' NPASS ' ' ': optimisations' ' ' VMPS ;
        MESS VMSG ;
        SI ITRACE0 ;
            OPTI 'IMPR' 'valid_trace.log' ;
        FINSI ;
        OPTI 'DIME' 3 'MODE' 'TRID' 'ELEM' 'CUB8' 'ECHO' IECHO0 ;
        VTHM = 0 ;
        REPETER ZVREP NREP0 ;
            VIR = &ZVREP ;
            VTFPR = TABL ;
            VTCT = TABL ;
            VTCT . 'N0' = 0 ;
            VTCT . 'N5' = 0 ;
            SI ITEMPS0 ;
                TEMP 'ZERO' ;
            FINSI ;
* Le cas s'execute dans une procedure (variables locales) : les variables
* d'un cas precedent ne peuvent pas masquer un mot-cle ou un operateur
            VC36 VPSW VNIV VTFPR VTCT IECHO0 ;
            VTHR = 0 ;
            SI ITEMPS0 ;
                VTHR = CHRONO ;
            FINSI ;
            SI (VIR 'EGA' 1) ;
                VTHM = VTHR ;
            SINON ;
                SI (VTHR '<' VTHM) ;
                    VTHM = VTHR ;
                FINSI ;
            FINSI ;
        FIN ZVREP ;
        VNER5 = VTCT . 'N5' ;
        VNER0 = VTCT . 'N0' ;
        SI (VIP 'EGA' 1) ;
            VTF1 = VTFPR ;
            VTH1 = VTHM ;
            VNE51 = VNER5 ;
            VNE01 = VNER0 ;
        FINSI ;
        SI (VIP 'EGA' 2) ;
            VTF2 = VTFPR ;
            VTH2 = VTHM ;
            VNE52 = VNER5 ;
            VNE02 = VNER0 ;
        FINSI ;
        SI (VIP 'EGA' 3) ;
            VTF3 = VTFPR ;
            VTH3 = VTHM ;
            VNE53 = VNER5 ;
            VNE03 = VNER0 ;
        FINSI ;
    FIN ZVRUN ;
*   comparaison des empreintes avec la passe 1
    VER2 VNL2 VNC2 = COMPAR VTF1 VTF2 ;
    VMOK2 = 'OK' ;
    SI ((VER2 '>' TOLV0) 'OU' (VNL2 '>' 0) 'OU' ('NON' (VNE52 'EGA' VNE51))) ;
        VMOK2 = 'ECART' ;
        VNBK2 = VNBK2 + 1 ;
    FINSI ;
    VER3 = 0. ;
    VNC3 = 0 ;
    VMOK3 = 'sans_objet' ;
    SI IPASS3 ;
        VER3 VNL3 VNC3 = COMPAR VTF1 VTF3 ;
        VMOK3 = 'OK' ;
        SI ((VER3 '>' TOLV3) 'OU' (VNL3 '>' 0) 'OU' ('NON' (VNE53 'EGA' VNE51))) ;
            VMOK3 = 'ECART' ;
            VNBK3 = VNBK3 + 1 ;
        FINSI ;
    FINSI ;
*   accelerations (temps de la passe 1 / temps de la passe)
    VSP2 = 0. ;
    VSP3 = 0. ;
    SI ((VTH1 '>' 0) 'ET' (VTH2 '>' 0)) ;
        VSP2 = (FLOT VTH1) '/' (FLOT VTH2) ;
    FINSI ;
    SI ((VTH1 '>' 0) 'ET' (VTH3 '>' 0)) ;
        VSP3 = (FLOT VTH1) '/' (FLOT VTH3) ;
    FINSI ;
    VSUM1 = VSUM1 + VTH1 ;
    VSUM2 = VSUM2 + VTH2 ;
    VSUM3 = VSUM3 + VTH3 ;
    VCLA = VTF2 . 'CL' ;
    VR2 = VTF2 . 'NRE' ;
    VC2 = VTF2 . 'NCA' ;
    VH2 = VTF2 . 'NHK' ;
    VM2 = VTF2 . 'NMA' ;
    VR3 = -1 ;
    VC3 = -1 ;
    VH3 = -1 ;
    VM3 = -1 ;
    SI IPASS3 ;
        VR3 = VTF3 . 'NRE' ;
        VC3 = VTF3 . 'NCA' ;
        VH3 = VTF3 . 'NHK' ;
        VM3 = VTF3 . 'NMA' ;
    FINSI ;
    VSE2 = CHAI 'FORMAT' '(1PE10.3)' VER2 ;
    VSE3 = CHAI 'FORMAT' '(1PE10.3)' VER3 ;
    VSS2 = CHAI 'FORMAT' '(F6.2)' VSP2 ;
    VSS3 = CHAI 'FORMAT' '(F6.2)' VSP3 ;
*   fichier de resultat du cas (SORT) et affichage console (MESS)
    OPTI 'SORT' 'valid_beton.log' ;
    VMSG = CHAI '=== Cas' ' ' '36' ' ' ':' ' ' 'beton' ' ' '(beton)' ' ' '===' ;
    MESS VMSG ;
    SORT 'CHAI' VMSG ;
    VMSG = CHAI 'Valeurs comparees :' ' ' VNC2 ;
    MESS VMSG ;
    SORT 'CHAI' VMSG ;
    VMSG = CHAI 'Temps horloge (ms) : origine' ' ' VTH1 ' ' '; niveau 1' ' ' VTH2 ' ' '; niveau 2' ' ' VTH3 ;
    MESS VMSG ;
    SORT 'CHAI' VMSG ;
    VMSG = CHAI 'Acceleration par rapport a l origine : niveau 1' ' ' VSS2 ' ' '; niveau 2' ' ' VSS3 ;
    MESS VMSG ;
    SORT 'CHAI' VMSG ;
    VMSG = CHAI 'Controles internes du cas : echecs origine' ' ' VNE51 ' ' '; niveau 1' ' ' VNE52 ' ' '; niveau 2' ' ' VNE53 ' ' '- reussites origine' ' ' VNE01 ' ' '; niveau 1' ' ' VNE02 ' ' '; niveau 2' ' ' VNE03 ;
    MESS VMSG ;
    SORT 'CHAI' VMSG ;
    VMSG = CHAI 'Classes exercees (1 MATVAR, 10 ENDOM, 20 VISCODOM, 100 GD) :' ' ' VCLA ;
    MESS VMSG ;
    SORT 'CHAI' VMSG ;
    VMSG = CHAI 'Niveau 1 : raideur reutilisee' ' ' VR2 ' ' 'fois, recalculee' ' ' VC2 ' ' 'fois ; HOOK evite' ' ' VH2 ' ' 'fois ; caracteristiques reutilisees' ' ' VM2 ' ' 'fois' ;
    MESS VMSG ;
    SORT 'CHAI' VMSG ;
    VMSG = CHAI 'Niveau 2 : raideur reutilisee' ' ' VR3 ' ' 'fois, recalculee' ' ' VC3 ' ' 'fois ; HOOK evite' ' ' VH3 ' ' 'fois ; caracteristiques reutilisees' ' ' VM3 ' ' 'fois' ;
    MESS VMSG ;
    SORT 'CHAI' VMSG ;
    VMSG = CHAI 'Ecart relatif maximal : niveau 1' ' ' VSE2 ' ' '; niveau 2' ' ' VSE3 ;
    MESS VMSG ;
    SORT 'CHAI' VMSG ;
    VMSG = CHAI 'RESULTAT : niveau 1' ' ' VMOK2 ' ' '; niveau 2' ' ' VMOK3 ;
    MESS VMSG ;
    SORT 'CHAI' VMSG ;
    SI (('EGA' VNC2 0) ) ;
        VMSG = CHAI 'ATTENTION : aucune valeur comparee (resultats non stockes ?)' ;
        MESS VMSG ;
        SORT 'CHAI' VMSG ;
    FINSI ;
    OPTI 'SORT' 'valid_inutile.tmp' ;
    VRES . 36 = TABL ;
    VRES . 36 . 'NOM' = 'beton' ;
    VRES . 36 . 'OKM' = VMOK2 ;
    VRES . 36 . 'OK3' = VMOK3 ;
    VRES . 36 . 'ERR2' = VER2 ;
    VRES . 36 . 'ERR3' = VER3 ;
    VRES . 36 . 'TH1' = VTH1 ;
    VRES . 36 . 'TH2' = VTH2 ;
    VRES . 36 . 'TH3' = VTH3 ;
    VRES . 36 . 'SP2F' = VSP2 ;
    VRES . 36 . 'SP3F' = VSP3 ;
    VRES . 36 . 'NRE2' = VR2 ;
    VRES . 36 . 'NCA2' = VC2 ;
    VRES . 36 . 'NHK2' = VH2 ;
    VRES . 36 . 'NMA2' = VM2 ;
    VRES . 36 . 'NRE3' = VR3 ;
    VRES . 36 . 'NCA3' = VC3 ;
    VRES . 36 . 'NHK3' = VH3 ;
    VRES . 36 . 'CL' = VCLA ;
    VRES . 36 . 'NCMP' = VNC2 ;
    VMSG = CHAI '<<< Cas' ' ' '36' ' ' 'sur' ' ' NTOT0 ' ' ':' ' ' 'beton' ' ' ':' ' ' 'niveau 1' ' ' VMOK2 ', niveau 2' ' ' VMOK3 ' ' '- ecart' ' ' VSE2 ', acceleration' ' ' VSS2 ' ' 'et' ' ' VSS3 ;
    MESS VMSG ;
    AVANCE VRES 36 NTOT0 'beton' NPASS 'termine' ;
    MENAGE 'OBLI' ;
FINSI ;

*
* ---------------------------------------------------------------------
* Procedure du cas 37 : ottovari_traction (plasticite)
* Variables locales : le cas ne voit aucune variable des cas precedents
* ---------------------------------------------------------------------
DEBPROC VC37 VPSW*'LOGIQUE' VNIV*'ENTIER' VTFPR*'TABLE' VTCT*'TABLE' IECHO0*'ENTIER' ;
* ----- debut du cas ottovari_traction

* fichier : ottovari_traction.dgibi
************************************************************************
*                 Test du modele OTTOVARI en traction                  *
************************************************************************

ITRAC = FAUX ;

TITR 'Test en traction simple' ;
OPTI 'DIME' 3 'ELEM' 'CUB8' 'MODE' 'TRID' ;

*------------------------------------------------------
*           DEFINITION DE LA GEOMETRIE
*------------------------------------------------------
A1= 0.   0.   0.;
B1= 1.5  0.   0.;
C1= 1.5  1.5  0.;
D1= 0.   1.5  0.;
A2= 0.   0.   1.;
B2= 1.5  0.   1.;
C2= 1.5  1.5  1.;
D2= 0.   1.5  1.;
*
L1 = A1 DROIT 1 B1  ;
L2 = B1 DROIT 1 C1  ;
L3 = C1 DROIT 1 D1  ;
L4 = D1 DROIT 1 A1  ;
LL = L1 ET L2 ET L3 ET L4 ;
SU1= SURF LL 'PLAN' ;
M1 = A2 DROIT 1 B2  ;
M2 = B2 DROIT 1 C2  ;
M3 = C2 DROIT 1 D2  ;
M4 = D2 DROIT 1 A2  ;
MM = M1 ET M2 ET M3 ET M4 ;
SU2= SURF MM 'PLAN' ;
SU = SU1 VOLU 1 SU2 ;

*------------------------------------------------------
*           DEFINITION DES CONDITIONS AUX LIMITES
*                ET DES DEPLACEMENTS IMPOSES
*------------------------------------------------------
CL4 = (BLOQ L4 'UX') ET (BLOQ M4 'UX') ;
CL2 = (BLOQ L2 'UX') ET (BLOQ M2 'UX') ;
CL1 = (BLOQ L1 'UY') ET (BLOQ M1 'UY') ;
CL5 = BLOQ SU1 'UZ' ;
CL  = CL1 ET CL2 ET CL4 ET CL5 ;

DEP = DEPI CL2 1.5E-4 ;

*------------------------------------------------------
*           DEFINITION DES PROPRIETES MATERIELLES
*------------------------------------------------------
MO   = MODE SU 'MECANIQUE' 'ELASTIQUE' 'ISOTROPE' 'PLASTIQUE' 'OTTOVARI' 'CONS' 'BETON' ;
TBET = TAILLE MO ;

YG  = 40000. ;
RTR = 1.1 ;
GF  = (RTR * 3.E-4) * 0.5 ;
MA = MATE MO 'YOUN' YG 'NU' 0.21 'LTR' RTR 'GFTR' GF 'BTR' 0.2 'LCS' 20. ;
MA = MA ET TBET ;

LI1 = PROG 0. 'PAS'  0.5 2.  'PAS'  0.5 18.;
LI2 = PROG 0. 'PAS'  0.5 2.  'PAS' -0.5  1.
              'PAS'  0.5 1.5 'PAS' -0.5  0.5 'PAS'  0.5  2.5
              'PAS' -0.5 1.  'PAS'  0.5  5.  'PAS' -0.5 -1.;
EV  = EVOL 'MANU' 'T' LI1 'F(T)' LI2 ;

*------------------------------------------
*            APPEL A PASAPAS
*------------------------------------------
CHA1 = CHAR 'DIMP' DEP EV ;
LIS1 = PROG 0. 'PAS' 0.1 18. ;
TAB1 = TABLE ;
TAB1.'MODELE' = MO ;
TAB1.'CARACTERISTIQUES' = MA ;
TAB1.'BLOCAGES_MECANIQUES' = CL ;
TAB1.'CHARGEMENT' = CHA1 ;
TAB1.'TEMPS_CALCULES' = LIS1 ;
TAB1.FTOL = 0.000001 ;
TAB1 . 'PERF_RAID' = VPSW ; TAB1 . 'PERF_RAID_NIVEAU' = VNIV ; PASAPAS TAB1 ; FPREC TAB1 VTFPR ;

*------------------------------------------
*          POST TRAITEMENT
*------------------------------------------
PGX = PROG 0. ;
PGY = PROG 0. ;
TT = TAB1 . CONTRAINTES ;
NN = (DIME TT) - 1  ;
REPE BOU NN ;
  FF = EXTR (REDU TAB1 . CONTRAINTES . &BOU MO) 'SMXX' 1 1 1 ;
  EPS = EPSI MO (TAB1 . DEPLACEMENTS . &BOU) ;
  GG = EXTR EPS 'EPXX' 1 1 1 ;
  PGX = PGX ET (PROG GG) ;
  PGY = PGY ET (PROG FF) ;
FIN BOU ;
EV1 = EVOL 'ROUG' 'MANU' 'ABS' PGX 'ORD' PGY ;
SI ITRAC ;
  DESS EV1 'AXES' ;
FINSI ;
* [valid] FIN final


* ----- fin du cas ottovari_traction
FINPROC ;
*
* ---------------------------------------------------------------------
* Cas 37 : ottovari_traction (plasticite)
* ---------------------------------------------------------------------
SI ((IDEB0 '<EG' 37) 'ET' (IFIN0 '>EG' 37) 'ET' ('NON' ('EXIS' TSKIP 37))) ;
    MENAGE 'OBLI' ;
    MESS ' ' ;
    VMSG = CHAI '>>> Cas' ' ' '37' ' ' 'sur' ' ' NTOT0 ' ' ':' ' ' 'ottovari_traction' ' ' '(plasticite)' ;
    MESS VMSG ;
    NPASS = 2 ;
    SI IPASS3 ;
        NPASS = 3 ;
    FINSI ;
    VTH1 = 0 ;
    VTH2 = 0 ;
    VTH3 = 0 ;
    VNE51 = 0 ;
    VNE01 = 0 ;
    VNE52 = 0 ;
    VNE02 = 0 ;
    VNE53 = 0 ;
    VNE03 = 0 ;
    REPETER ZVRUN NPASS ;
* ordre des passes alterne d'un cas a l'autre (derive des temps en session)
        VIP = &ZVRUN ;
        VPSW = (VIP '>' 1) ;
        VNIV = 1 ;
        VMPS = 'inactif' ;
        SI (VIP 'EGA' 2) ;
            VMPS = 'actif niveau 1' ;
        FINSI ;
        SI (VIP 'EGA' 3) ;
            VNIV = 2 ;
            VMPS = 'actif niveau 2' ;
        FINSI ;
        AVANCE VRES 37 NTOT0 'ottovari_traction' VIP 'en_cours' ;
        VMSG = CHAI '    passe' ' ' VIP ' ' 'sur' ' ' NPASS ' ' ': optimisations' ' ' VMPS ;
        MESS VMSG ;
        SI ITRACE0 ;
            OPTI 'IMPR' 'valid_trace.log' ;
        FINSI ;
        OPTI 'DIME' 3 'MODE' 'TRID' 'ELEM' 'CUB8' 'ECHO' IECHO0 ;
        VTHM = 0 ;
        REPETER ZVREP NREP0 ;
            VIR = &ZVREP ;
            VTFPR = TABL ;
            VTCT = TABL ;
            VTCT . 'N0' = 0 ;
            VTCT . 'N5' = 0 ;
            SI ITEMPS0 ;
                TEMP 'ZERO' ;
            FINSI ;
* Le cas s'execute dans une procedure (variables locales) : les variables
* d'un cas precedent ne peuvent pas masquer un mot-cle ou un operateur
            VC37 VPSW VNIV VTFPR VTCT IECHO0 ;
            VTHR = 0 ;
            SI ITEMPS0 ;
                VTHR = CHRONO ;
            FINSI ;
            SI (VIR 'EGA' 1) ;
                VTHM = VTHR ;
            SINON ;
                SI (VTHR '<' VTHM) ;
                    VTHM = VTHR ;
                FINSI ;
            FINSI ;
        FIN ZVREP ;
        VNER5 = VTCT . 'N5' ;
        VNER0 = VTCT . 'N0' ;
        SI (VIP 'EGA' 1) ;
            VTF1 = VTFPR ;
            VTH1 = VTHM ;
            VNE51 = VNER5 ;
            VNE01 = VNER0 ;
        FINSI ;
        SI (VIP 'EGA' 2) ;
            VTF2 = VTFPR ;
            VTH2 = VTHM ;
            VNE52 = VNER5 ;
            VNE02 = VNER0 ;
        FINSI ;
        SI (VIP 'EGA' 3) ;
            VTF3 = VTFPR ;
            VTH3 = VTHM ;
            VNE53 = VNER5 ;
            VNE03 = VNER0 ;
        FINSI ;
    FIN ZVRUN ;
*   comparaison des empreintes avec la passe 1
    VER2 VNL2 VNC2 = COMPAR VTF1 VTF2 ;
    VMOK2 = 'OK' ;
    SI ((VER2 '>' TOLV0) 'OU' (VNL2 '>' 0) 'OU' ('NON' (VNE52 'EGA' VNE51))) ;
        VMOK2 = 'ECART' ;
        VNBK2 = VNBK2 + 1 ;
    FINSI ;
    VER3 = 0. ;
    VNC3 = 0 ;
    VMOK3 = 'sans_objet' ;
    SI IPASS3 ;
        VER3 VNL3 VNC3 = COMPAR VTF1 VTF3 ;
        VMOK3 = 'OK' ;
        SI ((VER3 '>' TOLV3) 'OU' (VNL3 '>' 0) 'OU' ('NON' (VNE53 'EGA' VNE51))) ;
            VMOK3 = 'ECART' ;
            VNBK3 = VNBK3 + 1 ;
        FINSI ;
    FINSI ;
*   accelerations (temps de la passe 1 / temps de la passe)
    VSP2 = 0. ;
    VSP3 = 0. ;
    SI ((VTH1 '>' 0) 'ET' (VTH2 '>' 0)) ;
        VSP2 = (FLOT VTH1) '/' (FLOT VTH2) ;
    FINSI ;
    SI ((VTH1 '>' 0) 'ET' (VTH3 '>' 0)) ;
        VSP3 = (FLOT VTH1) '/' (FLOT VTH3) ;
    FINSI ;
    VSUM1 = VSUM1 + VTH1 ;
    VSUM2 = VSUM2 + VTH2 ;
    VSUM3 = VSUM3 + VTH3 ;
    VCLA = VTF2 . 'CL' ;
    VR2 = VTF2 . 'NRE' ;
    VC2 = VTF2 . 'NCA' ;
    VH2 = VTF2 . 'NHK' ;
    VM2 = VTF2 . 'NMA' ;
    VR3 = -1 ;
    VC3 = -1 ;
    VH3 = -1 ;
    VM3 = -1 ;
    SI IPASS3 ;
        VR3 = VTF3 . 'NRE' ;
        VC3 = VTF3 . 'NCA' ;
        VH3 = VTF3 . 'NHK' ;
        VM3 = VTF3 . 'NMA' ;
    FINSI ;
    VSE2 = CHAI 'FORMAT' '(1PE10.3)' VER2 ;
    VSE3 = CHAI 'FORMAT' '(1PE10.3)' VER3 ;
    VSS2 = CHAI 'FORMAT' '(F6.2)' VSP2 ;
    VSS3 = CHAI 'FORMAT' '(F6.2)' VSP3 ;
*   fichier de resultat du cas (SORT) et affichage console (MESS)
    OPTI 'SORT' 'valid_ottovari_traction.log' ;
    VMSG = CHAI '=== Cas' ' ' '37' ' ' ':' ' ' 'ottovari_traction' ' ' '(plasticite)' ' ' '===' ;
    MESS VMSG ;
    SORT 'CHAI' VMSG ;
    VMSG = CHAI 'Valeurs comparees :' ' ' VNC2 ;
    MESS VMSG ;
    SORT 'CHAI' VMSG ;
    VMSG = CHAI 'Temps horloge (ms) : origine' ' ' VTH1 ' ' '; niveau 1' ' ' VTH2 ' ' '; niveau 2' ' ' VTH3 ;
    MESS VMSG ;
    SORT 'CHAI' VMSG ;
    VMSG = CHAI 'Acceleration par rapport a l origine : niveau 1' ' ' VSS2 ' ' '; niveau 2' ' ' VSS3 ;
    MESS VMSG ;
    SORT 'CHAI' VMSG ;
    VMSG = CHAI 'Controles internes du cas : echecs origine' ' ' VNE51 ' ' '; niveau 1' ' ' VNE52 ' ' '; niveau 2' ' ' VNE53 ' ' '- reussites origine' ' ' VNE01 ' ' '; niveau 1' ' ' VNE02 ' ' '; niveau 2' ' ' VNE03 ;
    MESS VMSG ;
    SORT 'CHAI' VMSG ;
    VMSG = CHAI 'Classes exercees (1 MATVAR, 10 ENDOM, 20 VISCODOM, 100 GD) :' ' ' VCLA ;
    MESS VMSG ;
    SORT 'CHAI' VMSG ;
    VMSG = CHAI 'Niveau 1 : raideur reutilisee' ' ' VR2 ' ' 'fois, recalculee' ' ' VC2 ' ' 'fois ; HOOK evite' ' ' VH2 ' ' 'fois ; caracteristiques reutilisees' ' ' VM2 ' ' 'fois' ;
    MESS VMSG ;
    SORT 'CHAI' VMSG ;
    VMSG = CHAI 'Niveau 2 : raideur reutilisee' ' ' VR3 ' ' 'fois, recalculee' ' ' VC3 ' ' 'fois ; HOOK evite' ' ' VH3 ' ' 'fois ; caracteristiques reutilisees' ' ' VM3 ' ' 'fois' ;
    MESS VMSG ;
    SORT 'CHAI' VMSG ;
    VMSG = CHAI 'Ecart relatif maximal : niveau 1' ' ' VSE2 ' ' '; niveau 2' ' ' VSE3 ;
    MESS VMSG ;
    SORT 'CHAI' VMSG ;
    VMSG = CHAI 'RESULTAT : niveau 1' ' ' VMOK2 ' ' '; niveau 2' ' ' VMOK3 ;
    MESS VMSG ;
    SORT 'CHAI' VMSG ;
    SI (('EGA' VNC2 0) ) ;
        VMSG = CHAI 'ATTENTION : aucune valeur comparee (resultats non stockes ?)' ;
        MESS VMSG ;
        SORT 'CHAI' VMSG ;
    FINSI ;
    OPTI 'SORT' 'valid_inutile.tmp' ;
    VRES . 37 = TABL ;
    VRES . 37 . 'NOM' = 'ottovari_traction' ;
    VRES . 37 . 'OKM' = VMOK2 ;
    VRES . 37 . 'OK3' = VMOK3 ;
    VRES . 37 . 'ERR2' = VER2 ;
    VRES . 37 . 'ERR3' = VER3 ;
    VRES . 37 . 'TH1' = VTH1 ;
    VRES . 37 . 'TH2' = VTH2 ;
    VRES . 37 . 'TH3' = VTH3 ;
    VRES . 37 . 'SP2F' = VSP2 ;
    VRES . 37 . 'SP3F' = VSP3 ;
    VRES . 37 . 'NRE2' = VR2 ;
    VRES . 37 . 'NCA2' = VC2 ;
    VRES . 37 . 'NHK2' = VH2 ;
    VRES . 37 . 'NMA2' = VM2 ;
    VRES . 37 . 'NRE3' = VR3 ;
    VRES . 37 . 'NCA3' = VC3 ;
    VRES . 37 . 'NHK3' = VH3 ;
    VRES . 37 . 'CL' = VCLA ;
    VRES . 37 . 'NCMP' = VNC2 ;
    VMSG = CHAI '<<< Cas' ' ' '37' ' ' 'sur' ' ' NTOT0 ' ' ':' ' ' 'ottovari_traction' ' ' ':' ' ' 'niveau 1' ' ' VMOK2 ', niveau 2' ' ' VMOK3 ' ' '- ecart' ' ' VSE2 ', acceleration' ' ' VSS2 ' ' 'et' ' ' VSS3 ;
    MESS VMSG ;
    AVANCE VRES 37 NTOT0 'ottovari_traction' NPASS 'termine' ;
    MENAGE 'OBLI' ;
FINSI ;

*
* ---------------------------------------------------------------------
* Procedure du cas 38 : plas8 (coque plastique)
* Variables locales : le cas ne voit aucune variable des cas precedents
* ---------------------------------------------------------------------
DEBPROC VC38 VPSW*'LOGIQUE' VNIV*'ENTIER' VTFPR*'TABLE' VTCT*'TABLE' IECHO0*'ENTIER' ;
* ----- debut du cas plas8

* fichier :  plas8.dgibi
************************************************************************
* Section : Mecanique Plastique
************************************************************************
*           Test Plas8.dgibi: Jeux de données         *
*           ---------------------------------         *
*                                                     *

*******************************************************
*           Test plas8.dgibi: Jeux de données         *
*           ---------------------------------         *
*******************************************************

*  POUR CALCUL COMPLET METTRE COMPLET À : VRAI;

complet = vrai;

* SI GRAPH = N PAS DE GRAPHIQUE AFFICHE
* SINON SI GRAPH DIFFERENT DE N TOUS
* LES GRAPHIQUES SONT AFFICHES

GRAPH = 'N' ;

SAUT PAGE;
SI (NEG GRAPH 'N') ;
  OPTI ECHO IECHO0   ;
  OPTI TRAC PSC   ;
SINO ;
  OPTI ECHO IECHO0   ;
FINSI ;

SAUT PAGE;
*******************************************************
*  TEST PLAS8
*
*   CONSOLE SOUS CHARGE CONCENTREE
*
*   On impose un deplacement vertical (une fleche) sur
*   l'extremite libre d'une console. On etudie
*   l'evolution de la force de reaction fonction de la
*   fleche.La force doit tendre vers une valeur
*   asymptotique donnee par l'expression suivante
*   (si on considere la loi elastoplastique parfaite):
*
*   FU = (SIGY*H**2)/(4*L)
*    ou  SIGY = contrainte limite elastique
*        H    = l'epaisseur de la poutre
*        L    = longueur de poutre
*
*******************************************************
OPTI DIME 3 ELEM TRI3 DENS 0.5 ;

*______________________________________________________
*  GEOMETRIE
*______________________________________________________
B   =  1. ;
L   = 10. ;
nel = 20;

A1 = 0. 0. 0. ;
A2 = 0. B  0. ;
B1 = L  0. 0. ;
B2 = L  B 0.  ;

A2A1 = DROI 2   A2 A1 ;
A1B1 = DROI nel A1 B1 ;
B1B2 = DROI 2   B1 B2 ;
B2A2 = DROI nel B2 A2 ;
ST   = DALL A2A1 A1B1 B1B2 B2A2 PLAN ;
OEIL = -100 -100 -100 ;

SI (NEG GRAPH 'N') ;
  TRAC OEIL 'QUAL' ST  ;
FINSI ;

*______________________________________________________
*  INITIALISATION
*______________________________________________________
XABS  = PROG ;
FONC1 = PROG ;
EP    = L/10 ;

*______________________________________________________
*   MODELE
*______________________________________________________
MOD1 = MODE ST MECANIQUE ELASTIQUE PLASTIQUE  PARFAIT DKT  'INTEGRE' 7 ;

*______________________________________________________
*  MATERIAUX
*______________________________________________________
E    = 2.1E11 ;
SY   = 100.E6;
MAT1 = MATE MOD1 YOUN E NU 0. SIGY SY  EPAI EP CALF 1. ;

*______________________________________________________
*  CONDITIONS AUX LIMITES ET RIGIDITE
*______________________________________________________
RI1   = RIGI MOD1 MAT1 ;
CL1   = BLOQ UX UY UZ RY RZ A2A1 ;
CLDEP = BLOQ UZ B1B2 ;
CL    = CL1  ET CLDEP;
RIT1  = RI1  ET CL;

*______________________________________________________
*   DEPLACEMENT IMPOSE
*______________________________________________________
 FDEP = DEPI CLDEP  0.2;

*______________________________________________________
*  PREPARATION POUR PASAPAS
*______________________________________________________
LI1 = PROG 0. 1. ;
LI2 = PROG 0. 1. ;
EV = EVOL MANU T LI1 F(T) LI2 ;
CHA1 = CHAR DIMP FDEP  EV ;
*
si complet;
  LIS1 = PROG 0. PAS 0.01 0.5;
sinon;
  LIS1 = PROG PAS 0.03333 0.1 PAS 0.02 0.16 ;
finsi;

TAB1 = TABL ;
TAB1.'CARACTERISTIQUES'    = MAT1;
TAB1.'CHARGEMENT'          = CHA1;
TAB1.'MODELE'              = MOD1;
TAB1.'TEMPS_CALCULES'      = LIS1;
TAB1.'BLOCAGES_MECANIQUES' = CL  ;
TAB1.'PROCESSEURS'         = 'MOT' 'COMPORTEMENT';

*______________________________________________________
* CALCUL
*______________________________________________________
TAB1 . 'PERF_RAID' = VPSW ; TAB1 . 'PERF_RAID_NIVEAU' = VNIV ; PASAPAS TAB1 ; FPREC TAB1 VTFPR ;

* [valid] TEMPS ;

*______________________________________________________
* POST-TRAITEMENT
*______________________________________________________
NB   = DIME LIS1           ;
XABS = INSER XABS  1 (0.0) ;
FONC1= INSER FONC1 1 (0.0) ;

REPE BOUC1 NB ;
  ITER1 = &BOUC1 ;
  TT    = EXTR LIS1 ITER1              ;
  DEP   = PECHE TAB1 'DEPLACEMENTS' TT ;
  FLECH = EXTR DEP UZ B1               ;
  FF    = REAC DEP RIT1                ;
  FFF   = RESU(REDU FF B1B2)           ;
  FORC  = EXTR FFF 'FZ' B1             ;
  XABS  = INSER XABS  ITER1 FLECH      ;
  FONC1 = INSER FONC1 ITER1 FORC       ;

  SI (ITER1 EGA (NB-1));
    LIST TAB1.'DEPLACEMENTS' ;
    DEF0 = DEFO 0. DEP ST      ;
    DEF1 = DEFO 5. DEP ST VERT ;
    SI (NEG GRAPH 'N') ;
      TITR 'DEPLACEMENT UZ';
      TRAC 'CACH' (EXCO DEP UZ)  ST ;
      TITR 'DEFORMEE';
      TRAC 'CACH' (DEF0 ET DEF1) ST ;
    FINSI;
  FINSI;
FIN BOUC1 ;

*______________________________________________________
* ON TRACE LA COURBE FORCE-FLECHE
*______________________________________________________
TITR 'FORCE PONCTUELLE FONCTION DE LA FLECHE  ';
EV1 = EVOL ROUGE MANU 'FLECHE' XABS 'FORCE' FONC1 ;

*______________________________________________________
* CALCUL ANALYTIQUE DE LA VALEUR ASYMPTOTIQUE
*______________________________________________________
si complet;
  FU= (SY * (EP**2))/(4*L) ;
  ERRMAX = 8.5 ;
sinon;
  FU = 1.679E+06;
  ERRMAX = 0.06;
finsi;

SI(NEG GRAPH 'N');
 DESS EV1 ;
FINSI ;

*______________________________________________________
*            CODE FONCTIONNEMENT
*______________________________________________________
FC  = RESU(REDU FF B1B2) ;
FCC = EXTR FC 'FZ' B1 ;

RESI= 100 * (ABS((FCC-FU)/FU)) ;

MESS '    Force theorique  :' FU  'N';
MESS '    Force calcule    :' FCC 'N';
MESS '    Soit un ecart de :' RESI '%';

SI (RESI <EG ERRMAX) ;
    VTCT . 'N0' = (VTCT . 'N0') + 1 ;
SINO;
    VTCT . 'N5' = (VTCT . 'N5') + 1 ;
FINSI;

* [valid] TEMPS ;
* [valid] FIN final


* ----- fin du cas plas8
FINPROC ;
*
* ---------------------------------------------------------------------
* Cas 38 : plas8 (coque plastique)
* ---------------------------------------------------------------------
SI ((IDEB0 '<EG' 38) 'ET' (IFIN0 '>EG' 38) 'ET' ('NON' ('EXIS' TSKIP 38))) ;
    MENAGE 'OBLI' ;
    MESS ' ' ;
    VMSG = CHAI '>>> Cas' ' ' '38' ' ' 'sur' ' ' NTOT0 ' ' ':' ' ' 'plas8' ' ' '(coque plastique)' ;
    MESS VMSG ;
    NPASS = 2 ;
    SI IPASS3 ;
        NPASS = 3 ;
    FINSI ;
    VTH1 = 0 ;
    VTH2 = 0 ;
    VTH3 = 0 ;
    VNE51 = 0 ;
    VNE01 = 0 ;
    VNE52 = 0 ;
    VNE02 = 0 ;
    VNE53 = 0 ;
    VNE03 = 0 ;
    REPETER ZVRUN NPASS ;
* ordre des passes alterne d'un cas a l'autre (derive des temps en session)
        VIP = NPASS + 1 - &ZVRUN ;
        VPSW = (VIP '>' 1) ;
        VNIV = 1 ;
        VMPS = 'inactif' ;
        SI (VIP 'EGA' 2) ;
            VMPS = 'actif niveau 1' ;
        FINSI ;
        SI (VIP 'EGA' 3) ;
            VNIV = 2 ;
            VMPS = 'actif niveau 2' ;
        FINSI ;
        AVANCE VRES 38 NTOT0 'plas8' VIP 'en_cours' ;
        VMSG = CHAI '    passe' ' ' VIP ' ' 'sur' ' ' NPASS ' ' ': optimisations' ' ' VMPS ;
        MESS VMSG ;
        SI ITRACE0 ;
            OPTI 'IMPR' 'valid_trace.log' ;
        FINSI ;
        OPTI 'DIME' 3 'MODE' 'TRID' 'ELEM' 'CUB8' 'ECHO' IECHO0 ;
        VTHM = 0 ;
        REPETER ZVREP NREP0 ;
            VIR = &ZVREP ;
            VTFPR = TABL ;
            VTCT = TABL ;
            VTCT . 'N0' = 0 ;
            VTCT . 'N5' = 0 ;
            SI ITEMPS0 ;
                TEMP 'ZERO' ;
            FINSI ;
* Le cas s'execute dans une procedure (variables locales) : les variables
* d'un cas precedent ne peuvent pas masquer un mot-cle ou un operateur
            VC38 VPSW VNIV VTFPR VTCT IECHO0 ;
            VTHR = 0 ;
            SI ITEMPS0 ;
                VTHR = CHRONO ;
            FINSI ;
            SI (VIR 'EGA' 1) ;
                VTHM = VTHR ;
            SINON ;
                SI (VTHR '<' VTHM) ;
                    VTHM = VTHR ;
                FINSI ;
            FINSI ;
        FIN ZVREP ;
        VNER5 = VTCT . 'N5' ;
        VNER0 = VTCT . 'N0' ;
        SI (VIP 'EGA' 1) ;
            VTF1 = VTFPR ;
            VTH1 = VTHM ;
            VNE51 = VNER5 ;
            VNE01 = VNER0 ;
        FINSI ;
        SI (VIP 'EGA' 2) ;
            VTF2 = VTFPR ;
            VTH2 = VTHM ;
            VNE52 = VNER5 ;
            VNE02 = VNER0 ;
        FINSI ;
        SI (VIP 'EGA' 3) ;
            VTF3 = VTFPR ;
            VTH3 = VTHM ;
            VNE53 = VNER5 ;
            VNE03 = VNER0 ;
        FINSI ;
    FIN ZVRUN ;
*   comparaison des empreintes avec la passe 1
    VER2 VNL2 VNC2 = COMPAR VTF1 VTF2 ;
    VMOK2 = 'OK' ;
    SI ((VER2 '>' TOLV0) 'OU' (VNL2 '>' 0) 'OU' ('NON' (VNE52 'EGA' VNE51))) ;
        VMOK2 = 'ECART' ;
        VNBK2 = VNBK2 + 1 ;
    FINSI ;
    VER3 = 0. ;
    VNC3 = 0 ;
    VMOK3 = 'sans_objet' ;
    SI IPASS3 ;
        VER3 VNL3 VNC3 = COMPAR VTF1 VTF3 ;
        VMOK3 = 'OK' ;
        SI ((VER3 '>' TOLV3) 'OU' (VNL3 '>' 0) 'OU' ('NON' (VNE53 'EGA' VNE51))) ;
            VMOK3 = 'ECART' ;
            VNBK3 = VNBK3 + 1 ;
        FINSI ;
    FINSI ;
*   accelerations (temps de la passe 1 / temps de la passe)
    VSP2 = 0. ;
    VSP3 = 0. ;
    SI ((VTH1 '>' 0) 'ET' (VTH2 '>' 0)) ;
        VSP2 = (FLOT VTH1) '/' (FLOT VTH2) ;
    FINSI ;
    SI ((VTH1 '>' 0) 'ET' (VTH3 '>' 0)) ;
        VSP3 = (FLOT VTH1) '/' (FLOT VTH3) ;
    FINSI ;
    VSUM1 = VSUM1 + VTH1 ;
    VSUM2 = VSUM2 + VTH2 ;
    VSUM3 = VSUM3 + VTH3 ;
    VCLA = VTF2 . 'CL' ;
    VR2 = VTF2 . 'NRE' ;
    VC2 = VTF2 . 'NCA' ;
    VH2 = VTF2 . 'NHK' ;
    VM2 = VTF2 . 'NMA' ;
    VR3 = -1 ;
    VC3 = -1 ;
    VH3 = -1 ;
    VM3 = -1 ;
    SI IPASS3 ;
        VR3 = VTF3 . 'NRE' ;
        VC3 = VTF3 . 'NCA' ;
        VH3 = VTF3 . 'NHK' ;
        VM3 = VTF3 . 'NMA' ;
    FINSI ;
    VSE2 = CHAI 'FORMAT' '(1PE10.3)' VER2 ;
    VSE3 = CHAI 'FORMAT' '(1PE10.3)' VER3 ;
    VSS2 = CHAI 'FORMAT' '(F6.2)' VSP2 ;
    VSS3 = CHAI 'FORMAT' '(F6.2)' VSP3 ;
*   fichier de resultat du cas (SORT) et affichage console (MESS)
    OPTI 'SORT' 'valid_plas8.log' ;
    VMSG = CHAI '=== Cas' ' ' '38' ' ' ':' ' ' 'plas8' ' ' '(coque plastique)' ' ' '===' ;
    MESS VMSG ;
    SORT 'CHAI' VMSG ;
    VMSG = CHAI 'Valeurs comparees :' ' ' VNC2 ;
    MESS VMSG ;
    SORT 'CHAI' VMSG ;
    VMSG = CHAI 'Temps horloge (ms) : origine' ' ' VTH1 ' ' '; niveau 1' ' ' VTH2 ' ' '; niveau 2' ' ' VTH3 ;
    MESS VMSG ;
    SORT 'CHAI' VMSG ;
    VMSG = CHAI 'Acceleration par rapport a l origine : niveau 1' ' ' VSS2 ' ' '; niveau 2' ' ' VSS3 ;
    MESS VMSG ;
    SORT 'CHAI' VMSG ;
    VMSG = CHAI 'Controles internes du cas : echecs origine' ' ' VNE51 ' ' '; niveau 1' ' ' VNE52 ' ' '; niveau 2' ' ' VNE53 ' ' '- reussites origine' ' ' VNE01 ' ' '; niveau 1' ' ' VNE02 ' ' '; niveau 2' ' ' VNE03 ;
    MESS VMSG ;
    SORT 'CHAI' VMSG ;
    VMSG = CHAI 'Classes exercees (1 MATVAR, 10 ENDOM, 20 VISCODOM, 100 GD) :' ' ' VCLA ;
    MESS VMSG ;
    SORT 'CHAI' VMSG ;
    VMSG = CHAI 'Niveau 1 : raideur reutilisee' ' ' VR2 ' ' 'fois, recalculee' ' ' VC2 ' ' 'fois ; HOOK evite' ' ' VH2 ' ' 'fois ; caracteristiques reutilisees' ' ' VM2 ' ' 'fois' ;
    MESS VMSG ;
    SORT 'CHAI' VMSG ;
    VMSG = CHAI 'Niveau 2 : raideur reutilisee' ' ' VR3 ' ' 'fois, recalculee' ' ' VC3 ' ' 'fois ; HOOK evite' ' ' VH3 ' ' 'fois ; caracteristiques reutilisees' ' ' VM3 ' ' 'fois' ;
    MESS VMSG ;
    SORT 'CHAI' VMSG ;
    VMSG = CHAI 'Ecart relatif maximal : niveau 1' ' ' VSE2 ' ' '; niveau 2' ' ' VSE3 ;
    MESS VMSG ;
    SORT 'CHAI' VMSG ;
    VMSG = CHAI 'RESULTAT : niveau 1' ' ' VMOK2 ' ' '; niveau 2' ' ' VMOK3 ;
    MESS VMSG ;
    SORT 'CHAI' VMSG ;
    SI (('EGA' VNC2 0) ) ;
        VMSG = CHAI 'ATTENTION : aucune valeur comparee (resultats non stockes ?)' ;
        MESS VMSG ;
        SORT 'CHAI' VMSG ;
    FINSI ;
    OPTI 'SORT' 'valid_inutile.tmp' ;
    VRES . 38 = TABL ;
    VRES . 38 . 'NOM' = 'plas8' ;
    VRES . 38 . 'OKM' = VMOK2 ;
    VRES . 38 . 'OK3' = VMOK3 ;
    VRES . 38 . 'ERR2' = VER2 ;
    VRES . 38 . 'ERR3' = VER3 ;
    VRES . 38 . 'TH1' = VTH1 ;
    VRES . 38 . 'TH2' = VTH2 ;
    VRES . 38 . 'TH3' = VTH3 ;
    VRES . 38 . 'SP2F' = VSP2 ;
    VRES . 38 . 'SP3F' = VSP3 ;
    VRES . 38 . 'NRE2' = VR2 ;
    VRES . 38 . 'NCA2' = VC2 ;
    VRES . 38 . 'NHK2' = VH2 ;
    VRES . 38 . 'NMA2' = VM2 ;
    VRES . 38 . 'NRE3' = VR3 ;
    VRES . 38 . 'NCA3' = VC3 ;
    VRES . 38 . 'NHK3' = VH3 ;
    VRES . 38 . 'CL' = VCLA ;
    VRES . 38 . 'NCMP' = VNC2 ;
    VMSG = CHAI '<<< Cas' ' ' '38' ' ' 'sur' ' ' NTOT0 ' ' ':' ' ' 'plas8' ' ' ':' ' ' 'niveau 1' ' ' VMOK2 ', niveau 2' ' ' VMOK3 ' ' '- ecart' ' ' VSE2 ', acceleration' ' ' VSS2 ' ' 'et' ' ' VSS3 ;
    MESS VMSG ;
    AVANCE VRES 38 NTOT0 'plas8' NPASS 'termine' ;
    MENAGE 'OBLI' ;
FINSI ;

*
* ---------------------------------------------------------------------
* Procedure du cas 39 : ohno2 (coque visco Ohno)
* Variables locales : le cas ne voit aucune variable des cas precedents
* ---------------------------------------------------------------------
DEBPROC VC39 VPSW*'LOGIQUE' VNIV*'ENTIER' VTFPR*'TABLE' VTCT*'TABLE' IECHO0*'ENTIER' ;
* ----- debut du cas ohno2

* fichier :  ohno2.dgibi
************************************************************************
* Section : Mecanique Viscoplastique
************************************************************************
*           Test Ohno2.dgibi: Jeux de données         *
*           ---------------------------------         *
*                                                     *
*
**************************************************
*                                                *
*  TEST DE VALIDATION D'UNE LOI DE COMPORTEMENT  *
*  --------------------------------------------  *
*              DE MATERIAU                       *
*              -----------                       *
*                                                *
*  LOI DE COMPORTEMENT VISCOPLASTIQUE DE:        *
*   OHNO (CHABOCHE MODIFIE OHNO)                 *
*                                                *
*  TEST POUR DES ELEMENTS COQUE MINCE            *
*  ----------------------------------            *
*                                                *
*  MAILLAGES:                                    *
*   PREMIER MAILLAGE: ELEMENTS MASSIFS           *
*   DEUXIEME MAILLAGE: ELEMENTS COQUE MINCE      *
*   UN CYLINDRE CREUX AXISYMETRIQUE              *
*   LONGUEUR      L =.1 M                        *
*   RAYON INTERNE R =.05 M                       *
*   EPAISSEUR     E =.0005 M                     *
*                                                *
*  CHARGEMENT:                                   *
*   CYLINDRE ENCASTRE EN SON EXTREMITE BASSE     *
*   FORCES IMPOSEES SUR L'EXTREMITE DU HAUT:     *
*      FORCES RADIALES DIRIGEES VERS L'EXTERIEUR *
*                                                *
**************************************************
*
complet = faux ;
opti echo IECHO0 dime 2 elem qua8 mode axis ;
*
*
*  Maillage
*
rayon0 = .05 ;
epais0 = .0005 ;
l1 = epais0 + rayon0 ;
l2 = .1 ;
n1 = 1 ;
n2 = 200 ;
p1 = rayon0 0. ;
p2 = l1 0. ;
p3 = l1 l2 ;
p4 = rayon0 l2 ;
d1 = d p1 n1 p2 ;
d2 = d p2 n2 p3 ;
d3 = d p3 n1 p4 ;
d4 = d p4 n2 p1 ;
vol1 = 'DALL' d1 d2 d3 d4 ;
*
*    Modele de calcul
*
mod0 = 'MODE' vol1 'MECANIQUE' 'ELASTIQUE' 'ISOTROPE'
       'VISCOPLASTIQUE' 'OHNO' ;
mat0 = 'MATE' mod0 'YOUN' 7.34E10 'NU' 0.33
       'RHO' 7.8E3 'ALPHA' 1.E-5 'N' 24
       'KK' 10.E6 'K0' 116.E6 'ALFK' 1.5 'ALFR' 0.35
       'ALF' 2.E6 'A1' 67.5E6 'C1' 1300 'BET1' 4807.E6
       'R1' 4 'A2' 80.E6 'C2' 45 'BET2' 58480.E6
       'R2' 4 'PHI' 1. 'B' 12 'GAMA' 2.E-7 'M' 2
       'QMAX' 455.E6 'QSTA' 200.E6 'MU' 19 'ETA' 0.06
       'EXP1' 2. 'EXP2' 2. ;
*
*    Conditions aux limites
*
cl1 = 'BLOQ' d1 'UR' 'UZ' 'RT' 'RZ' ;
cl0 = cl1 ;
*
*    Chargement
*
pres0 = 1.E4 ;
p01 = ( rayon0 + ( epais0 / 2. ) ) l2 ;
p00 = vol1 'POIN' 'PROC' p01 ;
dep1 = 'FORCE' 'FR' pres0 p00 ;
ev0 = 'EVOL' 'MANU' temps ( 'PROG' 0. 10000. ) y
      ( 'PROG' 0. 1. ) ;
cha0 = 'CHAR' 'MECA' dep1 ev0 ;
vec1 = 'VECT' dep1 1.E-5 'FR' 'FZ' 'ROUG' ;
*
*  Temps du calcul
*
dt0 = 20. ;
si complet ;
tfin0 = 700. ;
sinon ;
tfin0 = 200. ;
finsi ;

*
*
*  Resolution par PASAPAS
*---------------------------------------
*
ta1 = 'TABLE' ;
ta1 .'MODELE' = mod0 ;
ta1 .'CARACTERISTIQUES' = mat0 ;
ta1 .'BLOCAGES_MECANIQUES' = cl0 ;
ta1 .'CHARGEMENT' = cha0 ;
ta1 .'TEMPS_CALCULES' = 'PROG' 0. 'PAS' dt0 tfin0 ;
*
ta1 . 'PERF_RAID' = VPSW ; ta1 . 'PERF_RAID_NIVEAU' = VNIV ; PASAPAS ta1 ; FPREC ta1 VTFPR ;
*
*
*  Post-traitement
*-----------------------------------------
*
dim0 = 'DIME' ( ta1 .'TEMPS' ) ;
char2 = 'PROG' 0. ;
depl2 = 'PROG' 0. ;
defi2 = 'PROG' 0. ;
cont1 = 'PROG' 0. ;
*
reac0 = ta1 .'REACTIONS'.( dim0 - 1 ) ;
depl0 = ta1 .'DEPLACEMENTS'.( dim0 - 1 ) ;
vec2 = 'VECT' reac0 1.E-2 'FR' 'FZ' 'ROUG' ;
defo0 = 'DEFO' vol1 depl0 0. 'ROUG' ;
defo1 = 'DEFO' vol1 depl0 1. ;
reac1 = 'REDU' reac0 p1 ;
reac2 = 'REDU' reac0 p2 ;
vec01 = 'VECT' reac1 1.E-2 'FR' 'FZ' 'ROUG' ;
vec02 = 'VECT' reac2 1.E-2 'FR' 'FZ' 'VERT' ;
*
'REPETER' bloc0 ( dim0 - 1 ) ;
  i0 = &bloc0 ;
  reac0 = ta1 .'REACTIONS'.i0 ;
  depl0 = ta1 .'DEPLACEMENTS'.i0 ;
  sigm0 = ta1 .'CONTRAINTES'.i0 ;
  defi0 = ta1 .'VARIABLES_INTERNES'.i0 ;
  temp0 = ta1 .'TEMPS'.i0 ;
  depl1 = 'EXTR' depl0 'UR' p3 ;
  depl2 = depl2 'ET' ( 'PROG' depl1 ) ;
  defi1 = 'MAXI' ( 'EXCO' defi0 'EPSE' ) ;
  defi2 = defi2 'ET' ( 'PROG' defi1 ) ;
*  cont0 =  'MAXI' ( 'EXCO' 'SMXX' sigm0 ) ;
*  cont1 = cont1 'ET' ( 'PROG' cont0 ) ;
  char1 = pres0 * temp0 / tfin0 ;
  char2 = char2 'ET' ( 'PROG' char1 ) ;
'FIN' bloc0 ;
*
opti echo IECHO0 dime 2 elem seg2 mode axis ;
*
*
*  Maillage
*
epais0 = .0005 ;
rayon0 = .05 ;
l10 = .1 ;
n10 = 400 ;
p10 = rayon0 0. ;
p20 = rayon0 l10 ;
mail1 = d p10 n10 p20 ;
*
*    Modele de calcul
*
mod00 = 'MODE' mail1 'MECANIQUE' 'ELASTIQUE' 'ISOTROPE'
       'VISCOPLASTIQUE' 'OHNO' 'COQ2' ;
mat00 = 'MATE' mod00 'YOUN' 7.34E10 'NU' 0.33
       'RHO' 7.8E3 'N' 24
       'KK' 10.E6 'K0' 116.E6 'ALFK' 1.5 'ALFR' 0.35
       'ALF' 2.E6 'A1' 67.5E6 'C1' 1300 'BET1' 4807.E6
       'R1' 4 'A2' 80.E6 'C2' 45 'BET2' 58480.E6
       'R2' 4 'PHI' 1. 'B' 12 'GAMA' 2.E-7 'M' 2
       'QMAX' 455.E6 'QSTA' 200.E6 'MU' 19 'ETA' 0.06
       'EXP1' 2. 'EXP2' 2. ;
car00 = 'CARA' mod00 'EPAI' epais0 'CALF' ( 2. / 3. ) ;
*
*    Conditions aux limites
*
cl10 = 'BLOQ' p10 'UR' 'UZ' 'RT' 'RZ' ;
cl00 = cl10 ;
*
*    Chargement
*
pres0 = 1.E4 ;
dep10 = 'FORCE' 'FR' pres0 p20 ;
ev00 = 'EVOL' 'MANU' temps ( 'PROG' 0. 10000. ) y
       ( 'PROG' 0. 1. ) ;
cha00 = 'CHAR' 'MECA' dep10 ev00 ;
vec1 = 'VECT' dep10 1.E-5 'FR' 'FZ' ;
*
*  Temps du calcul
*
dt00 = 20. ;
si complet ;
tfin00 = 700. ;
sinon ;
tfin00 = 200. ;
finsi ;
*
*
*  Resolution par PASAPAS
*---------------------------------------
*
ta10 = 'TABLE' ;
ta10 .'MODELE' = mod00 ;
ta10 .'CARACTERISTIQUES' = mat00 'ET' car00 ;
ta10 .'BLOCAGES_MECANIQUES' = cl00 ;
ta10 .'CHARGEMENT' = cha00 ;
ta10 .'TEMPS_CALCULES' = 'PROG' 0. 'PAS' dt00 tfin00 ;
*
ta10 . 'PERF_RAID' = VPSW ; ta10 . 'PERF_RAID_NIVEAU' = VNIV ; PASAPAS ta10 ; FPREC ta10 VTFPR ;
*
*
*  Post-traitement
*-----------------------------------------
*
dim10 = 'DIME' ta10 .'TEMPS' ;
depl12 = 'PROG' 0. ;
*
reac0 = ta10 .'REACTIONS'.( dim10 - 1 ) ;
depl0 = ta10 .'DEPLACEMENTS'.( dim10 - 1 ) ;
vec2 = 'VECT' reac0 1.E-2 'FR' 'FZ' 'ROUG' ;
defo0 = 'DEFO' mail1 depl0 0. ;
defo1 = 'DEFO' mail1 depl0 100. ;
*
'REPETER' bloc0 ( dim10 - 1 ) ;
  i10 = &bloc0 ;
  depl10 = ta10 .'DEPLACEMENTS'.i10 ;
  temp10 = ta10 .'TEMPS'.i10 ;
  depl11 = 'EXTR' depl10 'UR' p20 ;
  depl12 = depl12 'ET' ( 'PROG' depl11 ) ;
'FIN' bloc0 ;
*
*  Erreur
*
prob1 = faux ;
'REPETER' bloc0 ( dim10 - 1 ) ;
  i10 = &bloc0 ;
  depl1 = 'EXTR' depl2 i10 ;
  depl11 = 'EXTR' depl12 i10 ;
*
'SI' (depl1 'NEG' 0. ) ;
  err_e0 = 'ABS' ( ( depl1 - depl11 ) / depl1 ) ;
  err_e0 = err_e0 * 100. ;
'SINON' ;
  err_e0 = 0. ;
'FINSI' ;
*
*
  'SI' ( err_e0 '>' 3.E-1 ) ;
     prob0 = vrai ;
  'SINON' ;
     prob0 = faux ;
  'FINSI' ;
  'SI' (prob0 'EGA' vrai ) ;
     prob1 = vrai ;
  'FINSI' ;
*
'FIN' bloc0 ;
*
'SI' ( prob1 'EGA' vrai ) ;
   VTCT . 'N5' = (VTCT . 'N5') + 1 ;
'SINON' ;
   VTCT . 'N0' = (VTCT . 'N0') + 1 ;
'FINSI' ;
*
*
* [valid] FIN final


* ----- fin du cas ohno2
FINPROC ;
*
* ---------------------------------------------------------------------
* Cas 39 : ohno2 (coque visco Ohno)
* ---------------------------------------------------------------------
SI ((IDEB0 '<EG' 39) 'ET' (IFIN0 '>EG' 39) 'ET' ('NON' ('EXIS' TSKIP 39))) ;
    MENAGE 'OBLI' ;
    MESS ' ' ;
    VMSG = CHAI '>>> Cas' ' ' '39' ' ' 'sur' ' ' NTOT0 ' ' ':' ' ' 'ohno2' ' ' '(coque visco Ohno)' ;
    MESS VMSG ;
    NPASS = 2 ;
    SI IPASS3 ;
        NPASS = 3 ;
    FINSI ;
    VTH1 = 0 ;
    VTH2 = 0 ;
    VTH3 = 0 ;
    VNE51 = 0 ;
    VNE01 = 0 ;
    VNE52 = 0 ;
    VNE02 = 0 ;
    VNE53 = 0 ;
    VNE03 = 0 ;
    REPETER ZVRUN NPASS ;
* ordre des passes alterne d'un cas a l'autre (derive des temps en session)
        VIP = &ZVRUN ;
        VPSW = (VIP '>' 1) ;
        VNIV = 1 ;
        VMPS = 'inactif' ;
        SI (VIP 'EGA' 2) ;
            VMPS = 'actif niveau 1' ;
        FINSI ;
        SI (VIP 'EGA' 3) ;
            VNIV = 2 ;
            VMPS = 'actif niveau 2' ;
        FINSI ;
        AVANCE VRES 39 NTOT0 'ohno2' VIP 'en_cours' ;
        VMSG = CHAI '    passe' ' ' VIP ' ' 'sur' ' ' NPASS ' ' ': optimisations' ' ' VMPS ;
        MESS VMSG ;
        SI ITRACE0 ;
            OPTI 'IMPR' 'valid_trace.log' ;
        FINSI ;
        OPTI 'DIME' 3 'MODE' 'TRID' 'ELEM' 'CUB8' 'ECHO' IECHO0 ;
        VTHM = 0 ;
        REPETER ZVREP NREP0 ;
            VIR = &ZVREP ;
            VTFPR = TABL ;
            VTCT = TABL ;
            VTCT . 'N0' = 0 ;
            VTCT . 'N5' = 0 ;
            SI ITEMPS0 ;
                TEMP 'ZERO' ;
            FINSI ;
* Le cas s'execute dans une procedure (variables locales) : les variables
* d'un cas precedent ne peuvent pas masquer un mot-cle ou un operateur
            VC39 VPSW VNIV VTFPR VTCT IECHO0 ;
            VTHR = 0 ;
            SI ITEMPS0 ;
                VTHR = CHRONO ;
            FINSI ;
            SI (VIR 'EGA' 1) ;
                VTHM = VTHR ;
            SINON ;
                SI (VTHR '<' VTHM) ;
                    VTHM = VTHR ;
                FINSI ;
            FINSI ;
        FIN ZVREP ;
        VNER5 = VTCT . 'N5' ;
        VNER0 = VTCT . 'N0' ;
        SI (VIP 'EGA' 1) ;
            VTF1 = VTFPR ;
            VTH1 = VTHM ;
            VNE51 = VNER5 ;
            VNE01 = VNER0 ;
        FINSI ;
        SI (VIP 'EGA' 2) ;
            VTF2 = VTFPR ;
            VTH2 = VTHM ;
            VNE52 = VNER5 ;
            VNE02 = VNER0 ;
        FINSI ;
        SI (VIP 'EGA' 3) ;
            VTF3 = VTFPR ;
            VTH3 = VTHM ;
            VNE53 = VNER5 ;
            VNE03 = VNER0 ;
        FINSI ;
    FIN ZVRUN ;
*   comparaison des empreintes avec la passe 1
    VER2 VNL2 VNC2 = COMPAR VTF1 VTF2 ;
    VMOK2 = 'OK' ;
    SI ((VER2 '>' TOLV0) 'OU' (VNL2 '>' 0) 'OU' ('NON' (VNE52 'EGA' VNE51))) ;
        VMOK2 = 'ECART' ;
        VNBK2 = VNBK2 + 1 ;
    FINSI ;
    VER3 = 0. ;
    VNC3 = 0 ;
    VMOK3 = 'sans_objet' ;
    SI IPASS3 ;
        VER3 VNL3 VNC3 = COMPAR VTF1 VTF3 ;
        VMOK3 = 'OK' ;
        SI ((VER3 '>' TOLV3) 'OU' (VNL3 '>' 0) 'OU' ('NON' (VNE53 'EGA' VNE51))) ;
            VMOK3 = 'ECART' ;
            VNBK3 = VNBK3 + 1 ;
        FINSI ;
    FINSI ;
*   accelerations (temps de la passe 1 / temps de la passe)
    VSP2 = 0. ;
    VSP3 = 0. ;
    SI ((VTH1 '>' 0) 'ET' (VTH2 '>' 0)) ;
        VSP2 = (FLOT VTH1) '/' (FLOT VTH2) ;
    FINSI ;
    SI ((VTH1 '>' 0) 'ET' (VTH3 '>' 0)) ;
        VSP3 = (FLOT VTH1) '/' (FLOT VTH3) ;
    FINSI ;
    VSUM1 = VSUM1 + VTH1 ;
    VSUM2 = VSUM2 + VTH2 ;
    VSUM3 = VSUM3 + VTH3 ;
    VCLA = VTF2 . 'CL' ;
    VR2 = VTF2 . 'NRE' ;
    VC2 = VTF2 . 'NCA' ;
    VH2 = VTF2 . 'NHK' ;
    VM2 = VTF2 . 'NMA' ;
    VR3 = -1 ;
    VC3 = -1 ;
    VH3 = -1 ;
    VM3 = -1 ;
    SI IPASS3 ;
        VR3 = VTF3 . 'NRE' ;
        VC3 = VTF3 . 'NCA' ;
        VH3 = VTF3 . 'NHK' ;
        VM3 = VTF3 . 'NMA' ;
    FINSI ;
    VSE2 = CHAI 'FORMAT' '(1PE10.3)' VER2 ;
    VSE3 = CHAI 'FORMAT' '(1PE10.3)' VER3 ;
    VSS2 = CHAI 'FORMAT' '(F6.2)' VSP2 ;
    VSS3 = CHAI 'FORMAT' '(F6.2)' VSP3 ;
*   fichier de resultat du cas (SORT) et affichage console (MESS)
    OPTI 'SORT' 'valid_ohno2.log' ;
    VMSG = CHAI '=== Cas' ' ' '39' ' ' ':' ' ' 'ohno2' ' ' '(coque visco Ohno)' ' ' '===' ;
    MESS VMSG ;
    SORT 'CHAI' VMSG ;
    VMSG = CHAI 'Valeurs comparees :' ' ' VNC2 ;
    MESS VMSG ;
    SORT 'CHAI' VMSG ;
    VMSG = CHAI 'Temps horloge (ms) : origine' ' ' VTH1 ' ' '; niveau 1' ' ' VTH2 ' ' '; niveau 2' ' ' VTH3 ;
    MESS VMSG ;
    SORT 'CHAI' VMSG ;
    VMSG = CHAI 'Acceleration par rapport a l origine : niveau 1' ' ' VSS2 ' ' '; niveau 2' ' ' VSS3 ;
    MESS VMSG ;
    SORT 'CHAI' VMSG ;
    VMSG = CHAI 'Controles internes du cas : echecs origine' ' ' VNE51 ' ' '; niveau 1' ' ' VNE52 ' ' '; niveau 2' ' ' VNE53 ' ' '- reussites origine' ' ' VNE01 ' ' '; niveau 1' ' ' VNE02 ' ' '; niveau 2' ' ' VNE03 ;
    MESS VMSG ;
    SORT 'CHAI' VMSG ;
    VMSG = CHAI 'Classes exercees (1 MATVAR, 10 ENDOM, 20 VISCODOM, 100 GD) :' ' ' VCLA ;
    MESS VMSG ;
    SORT 'CHAI' VMSG ;
    VMSG = CHAI 'Niveau 1 : raideur reutilisee' ' ' VR2 ' ' 'fois, recalculee' ' ' VC2 ' ' 'fois ; HOOK evite' ' ' VH2 ' ' 'fois ; caracteristiques reutilisees' ' ' VM2 ' ' 'fois' ;
    MESS VMSG ;
    SORT 'CHAI' VMSG ;
    VMSG = CHAI 'Niveau 2 : raideur reutilisee' ' ' VR3 ' ' 'fois, recalculee' ' ' VC3 ' ' 'fois ; HOOK evite' ' ' VH3 ' ' 'fois ; caracteristiques reutilisees' ' ' VM3 ' ' 'fois' ;
    MESS VMSG ;
    SORT 'CHAI' VMSG ;
    VMSG = CHAI 'Ecart relatif maximal : niveau 1' ' ' VSE2 ' ' '; niveau 2' ' ' VSE3 ;
    MESS VMSG ;
    SORT 'CHAI' VMSG ;
    VMSG = CHAI 'RESULTAT : niveau 1' ' ' VMOK2 ' ' '; niveau 2' ' ' VMOK3 ;
    MESS VMSG ;
    SORT 'CHAI' VMSG ;
    SI (('EGA' VNC2 0) ) ;
        VMSG = CHAI 'ATTENTION : aucune valeur comparee (resultats non stockes ?)' ;
        MESS VMSG ;
        SORT 'CHAI' VMSG ;
    FINSI ;
    OPTI 'SORT' 'valid_inutile.tmp' ;
    VRES . 39 = TABL ;
    VRES . 39 . 'NOM' = 'ohno2' ;
    VRES . 39 . 'OKM' = VMOK2 ;
    VRES . 39 . 'OK3' = VMOK3 ;
    VRES . 39 . 'ERR2' = VER2 ;
    VRES . 39 . 'ERR3' = VER3 ;
    VRES . 39 . 'TH1' = VTH1 ;
    VRES . 39 . 'TH2' = VTH2 ;
    VRES . 39 . 'TH3' = VTH3 ;
    VRES . 39 . 'SP2F' = VSP2 ;
    VRES . 39 . 'SP3F' = VSP3 ;
    VRES . 39 . 'NRE2' = VR2 ;
    VRES . 39 . 'NCA2' = VC2 ;
    VRES . 39 . 'NHK2' = VH2 ;
    VRES . 39 . 'NMA2' = VM2 ;
    VRES . 39 . 'NRE3' = VR3 ;
    VRES . 39 . 'NCA3' = VC3 ;
    VRES . 39 . 'NHK3' = VH3 ;
    VRES . 39 . 'CL' = VCLA ;
    VRES . 39 . 'NCMP' = VNC2 ;
    VMSG = CHAI '<<< Cas' ' ' '39' ' ' 'sur' ' ' NTOT0 ' ' ':' ' ' 'ohno2' ' ' ':' ' ' 'niveau 1' ' ' VMOK2 ', niveau 2' ' ' VMOK3 ' ' '- ecart' ' ' VSE2 ', acceleration' ' ' VSS2 ' ' 'et' ' ' VSS3 ;
    MESS VMSG ;
    AVANCE VRES 39 NTOT0 'ohno2' NPASS 'termine' ;
    MENAGE 'OBLI' ;
FINSI ;

*
* ---------------------------------------------------------------------
* Procedure du cas 40 : guionnet_tra (coque visco)
* Variables locales : le cas ne voit aucune variable des cas precedents
* ---------------------------------------------------------------------
DEBPROC VC40 VPSW*'LOGIQUE' VNIV*'ENTIER' VTFPR*'TABLE' VTCT*'TABLE' IECHO0*'ENTIER' ;
* ----- debut du cas guionnet_tra

* fichier :  guionnet_tra.dgibi
************************************************************************
* Section : Mecanique Plastique
************************************************************************
*       Test Guionnet_tra.dgibi: Jeux de données      *
*       ----------------------------------------      *
*                                                     *
**************************************************
*                                                *
*  TEST DE VALIDATION D'UNE LOI DE COMPORTEMENT  *
*  --------------------------------------------  *
*              DE MATERIAU                       *
*              -----------                       *
*                                                *
*  LOI DE COMPORTEMENT VISCOPLASTIQUE DE :       *
*            GUIONNET                            *
*                                                *
*  COMPARAISON DE CALCULS SUR DES ELEMENTS:      *
*     - COQUE EPAISSE ( MFR=5 )                  *
*     - MASSIF 3D     ( MFR=1 )                  *
*                                                *
*  STRUCTURE : UNE PLAQUE CARREE                 *
*     - COTE : 1. M                              *
*     - EPAISSEUR : 0.01  M                      *
*                                                *
*  CHARGEMENT : DEPLACEMENTS IMPOSES             *
*               ESSAI DE TRACTION                *
*                                                *
**************************************************
*opti echo IECHO0 dime 3 elem cub8 ;
opti dime 3 elem cub8 ;
*
*  Maillage
*
l1 = 1. ;
l2 = 1. ;
ep0 = .01 ;
p1 = 0. 0. 0. ;
p2 = ep0 0. 0. ;
p3 = ep0 l2 0. ;
p4 = 0. l2 0. ;
p10 = 0. 0. l1 ;
p20 = ep0 0. l1 ;
p30 = ep0 l2 l1 ;
p40 = 0. l2 l1 ;
li1 = d p1 1 p2 ;
li2 = d p2 1 p3 ;
li3 = d p3 1 p4 ;
li4 = d p4 1 p1 ;
li10 = d p10 1 p20 ;
li20 = d p20 1 p30 ;
li30 = d p30 1 p40 ;
li40 = d p40 1 p10 ;
sur1 = 'DALL' li1 li2 li3 li4 ;
sur10 = 'DALL' li10 li20 li30 li40 ;
mail1 = sur1 'VOLU' 1 sur10 ;
*
*  Modele
*
youn0 = 2.1E11 ;
nu0 = .3 ;
mod0 = 'MODE' mail1 'MECANIQUE' 'ELASTIQUE' 'ISOTROPE'  'VISCOPLASTIQUE' 'GUIONNET' ;
mat0 = MATE mod0 'YOUN' 192500.  'NU  ' 0.3   'N   ' 24      'K   ' 200.    'CK  ' 0.       'R0  ' 25.      'CD  ' 0.     'M   ' 0.8         'A   ' 24000.    'A1  ' 3.3E5  'C   ' 180.   'C1  ' 40. 'G   ' 0.     'R   ' 0.      'NN  ' 0.005    'C2  ' 40.    'Q   ' 1.466    'G1  ' 0. 'R1  ' 0.       'BETA' 1.1 'C0  ' 180.     'P1M0' 0.00333 ;
*   *  Conditions aux limites  *
cl1 = 'BLOQ' sur1 'UZ' ;
cl2 = 'BLOQ' ( li1 'ET' li10 ) 'UY' ;
cl3 = 'BLOQ' ( li2 'ET' li20 ) 'UX' ;
cl4 = 'BLOQ' sur10 'UZ' ;
cl0 = cl1 'ET' cl2 'ET' cl3 'ET' cl4 ;
*
*  Chargement
*
depmax = .1 ;
dep0 = 'DEPI' cl4 depmax ;
ev0 = 'EVOL' 'MANU' temps ( 'PROG' 0. 1000. ) y ( 'PROG' 0. 1. ) ;
cha0 = 'CHAR' 'MECA' dep0 ev0 ;
*
dt0 = 10. ;
tfin0 = 100. ;
pro0 = 'PROG' 0. 'PAS' dt0 tfin0 ;
*
*  Appel à PASAPAS
*
ta1 = 'TABLE' ;
ta1 .'MODELE' = mod0 ;
ta1 .'CARACTERISTIQUES' = mat0 ;
ta1 .'CHARGEMENT' = cha0 ;
ta1 .'BLOCAGES_MECANIQUES' = cl0 ;
ta1 .'TEMPS_CALCULES' = pro0 ;
*
ta1 . 'PERF_RAID' = VPSW ; ta1 . 'PERF_RAID_NIVEAU' = VNIV ; PASAPAS ta1 ; FPREC ta1 VTFPR ;
*
*  Post traitement
*
dim0 = 'DIME' ta1 .'TEMPS' ;
*
*  Résultats calculés
*
reac0 = ta1 .'REACTIONS'.( dim0 - 1 ) ;
depl0 = ta1 .'DEPLACEMENTS'.( dim0 - 1 ) ;
temp0 = ta1 .'TEMPS'.( dim0 - 1 ) ;
sigm0 = ta1 .'CONTRAINTES'.(dim0 - 1 ) ;
eps0 = 'EPSI' mod0 depl0 ;
*
defo0 = 'DEFO' mail1 depl0 0. ;
defo1 = 'DEFO' mail1 depl0 10. 'ROUG' ;
*titr ' deformee finale' ;
*trace ( defo0 'ET' defo1 ) ;
*
sigm0 = 'CHAN' 'CHPO' sigm0 mod0 ;
*titr ' Contraintes suivant X' ;
*trace ( 'EXCO' sigm0 'SMXX' ) mail1 ;
*titr ' Contraintes suivant Y' ;
*trace ( 'EXCO' sigm0 'SMYY' ) mail1 ;
*titr ' Contraintes suivant Z' ;
*trace ( 'EXCO' sigm0 'SMZZ' ) mail1 ;
*titr ' Contraintes d cisaillement suivant YZ' ;
*trace ( 'EXCO' sigm0 'SMYZ' ) mail1 ;
reac0 = 'REDU' reac0 sur10 ;
reac0 = 'EXCO' reac0 'FZ' 'SCAL' ;
chp1 = 'MANU' 'CHPO' sur10 1 'SCAL' 1. ;
reac1 = 'XTY' reac0 chp1 ( 'MOTS' 'SCAL' )  ( 'MOTS' 'SCAL' ) ;
*
*opti echo IECHO0 dime 3 elem qua8 ;
opti dime 3 elem qua8 ;
*
*  Maillage
*
p1 = 0. 0. 0. ;
p4 = 0. l2 0. ;
p10 = 0. 0. l1 ;
p40 = 0. l2 l1 ;
li1 = d p1 1 p4 ;
li2 = d p4 1 p40 ;
li3 = d p40 1 p10 ;
li4 = d p10 1 p1 ;
mail1 = 'DALL' li1 li2 li3 li4 ;
*titr ' Maillage' ;
*trace mail1 ;
*
*  Modele
*
mod0 = 'MODE' mail1 'MECANIQUE' 'ELASTIQUE' 'ISOTROPE'  'VISCOPLASTIQUE' 'GUIONNET' 'COQ8' ;
mat0 = MATE mod0 'YOUN' 192500.  'NU  ' 0.3      'N   ' 24    'K   ' 200. 'CK  ' 0. 'A   ' 24000.     'R0  ' 25.   'CD  ' 0.     'M   ' 0.8  'A1  ' 3.3E5 'C   ' 180.   'C1  ' 40. 'G   ' 0. 'R   ' 0.      'NN  ' 0.005   'C2  ' 40. 'Q   ' 1.466  'G1  ' 0.    'R1  ' 0. 'BETA' 1.1 'C0  ' 180.   'P1M0' 0.00333 ;
car0 = 'CARA' mod0 'EPAI' ep0 ;
*
*  Conditions aux limites
*
cl1 = 'BLOQ' li1 'UZ' ;
cl2 = 'BLOQ' li4 'UY' ;
cl3 = 'BLOQ' mail1 'UX' ;
cl4 = 'BLOQ' li3 'UZ' ;
cl0 = cl1 'ET' cl2 'ET' cl3 'ET' cl4 ;
*
*  Chargement
*
dep0 = 'DEPI' cl4 depmax ;
ev0 = 'EVOL' 'MANU' temps ( 'PROG' 0. 1000. ) y ( 'PROG' 0. 1. ) ;
cha0 = 'CHAR' 'DIMP' dep0 ev0 ;
*
*  Appel à PASAPAS
*
ta1 = 'TABLE' ;
ta1 .'MODELE' = mod0 ;
ta1 .'CARACTERISTIQUES' = mat0 'ET' car0 ;
ta1 .'CHARGEMENT' = cha0 ;
ta1 .'BLOCAGES_MECANIQUES' = cl0 ;
ta1 .'TEMPS_CALCULES' = pro0 ;
*
ta1 . 'PERF_RAID' = VPSW ; ta1 . 'PERF_RAID_NIVEAU' = VNIV ; PASAPAS ta1 ; FPREC ta1 VTFPR ;
*
*  Post traitement
*
dim0 = 'DIME' ta1 .'TEMPS' ;
*
*  Résultats calculés
*
reac0 = ta1 .'REACTIONS'.( dim0 - 1 ) ;
depl0 = ta1 .'DEPLACEMENTS'.( dim0 - 1 ) ;
temp0 = ta1 .'TEMPS'.( dim0 - 1 ) ;
sigm0 = ta1 .'CONTRAINTES'.( dim0 - 1 ) ;
eps0 = 'EPSI' mod0 depl0 car0 ;
*
defo0 = 'DEFO' mail1 depl0 0. ;
defo1 = 'DEFO' mail1 depl0 10. 'ROUG' ;
*titr ' deformee finale' ;
*trace ( defo0 'ET' defo1 ) ;
*
sigm0 = 'CHAN' 'CHPO' sigm0 mod0 ;
*titr ' Contraintes suivant Y' ;
*trace ( 'EXCO' sigm0 'SMSS' ) mail1 ;
*titr ' Contraintes suivant Z' ;
*trace ( 'EXCO' sigm0 'SMTT' ) mail1 ;
*titr ' Contraintes d cisaillement suivant YZ' ;
*trace ( 'EXCO' sigm0 'SMST' ) mail1 ;
reac0 = 'REDU' reac0 li3 ;
reac0 = 'EXCO' reac0 'FZ' 'SCAL' ;
chp1 = 'MANU' 'CHPO' li3 1 'SCAL' 1. ;
reac2 = 'XTY' reac0 chp1 ( 'MOTS' 'SCAL' )  ( 'MOTS' 'SCAL' ) ;
*
'MESS' ' Réaction au sommet de la structure , calcul massif        ='  reac1 ;
'MESS' ' Réaction au sommet de la structure , calcul coque épaisse =' reac2 ;
'SI' ( reac1 '>' 0. ) ;
   err1 = ( 'ABS' ( reac1 -reac2 ) ) / reac1 ;
   err1 = err1 * 100. ;
'SINON' ;
   err1 = 0. ;
'FINSI' ;
'MESS' ' Erreur obtenue en % =' err1 ;
*
'SI' ( err1 '>' 0.03 ) ;
   VTCT . 'N5' = (VTCT . 'N5') + 1 ;
'SINON' ;
   VTCT . 'N0' = (VTCT . 'N0') + 1 ;
'FINSI' ;
*
* [valid] FIN final


* ----- fin du cas guionnet_tra
FINPROC ;
*
* ---------------------------------------------------------------------
* Cas 40 : guionnet_tra (coque visco)
* ---------------------------------------------------------------------
SI ((IDEB0 '<EG' 40) 'ET' (IFIN0 '>EG' 40) 'ET' ('NON' ('EXIS' TSKIP 40))) ;
    MENAGE 'OBLI' ;
    MESS ' ' ;
    VMSG = CHAI '>>> Cas' ' ' '40' ' ' 'sur' ' ' NTOT0 ' ' ':' ' ' 'guionnet_tra' ' ' '(coque visco)' ;
    MESS VMSG ;
    NPASS = 2 ;
    SI IPASS3 ;
        NPASS = 3 ;
    FINSI ;
    VTH1 = 0 ;
    VTH2 = 0 ;
    VTH3 = 0 ;
    VNE51 = 0 ;
    VNE01 = 0 ;
    VNE52 = 0 ;
    VNE02 = 0 ;
    VNE53 = 0 ;
    VNE03 = 0 ;
    REPETER ZVRUN NPASS ;
* ordre des passes alterne d'un cas a l'autre (derive des temps en session)
        VIP = NPASS + 1 - &ZVRUN ;
        VPSW = (VIP '>' 1) ;
        VNIV = 1 ;
        VMPS = 'inactif' ;
        SI (VIP 'EGA' 2) ;
            VMPS = 'actif niveau 1' ;
        FINSI ;
        SI (VIP 'EGA' 3) ;
            VNIV = 2 ;
            VMPS = 'actif niveau 2' ;
        FINSI ;
        AVANCE VRES 40 NTOT0 'guionnet_tra' VIP 'en_cours' ;
        VMSG = CHAI '    passe' ' ' VIP ' ' 'sur' ' ' NPASS ' ' ': optimisations' ' ' VMPS ;
        MESS VMSG ;
        SI ITRACE0 ;
            OPTI 'IMPR' 'valid_trace.log' ;
        FINSI ;
        OPTI 'DIME' 3 'MODE' 'TRID' 'ELEM' 'CUB8' 'ECHO' IECHO0 ;
        VTHM = 0 ;
        REPETER ZVREP NREP0 ;
            VIR = &ZVREP ;
            VTFPR = TABL ;
            VTCT = TABL ;
            VTCT . 'N0' = 0 ;
            VTCT . 'N5' = 0 ;
            SI ITEMPS0 ;
                TEMP 'ZERO' ;
            FINSI ;
* Le cas s'execute dans une procedure (variables locales) : les variables
* d'un cas precedent ne peuvent pas masquer un mot-cle ou un operateur
            VC40 VPSW VNIV VTFPR VTCT IECHO0 ;
            VTHR = 0 ;
            SI ITEMPS0 ;
                VTHR = CHRONO ;
            FINSI ;
            SI (VIR 'EGA' 1) ;
                VTHM = VTHR ;
            SINON ;
                SI (VTHR '<' VTHM) ;
                    VTHM = VTHR ;
                FINSI ;
            FINSI ;
        FIN ZVREP ;
        VNER5 = VTCT . 'N5' ;
        VNER0 = VTCT . 'N0' ;
        SI (VIP 'EGA' 1) ;
            VTF1 = VTFPR ;
            VTH1 = VTHM ;
            VNE51 = VNER5 ;
            VNE01 = VNER0 ;
        FINSI ;
        SI (VIP 'EGA' 2) ;
            VTF2 = VTFPR ;
            VTH2 = VTHM ;
            VNE52 = VNER5 ;
            VNE02 = VNER0 ;
        FINSI ;
        SI (VIP 'EGA' 3) ;
            VTF3 = VTFPR ;
            VTH3 = VTHM ;
            VNE53 = VNER5 ;
            VNE03 = VNER0 ;
        FINSI ;
    FIN ZVRUN ;
*   comparaison des empreintes avec la passe 1
    VER2 VNL2 VNC2 = COMPAR VTF1 VTF2 ;
    VMOK2 = 'OK' ;
    SI ((VER2 '>' TOLV0) 'OU' (VNL2 '>' 0) 'OU' ('NON' (VNE52 'EGA' VNE51))) ;
        VMOK2 = 'ECART' ;
        VNBK2 = VNBK2 + 1 ;
    FINSI ;
    VER3 = 0. ;
    VNC3 = 0 ;
    VMOK3 = 'sans_objet' ;
    SI IPASS3 ;
        VER3 VNL3 VNC3 = COMPAR VTF1 VTF3 ;
        VMOK3 = 'OK' ;
        SI ((VER3 '>' TOLV3) 'OU' (VNL3 '>' 0) 'OU' ('NON' (VNE53 'EGA' VNE51))) ;
            VMOK3 = 'ECART' ;
            VNBK3 = VNBK3 + 1 ;
        FINSI ;
    FINSI ;
*   accelerations (temps de la passe 1 / temps de la passe)
    VSP2 = 0. ;
    VSP3 = 0. ;
    SI ((VTH1 '>' 0) 'ET' (VTH2 '>' 0)) ;
        VSP2 = (FLOT VTH1) '/' (FLOT VTH2) ;
    FINSI ;
    SI ((VTH1 '>' 0) 'ET' (VTH3 '>' 0)) ;
        VSP3 = (FLOT VTH1) '/' (FLOT VTH3) ;
    FINSI ;
    VSUM1 = VSUM1 + VTH1 ;
    VSUM2 = VSUM2 + VTH2 ;
    VSUM3 = VSUM3 + VTH3 ;
    VCLA = VTF2 . 'CL' ;
    VR2 = VTF2 . 'NRE' ;
    VC2 = VTF2 . 'NCA' ;
    VH2 = VTF2 . 'NHK' ;
    VM2 = VTF2 . 'NMA' ;
    VR3 = -1 ;
    VC3 = -1 ;
    VH3 = -1 ;
    VM3 = -1 ;
    SI IPASS3 ;
        VR3 = VTF3 . 'NRE' ;
        VC3 = VTF3 . 'NCA' ;
        VH3 = VTF3 . 'NHK' ;
        VM3 = VTF3 . 'NMA' ;
    FINSI ;
    VSE2 = CHAI 'FORMAT' '(1PE10.3)' VER2 ;
    VSE3 = CHAI 'FORMAT' '(1PE10.3)' VER3 ;
    VSS2 = CHAI 'FORMAT' '(F6.2)' VSP2 ;
    VSS3 = CHAI 'FORMAT' '(F6.2)' VSP3 ;
*   fichier de resultat du cas (SORT) et affichage console (MESS)
    OPTI 'SORT' 'valid_guionnet_tra.log' ;
    VMSG = CHAI '=== Cas' ' ' '40' ' ' ':' ' ' 'guionnet_tra' ' ' '(coque visco)' ' ' '===' ;
    MESS VMSG ;
    SORT 'CHAI' VMSG ;
    VMSG = CHAI 'Valeurs comparees :' ' ' VNC2 ;
    MESS VMSG ;
    SORT 'CHAI' VMSG ;
    VMSG = CHAI 'Temps horloge (ms) : origine' ' ' VTH1 ' ' '; niveau 1' ' ' VTH2 ' ' '; niveau 2' ' ' VTH3 ;
    MESS VMSG ;
    SORT 'CHAI' VMSG ;
    VMSG = CHAI 'Acceleration par rapport a l origine : niveau 1' ' ' VSS2 ' ' '; niveau 2' ' ' VSS3 ;
    MESS VMSG ;
    SORT 'CHAI' VMSG ;
    VMSG = CHAI 'Controles internes du cas : echecs origine' ' ' VNE51 ' ' '; niveau 1' ' ' VNE52 ' ' '; niveau 2' ' ' VNE53 ' ' '- reussites origine' ' ' VNE01 ' ' '; niveau 1' ' ' VNE02 ' ' '; niveau 2' ' ' VNE03 ;
    MESS VMSG ;
    SORT 'CHAI' VMSG ;
    VMSG = CHAI 'Classes exercees (1 MATVAR, 10 ENDOM, 20 VISCODOM, 100 GD) :' ' ' VCLA ;
    MESS VMSG ;
    SORT 'CHAI' VMSG ;
    VMSG = CHAI 'Niveau 1 : raideur reutilisee' ' ' VR2 ' ' 'fois, recalculee' ' ' VC2 ' ' 'fois ; HOOK evite' ' ' VH2 ' ' 'fois ; caracteristiques reutilisees' ' ' VM2 ' ' 'fois' ;
    MESS VMSG ;
    SORT 'CHAI' VMSG ;
    VMSG = CHAI 'Niveau 2 : raideur reutilisee' ' ' VR3 ' ' 'fois, recalculee' ' ' VC3 ' ' 'fois ; HOOK evite' ' ' VH3 ' ' 'fois ; caracteristiques reutilisees' ' ' VM3 ' ' 'fois' ;
    MESS VMSG ;
    SORT 'CHAI' VMSG ;
    VMSG = CHAI 'Ecart relatif maximal : niveau 1' ' ' VSE2 ' ' '; niveau 2' ' ' VSE3 ;
    MESS VMSG ;
    SORT 'CHAI' VMSG ;
    VMSG = CHAI 'RESULTAT : niveau 1' ' ' VMOK2 ' ' '; niveau 2' ' ' VMOK3 ;
    MESS VMSG ;
    SORT 'CHAI' VMSG ;
    SI (('EGA' VNC2 0) ) ;
        VMSG = CHAI 'ATTENTION : aucune valeur comparee (resultats non stockes ?)' ;
        MESS VMSG ;
        SORT 'CHAI' VMSG ;
    FINSI ;
    OPTI 'SORT' 'valid_inutile.tmp' ;
    VRES . 40 = TABL ;
    VRES . 40 . 'NOM' = 'guionnet_tra' ;
    VRES . 40 . 'OKM' = VMOK2 ;
    VRES . 40 . 'OK3' = VMOK3 ;
    VRES . 40 . 'ERR2' = VER2 ;
    VRES . 40 . 'ERR3' = VER3 ;
    VRES . 40 . 'TH1' = VTH1 ;
    VRES . 40 . 'TH2' = VTH2 ;
    VRES . 40 . 'TH3' = VTH3 ;
    VRES . 40 . 'SP2F' = VSP2 ;
    VRES . 40 . 'SP3F' = VSP3 ;
    VRES . 40 . 'NRE2' = VR2 ;
    VRES . 40 . 'NCA2' = VC2 ;
    VRES . 40 . 'NHK2' = VH2 ;
    VRES . 40 . 'NMA2' = VM2 ;
    VRES . 40 . 'NRE3' = VR3 ;
    VRES . 40 . 'NCA3' = VC3 ;
    VRES . 40 . 'NHK3' = VH3 ;
    VRES . 40 . 'CL' = VCLA ;
    VRES . 40 . 'NCMP' = VNC2 ;
    VMSG = CHAI '<<< Cas' ' ' '40' ' ' 'sur' ' ' NTOT0 ' ' ':' ' ' 'guionnet_tra' ' ' ':' ' ' 'niveau 1' ' ' VMOK2 ', niveau 2' ' ' VMOK3 ' ' '- ecart' ' ' VSE2 ', acceleration' ' ' VSS2 ' ' 'et' ' ' VSS3 ;
    MESS VMSG ;
    AVANCE VRES 40 NTOT0 'guionnet_tra' NPASS 'termine' ;
    MENAGE 'OBLI' ;
FINSI ;

*
* ---------------------------------------------------------------------
* Procedure du cas 41 : g_c_etoile_coque_1 (coque visco)
* Variables locales : le cas ne voit aucune variable des cas precedents
* ---------------------------------------------------------------------
DEBPROC VC41 VPSW*'LOGIQUE' VNIV*'ENTIER' VTFPR*'TABLE' VTCT*'TABLE' IECHO0*'ENTIER' ;
* ----- debut du cas g_c_etoile_coque_1

optio norm auto;
* fichier : g_c_etoile_coque_1.dgibi
****************************************************
* Section : Mecanique Rupture
****************************************************
*                                                  *
*       VALIDATION DE LA PROCEDURE G_THETA         *
*   POUR UN DEFAUT CIRCONFERENTIEL TRAVERSANT      *
* DANS UN TUYAU MODELISE AVEC DES ELEMENTS COQUES  *
*  SOLUTION DE REFERENCE : Ductile Fracture        *
*  Handbook, A. Zahoor                             *
*                                                  *
*                                                  *
*  GEOMETRIE : tube                                *
*                                                  *
*  longueur du tube          : 3000. MM            *
*  epaisseur du tube         :  17.5 MM            *
*  rayon moyen du tube       :  350. MM            *
*  longueur de la fissure    :   50. MM            *
*                                                  *
*  MATERIAU : loi de Norton                        *
*                                                  *
*  Module d'Young         : 2.E5 MPa               *
*  Coefficient de poisson : 0.3                    *
*  Coefficient N (Norton) : 7                      *
*  Coefficient A (Norton) : 3.E-24 /h/MPa^7        *
*                                                  *
*  CHARGEMENT :                                    *
*                                                  *
*  Traction pure          : 240.78 MPa             *
*                                                  *
*  SOLUTION ANALYTIQUE (APPROCHEE) :               *
*                                                  *
*  IntÃ©grale C*                                    *
*                C* = 2.025 kJ/m^2/h               *
*                                                  *
****************************************************

* VALIDATION COMPLETE OU JUSTE FONCTIONNEMENT
VALIDATION = vrai ;

* I - REALISATION DU CALCUL
* -------------------------

* OPTIONS
OPTI 'DIME' 3 'ELEM' 'TRI3' ;

* I.1 - MAILLAGE
* **************

* GEOMETRIE :
* R = RAYON
* E = EPAISSEUR
* L = LONGUEUR
* AN = ANGLE TOTAL DE LA FISSURE (15Â° < AN < 150Â°)

R = 350. ;
E = R/10. ;
L = 3000. ;
AN = 45. ;


* MAILLAGE
DENS1 = R/350. ;
DENS (100.*DENS1) ;
A = COS (AN/2.) ;
B = SIN (AN/2.) ;
VECT0 = (R/50.) 0. (B*R/(50.*A)) ;
VECT1 = 10.*VECT0 ;
C0 = 0. 0. 0. ;
CI = 0. (L/10.) 0. ;
CII = 0. (L/5.) 0. ;
C1 = 0. L 0. ;
P1 = R 0. 0. ;
FF = (A*R) 0. (B*R) ;
XCI = IPOL (PROG 15 20 60 90 120 150) (PROG 41 8 5 4 3 3) AN ;
LIS1 = PROG 23. 40. 70. 120. XCI ;
LEC1 = LECT 3 4 4 4 5 ;
TF = TABL ;
TL = TABL ;
TP = TABL ;
REPE I (DIME LIS1) ;
        FAC = EXTR LIS1 &I ;
        N1 = EXTR LEC1 &I ;
        A1 = (-1*R/FAC) 0. 0. ;
        A2 = 0. (R/FAC) 0. ;
        A3 = (R/FAC) 0. 0. ;
        TF.&I = ((CERC N1 A1 C0 A2 CERC N1 C0 A3) TOUR (90.-(AN/2.)) C0 CI)
                DEPL PLUS VECT1 ;
        TL.&I = TF.&I PROJ 'CYLI' VECT0 'CYLI' C0 CI P1 ;
        TP.(&I + 1) = TL.&I POIN 'FINAL' ;
        TP.(12 - &I) = TL.&I POIN 'INITIAL' ;
FIN I ;
P12 = (-1*R) 0. 0. ;
P13 = (-1*R) (L/10.) 0. ;
P14 = 0. (L/10.) R ;
P15 = R (L/10.) 0. ;
P16 = (-1*R) (L/5.) 0. ;
P17 = 0. (L/5.) R ;
P18 = R (L/5.) 0. ;
P19 = (-1*R) L 0. ;
P20 = 0. L R ;
P21 = R L 0. ;
XC5 = IPOL (PROG 15 20 60 90 120 150) (PROG 35 35 40 40 50 50) AN ;
XC6 = IPOL (PROG 15 20 60 90 120 150) (PROG -1 -3 -4 -4 -5 -5) AN ;
XC6 = ENTI XC6 ;
LIMTF = (TP.(6) CERC XC6 C0 (INVE TL.(1)) 'DINI' (XC5*DENS1) 'DFIN' (30*DENS1))
                        CERC XC6 C0 TL.(5) 'DINI' (30*DENS1) DFIN (XC5*DENS1) ;
XC3 = IPOL (PROG 15 20 60 90 120 150) (PROG 2 2 4 5 5 5) AN ;
LIMF = P1 CERC (ENTI XC3) C0 (INVE TL.(5)) ;
XC4 = IPOL (PROG 15 20 60 90 120 150) (PROG 16 14 13 12 10 10) AN ;
XC7 = IPOL (PROG 15 20 60 90 120 150) (PROG 3 20 20 30 30 33) AN ;
LIMF = (LIMF  CERC (ENTI (0. - XC4)) C0 P12 'DINI' (XC7*DENS1)
                'DFIN' (160*DENS1)) DROI P13 CERC CI P14 CERC CI P15 ;
XC2 = IPOL (PROG 15 20 60 90 120 150) (PROG 15 25 50 70 80 80) AN ;
LIMF = LIMF ET (DROI -5 P15 P1 'DINI' (120*DENS1) 'DFIN' (XC2*DENS1)) ;
SUF = LIMF SURF 'CYLI' C0 CI 'COUL' 'TURQ' ;
Z1 = COUT TL.(4) FF 'COUL' 'ROUG' ;
Z2 = COUT TL.(4) TL.(3) 'COUL' 'VERT' ;
Z3 = COUT TL.(3) TL.(2) 'COUL' 'ROSE' ;
Z4 = COUT TL.(2) TL.(1) 'COUL' 'ROUG' ;
Z5 = LIMTF SURF 'CYLI' C0 CI 'COUL' 'BLEU' ;
ZF = Z1 ET Z2 ET Z3 ET Z4 ET Z5 ;
SUF = SUF ET ZF ;
MIN = ((P15 CERC CI P14 CERC CI P13) TRAN 2 (0. (L/10.) 0.))
                TRAN 15 (0. (4.*(L/5.)) 0.) 'COUL' 'TURQ' ;
TOUT = SUF ET MIN ;
TOUT = ORIE TOUT 'POIN' (0. 0. 0.) ;
LIG = COTE 3 MIN ;
CONT1 = CONT TOUT ;
LISY = ELEM CONT1 'COMP' FF P12 ;
LIFI = ELEM CONT1 'COMP' FF P1 ;
ELIM (TOUT ET LIG) 1.E-3 ;
* TRAC 'QUAL' TOUT ;FIN ;


* I.2 - MODELE ET MATERIAU
* ************************

* PROPRIETES :
* MYOUN = MODULE D'YOUNG
* NU1 = COEFFICIENT DE POISSON
* AF1, AF2, AF3 = COEFFICIENTS DE NORTON

MYOUN = 2.E5 ;
NU1 = 0.3 ;
AF1 = 3.E-23 ;
AF2 = 7. ;
AF3 = 1. ;

* MODELE MULTICOUCHE
* ELEMENT POUR LE MODELE MULTICOUCHE
IELEM = 268 ;
ELEFIS = TOUT ELEM 'TRI3' IELEM ;
* EPAISSEUR TOTALE
EPAI_T = E ;
* NOMBRE DE COUCHES ET LEUR EPAISSEUR
NB_COU = 13 ;
EPAI_C = EPAI_T * 1.E-6 ;
* CREATION DU MODELE MULTICOUCHE
EPAI_I = (EPAI_T - (EPAI_C*NB_COU))/(NB_COU - 1) ;
TBEPAI = TABL ;
TBEXCE = TABLE ;
MOD_MUL = VIDE 'MMODEL' ;
MAT_MUL = VIDE 'MCHAML' ;
REPE I ((2*NB_COU) - 1) ;
        EX1 = (EPAI_I + EPAI_C)*(&I - NB_COU)/2. ;
        SI (EGA ((&I/2)*2) &I) ;
                EP1 = EPAI_I ;
        SINON ;
                EP1 = EPAI_C ;
        FINSI;
        MOD_MU1 = MODE ELEFIS 'MECANIQUE' 'ELASTIQUE' 'FLUAGE' 'NORTON' 'DKT'
                                                                'CONS' (CHAI &I) ;
        MAT_MU1 = MATE MOD_MU1 'YOUN' MYOUN 'NU' NU1 'AF1' AF1 'AF2' AF2 'AF3' AF3
                                                    'SMAX' 0. 'EPAI' EP1 'EXCE' EX1 ;
        MOD_MUL = MOD_MUL ET MOD_MU1 ;
        MAT_MUL = MAT_MUL ET MAT_MU1 ;
FIN I;

* RESTE DU MODELE
MOD0 = MODE (TOUT DIFF ELEFIS) 'MECANIQUE' 'ELASTIQUE' 'FLUAGE' 'NORTON' 'DKT' ;
MAT0 = MATE MOD0 'YOUN' MYOUN 'NU' NU1 'AF1' AF1 'AF2' AF2 'AF3' AF3
    'SMAX' 0. 'EPAI' E ;

* MODELE TOTAL
MOD1 = MOD0 ET MOD_MUL ;
MAT1 = MAT0 ET MAT_MUL ;


* I.3 - CONDITIONS AUX LIMITES ET CHARGEMENT
* ******************************************

* CHARGE LIMITE
SIG0 = 320. ;
TETARAD = (AN/2.)*(PI/180.) ;
V1 = 0.5*(SIN (AN/2.)) ;
V2 = (PI/180.)*(ATG V1 ((1. - (V1**2))**0.5)) ;
P0 = 2*SIG0*R*E*(PI - TETARAD - (2.*V2)) ;
* MESS 'P0 = ' P0 ;FIN ;
* CHARGEMENT
PINI3 = POIN LIG 'INITIAL' ;
PFIN3 = POIN LIG 'FINAL' ;
PMIL3 = (CHAN 'POI1' LIG) DIFF (PINI3 ET PFIN3) ;
MOEXT = (P0/2) / ((NBNO LIG) - 1) ;
MOMIL = MOEXT*(NBNO PMIL3) ;
F01 = (FORC 'FY' MOEXT (PINI3 ET PFIN3)) ET (FORC 'FY' MOMIL PMIL3) ;
EVT = EVOL 'MANU' 'T' (PROG 0. 0.1 1.E20) 'F(T)' (PROG 0. 1. 1.) ;
CHA1 = CHAR F01 EVT ;

* CLS
SXOZ = SYMT 'DEPL' 'ROTA' TP.(10) TP.(11) P12 LISY 1.E-8 ;
SXOY = SYMT 'DEPL' P1 P12 P21 TOUT 1.E-8 ;
CDL = BLOQ 'UX' (POIN LIG 'FINAL') ;
COLIM = SXOZ ET SXOY ET CDL ;


* I.4 - APPEL A PASAPAS
* *********************

TAB1 = TABL ;
TAB1.'MODELE' = MOD1 ;
TAB1.'CARACTERISTIQUES' = MAT1 ;
TAB1.'BLOCAGES_MECANIQUES' = COLIM ;
TAB1.'CHARGEMENT' = CHA1 ;
LIS1 = PROG 0. PAS 0.02 0.2 PAS 0.05 1. PAS 0.5 10. PAS 5. 100. PAS 50. 350. ;
SI VALIDATION ;
        TAB1.'TEMPS_CALCULES' = LIS1 ;
SINON ;
        TAB1.'TEMPS_CALCULES' = EXTR LIS1 (LECT 1 PAS 1 20) ;
FINSI ;
MES_SAUV = TABL ;
MES_SAUV.'DEFIN' = VRAI ;
TAB1.'MES_SAUVEGARDES' = MES_SAUV ;
TAB1 . 'PERF_RAID' = VPSW ; TAB1 . 'PERF_RAID_NIVEAU' = VNIV ; PASAPAS TAB1 ; FPREC TAB1 VTFPR ;

* COD
* COD = 2.*(EVOL 'TEMP' TAB1 'DEPLACEMENTS' 'UY' P1) ;
* DESS COD ;
* DEF1 = DEFO TAB1.'DEPLACEMENTS'.((DIME TAB1.'TEMPS') - 1) TOUT ;
* TRAC DEF1 ;


* II - APPEL A G_THETA ET COMPARAISON A LA SOLUTION ANALYTIQUE
* ------------------------------------------------------------

* II.1 - APPEL A G_THETA
* **********************

* ON RECUPERE LA FISSURE
LF = CONT1 ELEM 'COMPRIS' P1 FF ;
* TRAC ((TOUT COUL 'BLAN') ET (LF COUL 'ROUG') ET (ELEFIS COUL 'BLEU')) ;

* ON CREE LA TABLE SUPTAB
SUPTAB = TABL ;
SUPTAB.'SOLUTION_PASAPAS' = TAB1 ;
SUPTAB.'OBJECTIF' = 'C*' ;
SUPTAB.'LEVRE_SUPERIEURE' = LF ;
SUPTAB.'FRONT_FISSURE' = FF ;
SUPTAB.'COUCHE' = 4 ;
SUPTAB.'ELEMENT_MULTICOUCHE' = ELEFIS ;
SUPTAB.'POINT_1' = CI ;
SUPTAB.'POINT_2' = C0 ;

* ON APPELLE G_THETA
G_THETA SUPTAB ;
NDER = DIME SUPTAB.'RESULTATS' ;
C_GT = SUPTAB.'RESULTATS'.(NDER-1).'GLOBAL' ;


* II.2 - SOLUTION ANALYTIQUE
* **************************

SI VALIDATION ;
        H1 = 0.638 ;
        C_AN = SIG0*AF1*(SIG0**AF2)*R*PI*(1. - (AN/360.))*H1 ;
        ERR1 = (ABS (C_AN - C_GT)) / C_AN ;
        MESS  (CHAI 'ERREUR RELATIVE :' ' ' 'FORMAT' '(F4.1)' (100*ERR1) ' %') ;
        SI (ERR1 > 3.E-2) ;
                VTCT . 'N5' = (VTCT . 'N5') + 1 ;
        FINSI ;
FINSI ;
* [valid] FIN final


* ----- fin du cas g_c_etoile_coque_1
FINPROC ;
*
* ---------------------------------------------------------------------
* Cas 41 : g_c_etoile_coque_1 (coque visco)
* ---------------------------------------------------------------------
SI ((IDEB0 '<EG' 41) 'ET' (IFIN0 '>EG' 41) 'ET' ('NON' ('EXIS' TSKIP 41))) ;
    MENAGE 'OBLI' ;
    MESS ' ' ;
    VMSG = CHAI '>>> Cas' ' ' '41' ' ' 'sur' ' ' NTOT0 ' ' ':' ' ' 'g_c_etoile_coque_1' ' ' '(coque visco)' ;
    MESS VMSG ;
    NPASS = 2 ;
    SI IPASS3 ;
        NPASS = 3 ;
    FINSI ;
    VTH1 = 0 ;
    VTH2 = 0 ;
    VTH3 = 0 ;
    VNE51 = 0 ;
    VNE01 = 0 ;
    VNE52 = 0 ;
    VNE02 = 0 ;
    VNE53 = 0 ;
    VNE03 = 0 ;
    REPETER ZVRUN NPASS ;
* ordre des passes alterne d'un cas a l'autre (derive des temps en session)
        VIP = &ZVRUN ;
        VPSW = (VIP '>' 1) ;
        VNIV = 1 ;
        VMPS = 'inactif' ;
        SI (VIP 'EGA' 2) ;
            VMPS = 'actif niveau 1' ;
        FINSI ;
        SI (VIP 'EGA' 3) ;
            VNIV = 2 ;
            VMPS = 'actif niveau 2' ;
        FINSI ;
        AVANCE VRES 41 NTOT0 'g_c_etoile_coque_1' VIP 'en_cours' ;
        VMSG = CHAI '    passe' ' ' VIP ' ' 'sur' ' ' NPASS ' ' ': optimisations' ' ' VMPS ;
        MESS VMSG ;
        SI ITRACE0 ;
            OPTI 'IMPR' 'valid_trace.log' ;
        FINSI ;
        OPTI 'DIME' 3 'MODE' 'TRID' 'ELEM' 'CUB8' 'ECHO' IECHO0 ;
        VTHM = 0 ;
        REPETER ZVREP NREP0 ;
            VIR = &ZVREP ;
            VTFPR = TABL ;
            VTCT = TABL ;
            VTCT . 'N0' = 0 ;
            VTCT . 'N5' = 0 ;
            SI ITEMPS0 ;
                TEMP 'ZERO' ;
            FINSI ;
* Le cas s'execute dans une procedure (variables locales) : les variables
* d'un cas precedent ne peuvent pas masquer un mot-cle ou un operateur
            VC41 VPSW VNIV VTFPR VTCT IECHO0 ;
            VTHR = 0 ;
            SI ITEMPS0 ;
                VTHR = CHRONO ;
            FINSI ;
            SI (VIR 'EGA' 1) ;
                VTHM = VTHR ;
            SINON ;
                SI (VTHR '<' VTHM) ;
                    VTHM = VTHR ;
                FINSI ;
            FINSI ;
        FIN ZVREP ;
        VNER5 = VTCT . 'N5' ;
        VNER0 = VTCT . 'N0' ;
        SI (VIP 'EGA' 1) ;
            VTF1 = VTFPR ;
            VTH1 = VTHM ;
            VNE51 = VNER5 ;
            VNE01 = VNER0 ;
        FINSI ;
        SI (VIP 'EGA' 2) ;
            VTF2 = VTFPR ;
            VTH2 = VTHM ;
            VNE52 = VNER5 ;
            VNE02 = VNER0 ;
        FINSI ;
        SI (VIP 'EGA' 3) ;
            VTF3 = VTFPR ;
            VTH3 = VTHM ;
            VNE53 = VNER5 ;
            VNE03 = VNER0 ;
        FINSI ;
    FIN ZVRUN ;
*   comparaison des empreintes avec la passe 1
    VER2 VNL2 VNC2 = COMPAR VTF1 VTF2 ;
    VMOK2 = 'OK' ;
    SI ((VER2 '>' TOLV0) 'OU' (VNL2 '>' 0) 'OU' ('NON' (VNE52 'EGA' VNE51))) ;
        VMOK2 = 'ECART' ;
        VNBK2 = VNBK2 + 1 ;
    FINSI ;
    VER3 = 0. ;
    VNC3 = 0 ;
    VMOK3 = 'sans_objet' ;
    SI IPASS3 ;
        VER3 VNL3 VNC3 = COMPAR VTF1 VTF3 ;
        VMOK3 = 'OK' ;
        SI ((VER3 '>' TOLV3) 'OU' (VNL3 '>' 0) 'OU' ('NON' (VNE53 'EGA' VNE51))) ;
            VMOK3 = 'ECART' ;
            VNBK3 = VNBK3 + 1 ;
        FINSI ;
    FINSI ;
*   accelerations (temps de la passe 1 / temps de la passe)
    VSP2 = 0. ;
    VSP3 = 0. ;
    SI ((VTH1 '>' 0) 'ET' (VTH2 '>' 0)) ;
        VSP2 = (FLOT VTH1) '/' (FLOT VTH2) ;
    FINSI ;
    SI ((VTH1 '>' 0) 'ET' (VTH3 '>' 0)) ;
        VSP3 = (FLOT VTH1) '/' (FLOT VTH3) ;
    FINSI ;
    VSUM1 = VSUM1 + VTH1 ;
    VSUM2 = VSUM2 + VTH2 ;
    VSUM3 = VSUM3 + VTH3 ;
    VCLA = VTF2 . 'CL' ;
    VR2 = VTF2 . 'NRE' ;
    VC2 = VTF2 . 'NCA' ;
    VH2 = VTF2 . 'NHK' ;
    VM2 = VTF2 . 'NMA' ;
    VR3 = -1 ;
    VC3 = -1 ;
    VH3 = -1 ;
    VM3 = -1 ;
    SI IPASS3 ;
        VR3 = VTF3 . 'NRE' ;
        VC3 = VTF3 . 'NCA' ;
        VH3 = VTF3 . 'NHK' ;
        VM3 = VTF3 . 'NMA' ;
    FINSI ;
    VSE2 = CHAI 'FORMAT' '(1PE10.3)' VER2 ;
    VSE3 = CHAI 'FORMAT' '(1PE10.3)' VER3 ;
    VSS2 = CHAI 'FORMAT' '(F6.2)' VSP2 ;
    VSS3 = CHAI 'FORMAT' '(F6.2)' VSP3 ;
*   fichier de resultat du cas (SORT) et affichage console (MESS)
    OPTI 'SORT' 'valid_g_c_etoile_coque_1.log' ;
    VMSG = CHAI '=== Cas' ' ' '41' ' ' ':' ' ' 'g_c_etoile_coque_1' ' ' '(coque visco)' ' ' '===' ;
    MESS VMSG ;
    SORT 'CHAI' VMSG ;
    VMSG = CHAI 'Valeurs comparees :' ' ' VNC2 ;
    MESS VMSG ;
    SORT 'CHAI' VMSG ;
    VMSG = CHAI 'Temps horloge (ms) : origine' ' ' VTH1 ' ' '; niveau 1' ' ' VTH2 ' ' '; niveau 2' ' ' VTH3 ;
    MESS VMSG ;
    SORT 'CHAI' VMSG ;
    VMSG = CHAI 'Acceleration par rapport a l origine : niveau 1' ' ' VSS2 ' ' '; niveau 2' ' ' VSS3 ;
    MESS VMSG ;
    SORT 'CHAI' VMSG ;
    VMSG = CHAI 'Controles internes du cas : echecs origine' ' ' VNE51 ' ' '; niveau 1' ' ' VNE52 ' ' '; niveau 2' ' ' VNE53 ' ' '- reussites origine' ' ' VNE01 ' ' '; niveau 1' ' ' VNE02 ' ' '; niveau 2' ' ' VNE03 ;
    MESS VMSG ;
    SORT 'CHAI' VMSG ;
    VMSG = CHAI 'Classes exercees (1 MATVAR, 10 ENDOM, 20 VISCODOM, 100 GD) :' ' ' VCLA ;
    MESS VMSG ;
    SORT 'CHAI' VMSG ;
    VMSG = CHAI 'Niveau 1 : raideur reutilisee' ' ' VR2 ' ' 'fois, recalculee' ' ' VC2 ' ' 'fois ; HOOK evite' ' ' VH2 ' ' 'fois ; caracteristiques reutilisees' ' ' VM2 ' ' 'fois' ;
    MESS VMSG ;
    SORT 'CHAI' VMSG ;
    VMSG = CHAI 'Niveau 2 : raideur reutilisee' ' ' VR3 ' ' 'fois, recalculee' ' ' VC3 ' ' 'fois ; HOOK evite' ' ' VH3 ' ' 'fois ; caracteristiques reutilisees' ' ' VM3 ' ' 'fois' ;
    MESS VMSG ;
    SORT 'CHAI' VMSG ;
    VMSG = CHAI 'Ecart relatif maximal : niveau 1' ' ' VSE2 ' ' '; niveau 2' ' ' VSE3 ;
    MESS VMSG ;
    SORT 'CHAI' VMSG ;
    VMSG = CHAI 'RESULTAT : niveau 1' ' ' VMOK2 ' ' '; niveau 2' ' ' VMOK3 ;
    MESS VMSG ;
    SORT 'CHAI' VMSG ;
    SI (('EGA' VNC2 0) ) ;
        VMSG = CHAI 'ATTENTION : aucune valeur comparee (resultats non stockes ?)' ;
        MESS VMSG ;
        SORT 'CHAI' VMSG ;
    FINSI ;
    OPTI 'SORT' 'valid_inutile.tmp' ;
    VRES . 41 = TABL ;
    VRES . 41 . 'NOM' = 'g_c_etoile_coque_1' ;
    VRES . 41 . 'OKM' = VMOK2 ;
    VRES . 41 . 'OK3' = VMOK3 ;
    VRES . 41 . 'ERR2' = VER2 ;
    VRES . 41 . 'ERR3' = VER3 ;
    VRES . 41 . 'TH1' = VTH1 ;
    VRES . 41 . 'TH2' = VTH2 ;
    VRES . 41 . 'TH3' = VTH3 ;
    VRES . 41 . 'SP2F' = VSP2 ;
    VRES . 41 . 'SP3F' = VSP3 ;
    VRES . 41 . 'NRE2' = VR2 ;
    VRES . 41 . 'NCA2' = VC2 ;
    VRES . 41 . 'NHK2' = VH2 ;
    VRES . 41 . 'NMA2' = VM2 ;
    VRES . 41 . 'NRE3' = VR3 ;
    VRES . 41 . 'NCA3' = VC3 ;
    VRES . 41 . 'NHK3' = VH3 ;
    VRES . 41 . 'CL' = VCLA ;
    VRES . 41 . 'NCMP' = VNC2 ;
    VMSG = CHAI '<<< Cas' ' ' '41' ' ' 'sur' ' ' NTOT0 ' ' ':' ' ' 'g_c_etoile_coque_1' ' ' ':' ' ' 'niveau 1' ' ' VMOK2 ', niveau 2' ' ' VMOK3 ' ' '- ecart' ' ' VSE2 ', acceleration' ' ' VSS2 ' ' 'et' ' ' VSS3 ;
    MESS VMSG ;
    AVANCE VRES 41 NTOT0 'g_c_etoile_coque_1' NPASS 'termine' ;
    MENAGE 'OBLI' ;
FINSI ;

*
* ---------------------------------------------------------------------
* Procedure du cas 42 : PoutreConsole_Plas_EcrouCineLine (poutre plastique)
* Variables locales : le cas ne voit aucune variable des cas precedents
* ---------------------------------------------------------------------
DEBPROC VC42 VPSW*'LOGIQUE' VNIV*'ENTIER' VTFPR*'TABLE' VTCT*'TABLE' IECHO0*'ENTIER' ;
* ----- debut du cas PoutreConsole_Plas_EcrouCineLine

* fichier : poutrconsole_plas_ecroucineline.dgibi
**-------------------------------------------------------------**
**                POUTRE CONSOLE EN FLEXION                    **
** MATERIAU ELASTOPLASTIQUE A ECROUISSAGE CINEMATIQUE LINEAIRE **
**-------------------------------------------------------------**
* Option de trace : VRAI/FAUX
B_GRAPH = FAUX ;

'OPTION' 'ECHO' IECHO0 ;

'OPTION' 'DIME' 3 'ELEM' 'SEG2' ;

p1 = 'POIN' 0. 0. 0. ;
p2 = 'POIN' 10. 0. 0. ;
l1 = 'DROI' 1 p1 p2 ;

mod1 = 'MODELISER' l1 'MECANIQUE' 'ELASTIQUE' 'PLASTIQUE' 'CINEMATIQUE' 'POUT' ;
mat1 = 'MATERIAU' mod1 'YOUN' 1.E7 'NU' 0.3 'SIGY' 1.E4 'H' 1.E6
                       'SECT' 0.1 'INRY' 8.3333E-5 'INRZ' 8.33333E-3 'TORS' 1.E-4
                       'VECT' (0. 1. 0.) 'DX' 0. 'DY' 0. 'DZ' 0.3333 ;

f1  = 'FORC' (0. +10. 0.) p2 ;
cl1 = 'BLOQ' 'DEPL' 'ROTA' p1 ;

lis1 = 'PROG' 0. 3. 6. 9. 12. ;
lis2 = 'PROG' 0. 3. 0. -3. 0.;
ev   = 'EVOL' 'MANU' 'Temps' lis1 'F(t)' lis2 ;
cha1 = 'CHAR' 'MECA' f1 ev ;

tab1 = 'TABL' ;
tab1 . 'MODELE'              = mod1 ;
tab1 . 'CARACTERISTIQUES'    = mat1 ;
tab1 . 'CHARGEMENT'          = cha1 ;
tab1 . 'BLOCAGES_MECANIQUES' = cl1 ;
tab1 . 'TEMPS_CALCULES'      = 'PROG' 0. 'PAS' 0.10 12. ;
tab1 . 'STABILITE'           = FAUX ;
tab1 . 'K_SIGMA'             = FAUX ;
tab1 . 'GRANDS_DEPLACEMENTS' = FAUX ;
tab1 . 'PRECISION'           = 1.E-8 ;

tab1 . 'PERF_RAID' = VPSW ; tab1 . 'PERF_RAID_NIVEAU' = VNIV ; PASAPAS tab1 ; FPREC tab1 VTFPR ;

* Quelques depouillements :
* Passage Reactions -> Force imposee * -1.  (ev_FY = 10. * ev !)
ev_t_FY = (EVOL 'TEMP' tab1 'REACTIONS'    'FY' p1) '*' -1. ;

ev_t_UY = EVOL 'TEMP' tab1 'DEPLACEMENTS' 'UY' p2 ;

ev_UY_FY = EVOL 'MANU' ('EXTR' ev_t_UY 'ORDO') 'DEPLACEMENT'
                       ('EXTR' ev_t_FY 'ORDO') 'FORCE' ;

ev_t_EPSE = EVOL 'TEMP' tab1 'VARIABLES_INTERNES' 'EPSE' 1 1 1 ;

** lister ev_t_FY ; lister ev_t_UY ; lister ev_UY_FY ; lister ev_t_EPSE ;

* Quelques traces eventuels
* Attention : selon la discretisation temporelle retenue (TEMPS SAUVES), on peut
* "ne pas avoir" l'instant correspondant a la limite d'elasticite !
'SI' B_GRAPH ;
  'DESSIN' ev_t_FY   'GRIL' 'POIN' 'TITR' 'Courbe Force - Temps' ;
  'DESSIN' ev_t_UY   'GRIL' 'POIN' 'TITR' 'Courbe Deplacement - Temps' ;
  'DESSIN' ev_UY_FY  'GRIL' 'POIN' 'TITR' 'Courbe Force - Deplacement' ;
  'DESSIN' ev_t_EPSE 'GRIL' 'POIN' 'TITR' 'Courbe Epse - Temps' ;
'FINSI' ;

* Tests de verification :
l_UY_1 = 'IPOL' lis1 ev_t_UY ;
l_FY_2 = 'IPOL' lis1 ev_t_FY ;
l_EP_3 = 'IPOL' lis1 ev_t_EPSE ;

** list l_UY_1 ; list l_FY_2 ; list l_EP_3 ;

ref_UY_1 = 'PROG' 0.0000    0.31990      0.19990     -0.31990     -0.19990 ;
ref_FY_2 = 'PROG' 0.0000     30.000      0.00000     -30.000      0.00000 ;
ref_EP_3 = 'PROG' 0.0000   1.99880E-03  1.99880E-03  5.99641E-03  5.99641E-03 ;

'MESS' ;
'MESS' 'Les comparaisons sont faites pour un maillage avec 1 ELEMENT !' ;
'MESS' ;
r_z = 'MAXI' ('ABS' (l_UY_1 '-' ref_UY_1)) ;
'MESS' 'Comparaison fleche calculee/reference :' ' ' r_z ;
'SI' ('>EG' r_z 7.E-7) ;
  'MESS' 'ERREUR sur la fleche calculee' ; 'ERREUR' 5 ;
'FINSI' ;
r_z = 'MAXI' ('ABS' (l_FY_2 '-' ref_FY_2)) ;
'MESS' 'Comparaison force imposee calculee/reference :' ' ' r_z ;
'SI' ('>EG' r_z 5.E-12) ;
  'MESS' 'ERREUR ANORMALE sur la force imposee' ; 'ERREUR' 5 ;
'FINSI' ;
r_z = 'MAXI' ('ABS' (l_EP_3 '-' ref_EP_3)) ;
'MESS' 'Comparaison deformation plastique cumulee calculee/reference :' ' ' r_z ;
'SI' ('>EG' r_z 6.E-9) ;
  'MESS' 'ERREUR sur la deformation plastique cumulee' ; 'ERREUR' 5 ;
'FINSI' ;
'MESS' ;
* [valid] FIN final


* ----- fin du cas PoutreConsole_Plas_EcrouCineLine
FINPROC ;
*
* ---------------------------------------------------------------------
* Cas 42 : PoutreConsole_Plas_EcrouCineLine (poutre plastique)
* ---------------------------------------------------------------------
SI ((IDEB0 '<EG' 42) 'ET' (IFIN0 '>EG' 42) 'ET' ('NON' ('EXIS' TSKIP 42))) ;
    MENAGE 'OBLI' ;
    MESS ' ' ;
    VMSG = CHAI '>>> Cas' ' ' '42' ' ' 'sur' ' ' NTOT0 ' ' ':' ' ' 'PoutreConsole_Plas_EcrouCineLine' ' ' '(poutre plastique)' ;
    MESS VMSG ;
    NPASS = 2 ;
    SI IPASS3 ;
        NPASS = 3 ;
    FINSI ;
    VTH1 = 0 ;
    VTH2 = 0 ;
    VTH3 = 0 ;
    VNE51 = 0 ;
    VNE01 = 0 ;
    VNE52 = 0 ;
    VNE02 = 0 ;
    VNE53 = 0 ;
    VNE03 = 0 ;
    REPETER ZVRUN NPASS ;
* ordre des passes alterne d'un cas a l'autre (derive des temps en session)
        VIP = NPASS + 1 - &ZVRUN ;
        VPSW = (VIP '>' 1) ;
        VNIV = 1 ;
        VMPS = 'inactif' ;
        SI (VIP 'EGA' 2) ;
            VMPS = 'actif niveau 1' ;
        FINSI ;
        SI (VIP 'EGA' 3) ;
            VNIV = 2 ;
            VMPS = 'actif niveau 2' ;
        FINSI ;
        AVANCE VRES 42 NTOT0 'PoutreConsole_Plas_EcrouCineLine' VIP 'en_cours' ;
        VMSG = CHAI '    passe' ' ' VIP ' ' 'sur' ' ' NPASS ' ' ': optimisations' ' ' VMPS ;
        MESS VMSG ;
        SI ITRACE0 ;
            OPTI 'IMPR' 'valid_trace.log' ;
        FINSI ;
        OPTI 'DIME' 3 'MODE' 'TRID' 'ELEM' 'CUB8' 'ECHO' IECHO0 ;
        VTHM = 0 ;
        REPETER ZVREP NREP0 ;
            VIR = &ZVREP ;
            VTFPR = TABL ;
            VTCT = TABL ;
            VTCT . 'N0' = 0 ;
            VTCT . 'N5' = 0 ;
            SI ITEMPS0 ;
                TEMP 'ZERO' ;
            FINSI ;
* Le cas s'execute dans une procedure (variables locales) : les variables
* d'un cas precedent ne peuvent pas masquer un mot-cle ou un operateur
            VC42 VPSW VNIV VTFPR VTCT IECHO0 ;
            VTHR = 0 ;
            SI ITEMPS0 ;
                VTHR = CHRONO ;
            FINSI ;
            SI (VIR 'EGA' 1) ;
                VTHM = VTHR ;
            SINON ;
                SI (VTHR '<' VTHM) ;
                    VTHM = VTHR ;
                FINSI ;
            FINSI ;
        FIN ZVREP ;
        VNER5 = VTCT . 'N5' ;
        VNER0 = VTCT . 'N0' ;
        SI (VIP 'EGA' 1) ;
            VTF1 = VTFPR ;
            VTH1 = VTHM ;
            VNE51 = VNER5 ;
            VNE01 = VNER0 ;
        FINSI ;
        SI (VIP 'EGA' 2) ;
            VTF2 = VTFPR ;
            VTH2 = VTHM ;
            VNE52 = VNER5 ;
            VNE02 = VNER0 ;
        FINSI ;
        SI (VIP 'EGA' 3) ;
            VTF3 = VTFPR ;
            VTH3 = VTHM ;
            VNE53 = VNER5 ;
            VNE03 = VNER0 ;
        FINSI ;
    FIN ZVRUN ;
*   comparaison des empreintes avec la passe 1
    VER2 VNL2 VNC2 = COMPAR VTF1 VTF2 ;
    VMOK2 = 'OK' ;
    SI ((VER2 '>' TOLV0) 'OU' (VNL2 '>' 0) 'OU' ('NON' (VNE52 'EGA' VNE51))) ;
        VMOK2 = 'ECART' ;
        VNBK2 = VNBK2 + 1 ;
    FINSI ;
    VER3 = 0. ;
    VNC3 = 0 ;
    VMOK3 = 'sans_objet' ;
    SI IPASS3 ;
        VER3 VNL3 VNC3 = COMPAR VTF1 VTF3 ;
        VMOK3 = 'OK' ;
        SI ((VER3 '>' TOLV3) 'OU' (VNL3 '>' 0) 'OU' ('NON' (VNE53 'EGA' VNE51))) ;
            VMOK3 = 'ECART' ;
            VNBK3 = VNBK3 + 1 ;
        FINSI ;
    FINSI ;
*   accelerations (temps de la passe 1 / temps de la passe)
    VSP2 = 0. ;
    VSP3 = 0. ;
    SI ((VTH1 '>' 0) 'ET' (VTH2 '>' 0)) ;
        VSP2 = (FLOT VTH1) '/' (FLOT VTH2) ;
    FINSI ;
    SI ((VTH1 '>' 0) 'ET' (VTH3 '>' 0)) ;
        VSP3 = (FLOT VTH1) '/' (FLOT VTH3) ;
    FINSI ;
    VSUM1 = VSUM1 + VTH1 ;
    VSUM2 = VSUM2 + VTH2 ;
    VSUM3 = VSUM3 + VTH3 ;
    VCLA = VTF2 . 'CL' ;
    VR2 = VTF2 . 'NRE' ;
    VC2 = VTF2 . 'NCA' ;
    VH2 = VTF2 . 'NHK' ;
    VM2 = VTF2 . 'NMA' ;
    VR3 = -1 ;
    VC3 = -1 ;
    VH3 = -1 ;
    VM3 = -1 ;
    SI IPASS3 ;
        VR3 = VTF3 . 'NRE' ;
        VC3 = VTF3 . 'NCA' ;
        VH3 = VTF3 . 'NHK' ;
        VM3 = VTF3 . 'NMA' ;
    FINSI ;
    VSE2 = CHAI 'FORMAT' '(1PE10.3)' VER2 ;
    VSE3 = CHAI 'FORMAT' '(1PE10.3)' VER3 ;
    VSS2 = CHAI 'FORMAT' '(F6.2)' VSP2 ;
    VSS3 = CHAI 'FORMAT' '(F6.2)' VSP3 ;
*   fichier de resultat du cas (SORT) et affichage console (MESS)
    OPTI 'SORT' 'valid_PoutreConsole_Plas_EcrouCineLine.log' ;
    VMSG = CHAI '=== Cas' ' ' '42' ' ' ':' ' ' 'PoutreConsole_Plas_EcrouCineLine' ' ' '(poutre plastique)' ' ' '===' ;
    MESS VMSG ;
    SORT 'CHAI' VMSG ;
    VMSG = CHAI 'Valeurs comparees :' ' ' VNC2 ;
    MESS VMSG ;
    SORT 'CHAI' VMSG ;
    VMSG = CHAI 'Temps horloge (ms) : origine' ' ' VTH1 ' ' '; niveau 1' ' ' VTH2 ' ' '; niveau 2' ' ' VTH3 ;
    MESS VMSG ;
    SORT 'CHAI' VMSG ;
    VMSG = CHAI 'Acceleration par rapport a l origine : niveau 1' ' ' VSS2 ' ' '; niveau 2' ' ' VSS3 ;
    MESS VMSG ;
    SORT 'CHAI' VMSG ;
    VMSG = CHAI 'Controles internes du cas : echecs origine' ' ' VNE51 ' ' '; niveau 1' ' ' VNE52 ' ' '; niveau 2' ' ' VNE53 ' ' '- reussites origine' ' ' VNE01 ' ' '; niveau 1' ' ' VNE02 ' ' '; niveau 2' ' ' VNE03 ;
    MESS VMSG ;
    SORT 'CHAI' VMSG ;
    VMSG = CHAI 'Classes exercees (1 MATVAR, 10 ENDOM, 20 VISCODOM, 100 GD) :' ' ' VCLA ;
    MESS VMSG ;
    SORT 'CHAI' VMSG ;
    VMSG = CHAI 'Niveau 1 : raideur reutilisee' ' ' VR2 ' ' 'fois, recalculee' ' ' VC2 ' ' 'fois ; HOOK evite' ' ' VH2 ' ' 'fois ; caracteristiques reutilisees' ' ' VM2 ' ' 'fois' ;
    MESS VMSG ;
    SORT 'CHAI' VMSG ;
    VMSG = CHAI 'Niveau 2 : raideur reutilisee' ' ' VR3 ' ' 'fois, recalculee' ' ' VC3 ' ' 'fois ; HOOK evite' ' ' VH3 ' ' 'fois ; caracteristiques reutilisees' ' ' VM3 ' ' 'fois' ;
    MESS VMSG ;
    SORT 'CHAI' VMSG ;
    VMSG = CHAI 'Ecart relatif maximal : niveau 1' ' ' VSE2 ' ' '; niveau 2' ' ' VSE3 ;
    MESS VMSG ;
    SORT 'CHAI' VMSG ;
    VMSG = CHAI 'RESULTAT : niveau 1' ' ' VMOK2 ' ' '; niveau 2' ' ' VMOK3 ;
    MESS VMSG ;
    SORT 'CHAI' VMSG ;
    SI (('EGA' VNC2 0) ) ;
        VMSG = CHAI 'ATTENTION : aucune valeur comparee (resultats non stockes ?)' ;
        MESS VMSG ;
        SORT 'CHAI' VMSG ;
    FINSI ;
    OPTI 'SORT' 'valid_inutile.tmp' ;
    VRES . 42 = TABL ;
    VRES . 42 . 'NOM' = 'PoutreConsole_Plas_EcrouCineLine' ;
    VRES . 42 . 'OKM' = VMOK2 ;
    VRES . 42 . 'OK3' = VMOK3 ;
    VRES . 42 . 'ERR2' = VER2 ;
    VRES . 42 . 'ERR3' = VER3 ;
    VRES . 42 . 'TH1' = VTH1 ;
    VRES . 42 . 'TH2' = VTH2 ;
    VRES . 42 . 'TH3' = VTH3 ;
    VRES . 42 . 'SP2F' = VSP2 ;
    VRES . 42 . 'SP3F' = VSP3 ;
    VRES . 42 . 'NRE2' = VR2 ;
    VRES . 42 . 'NCA2' = VC2 ;
    VRES . 42 . 'NHK2' = VH2 ;
    VRES . 42 . 'NMA2' = VM2 ;
    VRES . 42 . 'NRE3' = VR3 ;
    VRES . 42 . 'NCA3' = VC3 ;
    VRES . 42 . 'NHK3' = VH3 ;
    VRES . 42 . 'CL' = VCLA ;
    VRES . 42 . 'NCMP' = VNC2 ;
    VMSG = CHAI '<<< Cas' ' ' '42' ' ' 'sur' ' ' NTOT0 ' ' ':' ' ' 'PoutreConsole_Plas_EcrouCineLine' ' ' ':' ' ' 'niveau 1' ' ' VMOK2 ', niveau 2' ' ' VMOK3 ' ' '- ecart' ' ' VSE2 ', acceleration' ' ' VSS2 ' ' 'et' ' ' VSS3 ;
    MESS VMSG ;
    AVANCE VRES 42 NTOT0 'PoutreConsole_Plas_EcrouCineLine' NPASS 'termine' ;
    MENAGE 'OBLI' ;
FINSI ;

*
* ---------------------------------------------------------------------
* Procedure du cas 43 : fluage_fibre_norton_1 (poutre fibres fluage)
* Variables locales : le cas ne voit aucune variable des cas precedents
* ---------------------------------------------------------------------
DEBPROC VC43 VPSW*'LOGIQUE' VNIV*'ENTIER' VTFPR*'TABLE' VTCT*'TABLE' IECHO0*'ENTIER' ;
* ----- debut du cas fluage_fibre_norton_1

* fichier : fluage_fibre_norton_1.dgibi
************************************************************************
* Test du modele de fluage de Norton pour les modeles de section       *
* (appeles aussi modeles de poutre a fibre)                            *
* --> chargement uniaxial en traction                                  *
* --> comparaison a la solution analytique                             *
************************************************************************


** Options generales
OPTI 'DIME' 3 'ELEM' 'QUA4' 'ECHO' IECHO0 ;
itrac = FAUX ;


** Parametres geometrie (poutre a section rectangulaire)
a = 0.05 ;
b = 0.02 ;
l = 1. ;
se = a * b ;


** Nombres d'elements
nea = 5 ;
neb = 5 ;
nel = 10 ;


** Parametres materiau
yo = 1.E8 ;
nu = 0.3 ;
af1 = 3.E-13 ;
af2 = 1. ;
af3 = 1.4 ;


** Parametres chargement
ftrac = 10000. ;
tl = 1000. ;


** Maillage et modele de section
lig1 = DROI nea ((-0.5 * a) (-0.5 * b) 0.) ((0.5 * a) (-0.5 * b) 0.) ;
s1 = lig1 TRAN neb (0. b 0.) ;
s1 = SURF (CONT s1) 'PLAN' ;
mos = MODE s1 'MECANIQUE' 'ELASTIQUE' 'PLASTIQUE' 'NORTON' 'QUAS' 'TRIS' ;
mas = MATE mos 'YOUN' yo 'NU' nu 'AF1' af1 'AF2' af2 'AF3' af3 'SMAX' (yo / 1000.) 'ALPY' 0.66 'ALPZ' 0.66 ;


** Maillage et modele de poutre TIMO
p0 = 0. 0. 0. ;
p1 = l 0. 0. ;
lf = DROI nel p0 p1 ;
mop = MODE lf 'MECANIQUE' 'ELASTIQUE' 'SECTION' 'PLASTIQUE' 'SECTION' 'TIMO' ;
map = MATE mop 'MODS' mos 'MATS' mas 'VECT' (0. 1. 0.) ;


** Conditions aux limites
tl0 = 1.E-5 ;
evcha = EVOL 'MANU' (PROG 0. tl0 tl) (PROG 0. 1. 1.) ;
bl1p  = BLOQ 'DEPL' 'ROTA' p0 ;
ftp = FORC (ftrac 0. 0.) p1 ;
chaftp = CHAR 'MECA' ftp evcha ;


** Resolution
xpas = tl / 50. ;
ltc  = PROG tl0 'PAS' xpas tl ;
tp = TABL ;
tp . 'MODELE' = mop ;
tp . 'CARACTERISTIQUES' = map ;
chmsg0 = ZERO mos 'CONTRAIN' ;
chmvi0 = ZERO mos 'VARINTER' ;
tp . 'VARIABLES_INTERNES' = TABL ;
tp . 'VARIABLES_INTERNES' . 0 = MANU 'CHML' mop 'VONS' chmsg0 'VAIS' chmvi0 'TYPE' 'VARIABLES INTERNES' 'STRESSES' ;
tp . 'BLOCAGES_MECANIQUES' = bl1p ;
tp . 'CHARGEMENT' = chaftp ;
tp . 'TEMPS_CALCULES'  = ltc ;
TEMP 'ZERO' ;
tp . 'PERF_RAID' = VPSW ; tp . 'PERF_RAID_NIVEAU' = VNIV ; PASAPAS tp ; FPREC tp VTFPR ;
itp1 = TEMP 'HORL' ;
MESS 'Temps horloge :' ' ' itp1 ;
MESS ;


** Post traitement
n1 = DIME (tp . 'TEMPS') ;
* deplacements de l'extremite
lup = EXTR (EVOL 'TEMP' tp 'DEPLACEMENTS' 'UX' p1) 'ORDO' ;
* force de reaction a l'encastrement
lfp = EXTR (EVOL 'TEMP' tp 'REACTIONS' 'FX' p0) 'ORDO' ;
* defomration inelastique moyenne dans la poutre
ltps = PROG ;
lep = PROG 0. ;
REPE b1 (n1 - 1) ;
  tps1 = tp . 'TEMPS' . &b1 ;
  ltps = ltps ET tps1 ;
  up = tp . 'DEPLACEMENTS' . &b1 ;
  tabv = TABL ;
  tabv . 'DEPLACEMENTS' = TABL ;
  tabv . 'DEPLACEMENTS' . 1 = up ;
  tabv . 'VONS' = TABL ;
  tabv . 'VONS' . 1 = EXCO (tp . 'VARIABLES_INTERNES' . &b1) 'VONS' ;
  tabv . 'VAIS' = TABL ;
  tabv . 'VAIS' . 1 = EXCO (tp . 'VARIABLES_INTERNES' . &b1) 'VAIS' ;
  mail1 = POUT2MAS mop map 'GAUSS' tabv ;
  vips = tabv . 'VAIS_3D' . 1 ;
  mobid = MODE mail1 'MECANIQUE' ;
  cham1 = CHAN 'CHAM' mobid vips ;
  epsep = (INTG mobid cham1 'EPSE') * l / nel / se ;
  lep = lep ET epsep ;
FIN b1 ;


** Solutions analytiques
sigt = (ABS ftrac) / se ;
let = af1 * (sigt ** af2) * (ltps ** af3) ;
lut = (let + (sigt / yo)) / l ;
lft = PROG 0. (n1 - 1)*(-1. * ftrac) ;
let = (PROG 0.) ET let ;
lut = (PROG 0.) ET lut ;
ltps = (PROG 0.) ET ltps ;
evut = EVOL 'MANU' 'DEFA' ltps lut ;
evft = EVOL 'MANU' 'DEFA' ltps lft ;
evet = EVOL 'MANU' 'DEFA' ltps let ;


** Analyse/trace des resultats
tleg = TABL ;
tleg . 2 = MOT 'MARQ ROND NOLI' ;
tleg . 'TITRE' = TABL ;
tleg . 'TITRE' . 1 = 'Soluce analytique' ;
tleg . 'TITRE' . 2 = 'Modele poutre fibre' ;
MESS 'Ecart relatif max.' ;
evup = EVOL 'ROUG' 'MANU' 'Temps' ltps 'Deplacement' lup ;
difu = (MAXI (ABS (lup - lut))) / (MAXI (ABS lut)) ;
MESS '-- deplacement :' difu ;
SI itrac ;
  DESS (evut ET evup) 'TITR' 'Deplacement vs. Temps' 'LEGE' tleg ;
FINSI ;
evfp = EVOL 'ROUG' 'MANU' 'Temps' ltps 'Force' lfp ;
diff = (MAXI (ABS (lfp - lft))) / (MAXI (ABS lft)) ;
MESS '-- effort      :' diff ;
SI itrac ;
  DESS (evft ET evfp) 'TITR' 'Force vs. Temps' 'LEGE' tleg ;
FINSI ;
evep = EVOL 'ROUG' 'MANU' 'TEMPS' ltps 'ESPE' lep ;
dife = (MAXI (ABS (lep - let))) / (MAXI (ABS let)) ;
MESS '-- def. fluage :' dife ;
SI itrac ;
  DESS (evet ET evep) 'TITR' 'Deformation non lin. (EPSE) vs Temps' 'LEGE' tleg ;
FINSI ;


** Erreur si l'ecart relatif est trop eleve
lerr = PROG difu diff dife ;
errmax = MAXI lerr ;
MESS ;
SI (errmax > 2.E-3) ;
  MESS 'Echec du cas test !' ;
  VTCT . 'N5' = (VTCT . 'N5') + 1 ;
SINON ;
  MESS 'Succes du cas test !' ;
FINSI ;
* [valid] FIN final


* ----- fin du cas fluage_fibre_norton_1
FINPROC ;
*
* ---------------------------------------------------------------------
* Cas 43 : fluage_fibre_norton_1 (poutre fibres fluage)
* ---------------------------------------------------------------------
SI ((IDEB0 '<EG' 43) 'ET' (IFIN0 '>EG' 43) 'ET' ('NON' ('EXIS' TSKIP 43))) ;
    MENAGE 'OBLI' ;
    MESS ' ' ;
    VMSG = CHAI '>>> Cas' ' ' '43' ' ' 'sur' ' ' NTOT0 ' ' ':' ' ' 'fluage_fibre_norton_1' ' ' '(poutre fibres fluage)' ;
    MESS VMSG ;
    NPASS = 2 ;
    SI IPASS3 ;
        NPASS = 3 ;
    FINSI ;
    VTH1 = 0 ;
    VTH2 = 0 ;
    VTH3 = 0 ;
    VNE51 = 0 ;
    VNE01 = 0 ;
    VNE52 = 0 ;
    VNE02 = 0 ;
    VNE53 = 0 ;
    VNE03 = 0 ;
    REPETER ZVRUN NPASS ;
* ordre des passes alterne d'un cas a l'autre (derive des temps en session)
        VIP = &ZVRUN ;
        VPSW = (VIP '>' 1) ;
        VNIV = 1 ;
        VMPS = 'inactif' ;
        SI (VIP 'EGA' 2) ;
            VMPS = 'actif niveau 1' ;
        FINSI ;
        SI (VIP 'EGA' 3) ;
            VNIV = 2 ;
            VMPS = 'actif niveau 2' ;
        FINSI ;
        AVANCE VRES 43 NTOT0 'fluage_fibre_norton_1' VIP 'en_cours' ;
        VMSG = CHAI '    passe' ' ' VIP ' ' 'sur' ' ' NPASS ' ' ': optimisations' ' ' VMPS ;
        MESS VMSG ;
        SI ITRACE0 ;
            OPTI 'IMPR' 'valid_trace.log' ;
        FINSI ;
        OPTI 'DIME' 3 'MODE' 'TRID' 'ELEM' 'CUB8' 'ECHO' IECHO0 ;
        VTHM = 0 ;
        REPETER ZVREP NREP0 ;
            VIR = &ZVREP ;
            VTFPR = TABL ;
            VTCT = TABL ;
            VTCT . 'N0' = 0 ;
            VTCT . 'N5' = 0 ;
            SI ITEMPS0 ;
                TEMP 'ZERO' ;
            FINSI ;
* Le cas s'execute dans une procedure (variables locales) : les variables
* d'un cas precedent ne peuvent pas masquer un mot-cle ou un operateur
            VC43 VPSW VNIV VTFPR VTCT IECHO0 ;
            VTHR = 0 ;
            SI ITEMPS0 ;
                VTHR = CHRONO ;
            FINSI ;
            SI (VIR 'EGA' 1) ;
                VTHM = VTHR ;
            SINON ;
                SI (VTHR '<' VTHM) ;
                    VTHM = VTHR ;
                FINSI ;
            FINSI ;
        FIN ZVREP ;
        VNER5 = VTCT . 'N5' ;
        VNER0 = VTCT . 'N0' ;
        SI (VIP 'EGA' 1) ;
            VTF1 = VTFPR ;
            VTH1 = VTHM ;
            VNE51 = VNER5 ;
            VNE01 = VNER0 ;
        FINSI ;
        SI (VIP 'EGA' 2) ;
            VTF2 = VTFPR ;
            VTH2 = VTHM ;
            VNE52 = VNER5 ;
            VNE02 = VNER0 ;
        FINSI ;
        SI (VIP 'EGA' 3) ;
            VTF3 = VTFPR ;
            VTH3 = VTHM ;
            VNE53 = VNER5 ;
            VNE03 = VNER0 ;
        FINSI ;
    FIN ZVRUN ;
*   comparaison des empreintes avec la passe 1
    VER2 VNL2 VNC2 = COMPAR VTF1 VTF2 ;
    VMOK2 = 'OK' ;
    SI ((VER2 '>' TOLV0) 'OU' (VNL2 '>' 0) 'OU' ('NON' (VNE52 'EGA' VNE51))) ;
        VMOK2 = 'ECART' ;
        VNBK2 = VNBK2 + 1 ;
    FINSI ;
    VER3 = 0. ;
    VNC3 = 0 ;
    VMOK3 = 'sans_objet' ;
    SI IPASS3 ;
        VER3 VNL3 VNC3 = COMPAR VTF1 VTF3 ;
        VMOK3 = 'OK' ;
        SI ((VER3 '>' TOLV3) 'OU' (VNL3 '>' 0) 'OU' ('NON' (VNE53 'EGA' VNE51))) ;
            VMOK3 = 'ECART' ;
            VNBK3 = VNBK3 + 1 ;
        FINSI ;
    FINSI ;
*   accelerations (temps de la passe 1 / temps de la passe)
    VSP2 = 0. ;
    VSP3 = 0. ;
    SI ((VTH1 '>' 0) 'ET' (VTH2 '>' 0)) ;
        VSP2 = (FLOT VTH1) '/' (FLOT VTH2) ;
    FINSI ;
    SI ((VTH1 '>' 0) 'ET' (VTH3 '>' 0)) ;
        VSP3 = (FLOT VTH1) '/' (FLOT VTH3) ;
    FINSI ;
    VSUM1 = VSUM1 + VTH1 ;
    VSUM2 = VSUM2 + VTH2 ;
    VSUM3 = VSUM3 + VTH3 ;
    VCLA = VTF2 . 'CL' ;
    VR2 = VTF2 . 'NRE' ;
    VC2 = VTF2 . 'NCA' ;
    VH2 = VTF2 . 'NHK' ;
    VM2 = VTF2 . 'NMA' ;
    VR3 = -1 ;
    VC3 = -1 ;
    VH3 = -1 ;
    VM3 = -1 ;
    SI IPASS3 ;
        VR3 = VTF3 . 'NRE' ;
        VC3 = VTF3 . 'NCA' ;
        VH3 = VTF3 . 'NHK' ;
        VM3 = VTF3 . 'NMA' ;
    FINSI ;
    VSE2 = CHAI 'FORMAT' '(1PE10.3)' VER2 ;
    VSE3 = CHAI 'FORMAT' '(1PE10.3)' VER3 ;
    VSS2 = CHAI 'FORMAT' '(F6.2)' VSP2 ;
    VSS3 = CHAI 'FORMAT' '(F6.2)' VSP3 ;
*   fichier de resultat du cas (SORT) et affichage console (MESS)
    OPTI 'SORT' 'valid_fluage_fibre_norton_1.log' ;
    VMSG = CHAI '=== Cas' ' ' '43' ' ' ':' ' ' 'fluage_fibre_norton_1' ' ' '(poutre fibres fluage)' ' ' '===' ;
    MESS VMSG ;
    SORT 'CHAI' VMSG ;
    VMSG = CHAI 'Valeurs comparees :' ' ' VNC2 ;
    MESS VMSG ;
    SORT 'CHAI' VMSG ;
    VMSG = CHAI 'Temps horloge (ms) : origine' ' ' VTH1 ' ' '; niveau 1' ' ' VTH2 ' ' '; niveau 2' ' ' VTH3 ;
    MESS VMSG ;
    SORT 'CHAI' VMSG ;
    VMSG = CHAI 'Acceleration par rapport a l origine : niveau 1' ' ' VSS2 ' ' '; niveau 2' ' ' VSS3 ;
    MESS VMSG ;
    SORT 'CHAI' VMSG ;
    VMSG = CHAI 'Controles internes du cas : echecs origine' ' ' VNE51 ' ' '; niveau 1' ' ' VNE52 ' ' '; niveau 2' ' ' VNE53 ' ' '- reussites origine' ' ' VNE01 ' ' '; niveau 1' ' ' VNE02 ' ' '; niveau 2' ' ' VNE03 ;
    MESS VMSG ;
    SORT 'CHAI' VMSG ;
    VMSG = CHAI 'Classes exercees (1 MATVAR, 10 ENDOM, 20 VISCODOM, 100 GD) :' ' ' VCLA ;
    MESS VMSG ;
    SORT 'CHAI' VMSG ;
    VMSG = CHAI 'Niveau 1 : raideur reutilisee' ' ' VR2 ' ' 'fois, recalculee' ' ' VC2 ' ' 'fois ; HOOK evite' ' ' VH2 ' ' 'fois ; caracteristiques reutilisees' ' ' VM2 ' ' 'fois' ;
    MESS VMSG ;
    SORT 'CHAI' VMSG ;
    VMSG = CHAI 'Niveau 2 : raideur reutilisee' ' ' VR3 ' ' 'fois, recalculee' ' ' VC3 ' ' 'fois ; HOOK evite' ' ' VH3 ' ' 'fois ; caracteristiques reutilisees' ' ' VM3 ' ' 'fois' ;
    MESS VMSG ;
    SORT 'CHAI' VMSG ;
    VMSG = CHAI 'Ecart relatif maximal : niveau 1' ' ' VSE2 ' ' '; niveau 2' ' ' VSE3 ;
    MESS VMSG ;
    SORT 'CHAI' VMSG ;
    VMSG = CHAI 'RESULTAT : niveau 1' ' ' VMOK2 ' ' '; niveau 2' ' ' VMOK3 ;
    MESS VMSG ;
    SORT 'CHAI' VMSG ;
    SI (('EGA' VNC2 0) ) ;
        VMSG = CHAI 'ATTENTION : aucune valeur comparee (resultats non stockes ?)' ;
        MESS VMSG ;
        SORT 'CHAI' VMSG ;
    FINSI ;
    OPTI 'SORT' 'valid_inutile.tmp' ;
    VRES . 43 = TABL ;
    VRES . 43 . 'NOM' = 'fluage_fibre_norton_1' ;
    VRES . 43 . 'OKM' = VMOK2 ;
    VRES . 43 . 'OK3' = VMOK3 ;
    VRES . 43 . 'ERR2' = VER2 ;
    VRES . 43 . 'ERR3' = VER3 ;
    VRES . 43 . 'TH1' = VTH1 ;
    VRES . 43 . 'TH2' = VTH2 ;
    VRES . 43 . 'TH3' = VTH3 ;
    VRES . 43 . 'SP2F' = VSP2 ;
    VRES . 43 . 'SP3F' = VSP3 ;
    VRES . 43 . 'NRE2' = VR2 ;
    VRES . 43 . 'NCA2' = VC2 ;
    VRES . 43 . 'NHK2' = VH2 ;
    VRES . 43 . 'NMA2' = VM2 ;
    VRES . 43 . 'NRE3' = VR3 ;
    VRES . 43 . 'NCA3' = VC3 ;
    VRES . 43 . 'NHK3' = VH3 ;
    VRES . 43 . 'CL' = VCLA ;
    VRES . 43 . 'NCMP' = VNC2 ;
    VMSG = CHAI '<<< Cas' ' ' '43' ' ' 'sur' ' ' NTOT0 ' ' ':' ' ' 'fluage_fibre_norton_1' ' ' ':' ' ' 'niveau 1' ' ' VMOK2 ', niveau 2' ' ' VMOK3 ' ' '- ecart' ' ' VSE2 ', acceleration' ' ' VSS2 ' ' 'et' ' ' VSS3 ;
    MESS VMSG ;
    AVANCE VRES 43 NTOT0 'fluage_fibre_norton_1' NPASS 'termine' ;
    MENAGE 'OBLI' ;
FINSI ;

*
* ---------------------------------------------------------------------
* Procedure du cas 44 : test_cisailnl (poutre cisaillement non lineaire)
* Variables locales : le cas ne voit aucune variable des cas precedents
* ---------------------------------------------------------------------
DEBPROC VC44 VPSW*'LOGIQUE' VNIV*'ENTIER' VTFPR*'TABLE' VTCT*'TABLE' IECHO0*'ENTIER' ;
* ----- debut du cas test_cisailnl

* fichier :  test_cisailnl.dgibi
************************************************************************
* Section : Mecanique Plastique
* Section : Mecanique Elastique
************************************************************************
********************************
*
* Cas test modele global cisail_nl
*
*  D. COMBESCURE - EMSI 1999
*
********************************
opti dime 2 elem seg2;
*
p0 = 0.  0.;
p1 = 0.  1.;
bar1 = p0 d 1 p1;
*
Long = 0.25;
Larg = 0.25;
*
younbar = 30000.;
*
nubar = 0.;
Gbar = younbar/(2.*(1+nubar));
*
Sbar = Larg*Long;
Ibar = (1./12.)*(Long**3)*Larg;
*
* Courbe contrainte de cisaillement - déformation
*
Fmax = Sbar*2.1;
UXX1 = prog 0. (0.5*Fmax/(Gbar*Sbar)) (2.*Fmax/(Gbar*Sbar))
       (10.*Fmax/(Gbar*Sbar));
FXX1 = prog 0. (0.5*Fmax/Sbar) (Fmax/Sbar) (1.2*Fmax/Sbar);
DXFXTh = evol manu UXX1 (Sbar*FXX1);
*
DMAXP = 1. - ((extr FXX1 3 )/(Gbar*(extr UXX1 3 )));
DMAXN = DMAXP;
DELAP = (extr UXX1 2);
DELAN = DELAP;
Efiss = (1. - DMAXP)*Gbar;
*
XMONOP = PROG;
YMONOP = PROG;
j0 = 2;
repeter LAB1 ((DIME FXX1) - 2 );
   j0=j0+1;
   YY = (extr FXX1 j0);
   XX = (extr UXX1 j0) - ((extr FXX1 j0)/Efiss);
   XMONOP = INSE XMONOP (j0 - 2) (maxi (prog XX 0.));
   YMONOP = INSE YMONOP (j0 - 2) YY;
fin lab1;
MONOP = EVOL MANU XMONOP (Sbar*YMONOP);
MONON = EVOL MANU XMONOP (Sbar*YMONOP);
*
modbar1 = mode bar1 mecanique elastique plastique cisail_nl timo;
matbar1 = mate modbar1 YOUN younbar NU nubar SECT Sbar
     INRZ Ibar DELP delap DMAP dmaxp DELN delan DMAN dmaxn
     BETA 0.2 ALFA 0.5 TETA 1.  MONP monop MONN monon
     SECY Sbar RHO 0.;
*
BL0 = BLOQ DEPL ROTA p0;
BL1 = BLOQ ROTA p1;
BL2 = BLOQ UX p1;
DEPP1 = DEPI BL2 1.;
Protemp = prog 0. 10. 20. 101.;
ProHori = PROG 0. 0.001 -0.001 0.;
Procalc = PROG 0. pas 0.25 10.;
CharHori = CHAR DIMP DEPP1 (evol manu Protemp ProHori);
*
TAB1 = TABLE;
TAB1 . 'MOVA'          = 'RIEN';
TAB1 . 'TEMPS_CALCULES' = ProCalc ;
*TAB1 . 'CONVERGENCE_FORCEE ' = 'FAUX';
TAB1 .'MAXITERATION'  = 50;
*TAB1.'PRECISION' = 1.D-5;
TAB1 .'CHARGEMENT' = Charhori;
TAB1 .'DYNAMIQUE' = faux;
TAB1 .'MODELE' = modbar1;
TAB1 .'CARACTERISTIQUES'= matbar1;
TAB1 .'BLOCAGES_MECANIQUES' = BL0 ET BL1 ET BL2;
*
TAB1 . 'PERF_RAID' = VPSW ; TAB1 . 'PERF_RAID_NIVEAU' = VNIV ; PASAPAS TAB1 ; FPREC TAB1 VTFPR ;
*
*
DEPT = TAB1.DEPLACEMENTS;
CONT = TAB1.CONTRAINTES;
TIME = INDEX DEPT;
DIMT = DIME TIME;
*
DEPX = PROG;
GXYT = prog;
EFFX = prog;
*
EFFXXX = PROG;
REPETER BOU1 (DIMT - 1);
  DEP1 = DEPT.(TIME.(&BOU1 + 1));
  CON1 = CONT.(TIME.(&BOU1 + 1));
  FOR1 = REAC (BL0 et BL1 et BL2) DEP1;
  DEPX = DEPX ET (PROG  (extr DEP1 UX p1));
  EFFX = EFFX ET (PROG (extr FOR1 FX p0));
FIN BOU1;
*
DXFX = EVOL MANU DEPX ((-1.)*EFFX);
*
dreal = extr (ipol (prog 0.0005) DEPX ((-1.)*EFFX)) 1;
dtheo =  extr (ipol (prog 0.0005) UXX1 (Sbar*FXX1)) 1;
prec = abs (dreal - dtheo);
*
xlim0 = 1.D-7;
SI (prec > xlim0);
  VTCT . 'N5' = (VTCT . 'N5') + 1 ;
SINON;
   VTCT . 'N0' = (VTCT . 'N0') + 1 ;
FINSI;
*
* [valid] FIN final
*


* ----- fin du cas test_cisailnl
FINPROC ;
*
* ---------------------------------------------------------------------
* Cas 44 : test_cisailnl (poutre cisaillement non lineaire)
* ---------------------------------------------------------------------
SI ((IDEB0 '<EG' 44) 'ET' (IFIN0 '>EG' 44) 'ET' ('NON' ('EXIS' TSKIP 44))) ;
    MENAGE 'OBLI' ;
    MESS ' ' ;
    VMSG = CHAI '>>> Cas' ' ' '44' ' ' 'sur' ' ' NTOT0 ' ' ':' ' ' 'test_cisailnl' ' ' '(poutre cisaillement non lineaire)' ;
    MESS VMSG ;
    NPASS = 2 ;
    SI IPASS3 ;
        NPASS = 3 ;
    FINSI ;
    VTH1 = 0 ;
    VTH2 = 0 ;
    VTH3 = 0 ;
    VNE51 = 0 ;
    VNE01 = 0 ;
    VNE52 = 0 ;
    VNE02 = 0 ;
    VNE53 = 0 ;
    VNE03 = 0 ;
    REPETER ZVRUN NPASS ;
* ordre des passes alterne d'un cas a l'autre (derive des temps en session)
        VIP = NPASS + 1 - &ZVRUN ;
        VPSW = (VIP '>' 1) ;
        VNIV = 1 ;
        VMPS = 'inactif' ;
        SI (VIP 'EGA' 2) ;
            VMPS = 'actif niveau 1' ;
        FINSI ;
        SI (VIP 'EGA' 3) ;
            VNIV = 2 ;
            VMPS = 'actif niveau 2' ;
        FINSI ;
        AVANCE VRES 44 NTOT0 'test_cisailnl' VIP 'en_cours' ;
        VMSG = CHAI '    passe' ' ' VIP ' ' 'sur' ' ' NPASS ' ' ': optimisations' ' ' VMPS ;
        MESS VMSG ;
        SI ITRACE0 ;
            OPTI 'IMPR' 'valid_trace.log' ;
        FINSI ;
        OPTI 'DIME' 3 'MODE' 'TRID' 'ELEM' 'CUB8' 'ECHO' IECHO0 ;
        VTHM = 0 ;
        REPETER ZVREP NREP0 ;
            VIR = &ZVREP ;
            VTFPR = TABL ;
            VTCT = TABL ;
            VTCT . 'N0' = 0 ;
            VTCT . 'N5' = 0 ;
            SI ITEMPS0 ;
                TEMP 'ZERO' ;
            FINSI ;
* Le cas s'execute dans une procedure (variables locales) : les variables
* d'un cas precedent ne peuvent pas masquer un mot-cle ou un operateur
            VC44 VPSW VNIV VTFPR VTCT IECHO0 ;
            VTHR = 0 ;
            SI ITEMPS0 ;
                VTHR = CHRONO ;
            FINSI ;
            SI (VIR 'EGA' 1) ;
                VTHM = VTHR ;
            SINON ;
                SI (VTHR '<' VTHM) ;
                    VTHM = VTHR ;
                FINSI ;
            FINSI ;
        FIN ZVREP ;
        VNER5 = VTCT . 'N5' ;
        VNER0 = VTCT . 'N0' ;
        SI (VIP 'EGA' 1) ;
            VTF1 = VTFPR ;
            VTH1 = VTHM ;
            VNE51 = VNER5 ;
            VNE01 = VNER0 ;
        FINSI ;
        SI (VIP 'EGA' 2) ;
            VTF2 = VTFPR ;
            VTH2 = VTHM ;
            VNE52 = VNER5 ;
            VNE02 = VNER0 ;
        FINSI ;
        SI (VIP 'EGA' 3) ;
            VTF3 = VTFPR ;
            VTH3 = VTHM ;
            VNE53 = VNER5 ;
            VNE03 = VNER0 ;
        FINSI ;
    FIN ZVRUN ;
*   comparaison des empreintes avec la passe 1
    VER2 VNL2 VNC2 = COMPAR VTF1 VTF2 ;
    VMOK2 = 'OK' ;
    SI ((VER2 '>' TOLV0) 'OU' (VNL2 '>' 0) 'OU' ('NON' (VNE52 'EGA' VNE51))) ;
        VMOK2 = 'ECART' ;
        VNBK2 = VNBK2 + 1 ;
    FINSI ;
    VER3 = 0. ;
    VNC3 = 0 ;
    VMOK3 = 'sans_objet' ;
    SI IPASS3 ;
        VER3 VNL3 VNC3 = COMPAR VTF1 VTF3 ;
        VMOK3 = 'OK' ;
        SI ((VER3 '>' TOLV3) 'OU' (VNL3 '>' 0) 'OU' ('NON' (VNE53 'EGA' VNE51))) ;
            VMOK3 = 'ECART' ;
            VNBK3 = VNBK3 + 1 ;
        FINSI ;
    FINSI ;
*   accelerations (temps de la passe 1 / temps de la passe)
    VSP2 = 0. ;
    VSP3 = 0. ;
    SI ((VTH1 '>' 0) 'ET' (VTH2 '>' 0)) ;
        VSP2 = (FLOT VTH1) '/' (FLOT VTH2) ;
    FINSI ;
    SI ((VTH1 '>' 0) 'ET' (VTH3 '>' 0)) ;
        VSP3 = (FLOT VTH1) '/' (FLOT VTH3) ;
    FINSI ;
    VSUM1 = VSUM1 + VTH1 ;
    VSUM2 = VSUM2 + VTH2 ;
    VSUM3 = VSUM3 + VTH3 ;
    VCLA = VTF2 . 'CL' ;
    VR2 = VTF2 . 'NRE' ;
    VC2 = VTF2 . 'NCA' ;
    VH2 = VTF2 . 'NHK' ;
    VM2 = VTF2 . 'NMA' ;
    VR3 = -1 ;
    VC3 = -1 ;
    VH3 = -1 ;
    VM3 = -1 ;
    SI IPASS3 ;
        VR3 = VTF3 . 'NRE' ;
        VC3 = VTF3 . 'NCA' ;
        VH3 = VTF3 . 'NHK' ;
        VM3 = VTF3 . 'NMA' ;
    FINSI ;
    VSE2 = CHAI 'FORMAT' '(1PE10.3)' VER2 ;
    VSE3 = CHAI 'FORMAT' '(1PE10.3)' VER3 ;
    VSS2 = CHAI 'FORMAT' '(F6.2)' VSP2 ;
    VSS3 = CHAI 'FORMAT' '(F6.2)' VSP3 ;
*   fichier de resultat du cas (SORT) et affichage console (MESS)
    OPTI 'SORT' 'valid_test_cisailnl.log' ;
    VMSG = CHAI '=== Cas' ' ' '44' ' ' ':' ' ' 'test_cisailnl' ' ' '(poutre cisaillement non lineaire)' ' ' '===' ;
    MESS VMSG ;
    SORT 'CHAI' VMSG ;
    VMSG = CHAI 'Valeurs comparees :' ' ' VNC2 ;
    MESS VMSG ;
    SORT 'CHAI' VMSG ;
    VMSG = CHAI 'Temps horloge (ms) : origine' ' ' VTH1 ' ' '; niveau 1' ' ' VTH2 ' ' '; niveau 2' ' ' VTH3 ;
    MESS VMSG ;
    SORT 'CHAI' VMSG ;
    VMSG = CHAI 'Acceleration par rapport a l origine : niveau 1' ' ' VSS2 ' ' '; niveau 2' ' ' VSS3 ;
    MESS VMSG ;
    SORT 'CHAI' VMSG ;
    VMSG = CHAI 'Controles internes du cas : echecs origine' ' ' VNE51 ' ' '; niveau 1' ' ' VNE52 ' ' '; niveau 2' ' ' VNE53 ' ' '- reussites origine' ' ' VNE01 ' ' '; niveau 1' ' ' VNE02 ' ' '; niveau 2' ' ' VNE03 ;
    MESS VMSG ;
    SORT 'CHAI' VMSG ;
    VMSG = CHAI 'Classes exercees (1 MATVAR, 10 ENDOM, 20 VISCODOM, 100 GD) :' ' ' VCLA ;
    MESS VMSG ;
    SORT 'CHAI' VMSG ;
    VMSG = CHAI 'Niveau 1 : raideur reutilisee' ' ' VR2 ' ' 'fois, recalculee' ' ' VC2 ' ' 'fois ; HOOK evite' ' ' VH2 ' ' 'fois ; caracteristiques reutilisees' ' ' VM2 ' ' 'fois' ;
    MESS VMSG ;
    SORT 'CHAI' VMSG ;
    VMSG = CHAI 'Niveau 2 : raideur reutilisee' ' ' VR3 ' ' 'fois, recalculee' ' ' VC3 ' ' 'fois ; HOOK evite' ' ' VH3 ' ' 'fois ; caracteristiques reutilisees' ' ' VM3 ' ' 'fois' ;
    MESS VMSG ;
    SORT 'CHAI' VMSG ;
    VMSG = CHAI 'Ecart relatif maximal : niveau 1' ' ' VSE2 ' ' '; niveau 2' ' ' VSE3 ;
    MESS VMSG ;
    SORT 'CHAI' VMSG ;
    VMSG = CHAI 'RESULTAT : niveau 1' ' ' VMOK2 ' ' '; niveau 2' ' ' VMOK3 ;
    MESS VMSG ;
    SORT 'CHAI' VMSG ;
    SI (('EGA' VNC2 0) ) ;
        VMSG = CHAI 'ATTENTION : aucune valeur comparee (resultats non stockes ?)' ;
        MESS VMSG ;
        SORT 'CHAI' VMSG ;
    FINSI ;
    OPTI 'SORT' 'valid_inutile.tmp' ;
    VRES . 44 = TABL ;
    VRES . 44 . 'NOM' = 'test_cisailnl' ;
    VRES . 44 . 'OKM' = VMOK2 ;
    VRES . 44 . 'OK3' = VMOK3 ;
    VRES . 44 . 'ERR2' = VER2 ;
    VRES . 44 . 'ERR3' = VER3 ;
    VRES . 44 . 'TH1' = VTH1 ;
    VRES . 44 . 'TH2' = VTH2 ;
    VRES . 44 . 'TH3' = VTH3 ;
    VRES . 44 . 'SP2F' = VSP2 ;
    VRES . 44 . 'SP3F' = VSP3 ;
    VRES . 44 . 'NRE2' = VR2 ;
    VRES . 44 . 'NCA2' = VC2 ;
    VRES . 44 . 'NHK2' = VH2 ;
    VRES . 44 . 'NMA2' = VM2 ;
    VRES . 44 . 'NRE3' = VR3 ;
    VRES . 44 . 'NCA3' = VC3 ;
    VRES . 44 . 'NHK3' = VH3 ;
    VRES . 44 . 'CL' = VCLA ;
    VRES . 44 . 'NCMP' = VNC2 ;
    VMSG = CHAI '<<< Cas' ' ' '44' ' ' 'sur' ' ' NTOT0 ' ' ':' ' ' 'test_cisailnl' ' ' ':' ' ' 'niveau 1' ' ' VMOK2 ', niveau 2' ' ' VMOK3 ' ' '- ecart' ' ' VSE2 ', acceleration' ' ' VSS2 ' ' 'et' ' ' VSS3 ;
    MESS VMSG ;
    AVANCE VRES 44 NTOT0 'test_cisailnl' NPASS 'termine' ;
    MENAGE 'OBLI' ;
FINSI ;

*
* ---------------------------------------------------------------------
* Procedure du cas 45 : cou22 (joint)
* Variables locales : le cas ne voit aucune variable des cas precedents
* ---------------------------------------------------------------------
DEBPROC VC45 VPSW*'LOGIQUE' VNIV*'ENTIER' VTFPR*'TABLE' VTCT*'TABLE' IECHO0*'ENTIER' ;
* ----- debut du cas cou22

* fichier :  cou22.dgibi
************************************************************************
* Section : Mecanique Elastique
************************************************************************
OPTI ECHO IECHO0 ;
SAUT PAGE ;
MESS '                                                       ';
MESS '                                                       ';
MESS '        TEST DE CISAILLEMENT SUR UN JOINT              ';
MESS '                                                       ';
MESS '                                                       ';
MESS '               C_________________D                     ';
MESS '               A                 B                     ';
MESS '                                                       ';
MESS '  JOINT FORME DES NOEUDS CDAB                          ';
MESS '  CONDITIONS AUX LIMITES  :                            ';
MESS '       - AB BLOQUE EN UX ET EN UY                      ';
MESS '  CHARGEMENT              :                            ';
MESS '       - FORCE DE CISAILLEMENT SUIVANT CD              ';
MESS '                                                       ';
MESS '  LE CHARGEMENT EST TEL QUE L ON RESTE DANS LE DOMAINE ';
MESS '  ELASTIQUE                                            ';
MESS '                                                       ';
********************************************************************
*
OPTION DIME 2 ;
OPTION ELEM SEG2 MODE PLAN DEFO ;
*
COJANA = 1.5 ;
DEPANA = 0.015 ;
*
* ----------DEFINITION DE LA GEOMETRIE DU JOINT ----------
*
A = 0.00 0.00 ;
B = 1.00 0.00;
C = 0.00 0.00 ;
D = 1.00 0.00 ;
*
* ----------                  LIGNE                  ----------
*
AB =  A DROIT 1 B ;
CD =  C DROIT 1 D ;
*
* ----------         MAILLAGE                ----------
*
OPTION ELEM RAC2 ;
*
JOINT = RACC 0.001 CD AB ;
*
* ----------     DEFINITION DES CONDITIONS AUX LIMITES   ----------
*
*
*                        JOINT
*
CL1 = BLOQ AB UX ;
CL2 = BLOQ AB UY ;
CLJOINT =  CL1 ET CL2;
*
* ----------         DEFINITION DU MODELE DU JOINT      ----------
*
MODJOI = MODE JOINT MECANIQUE ELASTIQUE PLASTIQUE COULOMB JOI2 ;
MAJOI  = MATE MODJOI KS   100.0  KN   100.0   EF  150.0   ECN  0.05
                     COHE 2.0    FRIC  45.0   ;
*
* ----------            DEFINITION DU CHARGEMENT       ----------
*
CHPFO = FORCE (1.5 00.00) CD ;
LIST CHPFO;
*
* ----------   DEFINITION DE LA PROGRESSION DU CHARGEMENT ----------
*
   LI1 = PROG 0. 2.0 ; LI2 = PROG 1.0 1.0 ;
   EV = EVOL MANU X LI1 Y LI2 ;
   CAR1 = CHAR 'MECA' CHPFO EV ;
*
* ----------            RESOLUTION            ----------
*
   TAB = TABLE ;
   LIS1 = PROG 0.0 1.0 2.0 ;
   TAB.'BLOCAGES_MECANIQUES' = CLJOINT;
   TAB.'CARACTERISTIQUES' = MAJOI;
   TAB.'MODELE' = MODJOI;
   TAB.'TEMPS_CALCULES' = LIS1;
   TAB.'CHARGEMENT' = CAR1;
TMASAU=table;
tab . 'MES_SAUVEGARDES'=TMASAU;
TMASAU .'DEFTO'=VRAI;
TMASAU .'DEFIN'=VRAI;
   TAB . 'PERF_RAID' = VPSW ; TAB . 'PERF_RAID_NIVEAU' = VNIV ; PASAPAS TAB ; FPREC TAB VTFPR ;
*
* ---------- POST TRAITEMENT ----------
*
*
* -----RECUPERATION DE LA TABLE DES DEPLACEMENTS
*
dtab1=tab.temps;
*
ndime= (dime dtab1) - 1;
*
* ----- EXTRACTION DES DIFFERENTES TABLES
*
*                                    DEPLACEMENTS
*
i=0 ;
repeter bloc1 ndime ;
   i=i+1 ;
   dep1=tab.deplacements.i ;
   sig1=tab.contraintes.i ;
   var1=tab.variables_internes.i ;
   def1=tab.deformations_inelastiques.i ;
   eps1 = epsi modjoi dep1 ;
*
* ----- REDUCTION DES CHPOINTS A L'ELEMENT JOINT
*
SIGJOI = REDU SIG1 JOINT ;
DEFJOI = REDU EPS1 JOINT ;
DPLJOI = REDU DEP1 JOINT ;
DEPJOI = REDU DEF1 JOINT ;
VARJOI = REDU VAR1 JOINT ;
*
mess '              '   ;
mess ' PAS DE TEMPS ' i ;
mess ' ____________ '   ;
mess '              '   ;
mess ' CONTRAINTES  '   ;
list sigjoi ;
mess ' DEFO ELASTI  '   ;
list defjoi ;
mess ' DEFO INELASTI'   ;
list depjoi ;
mess ' VARIABLES INTERNES '   ;
list varjoi ;
mess ' DEPLACEMENTS '   ;
list dpljoi ;
*
SIGJOI1 = EXTR SIGJOI SMSN 1 1 1 ;
SIGJOI2 = EXTR SIGJOI SMSN 1 1 2 ;
DEFJOI1 = EXTR DEFJOI DRSN 1 1 1 ;
DEFJOI2 = EXTR DEFJOI DRSN 1 1 2 ;
*
RESI2 = ABS ( ( SIGJOI1 - COJANA)/COJANA ) ;
RESI3 = ABS ( ( SIGJOI2 - COJANA)/COJANA ) ;
RESI4 = ABS ( ( DEFJOI1 - DEPANA)/DEPANA ) ;
RESI5 = ABS ( ( DEFJOI2 - DEPANA)/DEPANA ) ;
*
SI (  (RESI2 <EG 1E-4 ) ET (RESI3 <EG 1E-4 ) ET
      (RESI4 <EG 1E-4 ) ET (RESI5 <EG 1E-4 ) ) ;
   VTCT . 'N0' = (VTCT . 'N0') + 1 ;
SINON;
   VTCT . 'N5' = (VTCT . 'N5') + 1 ;
FINSI ;
*
MESS '                                                       ' ;
MESS '   SOLUTION THEORIQUE :                                ' ;
MESS '     CONTRAINTES DANS LE JOINT' COJANA                   ;
MESS '     DEFORMATION DANS LE JOINT' DEPANA                   ;
MESS '                                                       ' ;
MESS '   SOLUTION CALCULEE  :                                ' ;
MESS '     CONTRAINTES DANS LE JOINT' SIGJOI1                  ;
MESS '     DEFORMATION DANS LE JOINT' DEFJOI1                  ;
fin bloc1 ;
* [valid] FIN final


* ----- fin du cas cou22
FINPROC ;
*
* ---------------------------------------------------------------------
* Cas 45 : cou22 (joint)
* ---------------------------------------------------------------------
SI ((IDEB0 '<EG' 45) 'ET' (IFIN0 '>EG' 45) 'ET' ('NON' ('EXIS' TSKIP 45))) ;
    MENAGE 'OBLI' ;
    MESS ' ' ;
    VMSG = CHAI '>>> Cas' ' ' '45' ' ' 'sur' ' ' NTOT0 ' ' ':' ' ' 'cou22' ' ' '(joint)' ;
    MESS VMSG ;
    NPASS = 2 ;
    SI IPASS3 ;
        NPASS = 3 ;
    FINSI ;
    VTH1 = 0 ;
    VTH2 = 0 ;
    VTH3 = 0 ;
    VNE51 = 0 ;
    VNE01 = 0 ;
    VNE52 = 0 ;
    VNE02 = 0 ;
    VNE53 = 0 ;
    VNE03 = 0 ;
    REPETER ZVRUN NPASS ;
* ordre des passes alterne d'un cas a l'autre (derive des temps en session)
        VIP = &ZVRUN ;
        VPSW = (VIP '>' 1) ;
        VNIV = 1 ;
        VMPS = 'inactif' ;
        SI (VIP 'EGA' 2) ;
            VMPS = 'actif niveau 1' ;
        FINSI ;
        SI (VIP 'EGA' 3) ;
            VNIV = 2 ;
            VMPS = 'actif niveau 2' ;
        FINSI ;
        AVANCE VRES 45 NTOT0 'cou22' VIP 'en_cours' ;
        VMSG = CHAI '    passe' ' ' VIP ' ' 'sur' ' ' NPASS ' ' ': optimisations' ' ' VMPS ;
        MESS VMSG ;
        SI ITRACE0 ;
            OPTI 'IMPR' 'valid_trace.log' ;
        FINSI ;
        OPTI 'DIME' 3 'MODE' 'TRID' 'ELEM' 'CUB8' 'ECHO' IECHO0 ;
        VTHM = 0 ;
        REPETER ZVREP NREP0 ;
            VIR = &ZVREP ;
            VTFPR = TABL ;
            VTCT = TABL ;
            VTCT . 'N0' = 0 ;
            VTCT . 'N5' = 0 ;
            SI ITEMPS0 ;
                TEMP 'ZERO' ;
            FINSI ;
* Le cas s'execute dans une procedure (variables locales) : les variables
* d'un cas precedent ne peuvent pas masquer un mot-cle ou un operateur
            VC45 VPSW VNIV VTFPR VTCT IECHO0 ;
            VTHR = 0 ;
            SI ITEMPS0 ;
                VTHR = CHRONO ;
            FINSI ;
            SI (VIR 'EGA' 1) ;
                VTHM = VTHR ;
            SINON ;
                SI (VTHR '<' VTHM) ;
                    VTHM = VTHR ;
                FINSI ;
            FINSI ;
        FIN ZVREP ;
        VNER5 = VTCT . 'N5' ;
        VNER0 = VTCT . 'N0' ;
        SI (VIP 'EGA' 1) ;
            VTF1 = VTFPR ;
            VTH1 = VTHM ;
            VNE51 = VNER5 ;
            VNE01 = VNER0 ;
        FINSI ;
        SI (VIP 'EGA' 2) ;
            VTF2 = VTFPR ;
            VTH2 = VTHM ;
            VNE52 = VNER5 ;
            VNE02 = VNER0 ;
        FINSI ;
        SI (VIP 'EGA' 3) ;
            VTF3 = VTFPR ;
            VTH3 = VTHM ;
            VNE53 = VNER5 ;
            VNE03 = VNER0 ;
        FINSI ;
    FIN ZVRUN ;
*   comparaison des empreintes avec la passe 1
    VER2 VNL2 VNC2 = COMPAR VTF1 VTF2 ;
    VMOK2 = 'OK' ;
    SI ((VER2 '>' TOLV0) 'OU' (VNL2 '>' 0) 'OU' ('NON' (VNE52 'EGA' VNE51))) ;
        VMOK2 = 'ECART' ;
        VNBK2 = VNBK2 + 1 ;
    FINSI ;
    VER3 = 0. ;
    VNC3 = 0 ;
    VMOK3 = 'sans_objet' ;
    SI IPASS3 ;
        VER3 VNL3 VNC3 = COMPAR VTF1 VTF3 ;
        VMOK3 = 'OK' ;
        SI ((VER3 '>' TOLV3) 'OU' (VNL3 '>' 0) 'OU' ('NON' (VNE53 'EGA' VNE51))) ;
            VMOK3 = 'ECART' ;
            VNBK3 = VNBK3 + 1 ;
        FINSI ;
    FINSI ;
*   accelerations (temps de la passe 1 / temps de la passe)
    VSP2 = 0. ;
    VSP3 = 0. ;
    SI ((VTH1 '>' 0) 'ET' (VTH2 '>' 0)) ;
        VSP2 = (FLOT VTH1) '/' (FLOT VTH2) ;
    FINSI ;
    SI ((VTH1 '>' 0) 'ET' (VTH3 '>' 0)) ;
        VSP3 = (FLOT VTH1) '/' (FLOT VTH3) ;
    FINSI ;
    VSUM1 = VSUM1 + VTH1 ;
    VSUM2 = VSUM2 + VTH2 ;
    VSUM3 = VSUM3 + VTH3 ;
    VCLA = VTF2 . 'CL' ;
    VR2 = VTF2 . 'NRE' ;
    VC2 = VTF2 . 'NCA' ;
    VH2 = VTF2 . 'NHK' ;
    VM2 = VTF2 . 'NMA' ;
    VR3 = -1 ;
    VC3 = -1 ;
    VH3 = -1 ;
    VM3 = -1 ;
    SI IPASS3 ;
        VR3 = VTF3 . 'NRE' ;
        VC3 = VTF3 . 'NCA' ;
        VH3 = VTF3 . 'NHK' ;
        VM3 = VTF3 . 'NMA' ;
    FINSI ;
    VSE2 = CHAI 'FORMAT' '(1PE10.3)' VER2 ;
    VSE3 = CHAI 'FORMAT' '(1PE10.3)' VER3 ;
    VSS2 = CHAI 'FORMAT' '(F6.2)' VSP2 ;
    VSS3 = CHAI 'FORMAT' '(F6.2)' VSP3 ;
*   fichier de resultat du cas (SORT) et affichage console (MESS)
    OPTI 'SORT' 'valid_cou22.log' ;
    VMSG = CHAI '=== Cas' ' ' '45' ' ' ':' ' ' 'cou22' ' ' '(joint)' ' ' '===' ;
    MESS VMSG ;
    SORT 'CHAI' VMSG ;
    VMSG = CHAI 'Valeurs comparees :' ' ' VNC2 ;
    MESS VMSG ;
    SORT 'CHAI' VMSG ;
    VMSG = CHAI 'Temps horloge (ms) : origine' ' ' VTH1 ' ' '; niveau 1' ' ' VTH2 ' ' '; niveau 2' ' ' VTH3 ;
    MESS VMSG ;
    SORT 'CHAI' VMSG ;
    VMSG = CHAI 'Acceleration par rapport a l origine : niveau 1' ' ' VSS2 ' ' '; niveau 2' ' ' VSS3 ;
    MESS VMSG ;
    SORT 'CHAI' VMSG ;
    VMSG = CHAI 'Controles internes du cas : echecs origine' ' ' VNE51 ' ' '; niveau 1' ' ' VNE52 ' ' '; niveau 2' ' ' VNE53 ' ' '- reussites origine' ' ' VNE01 ' ' '; niveau 1' ' ' VNE02 ' ' '; niveau 2' ' ' VNE03 ;
    MESS VMSG ;
    SORT 'CHAI' VMSG ;
    VMSG = CHAI 'Classes exercees (1 MATVAR, 10 ENDOM, 20 VISCODOM, 100 GD) :' ' ' VCLA ;
    MESS VMSG ;
    SORT 'CHAI' VMSG ;
    VMSG = CHAI 'Niveau 1 : raideur reutilisee' ' ' VR2 ' ' 'fois, recalculee' ' ' VC2 ' ' 'fois ; HOOK evite' ' ' VH2 ' ' 'fois ; caracteristiques reutilisees' ' ' VM2 ' ' 'fois' ;
    MESS VMSG ;
    SORT 'CHAI' VMSG ;
    VMSG = CHAI 'Niveau 2 : raideur reutilisee' ' ' VR3 ' ' 'fois, recalculee' ' ' VC3 ' ' 'fois ; HOOK evite' ' ' VH3 ' ' 'fois ; caracteristiques reutilisees' ' ' VM3 ' ' 'fois' ;
    MESS VMSG ;
    SORT 'CHAI' VMSG ;
    VMSG = CHAI 'Ecart relatif maximal : niveau 1' ' ' VSE2 ' ' '; niveau 2' ' ' VSE3 ;
    MESS VMSG ;
    SORT 'CHAI' VMSG ;
    VMSG = CHAI 'RESULTAT : niveau 1' ' ' VMOK2 ' ' '; niveau 2' ' ' VMOK3 ;
    MESS VMSG ;
    SORT 'CHAI' VMSG ;
    SI (('EGA' VNC2 0) ) ;
        VMSG = CHAI 'ATTENTION : aucune valeur comparee (resultats non stockes ?)' ;
        MESS VMSG ;
        SORT 'CHAI' VMSG ;
    FINSI ;
    OPTI 'SORT' 'valid_inutile.tmp' ;
    VRES . 45 = TABL ;
    VRES . 45 . 'NOM' = 'cou22' ;
    VRES . 45 . 'OKM' = VMOK2 ;
    VRES . 45 . 'OK3' = VMOK3 ;
    VRES . 45 . 'ERR2' = VER2 ;
    VRES . 45 . 'ERR3' = VER3 ;
    VRES . 45 . 'TH1' = VTH1 ;
    VRES . 45 . 'TH2' = VTH2 ;
    VRES . 45 . 'TH3' = VTH3 ;
    VRES . 45 . 'SP2F' = VSP2 ;
    VRES . 45 . 'SP3F' = VSP3 ;
    VRES . 45 . 'NRE2' = VR2 ;
    VRES . 45 . 'NCA2' = VC2 ;
    VRES . 45 . 'NHK2' = VH2 ;
    VRES . 45 . 'NMA2' = VM2 ;
    VRES . 45 . 'NRE3' = VR3 ;
    VRES . 45 . 'NCA3' = VC3 ;
    VRES . 45 . 'NHK3' = VH3 ;
    VRES . 45 . 'CL' = VCLA ;
    VRES . 45 . 'NCMP' = VNC2 ;
    VMSG = CHAI '<<< Cas' ' ' '45' ' ' 'sur' ' ' NTOT0 ' ' ':' ' ' 'cou22' ' ' ':' ' ' 'niveau 1' ' ' VMOK2 ', niveau 2' ' ' VMOK3 ' ' '- ecart' ' ' VSE2 ', acceleration' ' ' VSS2 ' ' 'et' ' ' VSS3 ;
    MESS VMSG ;
    AVANCE VRES 45 NTOT0 'cou22' NPASS 'termine' ;
    MENAGE 'OBLI' ;
FINSI ;

*
* ---------------------------------------------------------------------
* Procedure du cas 46 : testjoi1ani (joint anisotrope)
* Variables locales : le cas ne voit aucune variable des cas precedents
* ---------------------------------------------------------------------
DEBPROC VC46 VPSW*'LOGIQUE' VNIV*'ENTIER' VTFPR*'TABLE' VTCT*'TABLE' IECHO0*'ENTIER' ;
* ----- debut du cas testjoi1ani

* fichier : testjoi1ani.dgibi
************************************************************************
* Section : Mecanique Elastique
************************************************************************
opti elem seg2 dime 3 mode trid;
*****************************
*                           *
*    SOLUTION ANALYTIQUE    *
*                           *
*****************************
      UXANA = 0.00700;
      UYANA = -86.7515;
      UZANA = 2.38900;
*                           *
      RXANA = -0.36000;
      RYANA = -0.12000;
      RZANA = -4.33563;
*                           *
*****************************
*
*
*********CREATION DES POUTRES****
*
*****PROPRIETES GEOMETRIQUES*****
*
l1=10.;
lt=30.;
torp = 5;
iyp = 3;
izp = 4;
secp = 0.2;
*
*****PROPRIETES MATERIELLES*****
*
youp = 32;
nup = 0.2;
*
dir1 = 0 1 0;
dir2 = 1 0 0;
*
****POUTRE GAUCHE****
*
pi1 = 0 0 0;
pi2 = l1 0 0;
li = pi1 d 1 pi2;
*
*
****POUTRE DROITE****
*
ps1 = l1 0 0;
ps2 = lt 0 0;
ls = ps1 d 1 ps2;
*
lt = ls et li;
*trac lt;
*
mop =  modeli lt mecanique elastique poutre;
map = mate mop YOUN youp NU nup TORS torp INRY iyp INRZ izp SECT secp;
*
********JOINT*********
*
lj = pi2 d 1 ps1;
moj =  modeli lj mecanique elastique anisotrope joi1;
maj = mate moj direction dir1 dir2
         D11 30
         D21 10 D22 40
         D31 10 D32 10 D33 30
         D41 0 D42 0 D43 0 D44 40
         D51 0 D52 0 D53 0 D54 10 D55 20
         D61 0 D62 0 D63 0 D64 10 D65 10 D66 30;
*
*********************************
*********************************
*
mo1 = moj et mop;
ma1 = maj et map;
*
cl1 = bloq depl rota pi1;
*
**************
* CHARGEMENT *
**************
fo1 = force (0. -1. 0.) ps2;
*
LI1 = PROG 0. PAS 0.2 1. ;
LI2 = PROG 0. PAS 0.2 1. ;
EV1 = EVOL MANU T LI1 F(T) LI2;
*
CHA1 = CHAR 'MECA' fo1 EV1 ;
*
**************
*
TAB1 = TABLE ;
*
TAB1.'BLOCAGES_MECANIQUES' = cl1;
TAB1.'MODELE' = mo1;
TAB1.'CARACTERISTIQUES' = ma1;
TAB1.'CHARGEMENT' = CHA1;
TAB1.'TEMPS_CALCULES' = LI1;
TAB1.'HYPOTHESE_DEFORMATIONS' = 'LINEAIRE';
*
TAB1 . 'PERF_RAID' = VPSW ; TAB1 . 'PERF_RAID_NIVEAU' = VNIV ; PASAPAS TAB1 ; FPREC TAB1 VTFPR ;
*
* ----------    CODE DE FONCTIONNEMENT       ----------
*
RES = TAB1 . DEPLACEMENTS . 5 ;
DEPA1 = EXTR res UY ps2 ;
RESI = ABS( (DEPA1-UYANA)/UYANA ) ;
*
SI (RESI <EG 1E-3 ) ;
  VTCT . 'N0' = (VTCT . 'N0') + 1 ;
SINO;
   VTCT . 'N5' = (VTCT . 'N5') + 1 ;
FINSI ;
*
* [valid] FIN final


* ----- fin du cas testjoi1ani
FINPROC ;
*
* ---------------------------------------------------------------------
* Cas 46 : testjoi1ani (joint anisotrope)
* ---------------------------------------------------------------------
SI ((IDEB0 '<EG' 46) 'ET' (IFIN0 '>EG' 46) 'ET' ('NON' ('EXIS' TSKIP 46))) ;
    MENAGE 'OBLI' ;
    MESS ' ' ;
    VMSG = CHAI '>>> Cas' ' ' '46' ' ' 'sur' ' ' NTOT0 ' ' ':' ' ' 'testjoi1ani' ' ' '(joint anisotrope)' ;
    MESS VMSG ;
    NPASS = 2 ;
    SI IPASS3 ;
        NPASS = 3 ;
    FINSI ;
    VTH1 = 0 ;
    VTH2 = 0 ;
    VTH3 = 0 ;
    VNE51 = 0 ;
    VNE01 = 0 ;
    VNE52 = 0 ;
    VNE02 = 0 ;
    VNE53 = 0 ;
    VNE03 = 0 ;
    REPETER ZVRUN NPASS ;
* ordre des passes alterne d'un cas a l'autre (derive des temps en session)
        VIP = NPASS + 1 - &ZVRUN ;
        VPSW = (VIP '>' 1) ;
        VNIV = 1 ;
        VMPS = 'inactif' ;
        SI (VIP 'EGA' 2) ;
            VMPS = 'actif niveau 1' ;
        FINSI ;
        SI (VIP 'EGA' 3) ;
            VNIV = 2 ;
            VMPS = 'actif niveau 2' ;
        FINSI ;
        AVANCE VRES 46 NTOT0 'testjoi1ani' VIP 'en_cours' ;
        VMSG = CHAI '    passe' ' ' VIP ' ' 'sur' ' ' NPASS ' ' ': optimisations' ' ' VMPS ;
        MESS VMSG ;
        SI ITRACE0 ;
            OPTI 'IMPR' 'valid_trace.log' ;
        FINSI ;
        OPTI 'DIME' 3 'MODE' 'TRID' 'ELEM' 'CUB8' 'ECHO' IECHO0 ;
        VTHM = 0 ;
        REPETER ZVREP NREP0 ;
            VIR = &ZVREP ;
            VTFPR = TABL ;
            VTCT = TABL ;
            VTCT . 'N0' = 0 ;
            VTCT . 'N5' = 0 ;
            SI ITEMPS0 ;
                TEMP 'ZERO' ;
            FINSI ;
* Le cas s'execute dans une procedure (variables locales) : les variables
* d'un cas precedent ne peuvent pas masquer un mot-cle ou un operateur
            VC46 VPSW VNIV VTFPR VTCT IECHO0 ;
            VTHR = 0 ;
            SI ITEMPS0 ;
                VTHR = CHRONO ;
            FINSI ;
            SI (VIR 'EGA' 1) ;
                VTHM = VTHR ;
            SINON ;
                SI (VTHR '<' VTHM) ;
                    VTHM = VTHR ;
                FINSI ;
            FINSI ;
        FIN ZVREP ;
        VNER5 = VTCT . 'N5' ;
        VNER0 = VTCT . 'N0' ;
        SI (VIP 'EGA' 1) ;
            VTF1 = VTFPR ;
            VTH1 = VTHM ;
            VNE51 = VNER5 ;
            VNE01 = VNER0 ;
        FINSI ;
        SI (VIP 'EGA' 2) ;
            VTF2 = VTFPR ;
            VTH2 = VTHM ;
            VNE52 = VNER5 ;
            VNE02 = VNER0 ;
        FINSI ;
        SI (VIP 'EGA' 3) ;
            VTF3 = VTFPR ;
            VTH3 = VTHM ;
            VNE53 = VNER5 ;
            VNE03 = VNER0 ;
        FINSI ;
    FIN ZVRUN ;
*   comparaison des empreintes avec la passe 1
    VER2 VNL2 VNC2 = COMPAR VTF1 VTF2 ;
    VMOK2 = 'OK' ;
    SI ((VER2 '>' TOLV0) 'OU' (VNL2 '>' 0) 'OU' ('NON' (VNE52 'EGA' VNE51))) ;
        VMOK2 = 'ECART' ;
        VNBK2 = VNBK2 + 1 ;
    FINSI ;
    VER3 = 0. ;
    VNC3 = 0 ;
    VMOK3 = 'sans_objet' ;
    SI IPASS3 ;
        VER3 VNL3 VNC3 = COMPAR VTF1 VTF3 ;
        VMOK3 = 'OK' ;
        SI ((VER3 '>' TOLV3) 'OU' (VNL3 '>' 0) 'OU' ('NON' (VNE53 'EGA' VNE51))) ;
            VMOK3 = 'ECART' ;
            VNBK3 = VNBK3 + 1 ;
        FINSI ;
    FINSI ;
*   accelerations (temps de la passe 1 / temps de la passe)
    VSP2 = 0. ;
    VSP3 = 0. ;
    SI ((VTH1 '>' 0) 'ET' (VTH2 '>' 0)) ;
        VSP2 = (FLOT VTH1) '/' (FLOT VTH2) ;
    FINSI ;
    SI ((VTH1 '>' 0) 'ET' (VTH3 '>' 0)) ;
        VSP3 = (FLOT VTH1) '/' (FLOT VTH3) ;
    FINSI ;
    VSUM1 = VSUM1 + VTH1 ;
    VSUM2 = VSUM2 + VTH2 ;
    VSUM3 = VSUM3 + VTH3 ;
    VCLA = VTF2 . 'CL' ;
    VR2 = VTF2 . 'NRE' ;
    VC2 = VTF2 . 'NCA' ;
    VH2 = VTF2 . 'NHK' ;
    VM2 = VTF2 . 'NMA' ;
    VR3 = -1 ;
    VC3 = -1 ;
    VH3 = -1 ;
    VM3 = -1 ;
    SI IPASS3 ;
        VR3 = VTF3 . 'NRE' ;
        VC3 = VTF3 . 'NCA' ;
        VH3 = VTF3 . 'NHK' ;
        VM3 = VTF3 . 'NMA' ;
    FINSI ;
    VSE2 = CHAI 'FORMAT' '(1PE10.3)' VER2 ;
    VSE3 = CHAI 'FORMAT' '(1PE10.3)' VER3 ;
    VSS2 = CHAI 'FORMAT' '(F6.2)' VSP2 ;
    VSS3 = CHAI 'FORMAT' '(F6.2)' VSP3 ;
*   fichier de resultat du cas (SORT) et affichage console (MESS)
    OPTI 'SORT' 'valid_testjoi1ani.log' ;
    VMSG = CHAI '=== Cas' ' ' '46' ' ' ':' ' ' 'testjoi1ani' ' ' '(joint anisotrope)' ' ' '===' ;
    MESS VMSG ;
    SORT 'CHAI' VMSG ;
    VMSG = CHAI 'Valeurs comparees :' ' ' VNC2 ;
    MESS VMSG ;
    SORT 'CHAI' VMSG ;
    VMSG = CHAI 'Temps horloge (ms) : origine' ' ' VTH1 ' ' '; niveau 1' ' ' VTH2 ' ' '; niveau 2' ' ' VTH3 ;
    MESS VMSG ;
    SORT 'CHAI' VMSG ;
    VMSG = CHAI 'Acceleration par rapport a l origine : niveau 1' ' ' VSS2 ' ' '; niveau 2' ' ' VSS3 ;
    MESS VMSG ;
    SORT 'CHAI' VMSG ;
    VMSG = CHAI 'Controles internes du cas : echecs origine' ' ' VNE51 ' ' '; niveau 1' ' ' VNE52 ' ' '; niveau 2' ' ' VNE53 ' ' '- reussites origine' ' ' VNE01 ' ' '; niveau 1' ' ' VNE02 ' ' '; niveau 2' ' ' VNE03 ;
    MESS VMSG ;
    SORT 'CHAI' VMSG ;
    VMSG = CHAI 'Classes exercees (1 MATVAR, 10 ENDOM, 20 VISCODOM, 100 GD) :' ' ' VCLA ;
    MESS VMSG ;
    SORT 'CHAI' VMSG ;
    VMSG = CHAI 'Niveau 1 : raideur reutilisee' ' ' VR2 ' ' 'fois, recalculee' ' ' VC2 ' ' 'fois ; HOOK evite' ' ' VH2 ' ' 'fois ; caracteristiques reutilisees' ' ' VM2 ' ' 'fois' ;
    MESS VMSG ;
    SORT 'CHAI' VMSG ;
    VMSG = CHAI 'Niveau 2 : raideur reutilisee' ' ' VR3 ' ' 'fois, recalculee' ' ' VC3 ' ' 'fois ; HOOK evite' ' ' VH3 ' ' 'fois ; caracteristiques reutilisees' ' ' VM3 ' ' 'fois' ;
    MESS VMSG ;
    SORT 'CHAI' VMSG ;
    VMSG = CHAI 'Ecart relatif maximal : niveau 1' ' ' VSE2 ' ' '; niveau 2' ' ' VSE3 ;
    MESS VMSG ;
    SORT 'CHAI' VMSG ;
    VMSG = CHAI 'RESULTAT : niveau 1' ' ' VMOK2 ' ' '; niveau 2' ' ' VMOK3 ;
    MESS VMSG ;
    SORT 'CHAI' VMSG ;
    SI (('EGA' VNC2 0) ) ;
        VMSG = CHAI 'ATTENTION : aucune valeur comparee (resultats non stockes ?)' ;
        MESS VMSG ;
        SORT 'CHAI' VMSG ;
    FINSI ;
    OPTI 'SORT' 'valid_inutile.tmp' ;
    VRES . 46 = TABL ;
    VRES . 46 . 'NOM' = 'testjoi1ani' ;
    VRES . 46 . 'OKM' = VMOK2 ;
    VRES . 46 . 'OK3' = VMOK3 ;
    VRES . 46 . 'ERR2' = VER2 ;
    VRES . 46 . 'ERR3' = VER3 ;
    VRES . 46 . 'TH1' = VTH1 ;
    VRES . 46 . 'TH2' = VTH2 ;
    VRES . 46 . 'TH3' = VTH3 ;
    VRES . 46 . 'SP2F' = VSP2 ;
    VRES . 46 . 'SP3F' = VSP3 ;
    VRES . 46 . 'NRE2' = VR2 ;
    VRES . 46 . 'NCA2' = VC2 ;
    VRES . 46 . 'NHK2' = VH2 ;
    VRES . 46 . 'NMA2' = VM2 ;
    VRES . 46 . 'NRE3' = VR3 ;
    VRES . 46 . 'NCA3' = VC3 ;
    VRES . 46 . 'NHK3' = VH3 ;
    VRES . 46 . 'CL' = VCLA ;
    VRES . 46 . 'NCMP' = VNC2 ;
    VMSG = CHAI '<<< Cas' ' ' '46' ' ' 'sur' ' ' NTOT0 ' ' ':' ' ' 'testjoi1ani' ' ' ':' ' ' 'niveau 1' ' ' VMOK2 ', niveau 2' ' ' VMOK3 ' ' '- ecart' ' ' VSE2 ', acceleration' ' ' VSS2 ' ' 'et' ' ' VSS3 ;
    MESS VMSG ;
    AVANCE VRES 46 NTOT0 'testjoi1ani' NPASS 'termine' ;
    MENAGE 'OBLI' ;
FINSI ;

*
* ---------------------------------------------------------------------
* Procedure du cas 47 : joi_eli (joint elastique)
* Variables locales : le cas ne voit aucune variable des cas precedents
* ---------------------------------------------------------------------
DEBPROC VC47 VPSW*'LOGIQUE' VNIV*'ENTIER' VTFPR*'TABLE' VTCT*'TABLE' IECHO0*'ENTIER' ;
* ----- debut du cas joi_eli

* fichier :  joi_eli.dgibi
************************************************************************
* Section : Mecanique Plastique
************************************************************************
   GRAPH = 'N' ;
   SAUT PAGE ;
********************************************************************
MESS '                                                             ';
MESS '                                                             ';
MESS '                                                             ';
MESS '                                                             ';
MESS '  TEST AVEC UN JOINT (2D) POUR LE MODELE D ANCRAGE           ';
MESS '                    D ELIGEHAUSEN                           ';
MESS '                                                             ';
MESS '  LA SURFACE DE HAUT DU JOINT EST SOUMISE A UN DEPL. IMPOSE  ';
MESS '   SELON LA DIRECTION TANGENTIELLE                           ';
MESS '                                                             ';
MESS '                                                             ';
MESS '                                                             ';
MESS '                                                             ';
MESS '                                                             ';
MESS '                                                             ';
MESS '                   A _______________ H                       ';
MESS '                    |               |                        ';
MESS '                    |_______________|                        ';
MESS '                   G                 D                       ';
MESS '                                                             ';
MESS '                                                             ';
MESS '                                                             ';
MESS '                                                             ';
MESS '                                                             ';
MESS '  JOINT FORME DES NOEUDS DG-HA                               ';
MESS '                                                             ';
MESS '  CONDITIONS AUX LIMITES  :                                  ';
MESS '       - DG  BLOQUEE EN UX ET EN UY                          ';
MESS '                                                             ';
MESS '  CHARGEMENT              :                                  ';
MESS '       - DEPLACEMENT IMPOSE ET FORCE SUR HA                  ';
MESS '                                                             ';
MESS '                                                             ';
MESS '                                                             ';
MESS '  DANS CET ESSAI ON COMPARE LA CONTRAINTE TANGENTIELLE ET    ';
MESS '   LE DEPLACEMENT NORMAL AUX QUANTITES CORRESPONDANTES       ';
MESS '   CALCULEES ANALYTIQUEMENT.                                 ';
MESS '                                                             ';
MESS '                                                             ';
MESS '                                                             ';
********************************************************************
*
*
   OPTION ECHO IECHO0 DIME 2 ;
   OPTION ELEM SEG2 MODE PLAN CONT ;
* [valid]    TEMPS ;
*
*------------------------------------------------
* --------- DEFINITION DE LA GEOMETRIE ----------
*------------------------------------------------
*
   A = 0.00  0.00 ;
   H = 1.00  0.00 ;
*
   G = 0.00 0.00 ;
   D = 1.00 0.00 ;
*
   HA =  H DROIT 1 A ;
*
   DG =  D DROIT 1 G ;
*
*-----------------------------------------------------
* -------------- DEFINITION DU MAILLAGE --------------
*-----------------------------------------------------
*
   OPTION ELEM RAC2 ;
*
   JOINT = RACC 0.001 (INVE HA ) ( INVE DG )  ;
*
*------------------------------------------------------------------
* -------------- DEFINITION DES CONDITIONS AUX LIMITES ------------
*------------------------------------------------------------------
*
   CL1 = BLOQ DG UX UY ;
*
   CL5 = BLOQ HA UX ;
*
   CLTOT = CL1 ET CL5 ;
*
*-----------------------------------------------------------------
* -------------- DEFINITION DU MODELE E DU MATERIAU --------------
*-----------------------------------------------------------------
*
   MODJOI = MODE JOINT 'MECANIQUE' 'ELASTIQUE' 'PLASTIQUE'
                       'ANCRAGE_ELIGEHAUSEN' JOI2 ;
*
   phi0 = 0.010;
*
   MAJOI  = MATE MODJOI  'KS  ' ((30000./(2.*(1+0.25)*0.05))*pi*phi0)
                         'KN  ' ((30000./0.05)*pi*phi0)
                         'S1T' 0.001 'S2T' 0.003 'S3T' 0.010
                         'T1T' 15. 'T3T' 5.
                         'ALFA' 0.4 'PERI' (pi*phi0);

*--------------------------------------------------------------
* ------------------- DEFINITION DU CHARGEMENT ----------------
*--------------------------------------------------------------
*
   DEP6 = FORCE FY -10.0 HA ;
   DEP5 = DEPI CL5 (-20.0/1000.) ;
*
   L56 = PROG 0.0  1.0  1.0 ;
   L55 = PROG 0.0  0.0  1.0 ;
   L50 = PROG 0.0  1.0  2.0 ;
*
   EV5 = EVOL MANU X L50 Y L55 ;
   EV6 = EVOL MANU X L50 Y L56 ;
*
   CAR5 = CHAR 'DIMP' DEP5 EV5 ;
   CAR6 = CHAR 'MECA' DEP6 EV6 ;
   CART = CAR5 ET CAR6 ;
*
*-------------------------------------------------------
* --------------------- RESOLUTION ---------------------
*-------------------------------------------------------
*
   TAB = TABLE ;
   LIS1 = PROG 0.0 1.0 PAS 0.05 2.0 ;
   TAB.'BLOCAGES_MECANIQUES' = CLTOT;
   TAB.'MODELE' = MODJOI;
   TAB.'CHARGEMENT' = CART;
   TAB.'TEMPS_CALCULES' = LIS1;
   TAB.'CARACTERISTIQUES' = MAJOI;
   TAB.'MOVA'             = RIEN;
*
TMASAU=table;
tab. 'MES_SAUVEGARDES'=TMASAU;
TMASAU .'DEFTO'=VRAI;
TMASAU .'DEFIN'=VRAI;
   TAB . 'PERF_RAID' = VPSW ; TAB . 'PERF_RAID_NIVEAU' = VNIV ; PASAPAS TAB ; FPREC TAB VTFPR ;
*
*--------------------------------------
* ---------- POST TRAITEMENT ----------
*--------------------------------------
*
sig1 = prog ; sig2 = prog ; var1 = prog ; var2 = prog ;
var3 = prog ; var4 = prog ; var5 = prog ; var6 = prog ;
dep1 = prog ; dep2 = prog ; tem0 = prog ; tem1 = prog ;
*
dtab1=index(tab.deplacements) ;
*
ndime=dime dtab1 ;
*
*
i=0 ;
*
REPETER BOU1 ndime ;
*
i=i+1 ;
*
d=dtab1.i ;
*
dep0 = tab.deplacements.d ;
sig0 = tab.contraintes.d ;
var0 = tab.variables_internes.d ;
def0 = tab.deformations_inelastiques.d ;
*
DEPJOI = REDU DEP0 JOINT ;
SIGJOI = REDU SIG0 JOINT ;
VARJOI = REDU VAR0 JOINT ;
DEFJOI = REDU DEF0 JOINT ;
*
* Contrainte de cisaillement
tau1 = extr SIGJOI 'SMSN' 1 1 1 ;
* Contrainte normale
tau2 = extr SIGJOI 'SMN' 1 1 1 ;
*
* Glissement plastique atteint pour un glissement positif
sor1 = extr VARJOI 'EPPP' 1 1 1 ;
* Glissement plastique atteint pour un glissement négatif
sor2 = extr VARJOI 'EPPM' 1 1 1 ;
* Glissement total
sor3 = extr VARJOI 'EPSO' 1 1 1 ;
* Rigidité tangente en glissement
sor4 = extr VARJOI 'KSTA' 1 1 1 ;
* Rigidité tangente en traction/compression
sor5 = extr VARJOI 'KNEL' 1 1 1 ;
*
* Déformations plastiques
pla1 = extr DEFJOI 'FRSN' 1 1 1 ;
pla2 = extr DEFJOI 'FRN' 1 1 1 ;
*
sig1 = inse sig1 i tau1 ;
sig2 = inse sig2 i tau2 ;
*
var1 = inse var1 i sor1 ;
var2 = inse var2 i sor2 ;
var3 = inse var3 i sor3 ;
var4 = inse var4 i sor4 ;
var5 = inse var5 i sor5 ;
*
tem0 = inse tem0 i d  ;
*
dep1 = inse dep1 i pla1 ;
dep2 = inse dep2 i pla2 ;
*
fin bou1 ;
*
   si ( NEG graph 'N' ) ;
*
      gra1 = evol manu U var3 T sig1 ;
      gra2 = evol manu t0 tem0 EPPP var1 ;
      gra3 = evol manu t0 tem0 EPPM var2 ;
      gra4 = evol manu t0 tem0 EPSO var3 ;
      gra5 = evol manu t0 tem0 KSTA var4 ;
      gra6 = evol manu t0 tem0 KNEL var5 ;
*
      dess gra1 ;
      dess gra2 ;
      dess gra3 ;
      dess gra4 ;
      dess gra5 ;
      dess gra6 ;
*
   finsi ;
*
*-------------------------------------------------------------
*------------------ CODE DE FONCTIONNEMENT -------------------
*-------------------------------------------------------------
*
*
* listreel de la contrainte tangentielle de repère en fonction du temps *
*
pro1 = prog
       0.0  0.0  -.47124 -.47124  -.47124  -.42636  -.38148
     -.33660  -.29172  -.24684  -.20196 -.15708  -.15708  -.15708  -.15708
     -.15708  -.15708  -.15708  -.15708  -.15708  -.15708  -.15708;
*
*
***** listreel du glissement total en fonction du temps *****
*
pro2 = prog  0.0  0.0 -0.001  -0.002 -0.003 -0.004 -0.005 -0.006 -0.007 -0.008
     -0.009 -0.01 -0.011 -0.012 -0.013 -0.014 -0.015 -0.016 -0.017 -0.018
     -0.019 -0.020;
*
j1 = 0 ;
j2 = 0 ;
ii0 = 0 ;
num1 = 0. ;
num2 = 0. ;
den1 = 0. ;
den2 = 0. ;
*
repeter bou2 20 ;
*
j1 = j1 + 1 ;
j2 = j2 + 1 ;
ii0 = ii0 + 1 ;
*
ttt1 = extr sig1 j1 ;
vvv1 = extr var3 j2 ;
ttt0 = extr pro1 ii0 ;
vvv0 = extr pro2 ii0 ;
*
num1 = num1 + ((ttt1 - ttt0) * (ttt1 - ttt0)) ;
num2 = num2 + ((vvv1 - vvv0) * (vvv1 - vvv0)) ;
den1 = den1 + (ttt0 * ttt0) ;
den2 = den2 + (vvv0 * vvv0) ;
*
fin bou2 ;
*
err0 = (num1/den1) * 100. ;
err1 = (num2/den2) * 100. ;
*
si ((err0 < 5.) et (err1 < 5.)) ;
*
VTCT . 'N0' = (VTCT . 'N0') + 1 ;
*
sinon ;
*
VTCT . 'N5' = (VTCT . 'N5') + 1 ;
*
finsi ;
*
* [valid] FIN final


* ----- fin du cas joi_eli
FINPROC ;
*
* ---------------------------------------------------------------------
* Cas 47 : joi_eli (joint elastique)
* ---------------------------------------------------------------------
SI ((IDEB0 '<EG' 47) 'ET' (IFIN0 '>EG' 47) 'ET' ('NON' ('EXIS' TSKIP 47))) ;
    MENAGE 'OBLI' ;
    MESS ' ' ;
    VMSG = CHAI '>>> Cas' ' ' '47' ' ' 'sur' ' ' NTOT0 ' ' ':' ' ' 'joi_eli' ' ' '(joint elastique)' ;
    MESS VMSG ;
    NPASS = 2 ;
    SI IPASS3 ;
        NPASS = 3 ;
    FINSI ;
    VTH1 = 0 ;
    VTH2 = 0 ;
    VTH3 = 0 ;
    VNE51 = 0 ;
    VNE01 = 0 ;
    VNE52 = 0 ;
    VNE02 = 0 ;
    VNE53 = 0 ;
    VNE03 = 0 ;
    REPETER ZVRUN NPASS ;
* ordre des passes alterne d'un cas a l'autre (derive des temps en session)
        VIP = &ZVRUN ;
        VPSW = (VIP '>' 1) ;
        VNIV = 1 ;
        VMPS = 'inactif' ;
        SI (VIP 'EGA' 2) ;
            VMPS = 'actif niveau 1' ;
        FINSI ;
        SI (VIP 'EGA' 3) ;
            VNIV = 2 ;
            VMPS = 'actif niveau 2' ;
        FINSI ;
        AVANCE VRES 47 NTOT0 'joi_eli' VIP 'en_cours' ;
        VMSG = CHAI '    passe' ' ' VIP ' ' 'sur' ' ' NPASS ' ' ': optimisations' ' ' VMPS ;
        MESS VMSG ;
        SI ITRACE0 ;
            OPTI 'IMPR' 'valid_trace.log' ;
        FINSI ;
        OPTI 'DIME' 3 'MODE' 'TRID' 'ELEM' 'CUB8' 'ECHO' IECHO0 ;
        VTHM = 0 ;
        REPETER ZVREP NREP0 ;
            VIR = &ZVREP ;
            VTFPR = TABL ;
            VTCT = TABL ;
            VTCT . 'N0' = 0 ;
            VTCT . 'N5' = 0 ;
            SI ITEMPS0 ;
                TEMP 'ZERO' ;
            FINSI ;
* Le cas s'execute dans une procedure (variables locales) : les variables
* d'un cas precedent ne peuvent pas masquer un mot-cle ou un operateur
            VC47 VPSW VNIV VTFPR VTCT IECHO0 ;
            VTHR = 0 ;
            SI ITEMPS0 ;
                VTHR = CHRONO ;
            FINSI ;
            SI (VIR 'EGA' 1) ;
                VTHM = VTHR ;
            SINON ;
                SI (VTHR '<' VTHM) ;
                    VTHM = VTHR ;
                FINSI ;
            FINSI ;
        FIN ZVREP ;
        VNER5 = VTCT . 'N5' ;
        VNER0 = VTCT . 'N0' ;
        SI (VIP 'EGA' 1) ;
            VTF1 = VTFPR ;
            VTH1 = VTHM ;
            VNE51 = VNER5 ;
            VNE01 = VNER0 ;
        FINSI ;
        SI (VIP 'EGA' 2) ;
            VTF2 = VTFPR ;
            VTH2 = VTHM ;
            VNE52 = VNER5 ;
            VNE02 = VNER0 ;
        FINSI ;
        SI (VIP 'EGA' 3) ;
            VTF3 = VTFPR ;
            VTH3 = VTHM ;
            VNE53 = VNER5 ;
            VNE03 = VNER0 ;
        FINSI ;
    FIN ZVRUN ;
*   comparaison des empreintes avec la passe 1
    VER2 VNL2 VNC2 = COMPAR VTF1 VTF2 ;
    VMOK2 = 'OK' ;
    SI ((VER2 '>' TOLV0) 'OU' (VNL2 '>' 0) 'OU' ('NON' (VNE52 'EGA' VNE51))) ;
        VMOK2 = 'ECART' ;
        VNBK2 = VNBK2 + 1 ;
    FINSI ;
    VER3 = 0. ;
    VNC3 = 0 ;
    VMOK3 = 'sans_objet' ;
    SI IPASS3 ;
        VER3 VNL3 VNC3 = COMPAR VTF1 VTF3 ;
        VMOK3 = 'OK' ;
        SI ((VER3 '>' TOLV3) 'OU' (VNL3 '>' 0) 'OU' ('NON' (VNE53 'EGA' VNE51))) ;
            VMOK3 = 'ECART' ;
            VNBK3 = VNBK3 + 1 ;
        FINSI ;
    FINSI ;
*   accelerations (temps de la passe 1 / temps de la passe)
    VSP2 = 0. ;
    VSP3 = 0. ;
    SI ((VTH1 '>' 0) 'ET' (VTH2 '>' 0)) ;
        VSP2 = (FLOT VTH1) '/' (FLOT VTH2) ;
    FINSI ;
    SI ((VTH1 '>' 0) 'ET' (VTH3 '>' 0)) ;
        VSP3 = (FLOT VTH1) '/' (FLOT VTH3) ;
    FINSI ;
    VSUM1 = VSUM1 + VTH1 ;
    VSUM2 = VSUM2 + VTH2 ;
    VSUM3 = VSUM3 + VTH3 ;
    VCLA = VTF2 . 'CL' ;
    VR2 = VTF2 . 'NRE' ;
    VC2 = VTF2 . 'NCA' ;
    VH2 = VTF2 . 'NHK' ;
    VM2 = VTF2 . 'NMA' ;
    VR3 = -1 ;
    VC3 = -1 ;
    VH3 = -1 ;
    VM3 = -1 ;
    SI IPASS3 ;
        VR3 = VTF3 . 'NRE' ;
        VC3 = VTF3 . 'NCA' ;
        VH3 = VTF3 . 'NHK' ;
        VM3 = VTF3 . 'NMA' ;
    FINSI ;
    VSE2 = CHAI 'FORMAT' '(1PE10.3)' VER2 ;
    VSE3 = CHAI 'FORMAT' '(1PE10.3)' VER3 ;
    VSS2 = CHAI 'FORMAT' '(F6.2)' VSP2 ;
    VSS3 = CHAI 'FORMAT' '(F6.2)' VSP3 ;
*   fichier de resultat du cas (SORT) et affichage console (MESS)
    OPTI 'SORT' 'valid_joi_eli.log' ;
    VMSG = CHAI '=== Cas' ' ' '47' ' ' ':' ' ' 'joi_eli' ' ' '(joint elastique)' ' ' '===' ;
    MESS VMSG ;
    SORT 'CHAI' VMSG ;
    VMSG = CHAI 'Valeurs comparees :' ' ' VNC2 ;
    MESS VMSG ;
    SORT 'CHAI' VMSG ;
    VMSG = CHAI 'Temps horloge (ms) : origine' ' ' VTH1 ' ' '; niveau 1' ' ' VTH2 ' ' '; niveau 2' ' ' VTH3 ;
    MESS VMSG ;
    SORT 'CHAI' VMSG ;
    VMSG = CHAI 'Acceleration par rapport a l origine : niveau 1' ' ' VSS2 ' ' '; niveau 2' ' ' VSS3 ;
    MESS VMSG ;
    SORT 'CHAI' VMSG ;
    VMSG = CHAI 'Controles internes du cas : echecs origine' ' ' VNE51 ' ' '; niveau 1' ' ' VNE52 ' ' '; niveau 2' ' ' VNE53 ' ' '- reussites origine' ' ' VNE01 ' ' '; niveau 1' ' ' VNE02 ' ' '; niveau 2' ' ' VNE03 ;
    MESS VMSG ;
    SORT 'CHAI' VMSG ;
    VMSG = CHAI 'Classes exercees (1 MATVAR, 10 ENDOM, 20 VISCODOM, 100 GD) :' ' ' VCLA ;
    MESS VMSG ;
    SORT 'CHAI' VMSG ;
    VMSG = CHAI 'Niveau 1 : raideur reutilisee' ' ' VR2 ' ' 'fois, recalculee' ' ' VC2 ' ' 'fois ; HOOK evite' ' ' VH2 ' ' 'fois ; caracteristiques reutilisees' ' ' VM2 ' ' 'fois' ;
    MESS VMSG ;
    SORT 'CHAI' VMSG ;
    VMSG = CHAI 'Niveau 2 : raideur reutilisee' ' ' VR3 ' ' 'fois, recalculee' ' ' VC3 ' ' 'fois ; HOOK evite' ' ' VH3 ' ' 'fois ; caracteristiques reutilisees' ' ' VM3 ' ' 'fois' ;
    MESS VMSG ;
    SORT 'CHAI' VMSG ;
    VMSG = CHAI 'Ecart relatif maximal : niveau 1' ' ' VSE2 ' ' '; niveau 2' ' ' VSE3 ;
    MESS VMSG ;
    SORT 'CHAI' VMSG ;
    VMSG = CHAI 'RESULTAT : niveau 1' ' ' VMOK2 ' ' '; niveau 2' ' ' VMOK3 ;
    MESS VMSG ;
    SORT 'CHAI' VMSG ;
    SI (('EGA' VNC2 0) ) ;
        VMSG = CHAI 'ATTENTION : aucune valeur comparee (resultats non stockes ?)' ;
        MESS VMSG ;
        SORT 'CHAI' VMSG ;
    FINSI ;
    OPTI 'SORT' 'valid_inutile.tmp' ;
    VRES . 47 = TABL ;
    VRES . 47 . 'NOM' = 'joi_eli' ;
    VRES . 47 . 'OKM' = VMOK2 ;
    VRES . 47 . 'OK3' = VMOK3 ;
    VRES . 47 . 'ERR2' = VER2 ;
    VRES . 47 . 'ERR3' = VER3 ;
    VRES . 47 . 'TH1' = VTH1 ;
    VRES . 47 . 'TH2' = VTH2 ;
    VRES . 47 . 'TH3' = VTH3 ;
    VRES . 47 . 'SP2F' = VSP2 ;
    VRES . 47 . 'SP3F' = VSP3 ;
    VRES . 47 . 'NRE2' = VR2 ;
    VRES . 47 . 'NCA2' = VC2 ;
    VRES . 47 . 'NHK2' = VH2 ;
    VRES . 47 . 'NMA2' = VM2 ;
    VRES . 47 . 'NRE3' = VR3 ;
    VRES . 47 . 'NCA3' = VC3 ;
    VRES . 47 . 'NHK3' = VH3 ;
    VRES . 47 . 'CL' = VCLA ;
    VRES . 47 . 'NCMP' = VNC2 ;
    VMSG = CHAI '<<< Cas' ' ' '47' ' ' 'sur' ' ' NTOT0 ' ' ':' ' ' 'joi_eli' ' ' ':' ' ' 'niveau 1' ' ' VMOK2 ', niveau 2' ' ' VMOK3 ' ' '- ecart' ' ' VSE2 ', acceleration' ' ' VSS2 ' ' 'et' ' ' VSS3 ;
    MESS VMSG ;
    AVANCE VRES 47 NTOT0 'joi_eli' NPASS 'termine' ;
    MENAGE 'OBLI' ;
FINSI ;

*
* ---------------------------------------------------------------------
* Procedure du cas 48 : jointsoft1 (joint adoucissant)
* Variables locales : le cas ne voit aucune variable des cas precedents
* ---------------------------------------------------------------------
DEBPROC VC48 VPSW*'LOGIQUE' VNIV*'ENTIER' VTFPR*'TABLE' VTCT*'TABLE' IECHO0*'ENTIER' ;
* ----- debut du cas jointsoft1

* fichier : jointsoft1.dgibi
* section : mecanique statique non lineaire
*----------------------------------------------------------------------*
*                    J O I N T S O F T 1 . D G I B I                   *
*----------------------------------------------------------------------*
* Objet :
* -------
*
* Cas-test de validation du modele de joint "JOINT_SOFT" (JOI2).
*
* Le modele est valide en :
* - compression simple
* - traction simple
* - cisaillement simple
*
* Son fonctionnement pour un cas de chargement mixte compression-cisail-
* -lement est egalement teste mais sans validation a un resultat de
* reference.
*
* Description :
* -------------
*
* Type de calcul : Mecanique Statique NON LINEAIRE
* Mode de calcul : 2D PLAN
* Type d'element : JOI2
* Chargement     : deplacements imposes
*
*----------------------------------------------------------------------*
opti dime 2 mode plan defo elem qua4 ;

* Pour traces, mettre IG1 a vrai :
ig1      = faux ;

*----------------------------------------------------------------------*
*                         DEFINITION DU MODELE                         *
*----------------------------------------------------------------------*

*------------------------------ Maillage ------------------------------*

l1       = (0 0) droi 1 (1 0) ;
l2       = l1 plus (0 1) ;
* Sens parcours lignes impose l2 en 1er (voir RACC) :
jt1      = racc l2 l1 1.1 ;
l1       = l1 coul roug ;
l2       = l2 coul vert ;

si ig1 ;
  trac (jt1 et l1 et l2) qual titr ' Maillage du joint JT1. CL : L1 bloquee, L2 mobile ' ;
fins ;

*--------------------- Modele / Caracteristiques ----------------------*

* Courbes de comportement en compression, traction, cisaillement :
luc1     = prog 0. +0.1 +1.0 ;
lfc1     = prog 0. +0.2 +0.3 ;
comp1    = evol bleu manu luc1 sjcb lfc1 ;
lut1     = prog 0. +0.1 +0.2   +1.0 ;
lft1     = prog 0. +0.2 +1.e-5 +1.e-5 ;
trac1    = evol roug manu lut1 sjtb lft1 ;
lus1     = prog 0. +0.1 +1.0 ;
lfs1     = prog 0. +0.1 +0.1 ;
cisa1    = evol vert manu lus1 sjsb lfs1 ;

si ig1 ;
  tleg0    = table ;
  tleg0 . 2 = mot 'TIRR MARQ ROND' ;
  tleg0 . 3 = mot 'TIRR' ;
  dess (comp1 et trac1 et cisa1) lege tleg0
    titr ' Courbes compression (bleue), traction (rouge) et cisaillement' ;
fins ;

* Defimition du modele et materiau :
mo1      = mode jt1 mecanique elastique plastique joint_soft joi2 ;
ma1      = mate mo1 'KS' 1.      'KN' 2.      'PNOR' -0.5 'CPLG' 0. 'BETA' 1.
                    'SJCB' comp1 'SJTB' trac1 'SJSB' cisa1 ;

* Blocages :
cl1      = bloq depl l1 ;
cl2      = bloq ux   l2 ;
cl3      = bloq uy   l2 ;

*----------------------------------------------------------------------*
*                   VALIDATION EN COMPRESSION SIMPLE                   *
*----------------------------------------------------------------------*

* Compression simple :
dcl3     = depi cl3 -0.5 ;
dcl0     = dcl3 ;
ev1      = evol manu temp (prog 0. 1.) (prog 0. 1.) ;
cgu1     = char dimp dcl0 ev1 ;

* Resolution avec PASAPAS :
tab1                      = table ;
tab1. modele              = mo1 ;
tab1. caracteristiques    = ma1 ;
tab1. blocages_mecaniques = cl1 et cl2 et cl3 ;
tab1. chargement          = cgu1 ;
tab1. temps_calcules      = prog 0. pas 0.1 1. ;

tab1 . 'PERF_RAID' = VPSW ; tab1 . 'PERF_RAID_NIVEAU' = VNIV ; PASAPAS tab1 ; FPREC tab1 VTFPR ;

* Validation solution :
evf1     = evol temp tab1 reactions 'FY' (l2 poin 1) ;
evf2     = evol temp tab1 reactions 'FY' (l2 poin 2) ;
evf1     = evf1 + evf2 ;
evu1     = evol temp tab1 deplacements 'UY' (l2 poin 1) ;
lu1      = extr evu1 ordo ;
lf1      = extr evf1 ordo ;
evfu1    = evol manu uy (abs lu1) fy (abs lf1) ;

si ig1 ;
  tleg1    = table ;
  tleg1. 2 = mot 'MARQ TRIA TIRC' ;
  tleg1. titre = table ;
  tleg1. titre . 1 = 'Reference' ;
  tleg1. titre . 2 = 'Calcul' ;
  dess (comp1 et evfu1) lege tleg1 titr ' Comparaison calcul / reference compression simple ' ;
fins ;

* Test validation :
err1     = ((abs lf1) - (ipol comp1 (abs lu1))) maxi abs ;
err1     = err1 / (maxi abs lf1) ;

si (err1 > 1.e-8) ;
  comm VTCT . 'N5' = (VTCT . 'N5') + 1 ;
fins ;

*----------------------------------------------------------------------*
*                     VALIDATION EN TRACTION SIMPLE                    *
*----------------------------------------------------------------------*

* Compression simple :
dcl3     = depi cl3 +0.5 ;
dcl0     = dcl3 ;
cgu1     = char dimp dcl0 ev1 ;

* Resolution avec PASAPAS :
tab2                      = table ;
tab2. modele              = mo1 ;
tab2. caracteristiques    = ma1 ;
tab2. blocages_mecaniques = cl1 et cl2 et cl3 ;
tab2. chargement          = cgu1 ;
tab2. temps_calcules      = prog 0. pas 0.2 1. ;

tab2 . 'PERF_RAID' = VPSW ; tab2 . 'PERF_RAID_NIVEAU' = VNIV ; PASAPAS tab2 ; FPREC tab2 VTFPR ;

* Validation solution :
evf1     = evol temp tab2 reactions 'FY' (l2 poin 1) ;
evf2     = evol temp tab2 reactions 'FY' (l2 poin 2) ;
evf2     = evf1 + evf2 ;
evu2     = evol temp tab2 deplacements 'UY' (l2 poin 1) ;
lu2      = extr evu2 ordo ;
lf2      = extr evf2 ordo ;
evfu2    = evol manu uy (abs lu2) fy (abs lf2) ;

si ig1 ;
  tleg2    = table ;
  tleg2. 2 = mot 'MARQ TRIA TIRC' ;
  tleg2. titre = table ;
  tleg2. titre . 1 = 'Reference' ;
  tleg2. titre . 2 = 'Calcul' ;
  dess (trac1 et evfu2) lege tleg2 ybor 0. 0.25
    titr ' Comparaison calcul / reference traction simple ' ;
fins ;

* Test validation :
err1     = ((abs lf2) - (ipol trac1 (abs lu2))) maxi abs ;
err1     = err1 / (maxi abs lf2) ;

si (err1 > 1.e-8) ;
  comm VTCT . 'N5' = (VTCT . 'N5') + 1 ;
fins ;

*----------------------------------------------------------------------*
*                      VALIDATION EN CISAILLEMENT                      *
*----------------------------------------------------------------------*

* Compression simple :
dcl2     = depi cl2 +0.5 ;
dcl0     = dcl2 ;
ev1      = evol manu temp (prog 0. 1.) (prog 0. 1.) ;
cgu1     = char dimp dcl0 ev1 ;

* Resolution avec PASAPAS :
tab3                      = table ;
tab3. modele              = mo1 ;
tab3. caracteristiques    = ma1 ;
tab3. blocages_mecaniques = cl1 et cl2 et cl3 ;
tab3. chargement          = cgu1 ;
tab3. temps_calcules      = prog 0. pas 0.1 1. ;

tab3 . 'PERF_RAID' = VPSW ; tab3 . 'PERF_RAID_NIVEAU' = VNIV ; PASAPAS tab3 ; FPREC tab3 VTFPR ;

* Validation solution :
evf1     = evol temp tab3 reactions 'FX' (l2 poin 1) ;
evf2     = evol temp tab3 reactions 'FX' (l2 poin 2) ;
evf3     = evf1 + evf2 ;
evu3     = evol temp tab3 deplacements 'UX' (l2 poin 1) ;
lu3      = extr evu3 ordo ;
lf3      = extr evf3 ordo ;
evfu3    = evol manu UX (abs lu3) FX (abs lf3) ;

si ig1 ;
  tleg3    = table ;
  tleg3. 2 = mot 'MARQ TRIA TIRC' ;
  tleg3. titre = table ;
  tleg3. titre . 1 = 'Reference' ;
  tleg3. titre . 2 = 'Calcul' ;
  dess (cisa1 et evfu3) lege tleg3 ybor 0. 0.12
   titr ' Comparaison calcul / reference cisaillement simple ' ;
fins ;

* Test validation :
err1     = ((abs lf3) - (ipol cisa1 (abs lu3))) maxi abs ;
err1     = err1 / (maxi abs lf3) ;

si (err1 > 1.e-8) ;
  comm VTCT . 'N5' = (VTCT . 'N5') + 1 ;
fins ;

*----------------------------------------------------------------------*
*                      TEST FONCTIONNEMENT MIXTE                       *
*----------------------------------------------------------------------*

* Activation du coefficient de couplage pour test fonctionnement :
ma1      = mate mo1 'KS' 1.      'KN' 2.      'PNOR' -0.5 'CPLG' 1. 'BETA' 1.
                    'SJCB' comp1 'SJTB' trac1 'SJSB' cisa1 ;

* Compression simple :
dcl2     = depi cl2 +0.3 ;
dcl3     = depi cl3 -0.5 ;
dcl0     = dcl2 et dcl3 ;
ev1      = evol manu temp (prog 0. 1.) (prog 0. 1.) ;
cgu1     = char dimp dcl0 ev1 ;

* Resolution avec PASAPAS :
tab4                      = table ;
tab4. modele              = mo1 ;
tab4. caracteristiques    = ma1 ;
tab4. blocages_mecaniques = cl1 et cl2 et cl3 ;
tab4. chargement          = cgu1 ;
tab4. temps_calcules      = prog 0. pas 0.1 1. ;

tab4 . 'PERF_RAID' = VPSW ; tab4 . 'PERF_RAID_NIVEAU' = VNIV ; PASAPAS tab4 ; FPREC tab4 VTFPR ;

* Validation solution :
evf1     = evol temp tab4 reactions 'FX' (l2 poin 1) ;
evf2     = evol temp tab4 reactions 'FX' (l2 poin 2) ;
evf4     = evf1 + evf2 ;
evu4     = evol temp tab4 deplacements 'UX' (l2 poin 1) ;
lu4      = extr evu4 ordo ;
lf4      = extr evf4 ordo ;
evfux4   = evol manu UX (abs lu4) FX (abs lf4) ;
evf1     = evol temp tab4 reactions 'FY' (l2 poin 1) ;
evf2     = evol temp tab4 reactions 'FY' (l2 poin 2) ;
evf4     = evf1 + evf2 ;
evu4     = evol temp tab4 deplacements 'UY' (l2 poin 1) ;
lu4      = extr evu4 ordo ;
lf4      = extr evf4 ordo ;
evfuy4   = evol manu UY (abs lu4) FY (abs lf4) ;

si ig1 ;
  tleg4    = table ;
  tleg4. 3 = mot 'MARQ TRIA TIRC' ;
  tleg4. 4 = mot 'MARQ ROND TIRC' ;
  tleg4. titre = table ;
  tleg4. titre . 1 = 'Ref. compression' ;
  tleg4. titre . 2 = 'Ref. cisaillement' ;
  tleg4. titre . 3 = 'Calcul Fx(Ux)' ;
  tleg4. titre . 4 = 'Calcul Fy(Uy)' ;
  dess (comp1 et cisa1 et evfux4 et evfuy4) lege tleg4
    titr ' Comparaison calcul / references chargement compression + cisaillement' ;
fins ;

*-------------- F I N   J O I N T S O F T 1 . D G I B I ---------------*
* [valid] FIN final


* ----- fin du cas jointsoft1
FINPROC ;
*
* ---------------------------------------------------------------------
* Cas 48 : jointsoft1 (joint adoucissant)
* ---------------------------------------------------------------------
SI ((IDEB0 '<EG' 48) 'ET' (IFIN0 '>EG' 48) 'ET' ('NON' ('EXIS' TSKIP 48))) ;
    MENAGE 'OBLI' ;
    MESS ' ' ;
    VMSG = CHAI '>>> Cas' ' ' '48' ' ' 'sur' ' ' NTOT0 ' ' ':' ' ' 'jointsoft1' ' ' '(joint adoucissant)' ;
    MESS VMSG ;
    NPASS = 2 ;
    SI IPASS3 ;
        NPASS = 3 ;
    FINSI ;
    VTH1 = 0 ;
    VTH2 = 0 ;
    VTH3 = 0 ;
    VNE51 = 0 ;
    VNE01 = 0 ;
    VNE52 = 0 ;
    VNE02 = 0 ;
    VNE53 = 0 ;
    VNE03 = 0 ;
    REPETER ZVRUN NPASS ;
* ordre des passes alterne d'un cas a l'autre (derive des temps en session)
        VIP = NPASS + 1 - &ZVRUN ;
        VPSW = (VIP '>' 1) ;
        VNIV = 1 ;
        VMPS = 'inactif' ;
        SI (VIP 'EGA' 2) ;
            VMPS = 'actif niveau 1' ;
        FINSI ;
        SI (VIP 'EGA' 3) ;
            VNIV = 2 ;
            VMPS = 'actif niveau 2' ;
        FINSI ;
        AVANCE VRES 48 NTOT0 'jointsoft1' VIP 'en_cours' ;
        VMSG = CHAI '    passe' ' ' VIP ' ' 'sur' ' ' NPASS ' ' ': optimisations' ' ' VMPS ;
        MESS VMSG ;
        SI ITRACE0 ;
            OPTI 'IMPR' 'valid_trace.log' ;
        FINSI ;
        OPTI 'DIME' 3 'MODE' 'TRID' 'ELEM' 'CUB8' 'ECHO' IECHO0 ;
        VTHM = 0 ;
        REPETER ZVREP NREP0 ;
            VIR = &ZVREP ;
            VTFPR = TABL ;
            VTCT = TABL ;
            VTCT . 'N0' = 0 ;
            VTCT . 'N5' = 0 ;
            SI ITEMPS0 ;
                TEMP 'ZERO' ;
            FINSI ;
* Le cas s'execute dans une procedure (variables locales) : les variables
* d'un cas precedent ne peuvent pas masquer un mot-cle ou un operateur
            VC48 VPSW VNIV VTFPR VTCT IECHO0 ;
            VTHR = 0 ;
            SI ITEMPS0 ;
                VTHR = CHRONO ;
            FINSI ;
            SI (VIR 'EGA' 1) ;
                VTHM = VTHR ;
            SINON ;
                SI (VTHR '<' VTHM) ;
                    VTHM = VTHR ;
                FINSI ;
            FINSI ;
        FIN ZVREP ;
        VNER5 = VTCT . 'N5' ;
        VNER0 = VTCT . 'N0' ;
        SI (VIP 'EGA' 1) ;
            VTF1 = VTFPR ;
            VTH1 = VTHM ;
            VNE51 = VNER5 ;
            VNE01 = VNER0 ;
        FINSI ;
        SI (VIP 'EGA' 2) ;
            VTF2 = VTFPR ;
            VTH2 = VTHM ;
            VNE52 = VNER5 ;
            VNE02 = VNER0 ;
        FINSI ;
        SI (VIP 'EGA' 3) ;
            VTF3 = VTFPR ;
            VTH3 = VTHM ;
            VNE53 = VNER5 ;
            VNE03 = VNER0 ;
        FINSI ;
    FIN ZVRUN ;
*   comparaison des empreintes avec la passe 1
    VER2 VNL2 VNC2 = COMPAR VTF1 VTF2 ;
    VMOK2 = 'OK' ;
    SI ((VER2 '>' TOLV0) 'OU' (VNL2 '>' 0) 'OU' ('NON' (VNE52 'EGA' VNE51))) ;
        VMOK2 = 'ECART' ;
        VNBK2 = VNBK2 + 1 ;
    FINSI ;
    VER3 = 0. ;
    VNC3 = 0 ;
    VMOK3 = 'sans_objet' ;
    SI IPASS3 ;
        VER3 VNL3 VNC3 = COMPAR VTF1 VTF3 ;
        VMOK3 = 'OK' ;
        SI ((VER3 '>' TOLV3) 'OU' (VNL3 '>' 0) 'OU' ('NON' (VNE53 'EGA' VNE51))) ;
            VMOK3 = 'ECART' ;
            VNBK3 = VNBK3 + 1 ;
        FINSI ;
    FINSI ;
*   accelerations (temps de la passe 1 / temps de la passe)
    VSP2 = 0. ;
    VSP3 = 0. ;
    SI ((VTH1 '>' 0) 'ET' (VTH2 '>' 0)) ;
        VSP2 = (FLOT VTH1) '/' (FLOT VTH2) ;
    FINSI ;
    SI ((VTH1 '>' 0) 'ET' (VTH3 '>' 0)) ;
        VSP3 = (FLOT VTH1) '/' (FLOT VTH3) ;
    FINSI ;
    VSUM1 = VSUM1 + VTH1 ;
    VSUM2 = VSUM2 + VTH2 ;
    VSUM3 = VSUM3 + VTH3 ;
    VCLA = VTF2 . 'CL' ;
    VR2 = VTF2 . 'NRE' ;
    VC2 = VTF2 . 'NCA' ;
    VH2 = VTF2 . 'NHK' ;
    VM2 = VTF2 . 'NMA' ;
    VR3 = -1 ;
    VC3 = -1 ;
    VH3 = -1 ;
    VM3 = -1 ;
    SI IPASS3 ;
        VR3 = VTF3 . 'NRE' ;
        VC3 = VTF3 . 'NCA' ;
        VH3 = VTF3 . 'NHK' ;
        VM3 = VTF3 . 'NMA' ;
    FINSI ;
    VSE2 = CHAI 'FORMAT' '(1PE10.3)' VER2 ;
    VSE3 = CHAI 'FORMAT' '(1PE10.3)' VER3 ;
    VSS2 = CHAI 'FORMAT' '(F6.2)' VSP2 ;
    VSS3 = CHAI 'FORMAT' '(F6.2)' VSP3 ;
*   fichier de resultat du cas (SORT) et affichage console (MESS)
    OPTI 'SORT' 'valid_jointsoft1.log' ;
    VMSG = CHAI '=== Cas' ' ' '48' ' ' ':' ' ' 'jointsoft1' ' ' '(joint adoucissant)' ' ' '===' ;
    MESS VMSG ;
    SORT 'CHAI' VMSG ;
    VMSG = CHAI 'Valeurs comparees :' ' ' VNC2 ;
    MESS VMSG ;
    SORT 'CHAI' VMSG ;
    VMSG = CHAI 'Temps horloge (ms) : origine' ' ' VTH1 ' ' '; niveau 1' ' ' VTH2 ' ' '; niveau 2' ' ' VTH3 ;
    MESS VMSG ;
    SORT 'CHAI' VMSG ;
    VMSG = CHAI 'Acceleration par rapport a l origine : niveau 1' ' ' VSS2 ' ' '; niveau 2' ' ' VSS3 ;
    MESS VMSG ;
    SORT 'CHAI' VMSG ;
    VMSG = CHAI 'Controles internes du cas : echecs origine' ' ' VNE51 ' ' '; niveau 1' ' ' VNE52 ' ' '; niveau 2' ' ' VNE53 ' ' '- reussites origine' ' ' VNE01 ' ' '; niveau 1' ' ' VNE02 ' ' '; niveau 2' ' ' VNE03 ;
    MESS VMSG ;
    SORT 'CHAI' VMSG ;
    VMSG = CHAI 'Classes exercees (1 MATVAR, 10 ENDOM, 20 VISCODOM, 100 GD) :' ' ' VCLA ;
    MESS VMSG ;
    SORT 'CHAI' VMSG ;
    VMSG = CHAI 'Niveau 1 : raideur reutilisee' ' ' VR2 ' ' 'fois, recalculee' ' ' VC2 ' ' 'fois ; HOOK evite' ' ' VH2 ' ' 'fois ; caracteristiques reutilisees' ' ' VM2 ' ' 'fois' ;
    MESS VMSG ;
    SORT 'CHAI' VMSG ;
    VMSG = CHAI 'Niveau 2 : raideur reutilisee' ' ' VR3 ' ' 'fois, recalculee' ' ' VC3 ' ' 'fois ; HOOK evite' ' ' VH3 ' ' 'fois ; caracteristiques reutilisees' ' ' VM3 ' ' 'fois' ;
    MESS VMSG ;
    SORT 'CHAI' VMSG ;
    VMSG = CHAI 'Ecart relatif maximal : niveau 1' ' ' VSE2 ' ' '; niveau 2' ' ' VSE3 ;
    MESS VMSG ;
    SORT 'CHAI' VMSG ;
    VMSG = CHAI 'RESULTAT : niveau 1' ' ' VMOK2 ' ' '; niveau 2' ' ' VMOK3 ;
    MESS VMSG ;
    SORT 'CHAI' VMSG ;
    SI (('EGA' VNC2 0) ) ;
        VMSG = CHAI 'ATTENTION : aucune valeur comparee (resultats non stockes ?)' ;
        MESS VMSG ;
        SORT 'CHAI' VMSG ;
    FINSI ;
    OPTI 'SORT' 'valid_inutile.tmp' ;
    VRES . 48 = TABL ;
    VRES . 48 . 'NOM' = 'jointsoft1' ;
    VRES . 48 . 'OKM' = VMOK2 ;
    VRES . 48 . 'OK3' = VMOK3 ;
    VRES . 48 . 'ERR2' = VER2 ;
    VRES . 48 . 'ERR3' = VER3 ;
    VRES . 48 . 'TH1' = VTH1 ;
    VRES . 48 . 'TH2' = VTH2 ;
    VRES . 48 . 'TH3' = VTH3 ;
    VRES . 48 . 'SP2F' = VSP2 ;
    VRES . 48 . 'SP3F' = VSP3 ;
    VRES . 48 . 'NRE2' = VR2 ;
    VRES . 48 . 'NCA2' = VC2 ;
    VRES . 48 . 'NHK2' = VH2 ;
    VRES . 48 . 'NMA2' = VM2 ;
    VRES . 48 . 'NRE3' = VR3 ;
    VRES . 48 . 'NCA3' = VC3 ;
    VRES . 48 . 'NHK3' = VH3 ;
    VRES . 48 . 'CL' = VCLA ;
    VRES . 48 . 'NCMP' = VNC2 ;
    VMSG = CHAI '<<< Cas' ' ' '48' ' ' 'sur' ' ' NTOT0 ' ' ':' ' ' 'jointsoft1' ' ' ':' ' ' 'niveau 1' ' ' VMOK2 ', niveau 2' ' ' VMOK3 ' ' '- ecart' ' ' VSE2 ', acceleration' ' ' VSS2 ' ' 'et' ' ' VSS3 ;
    MESS VMSG ;
    AVANCE VRES 48 NTOT0 'jointsoft1' NPASS 'termine' ;
    MENAGE 'OBLI' ;
FINSI ;

*
* ---------------------------------------------------------------------
* Procedure du cas 49 : gdep2 (grands deplacements coque)
* Variables locales : le cas ne voit aucune variable des cas precedents
* ---------------------------------------------------------------------
DEBPROC VC49 VPSW*'LOGIQUE' VNIV*'ENTIER' VTFPR*'TABLE' VTCT*'TABLE' IECHO0*'ENTIER' ;
* ----- debut du cas gdep2

* fichier :  gdep2.dgibi
************************************************************************
* Section : Mecanique Elastique
************************************************************************

******************************************************************
*           anneau sous pression non uniforme
******************************************************************
*
* position du probleme
* --------------------
* il s agit de determiner la deformee d un anneau
* sous pression non uniforme suiveuse en grands
* deplacements
* reference:
* ----------
* Argyris J., Mlejnek H. P., Dynamics of structure, North Holland
* 1991, p545
******************************************************************

option echo IECHO0;
option dime 2 elem seg2 ;
opti mode 'PLAN' 'CONT' ;

graph = faux ;

*-------------------------------
* definition de la geometrie
*-------------------------------

r = 100 ;
a = 0 0  ;
b = 100 0  ;
c = 0 100 ;
lig1 = b cerc 18 a c ;

*--------------------------------------
*definition des conditions aux limites
*--------------------------------------
cl1 = bloq rota (b et c) ;
cl2 = bloq uy b ;
cl3 = bloq ux c ;
cl = cl1 et cl2 et cl3 ;

*---------------------------------------------------------
*definition du modele, du materiau et des caracteristiques
*---------------------------------------------------------

valyoun = 2.1e7 ;
mo1 = modele lig1 mecanique elastique isotrope  coq2 ;
ma = mate mo1 youn valyoun nu 0. rho 7.8e3 ;
ep1 = 1. ;
ca = cara mo1 epai ep1 ;
ma = ma et ca;

*-----------------------------
* calcul de l objet chargement
*-----------------------------

lf = prog 0  1000. ;
lt = prog 0   1000. ;
ls = prog 0 pas 0.0125   3. ;

p0bar = r * r * r * 12 / valyoun ;
chx1 = lig1 coor 1 ;
chp1 = chx1 ** 2 / r / r * 2. / p0bar ;
chp1 = chp1 nomc pr ;

* Modele Chargement de pression
MOPRE = 'MODE' LIG1 'CHARGEMENT' 'PRESSION' 'COQ2' ;
CHMZ = pres MOPRE (chan cham MOPRE chp1) ;
*
TTPS = 'TABL' ; TTPS. 0 = 0. ; TTPS. 1 = 1000. ;
TPRE = 'TABL' ; TPRE. 0 = 0.*CHMZ ; TPRE. 1 = 1000.*CHMZ ;
CHAA = 'CHAR' 'PRES' TTPS TPRE ;
*
*------------------------------
*  calcul non lineaire
*------------------------------

tab2 = table ;
tab2.grands_deplacements = vrai ;
tab2.blocages_mecaniques = cl;
tab2.modele = MO1 'ET' MOPRE ;
tab2.caracteristiques = MA ;
tab2.chargement = CHAA ;
tab2.temps_calcules = ls;
tab2.'PROCESSEURS' = 'MONO_PROCESSEUR';
tab2.'PRECISION' = 1e-8;
tab2.'PREDICTEUR' = 'HPP';
tab2 . 'PERF_RAID' = VPSW ; tab2 . 'PERF_RAID_NIVEAU' = VNIV ; PASAPAS tab2 ; FPREC tab2 VTFPR ;

*------------------------------
* comparaison avec la reference
*------------------------------

xxx = peche tab2 deplacements;
uxb = (extr xxx ux b)  ;
uxbth = -86. ;
err = (abs ((uxbth - uxb)/uxbth))*100 ;
mess 'deplacement du point b, p0 = 3 ' ;
mess 'reference 'uxbth 'castem' uxb '%erreur' err ;

si (err < 2) ;
   VTCT . 'N0' = (VTCT . 'N0') + 1 ;
sinon ;
   VTCT . 'N5' = (VTCT . 'N5') + 1 ;
finsi ;

si(graph) ;
   defo0 = defo lig1 xxx 0. VERT ;
   defo1 = defo lig1 xxx 1. ROUG ;
   trac (defo0 et defo1) ;
finsi ;
* [valid] FIN final


* ----- fin du cas gdep2
FINPROC ;
*
* ---------------------------------------------------------------------
* Cas 49 : gdep2 (grands deplacements coque)
* ---------------------------------------------------------------------
SI ((IDEB0 '<EG' 49) 'ET' (IFIN0 '>EG' 49) 'ET' ('NON' ('EXIS' TSKIP 49))) ;
    MENAGE 'OBLI' ;
    MESS ' ' ;
    VMSG = CHAI '>>> Cas' ' ' '49' ' ' 'sur' ' ' NTOT0 ' ' ':' ' ' 'gdep2' ' ' '(grands deplacements coque)' ;
    MESS VMSG ;
    NPASS = 2 ;
    SI IPASS3 ;
        NPASS = 3 ;
    FINSI ;
    VTH1 = 0 ;
    VTH2 = 0 ;
    VTH3 = 0 ;
    VNE51 = 0 ;
    VNE01 = 0 ;
    VNE52 = 0 ;
    VNE02 = 0 ;
    VNE53 = 0 ;
    VNE03 = 0 ;
    REPETER ZVRUN NPASS ;
* ordre des passes alterne d'un cas a l'autre (derive des temps en session)
        VIP = &ZVRUN ;
        VPSW = (VIP '>' 1) ;
        VNIV = 1 ;
        VMPS = 'inactif' ;
        SI (VIP 'EGA' 2) ;
            VMPS = 'actif niveau 1' ;
        FINSI ;
        SI (VIP 'EGA' 3) ;
            VNIV = 2 ;
            VMPS = 'actif niveau 2' ;
        FINSI ;
        AVANCE VRES 49 NTOT0 'gdep2' VIP 'en_cours' ;
        VMSG = CHAI '    passe' ' ' VIP ' ' 'sur' ' ' NPASS ' ' ': optimisations' ' ' VMPS ;
        MESS VMSG ;
        SI ITRACE0 ;
            OPTI 'IMPR' 'valid_trace.log' ;
        FINSI ;
        OPTI 'DIME' 3 'MODE' 'TRID' 'ELEM' 'CUB8' 'ECHO' IECHO0 ;
        VTHM = 0 ;
        REPETER ZVREP NREP0 ;
            VIR = &ZVREP ;
            VTFPR = TABL ;
            VTCT = TABL ;
            VTCT . 'N0' = 0 ;
            VTCT . 'N5' = 0 ;
            SI ITEMPS0 ;
                TEMP 'ZERO' ;
            FINSI ;
* Le cas s'execute dans une procedure (variables locales) : les variables
* d'un cas precedent ne peuvent pas masquer un mot-cle ou un operateur
            VC49 VPSW VNIV VTFPR VTCT IECHO0 ;
            VTHR = 0 ;
            SI ITEMPS0 ;
                VTHR = CHRONO ;
            FINSI ;
            SI (VIR 'EGA' 1) ;
                VTHM = VTHR ;
            SINON ;
                SI (VTHR '<' VTHM) ;
                    VTHM = VTHR ;
                FINSI ;
            FINSI ;
        FIN ZVREP ;
        VNER5 = VTCT . 'N5' ;
        VNER0 = VTCT . 'N0' ;
        SI (VIP 'EGA' 1) ;
            VTF1 = VTFPR ;
            VTH1 = VTHM ;
            VNE51 = VNER5 ;
            VNE01 = VNER0 ;
        FINSI ;
        SI (VIP 'EGA' 2) ;
            VTF2 = VTFPR ;
            VTH2 = VTHM ;
            VNE52 = VNER5 ;
            VNE02 = VNER0 ;
        FINSI ;
        SI (VIP 'EGA' 3) ;
            VTF3 = VTFPR ;
            VTH3 = VTHM ;
            VNE53 = VNER5 ;
            VNE03 = VNER0 ;
        FINSI ;
    FIN ZVRUN ;
*   comparaison des empreintes avec la passe 1
    VER2 VNL2 VNC2 = COMPAR VTF1 VTF2 ;
    VMOK2 = 'OK' ;
    SI ((VER2 '>' TOLV0) 'OU' (VNL2 '>' 0) 'OU' ('NON' (VNE52 'EGA' VNE51))) ;
        VMOK2 = 'ECART' ;
        VNBK2 = VNBK2 + 1 ;
    FINSI ;
    VER3 = 0. ;
    VNC3 = 0 ;
    VMOK3 = 'sans_objet' ;
    SI IPASS3 ;
        VER3 VNL3 VNC3 = COMPAR VTF1 VTF3 ;
        VMOK3 = 'OK' ;
        SI ((VER3 '>' TOLV3) 'OU' (VNL3 '>' 0) 'OU' ('NON' (VNE53 'EGA' VNE51))) ;
            VMOK3 = 'ECART' ;
            VNBK3 = VNBK3 + 1 ;
        FINSI ;
    FINSI ;
*   accelerations (temps de la passe 1 / temps de la passe)
    VSP2 = 0. ;
    VSP3 = 0. ;
    SI ((VTH1 '>' 0) 'ET' (VTH2 '>' 0)) ;
        VSP2 = (FLOT VTH1) '/' (FLOT VTH2) ;
    FINSI ;
    SI ((VTH1 '>' 0) 'ET' (VTH3 '>' 0)) ;
        VSP3 = (FLOT VTH1) '/' (FLOT VTH3) ;
    FINSI ;
    VSUM1 = VSUM1 + VTH1 ;
    VSUM2 = VSUM2 + VTH2 ;
    VSUM3 = VSUM3 + VTH3 ;
    VCLA = VTF2 . 'CL' ;
    VR2 = VTF2 . 'NRE' ;
    VC2 = VTF2 . 'NCA' ;
    VH2 = VTF2 . 'NHK' ;
    VM2 = VTF2 . 'NMA' ;
    VR3 = -1 ;
    VC3 = -1 ;
    VH3 = -1 ;
    VM3 = -1 ;
    SI IPASS3 ;
        VR3 = VTF3 . 'NRE' ;
        VC3 = VTF3 . 'NCA' ;
        VH3 = VTF3 . 'NHK' ;
        VM3 = VTF3 . 'NMA' ;
    FINSI ;
    VSE2 = CHAI 'FORMAT' '(1PE10.3)' VER2 ;
    VSE3 = CHAI 'FORMAT' '(1PE10.3)' VER3 ;
    VSS2 = CHAI 'FORMAT' '(F6.2)' VSP2 ;
    VSS3 = CHAI 'FORMAT' '(F6.2)' VSP3 ;
*   fichier de resultat du cas (SORT) et affichage console (MESS)
    OPTI 'SORT' 'valid_gdep2.log' ;
    VMSG = CHAI '=== Cas' ' ' '49' ' ' ':' ' ' 'gdep2' ' ' '(grands deplacements coque)' ' ' '===' ;
    MESS VMSG ;
    SORT 'CHAI' VMSG ;
    VMSG = CHAI 'Valeurs comparees :' ' ' VNC2 ;
    MESS VMSG ;
    SORT 'CHAI' VMSG ;
    VMSG = CHAI 'Temps horloge (ms) : origine' ' ' VTH1 ' ' '; niveau 1' ' ' VTH2 ' ' '; niveau 2' ' ' VTH3 ;
    MESS VMSG ;
    SORT 'CHAI' VMSG ;
    VMSG = CHAI 'Acceleration par rapport a l origine : niveau 1' ' ' VSS2 ' ' '; niveau 2' ' ' VSS3 ;
    MESS VMSG ;
    SORT 'CHAI' VMSG ;
    VMSG = CHAI 'Controles internes du cas : echecs origine' ' ' VNE51 ' ' '; niveau 1' ' ' VNE52 ' ' '; niveau 2' ' ' VNE53 ' ' '- reussites origine' ' ' VNE01 ' ' '; niveau 1' ' ' VNE02 ' ' '; niveau 2' ' ' VNE03 ;
    MESS VMSG ;
    SORT 'CHAI' VMSG ;
    VMSG = CHAI 'Classes exercees (1 MATVAR, 10 ENDOM, 20 VISCODOM, 100 GD) :' ' ' VCLA ;
    MESS VMSG ;
    SORT 'CHAI' VMSG ;
    VMSG = CHAI 'Niveau 1 : raideur reutilisee' ' ' VR2 ' ' 'fois, recalculee' ' ' VC2 ' ' 'fois ; HOOK evite' ' ' VH2 ' ' 'fois ; caracteristiques reutilisees' ' ' VM2 ' ' 'fois' ;
    MESS VMSG ;
    SORT 'CHAI' VMSG ;
    VMSG = CHAI 'Niveau 2 : raideur reutilisee' ' ' VR3 ' ' 'fois, recalculee' ' ' VC3 ' ' 'fois ; HOOK evite' ' ' VH3 ' ' 'fois ; caracteristiques reutilisees' ' ' VM3 ' ' 'fois' ;
    MESS VMSG ;
    SORT 'CHAI' VMSG ;
    VMSG = CHAI 'Ecart relatif maximal : niveau 1' ' ' VSE2 ' ' '; niveau 2' ' ' VSE3 ;
    MESS VMSG ;
    SORT 'CHAI' VMSG ;
    VMSG = CHAI 'RESULTAT : niveau 1' ' ' VMOK2 ' ' '; niveau 2' ' ' VMOK3 ;
    MESS VMSG ;
    SORT 'CHAI' VMSG ;
    SI (('EGA' VNC2 0) ) ;
        VMSG = CHAI 'ATTENTION : aucune valeur comparee (resultats non stockes ?)' ;
        MESS VMSG ;
        SORT 'CHAI' VMSG ;
    FINSI ;
    OPTI 'SORT' 'valid_inutile.tmp' ;
    VRES . 49 = TABL ;
    VRES . 49 . 'NOM' = 'gdep2' ;
    VRES . 49 . 'OKM' = VMOK2 ;
    VRES . 49 . 'OK3' = VMOK3 ;
    VRES . 49 . 'ERR2' = VER2 ;
    VRES . 49 . 'ERR3' = VER3 ;
    VRES . 49 . 'TH1' = VTH1 ;
    VRES . 49 . 'TH2' = VTH2 ;
    VRES . 49 . 'TH3' = VTH3 ;
    VRES . 49 . 'SP2F' = VSP2 ;
    VRES . 49 . 'SP3F' = VSP3 ;
    VRES . 49 . 'NRE2' = VR2 ;
    VRES . 49 . 'NCA2' = VC2 ;
    VRES . 49 . 'NHK2' = VH2 ;
    VRES . 49 . 'NMA2' = VM2 ;
    VRES . 49 . 'NRE3' = VR3 ;
    VRES . 49 . 'NCA3' = VC3 ;
    VRES . 49 . 'NHK3' = VH3 ;
    VRES . 49 . 'CL' = VCLA ;
    VRES . 49 . 'NCMP' = VNC2 ;
    VMSG = CHAI '<<< Cas' ' ' '49' ' ' 'sur' ' ' NTOT0 ' ' ':' ' ' 'gdep2' ' ' ':' ' ' 'niveau 1' ' ' VMOK2 ', niveau 2' ' ' VMOK3 ' ' '- ecart' ' ' VSE2 ', acceleration' ' ' VSS2 ' ' 'et' ' ' VSS3 ;
    MESS VMSG ;
    AVANCE VRES 49 NTOT0 'gdep2' NPASS 'termine' ;
    MENAGE 'OBLI' ;
FINSI ;

*
* ---------------------------------------------------------------------
* Procedure du cas 50 : gdef2 (grandes deformations)
* Variables locales : le cas ne voit aucune variable des cas precedents
* ---------------------------------------------------------------------
DEBPROC VC50 VPSW*'LOGIQUE' VNIV*'ENTIER' VTFPR*'TABLE' VTCT*'TABLE' IECHO0*'ENTIER' ;
* ----- debut du cas gdef2

* fichier :  gdef2.dgibi
************************************************************************
* Section : Mecanique Plastique
************************************************************************
********************************************************************
*                                                                  *
*  TEST GDEF2                                                      *
*                                                                  *
*  CISAILLEMENT PUR EN GRANDES DEFORMATIONS PLASTIQUES             *
*  ( MODELE DE PLASTICITE ISOTROPE )                               *
*      On compare avec les valeurs obtenues a une solution         *
*      analytique                                                  *
*                                                                  *
********************************************************************
*
OPTI ECHO IECHO0;
TITRE   ' TEST GDEF2  ' ;
GRAPH = 'N';
OPTI DIME 2 ELEM QUA4 MODE PLAN CONT;
*
*==================================================================*
*             geometrie : maillage                                 *
*==================================================================*
*
P1 = 0 0 ;
P2 = 1. 0. ;
P3 = 1. 1. ;
P4 = 0. 1. ;
L1 = P1 D 1 P2 ;
L2 = P2 D 1 P3;
L3 = P3 D 1 P4 ;
L4 = P4 D 1 P1 ;
SU = DALLER L1 L2 L3 L4 ;
SI (NEG GRAPH 'N');
   TRAC SU    ;
FINSI;
*
*==================================================================*
*           modele - materiau - caracteristiques en Pa             *
*                      conditions aux limites                      *
*==================================================================*
*
MO = MODE SU MECANIQUE ELASTIQUE PLASTIQUE ISOTROPE ;
YU = 1000. ;   XNU = 0.3 ;
LTRAC = EVOL MANU 'EPS' ( PROG 0. 1.E-3 10.001 )
                  'SIG' ( PROG 0. 1. 30.91026920);
LEPS1 = LTRAC extr absc ;
LSIG1 = LTRAC extr ordo ;
lsig1 = lsig1 enle 1 ;
leps1 = (leps1 enle 1) - (lsig1 / yu) ;
LECRO = evol vert manu eps leps1 sig lsig1 ;
si (neg graph 'N')
  dess (ltrac et lecro) titr ' Courbes de traction et d ecrouissage (vert)' ;
fins ;
MA = MATE MO YOUN YU     NU XNU ECRO LECRO ;
BL1 = BLOQ  DEPL P1 ;
BL2 = BLOQ  DEPL P2 ;
BL3 = BLOQ UX L3 ;
BL4 = BLOQ UY L3 ;
FF = DEPI BL3 1. ;
*
*==================================================================*
*         Initialisation de la table pour appel a PASAPAS          *
*==================================================================*
*
TAB1 = TABLE;
tab1.grands_deplacements=vrai;
TAB1 . BLOCAGES_MECANIQUES= BL1 ET BL2 ET BL3 ET BL4 ;
TAB1 . MODELE = MO;
TAB1 . CARACTERISTIQUES = MA ;
EV1 = EVOL MANU X (PROG 0  5 10 15 20 )
 Y  (PROG 0  5 10 5 0   );
TAB1 . CHARGEMENT = CHAR MECA FF EV1 ;
TAB1 . TEMPS_CALCULES = PROG 0.1   PAS 0.1 5.;
TAB1.'HYPOTHESE_DEFORMATIONS' = MOT 'JAUMANN' ;
TAB1 . 'PERF_RAID' = VPSW ; TAB1 . 'PERF_RAID_NIVEAU' = VNIV ; PASAPAS TAB1 ; FPREC TAB1 VTFPR ;
*
*==================================================================*
*                   affichage des resultats                        *
*==================================================================*
*
MESS ' RESULTATS TEST GDEF2 ';
MESS ' -------------------- ';
SAUT 2 LIGN;
MESS '   On cherche le cisaillement ';
MESS '   Il est compare a une solution analytique   ';
SAUT 2 LIGN;
*
*----------- r{sultats --------------------------------------------------
*
AA = TAB1 . DEPLACEMENTS ;
BB = TAB1 . CONTRAINTES  ;
N = DIME AA ;
SP12= PROG ;
SPTH12= PROG ;
EP = PROG ;
EP = TAB1 . TEMPS_CALCULES ;
REPE BOU (N - 1 ) ;
CSX = CHAN CHPO  MO ( BB . &BOU ) ;
DX = EXTR ( AA . &BOU ) UX P3 ;
S12 = EXTR CSX SMXY P1 ;
SP12 = SP12 ET ( PROG S12 ) ;
SDX = 0.577350269 +  DX  ;
SPTH12= SPTH12 ET ( PROG  SDX ) ;
FIN BOU ;
EV12 = EVOL ROSE  MANU 'DEPLA' EP 'SIG12' SP12 ;
FVTH12 = EVOL TURQ  MANU 'DEPLA' EP 'SIG12' SPTH12 ;
SI (NEG GRAPH 'N');
 DESS  ( FVTH12 ET EV12) ;
FINSI;
*
*   COMPARAISON SOL ANALYTIQUE
*   ecart
*
ER12 =(MAXI ABS ( SP12 - SPTH12 ))/(MAXI ABS SPTH12);
*
SAUT 1 LIGN;
MESS ' Ecart  relatif en contraintes  sig12     :' ER12 ;
*
*
*==================================================================*
*                  code fonctionnement                             *
*==================================================================*
*
* L'ecart maximum entre valeurs de reference et calculee doit etre
* inferieur a 5.d-2
*
SAUT 2 LIGNE;
    SI (ER12 <EG 0.05 ) ;
        VTCT . 'N0' = (VTCT . 'N0') + 1 ;
    SINON;
        VTCT . 'N5' = (VTCT . 'N5') + 1 ;
    FINSI;
*
SAUT 1 LIGN;
*
* [valid] FIN final


* ----- fin du cas gdef2
FINPROC ;
*
* ---------------------------------------------------------------------
* Cas 50 : gdef2 (grandes deformations)
* ---------------------------------------------------------------------
SI ((IDEB0 '<EG' 50) 'ET' (IFIN0 '>EG' 50) 'ET' ('NON' ('EXIS' TSKIP 50))) ;
    MENAGE 'OBLI' ;
    MESS ' ' ;
    VMSG = CHAI '>>> Cas' ' ' '50' ' ' 'sur' ' ' NTOT0 ' ' ':' ' ' 'gdef2' ' ' '(grandes deformations)' ;
    MESS VMSG ;
    NPASS = 2 ;
    SI IPASS3 ;
        NPASS = 3 ;
    FINSI ;
    VTH1 = 0 ;
    VTH2 = 0 ;
    VTH3 = 0 ;
    VNE51 = 0 ;
    VNE01 = 0 ;
    VNE52 = 0 ;
    VNE02 = 0 ;
    VNE53 = 0 ;
    VNE03 = 0 ;
    REPETER ZVRUN NPASS ;
* ordre des passes alterne d'un cas a l'autre (derive des temps en session)
        VIP = NPASS + 1 - &ZVRUN ;
        VPSW = (VIP '>' 1) ;
        VNIV = 1 ;
        VMPS = 'inactif' ;
        SI (VIP 'EGA' 2) ;
            VMPS = 'actif niveau 1' ;
        FINSI ;
        SI (VIP 'EGA' 3) ;
            VNIV = 2 ;
            VMPS = 'actif niveau 2' ;
        FINSI ;
        AVANCE VRES 50 NTOT0 'gdef2' VIP 'en_cours' ;
        VMSG = CHAI '    passe' ' ' VIP ' ' 'sur' ' ' NPASS ' ' ': optimisations' ' ' VMPS ;
        MESS VMSG ;
        SI ITRACE0 ;
            OPTI 'IMPR' 'valid_trace.log' ;
        FINSI ;
        OPTI 'DIME' 3 'MODE' 'TRID' 'ELEM' 'CUB8' 'ECHO' IECHO0 ;
        VTHM = 0 ;
        REPETER ZVREP NREP0 ;
            VIR = &ZVREP ;
            VTFPR = TABL ;
            VTCT = TABL ;
            VTCT . 'N0' = 0 ;
            VTCT . 'N5' = 0 ;
            SI ITEMPS0 ;
                TEMP 'ZERO' ;
            FINSI ;
* Le cas s'execute dans une procedure (variables locales) : les variables
* d'un cas precedent ne peuvent pas masquer un mot-cle ou un operateur
            VC50 VPSW VNIV VTFPR VTCT IECHO0 ;
            VTHR = 0 ;
            SI ITEMPS0 ;
                VTHR = CHRONO ;
            FINSI ;
            SI (VIR 'EGA' 1) ;
                VTHM = VTHR ;
            SINON ;
                SI (VTHR '<' VTHM) ;
                    VTHM = VTHR ;
                FINSI ;
            FINSI ;
        FIN ZVREP ;
        VNER5 = VTCT . 'N5' ;
        VNER0 = VTCT . 'N0' ;
        SI (VIP 'EGA' 1) ;
            VTF1 = VTFPR ;
            VTH1 = VTHM ;
            VNE51 = VNER5 ;
            VNE01 = VNER0 ;
        FINSI ;
        SI (VIP 'EGA' 2) ;
            VTF2 = VTFPR ;
            VTH2 = VTHM ;
            VNE52 = VNER5 ;
            VNE02 = VNER0 ;
        FINSI ;
        SI (VIP 'EGA' 3) ;
            VTF3 = VTFPR ;
            VTH3 = VTHM ;
            VNE53 = VNER5 ;
            VNE03 = VNER0 ;
        FINSI ;
    FIN ZVRUN ;
*   comparaison des empreintes avec la passe 1
    VER2 VNL2 VNC2 = COMPAR VTF1 VTF2 ;
    VMOK2 = 'OK' ;
    SI ((VER2 '>' TOLV0) 'OU' (VNL2 '>' 0) 'OU' ('NON' (VNE52 'EGA' VNE51))) ;
        VMOK2 = 'ECART' ;
        VNBK2 = VNBK2 + 1 ;
    FINSI ;
    VER3 = 0. ;
    VNC3 = 0 ;
    VMOK3 = 'sans_objet' ;
    SI IPASS3 ;
        VER3 VNL3 VNC3 = COMPAR VTF1 VTF3 ;
        VMOK3 = 'OK' ;
        SI ((VER3 '>' TOLV3) 'OU' (VNL3 '>' 0) 'OU' ('NON' (VNE53 'EGA' VNE51))) ;
            VMOK3 = 'ECART' ;
            VNBK3 = VNBK3 + 1 ;
        FINSI ;
    FINSI ;
*   accelerations (temps de la passe 1 / temps de la passe)
    VSP2 = 0. ;
    VSP3 = 0. ;
    SI ((VTH1 '>' 0) 'ET' (VTH2 '>' 0)) ;
        VSP2 = (FLOT VTH1) '/' (FLOT VTH2) ;
    FINSI ;
    SI ((VTH1 '>' 0) 'ET' (VTH3 '>' 0)) ;
        VSP3 = (FLOT VTH1) '/' (FLOT VTH3) ;
    FINSI ;
    VSUM1 = VSUM1 + VTH1 ;
    VSUM2 = VSUM2 + VTH2 ;
    VSUM3 = VSUM3 + VTH3 ;
    VCLA = VTF2 . 'CL' ;
    VR2 = VTF2 . 'NRE' ;
    VC2 = VTF2 . 'NCA' ;
    VH2 = VTF2 . 'NHK' ;
    VM2 = VTF2 . 'NMA' ;
    VR3 = -1 ;
    VC3 = -1 ;
    VH3 = -1 ;
    VM3 = -1 ;
    SI IPASS3 ;
        VR3 = VTF3 . 'NRE' ;
        VC3 = VTF3 . 'NCA' ;
        VH3 = VTF3 . 'NHK' ;
        VM3 = VTF3 . 'NMA' ;
    FINSI ;
    VSE2 = CHAI 'FORMAT' '(1PE10.3)' VER2 ;
    VSE3 = CHAI 'FORMAT' '(1PE10.3)' VER3 ;
    VSS2 = CHAI 'FORMAT' '(F6.2)' VSP2 ;
    VSS3 = CHAI 'FORMAT' '(F6.2)' VSP3 ;
*   fichier de resultat du cas (SORT) et affichage console (MESS)
    OPTI 'SORT' 'valid_gdef2.log' ;
    VMSG = CHAI '=== Cas' ' ' '50' ' ' ':' ' ' 'gdef2' ' ' '(grandes deformations)' ' ' '===' ;
    MESS VMSG ;
    SORT 'CHAI' VMSG ;
    VMSG = CHAI 'Valeurs comparees :' ' ' VNC2 ;
    MESS VMSG ;
    SORT 'CHAI' VMSG ;
    VMSG = CHAI 'Temps horloge (ms) : origine' ' ' VTH1 ' ' '; niveau 1' ' ' VTH2 ' ' '; niveau 2' ' ' VTH3 ;
    MESS VMSG ;
    SORT 'CHAI' VMSG ;
    VMSG = CHAI 'Acceleration par rapport a l origine : niveau 1' ' ' VSS2 ' ' '; niveau 2' ' ' VSS3 ;
    MESS VMSG ;
    SORT 'CHAI' VMSG ;
    VMSG = CHAI 'Controles internes du cas : echecs origine' ' ' VNE51 ' ' '; niveau 1' ' ' VNE52 ' ' '; niveau 2' ' ' VNE53 ' ' '- reussites origine' ' ' VNE01 ' ' '; niveau 1' ' ' VNE02 ' ' '; niveau 2' ' ' VNE03 ;
    MESS VMSG ;
    SORT 'CHAI' VMSG ;
    VMSG = CHAI 'Classes exercees (1 MATVAR, 10 ENDOM, 20 VISCODOM, 100 GD) :' ' ' VCLA ;
    MESS VMSG ;
    SORT 'CHAI' VMSG ;
    VMSG = CHAI 'Niveau 1 : raideur reutilisee' ' ' VR2 ' ' 'fois, recalculee' ' ' VC2 ' ' 'fois ; HOOK evite' ' ' VH2 ' ' 'fois ; caracteristiques reutilisees' ' ' VM2 ' ' 'fois' ;
    MESS VMSG ;
    SORT 'CHAI' VMSG ;
    VMSG = CHAI 'Niveau 2 : raideur reutilisee' ' ' VR3 ' ' 'fois, recalculee' ' ' VC3 ' ' 'fois ; HOOK evite' ' ' VH3 ' ' 'fois ; caracteristiques reutilisees' ' ' VM3 ' ' 'fois' ;
    MESS VMSG ;
    SORT 'CHAI' VMSG ;
    VMSG = CHAI 'Ecart relatif maximal : niveau 1' ' ' VSE2 ' ' '; niveau 2' ' ' VSE3 ;
    MESS VMSG ;
    SORT 'CHAI' VMSG ;
    VMSG = CHAI 'RESULTAT : niveau 1' ' ' VMOK2 ' ' '; niveau 2' ' ' VMOK3 ;
    MESS VMSG ;
    SORT 'CHAI' VMSG ;
    SI (('EGA' VNC2 0) ) ;
        VMSG = CHAI 'ATTENTION : aucune valeur comparee (resultats non stockes ?)' ;
        MESS VMSG ;
        SORT 'CHAI' VMSG ;
    FINSI ;
    OPTI 'SORT' 'valid_inutile.tmp' ;
    VRES . 50 = TABL ;
    VRES . 50 . 'NOM' = 'gdef2' ;
    VRES . 50 . 'OKM' = VMOK2 ;
    VRES . 50 . 'OK3' = VMOK3 ;
    VRES . 50 . 'ERR2' = VER2 ;
    VRES . 50 . 'ERR3' = VER3 ;
    VRES . 50 . 'TH1' = VTH1 ;
    VRES . 50 . 'TH2' = VTH2 ;
    VRES . 50 . 'TH3' = VTH3 ;
    VRES . 50 . 'SP2F' = VSP2 ;
    VRES . 50 . 'SP3F' = VSP3 ;
    VRES . 50 . 'NRE2' = VR2 ;
    VRES . 50 . 'NCA2' = VC2 ;
    VRES . 50 . 'NHK2' = VH2 ;
    VRES . 50 . 'NMA2' = VM2 ;
    VRES . 50 . 'NRE3' = VR3 ;
    VRES . 50 . 'NCA3' = VC3 ;
    VRES . 50 . 'NHK3' = VH3 ;
    VRES . 50 . 'CL' = VCLA ;
    VRES . 50 . 'NCMP' = VNC2 ;
    VMSG = CHAI '<<< Cas' ' ' '50' ' ' 'sur' ' ' NTOT0 ' ' ':' ' ' 'gdef2' ' ' ':' ' ' 'niveau 1' ' ' VMOK2 ', niveau 2' ' ' VMOK3 ' ' '- ecart' ' ' VSE2 ', acceleration' ' ' VSS2 ' ' 'et' ' ' VSS3 ;
    MESS VMSG ;
    AVANCE VRES 50 NTOT0 'gdef2' NPASS 'termine' ;
    MENAGE 'OBLI' ;
FINSI ;

*
* ---------------------------------------------------------------------
* Procedure du cas 51 : Mooney_LRGTreloar_Traction (hyperelastique)
* Variables locales : le cas ne voit aucune variable des cas precedents
* ---------------------------------------------------------------------
DEBPROC VC51 VPSW*'LOGIQUE' VNIV*'ENTIER' VTFPR*'TABLE' VTCT*'TABLE' IECHO0*'ENTIER' ;
* ----- debut du cas Mooney_LRGTreloar_Traction

* fichier : Mooney_LRGTreloar_Traction.dgibi
************************************************************************
* Section : Mecanique Endommagement
* Section : Mecanique Elastique
************************************************************************
*======================================================================*
*         MODELE HYPERELASTIQUE MOONEY-RIVLIN INCOMPRESSIBLE           *
*           EN GRANDES TRANSFORMATIONS - CONTRAINTES PLANES            *
*                                                                      *
*   TEST DE VALIDATION DU MODELE : TRACTION SELON LA DIRECTION Y       *
*   COMPARAISON AVEC LA SOLUTION ANALYTIQUE                            *
*                                                                      *
*   Contribution de Laurent Gornet - Ecole Centrale de Nantes (2006)   *
*======================================================================*
*  Pour plus d'informations, voir la presentation de L. Gornet lors    *
*  du Club Cast3m 2006, disponible sur le site Web de Cast3m.          *
*======================================================================*
*  Exemple d'utilisation d'un modele UMAT en grandes transformations   *
*                                                                      *
*  Note : Actuellement en grandes deformations dans PASAPAS, le modele *
*         ne peut contenir que des modeles de type UMAT. On ne peut    *
*         pas melanger les derivees objectives et les modeles de C3m.  *
*======================================================================*

'OPTION' 'DIME' 2 'MODE' 'PLAN' 'CONT' 'ECHO' IECHO0 ;

* Mettre VRAI si l'on souhaite divers traces.
GRAPH = FAUX ;

title = 'CHAINE' 'MOONEY-RIVLIN - ' 'TRACTION UNIAXIALE Y' ;

*======================================================================*
*             Geometrie - Maillage                                     *
*======================================================================*
* Longueur (direction x) de la plaque/membrane :
Lg_x = 1. ;
* Largeur (direction y) de la plaque/membrane :
Lg_y = 1. ;
* Nombre d'elements selon les directions x et y :
Nel_x = 2 ;
Nel_y = 2 ;
*
'OPTION' 'ELEM' 'TRI6' ;
*
P1 =  0.    0. ;
P2 = Lg_x   0. ;
P3 = Lg_x Lg_y ;
P4 =  0.  Lg_y ;
*
L1 = 'DROITE' Nel_x P1 P2 ;
L2 = 'DROITE' Nel_y P2 P3 ;
L3 = 'DROITE' Nel_x P3 P4 ;
L4 = 'DROITE' Nel_y P4 P1 ;
*
SU = 'DALLER' L1 L2 L3 L4 ;
'SI' GRAPH ;
  'TRACER' SU 'TITRE' ('CHAINE' title ' - MAILLAGE') ;
'FINSI' ;

*======================================================================*
*             Modele - Materiau - Caracteristiques (en Pa)             *
*======================================================================*
'SI' (('NEG' ('VALEUR' 'DIME') 2) 'ET'
      ('NEG' ('VALEUR' 'MODE') 'PLANCONT')) ;
  'MESS' 'Ce modele ne fonctionne qu en 2D CONTRAINTES PLANES' ;
  'ERREUR' 5 ;
'FINSI' ;
*
* Ne pas oublier de definir les parametres lies a l'elasticite.
* Meme si ce n'est pas utilise dans le modele, cela est utile pour
* l'operateur de convergence mecanique de PASAPAS-INCREME.
*
LCMAT = 'MOTS' 'YOUN' 'NU  '  'C1  ' 'C2  ' ;
MO = MODE SU 'MECANIQUE' 'ELASTIQUE' 'ISOTROPE'
                         'NON_LINEAIRE' 'UTILISATEUR'
                         'NUME_LOI' 31  'C_MATERIAU' LCMAT ;
*
* Coefficients du modele de Mooney-Rivlin (en Pa) :
C1 = 0.183E+6 ;     C2 = 0.0034E+6  ;
*
* On fixe le coefficient de Poisson XNU a une valeur proche de 0.5
* du fait de l'incompressibilite inherente au modele.
* Le module de Young YOU est alors connu, car, pour ce modele, le
* module de cisaillement MU vaut : MU = YOU/(2*(1+XNU)) = 2.(C1+C2)
* Il s'agit de la valeur initiale et de la borne inferieure dans le cas
* de la traction. En fonction du niveau de deformation atteinte en
* traction, il faut augmenter cette valeur afin de pouvoir faire
* converger les calculs (module tangent en fin de calculs).
* Prendre des valeurs superieures n'entraine pas de modification des
* resultats, cela modifie seulement le nombre d'iterations mecaniques.
*
XNU = 0.497 ;
YOUini = 3.*(2.*(C1+C2)) ;   YOU = 100. * YOUini ;
*
MA = 'MATERIAU' MO 'YOUN' YOU  'NU  ' XNU
                   'C1  ' C1   'C2  ' C2 ;

*======================================================================*
*             Conditions aux limites - Traction suivant UY             *
*======================================================================*
BL1 = 'BLOQUER' 'UY  ' L1 ;
BL2 = 'BLOQUER' 'UY  ' L3 ;
BL4 = 'BLOQUER' 'UX  ' P1 ;
BLTOT = BL1 'ET' BL2 'ET' BL4 ;
*
* Definition des instants du chargement :
t_deb = 0. ;   t_fin = 10. ;
L_tps = 'PROG' t_deb t_fin ;
* Deplacement suivant Y :
L_UY = 'PROG' 0. ( 3. * Lg_y) ;
FF_y = 'DEPIMP' BL2 1. ;
EV_y = 'EVOL' 'MANU' 'TEMPS' L_tps  'LAMY' L_UY ;
CHARTOT = 'CHARGEMENT' 'DIMP' FF_y EV_y ;

*======================================================================*
*             Initialisation de la table pour appel a PASAPAS          *
*======================================================================*
TAB1 = 'TABLE' ;
TAB1.'MODELE' = MO ;
TAB1.'CARACTERISTIQUES' = MA ;
TAB1.'BLOCAGES_MECANIQUES' = BLTOT ;
TAB1.'CHARGEMENT' = CHARTOT ;
*TAB1.'PRECISION' = 1.E-5 ;
*TAB1.'FTOL' = 1.E-5 ;
*TAB1.'MTOL' = 1.E-5 ;
TAB1.'CONVERGENCE_FORCEE' = FAUX ;
TAB1.'GRANDS_DEPLACEMENTS' = VRAI ;
TAB1.'HYPOTHESE_DEFORMATIONS' = MOT 'UTILISATEUR' ;
TAB1.'TEMPS_CALCULES' = 'PROG' t_deb 'PAS' 0.1 t_fin ;
TAB1.'TEMPS_SAUVES' = 'PROG' t_deb 'PAS' 0.5 t_fin ;
*
L_abs = TAB1.'TEMPS_SAUVES' ;
n_abs = 'DIMENSION' L_abs ;
*
TAB1 . 'PERF_RAID' = VPSW ; TAB1 . 'PERF_RAID_NIVEAU' = VNIV ; PASAPAS TAB1 ; FPREC TAB1 VTFPR ;
*
* Quelques traces de controle apres calculs
'SI' GRAPH ;
  Defo_0 = 'DEFORMEE' SU (TAB1.'DEPLACEMENTS'.(n_abs-1)) 0. ;
  Defo_1 = 'DEFORMEE' SU (TAB1.'DEPLACEMENTS'.(n_abs-1)) 1. 'VERT' ;
  'TRACER' (Defo_0 'ET' Defo_1)
           'TITRE' ('CHAINE' title ' - DEFORMEES INITIALE ET FINALE') ;
  'TRACER' MO (TAB1.'CONTRAINTES'.(n_abs-1))
           'TITRE' ('CHAINE' title ' - CONTRAINTES EN FIN DE CALCUL') ;
'FINSI' ;
*
*======================================================================*
*             Construction de la solution analytique                   *
*======================================================================*
* Definitions :
* - Allongement selon direction y : Lamy = 1 + (UY/Lg_y)
* - Densite d'energie de deformation hyperelastique : W(I1,I2)
* - I1, I2 : trois invariants du tenseur de Cauchy-Green droit
* Dans le cas du modele de Mooney-Rivlin :
*   W = C1*(I1-3.)+C2*(I2-3.) , soit dW/dI1 = C1 et dW/dI2 = C2
*
* Les contraintes de Cauchy sont calculables analytiquement :
* - SCxx = 0.
* - SCyy = 2.(Lamy**2 - 1./Lamy).(dW/dI1 + 1./Lamy.dW/dI2)
* - SCxy = 0  (pas de cisaillement)
* - SCzz = 0  (hypothese des contraintes planes)
*
L_Un  = 'PROG' n_abs '*' 1. ;
Lamy  = L_Un + (('IPOL' L_abs L_tps L_UY) / Lg_Y) ;
*
SCxx_th = 0. * L_Un ;
L_z1 = Lamy * Lamy ;  L_z2 = L_Un / Lamy ;
SCyy_th = (L_z1 - L_z2) * ((2.*C1*L_Un) + (2.*C2*L_z2)) ;
SCxy_th = 0. * L_Un ;

*======================================================================*
*             Comparaison des resultats avec la solution analytique    *
*======================================================================*
* La comparaison s'effectue entre les valeurs moyennes des contraintes
* calculees et les solutions analytiques correspondantes.
* On ne cherche pas a verifier l'uniformite du champ de contraintes.
* (Faire le calcul en mettant GRAPH a VRAI et voir les isovaleurs !)
*
TabD = TAB1.'DEPLACEMENTS' ;
TabS = TAB1.'CONTRAINTES' ;
Confini = 'FORM' ;
ChmUn = 'MANU' 'CHML' MO 'SCAL' 1. ;
*
SCxx = 'PROG' 0. ;
SCyy = 'PROG' 0. ;
SCxy = 'PROG' 0. ;
'REPETER' Boucle (n_abs - 1) ;
  'FORM' (TabD.&Boucle) ;
  VolSU = 'INTG' MO ChmUn ;
  SCxx = SCxx 'ET' ('PROG' (('INTG' MO (TabS. &Boucle) 'SMXX')/VolSU)) ;
  SCyy = SCyy 'ET' ('PROG' (('INTG' MO (TabS. &Boucle) 'SMYY')/VolSU)) ;
  SCxy = SCxy 'ET' ('PROG' (('INTG' MO (TabS. &Boucle) 'SMXY')/VolSU)) ;
  'FORM' Confini ;
'FIN' Boucle ;
*
'SI' GRAPH ;
  tlege = 'TABLE' ;
  tlege. 1 = 'MARQ CROI' ;
  tlege.'TITRE' = 'TABLE' ;
  tlege.'TITRE'. 1 = 'Numerique' ;
  tlege.'TITRE'. 2 = 'Analytique' ;
  Evxx    = 'EVOL' 'ROUG' 'MANU' 'LAMB' L_abs 'SCXX' SCxx ;
  Evxx_th = 'EVOL' 'BLEU' 'MANU' 'LAMB' L_abs 'SCXX' SCxx_th ;
  'DESSIN' (Evxx 'ET' Evxx_th) 'LEGE' tlege
           'TITRE' ('CHAINE' title ' - CONTRAINTE DE CAUCHY XX (Pa)') ;
  Evyy    = 'EVOL' 'ROUG' 'MANU' 'LAMB' L_abs 'SCYY' SCyy ;
  Evyy_th = 'EVOL' 'BLEU' 'MANU' 'LAMB' L_abs 'SCYY' SCyy_th ;
  'DESSIN' (Evyy 'ET' Evyy_th) 'LEGE' tlege
           'TITRE' ('CHAINE' title ' - CONTRAINTE DE CAUCHY YY (Pa)') ;
  Evxy    = 'EVOL' 'ROUG' 'MANU' 'LAMB' L_abs 'SCXY' SCxy ;
  Evxy_th = 'EVOL' 'BLEU' 'MANU' 'LAMB' L_abs 'SCXY' SCxy_th ;
  'DESSIN' (Evxy 'ET' Evxy_th) 'LEGE' tlege
           'TITRE' ('CHAINE' title ' - CONTRAINTE DE CAUCHY XY (Pa)');
'FINSI' ;
*
* Tests de bon fonctionnement :
r_z = 'MAXIMUM' ('ABS' SCyy_th) ;
r_xx = 'MAXIMUM' ('ABS' (SCxx - SCxx_th)) / r_z ;
r_yy = 'MAXIMUM' ('ABS' (SCyy - SCyy_th)) / r_z ;
r_xy = 'MAXIMUM' ('ABS' (SCxy - SCxy_th)) / r_z ;
*
MESS ' RESULTATS : ' title ;
MESS ' ------------------------------------------------- ';
'SAUTER' 1 'LIGNE' ;
'MESS' '  Tests de bon fonctionnement :' ;
'MESS' ' -------------------------------' ;
'MESS' ' Comparaison effectuee sur les contraintes de Cauchy' ;
'MESS' ' Ecart relatif maximal entre la valeur moyenne '
       'calculee' ;
'MESS' '                          et la '
       'solution analytique associee' ;
'MESS' ' Composante XX : ' r_xx ;
'MESS' ' Composante YY : ' r_yy ;
'MESS' ' Composante XY : ' r_xy ;
'SAUTER' 1 'LIGNE' ;
* Ecart relatif maximal tolere
Sigref = 1.E-3 ;
'SI' ('>EG' ('MAXIMUM' ('PROG' r_xx r_yy r_xy)) Sigref) ;
  'MESS' ' ---------------------' ;
  'MESS' '  ECHEC DU CAS-TEST !' ;
  'MESS' ' ---------------------' ;
  'ERREUR' 5 ;
'SINON' ;
  'MESS' ' ----------------------' ;
  'MESS' '  SUCCES DU CAS-TEST !' ;
  'MESS' ' ----------------------' ;
'FINSI' ;
'SAUTER' 1 'LIGNE' ;
* [valid] FIN final


* ----- fin du cas Mooney_LRGTreloar_Traction
FINPROC ;
*
* ---------------------------------------------------------------------
* Cas 51 : Mooney_LRGTreloar_Traction (hyperelastique)
* ---------------------------------------------------------------------
SI ((IDEB0 '<EG' 51) 'ET' (IFIN0 '>EG' 51) 'ET' ('NON' ('EXIS' TSKIP 51))) ;
    MENAGE 'OBLI' ;
    MESS ' ' ;
    VMSG = CHAI '>>> Cas' ' ' '51' ' ' 'sur' ' ' NTOT0 ' ' ':' ' ' 'Mooney_LRGTreloar_Traction' ' ' '(hyperelastique)' ;
    MESS VMSG ;
    NPASS = 2 ;
    SI IPASS3 ;
        NPASS = 3 ;
    FINSI ;
    VTH1 = 0 ;
    VTH2 = 0 ;
    VTH3 = 0 ;
    VNE51 = 0 ;
    VNE01 = 0 ;
    VNE52 = 0 ;
    VNE02 = 0 ;
    VNE53 = 0 ;
    VNE03 = 0 ;
    REPETER ZVRUN NPASS ;
* ordre des passes alterne d'un cas a l'autre (derive des temps en session)
        VIP = &ZVRUN ;
        VPSW = (VIP '>' 1) ;
        VNIV = 1 ;
        VMPS = 'inactif' ;
        SI (VIP 'EGA' 2) ;
            VMPS = 'actif niveau 1' ;
        FINSI ;
        SI (VIP 'EGA' 3) ;
            VNIV = 2 ;
            VMPS = 'actif niveau 2' ;
        FINSI ;
        AVANCE VRES 51 NTOT0 'Mooney_LRGTreloar_Traction' VIP 'en_cours' ;
        VMSG = CHAI '    passe' ' ' VIP ' ' 'sur' ' ' NPASS ' ' ': optimisations' ' ' VMPS ;
        MESS VMSG ;
        SI ITRACE0 ;
            OPTI 'IMPR' 'valid_trace.log' ;
        FINSI ;
        OPTI 'DIME' 3 'MODE' 'TRID' 'ELEM' 'CUB8' 'ECHO' IECHO0 ;
        VTHM = 0 ;
        REPETER ZVREP NREP0 ;
            VIR = &ZVREP ;
            VTFPR = TABL ;
            VTCT = TABL ;
            VTCT . 'N0' = 0 ;
            VTCT . 'N5' = 0 ;
            SI ITEMPS0 ;
                TEMP 'ZERO' ;
            FINSI ;
* Le cas s'execute dans une procedure (variables locales) : les variables
* d'un cas precedent ne peuvent pas masquer un mot-cle ou un operateur
            VC51 VPSW VNIV VTFPR VTCT IECHO0 ;
            VTHR = 0 ;
            SI ITEMPS0 ;
                VTHR = CHRONO ;
            FINSI ;
            SI (VIR 'EGA' 1) ;
                VTHM = VTHR ;
            SINON ;
                SI (VTHR '<' VTHM) ;
                    VTHM = VTHR ;
                FINSI ;
            FINSI ;
        FIN ZVREP ;
        VNER5 = VTCT . 'N5' ;
        VNER0 = VTCT . 'N0' ;
        SI (VIP 'EGA' 1) ;
            VTF1 = VTFPR ;
            VTH1 = VTHM ;
            VNE51 = VNER5 ;
            VNE01 = VNER0 ;
        FINSI ;
        SI (VIP 'EGA' 2) ;
            VTF2 = VTFPR ;
            VTH2 = VTHM ;
            VNE52 = VNER5 ;
            VNE02 = VNER0 ;
        FINSI ;
        SI (VIP 'EGA' 3) ;
            VTF3 = VTFPR ;
            VTH3 = VTHM ;
            VNE53 = VNER5 ;
            VNE03 = VNER0 ;
        FINSI ;
    FIN ZVRUN ;
*   comparaison des empreintes avec la passe 1
    VER2 VNL2 VNC2 = COMPAR VTF1 VTF2 ;
    VMOK2 = 'OK' ;
    SI ((VER2 '>' TOLV0) 'OU' (VNL2 '>' 0) 'OU' ('NON' (VNE52 'EGA' VNE51))) ;
        VMOK2 = 'ECART' ;
        VNBK2 = VNBK2 + 1 ;
    FINSI ;
    VER3 = 0. ;
    VNC3 = 0 ;
    VMOK3 = 'sans_objet' ;
    SI IPASS3 ;
        VER3 VNL3 VNC3 = COMPAR VTF1 VTF3 ;
        VMOK3 = 'OK' ;
        SI ((VER3 '>' TOLV3) 'OU' (VNL3 '>' 0) 'OU' ('NON' (VNE53 'EGA' VNE51))) ;
            VMOK3 = 'ECART' ;
            VNBK3 = VNBK3 + 1 ;
        FINSI ;
    FINSI ;
*   accelerations (temps de la passe 1 / temps de la passe)
    VSP2 = 0. ;
    VSP3 = 0. ;
    SI ((VTH1 '>' 0) 'ET' (VTH2 '>' 0)) ;
        VSP2 = (FLOT VTH1) '/' (FLOT VTH2) ;
    FINSI ;
    SI ((VTH1 '>' 0) 'ET' (VTH3 '>' 0)) ;
        VSP3 = (FLOT VTH1) '/' (FLOT VTH3) ;
    FINSI ;
    VSUM1 = VSUM1 + VTH1 ;
    VSUM2 = VSUM2 + VTH2 ;
    VSUM3 = VSUM3 + VTH3 ;
    VCLA = VTF2 . 'CL' ;
    VR2 = VTF2 . 'NRE' ;
    VC2 = VTF2 . 'NCA' ;
    VH2 = VTF2 . 'NHK' ;
    VM2 = VTF2 . 'NMA' ;
    VR3 = -1 ;
    VC3 = -1 ;
    VH3 = -1 ;
    VM3 = -1 ;
    SI IPASS3 ;
        VR3 = VTF3 . 'NRE' ;
        VC3 = VTF3 . 'NCA' ;
        VH3 = VTF3 . 'NHK' ;
        VM3 = VTF3 . 'NMA' ;
    FINSI ;
    VSE2 = CHAI 'FORMAT' '(1PE10.3)' VER2 ;
    VSE3 = CHAI 'FORMAT' '(1PE10.3)' VER3 ;
    VSS2 = CHAI 'FORMAT' '(F6.2)' VSP2 ;
    VSS3 = CHAI 'FORMAT' '(F6.2)' VSP3 ;
*   fichier de resultat du cas (SORT) et affichage console (MESS)
    OPTI 'SORT' 'valid_Mooney_LRGTreloar_Traction.log' ;
    VMSG = CHAI '=== Cas' ' ' '51' ' ' ':' ' ' 'Mooney_LRGTreloar_Traction' ' ' '(hyperelastique)' ' ' '===' ;
    MESS VMSG ;
    SORT 'CHAI' VMSG ;
    VMSG = CHAI 'Valeurs comparees :' ' ' VNC2 ;
    MESS VMSG ;
    SORT 'CHAI' VMSG ;
    VMSG = CHAI 'Temps horloge (ms) : origine' ' ' VTH1 ' ' '; niveau 1' ' ' VTH2 ' ' '; niveau 2' ' ' VTH3 ;
    MESS VMSG ;
    SORT 'CHAI' VMSG ;
    VMSG = CHAI 'Acceleration par rapport a l origine : niveau 1' ' ' VSS2 ' ' '; niveau 2' ' ' VSS3 ;
    MESS VMSG ;
    SORT 'CHAI' VMSG ;
    VMSG = CHAI 'Controles internes du cas : echecs origine' ' ' VNE51 ' ' '; niveau 1' ' ' VNE52 ' ' '; niveau 2' ' ' VNE53 ' ' '- reussites origine' ' ' VNE01 ' ' '; niveau 1' ' ' VNE02 ' ' '; niveau 2' ' ' VNE03 ;
    MESS VMSG ;
    SORT 'CHAI' VMSG ;
    VMSG = CHAI 'Classes exercees (1 MATVAR, 10 ENDOM, 20 VISCODOM, 100 GD) :' ' ' VCLA ;
    MESS VMSG ;
    SORT 'CHAI' VMSG ;
    VMSG = CHAI 'Niveau 1 : raideur reutilisee' ' ' VR2 ' ' 'fois, recalculee' ' ' VC2 ' ' 'fois ; HOOK evite' ' ' VH2 ' ' 'fois ; caracteristiques reutilisees' ' ' VM2 ' ' 'fois' ;
    MESS VMSG ;
    SORT 'CHAI' VMSG ;
    VMSG = CHAI 'Niveau 2 : raideur reutilisee' ' ' VR3 ' ' 'fois, recalculee' ' ' VC3 ' ' 'fois ; HOOK evite' ' ' VH3 ' ' 'fois ; caracteristiques reutilisees' ' ' VM3 ' ' 'fois' ;
    MESS VMSG ;
    SORT 'CHAI' VMSG ;
    VMSG = CHAI 'Ecart relatif maximal : niveau 1' ' ' VSE2 ' ' '; niveau 2' ' ' VSE3 ;
    MESS VMSG ;
    SORT 'CHAI' VMSG ;
    VMSG = CHAI 'RESULTAT : niveau 1' ' ' VMOK2 ' ' '; niveau 2' ' ' VMOK3 ;
    MESS VMSG ;
    SORT 'CHAI' VMSG ;
    SI (('EGA' VNC2 0) ) ;
        VMSG = CHAI 'ATTENTION : aucune valeur comparee (resultats non stockes ?)' ;
        MESS VMSG ;
        SORT 'CHAI' VMSG ;
    FINSI ;
    OPTI 'SORT' 'valid_inutile.tmp' ;
    VRES . 51 = TABL ;
    VRES . 51 . 'NOM' = 'Mooney_LRGTreloar_Traction' ;
    VRES . 51 . 'OKM' = VMOK2 ;
    VRES . 51 . 'OK3' = VMOK3 ;
    VRES . 51 . 'ERR2' = VER2 ;
    VRES . 51 . 'ERR3' = VER3 ;
    VRES . 51 . 'TH1' = VTH1 ;
    VRES . 51 . 'TH2' = VTH2 ;
    VRES . 51 . 'TH3' = VTH3 ;
    VRES . 51 . 'SP2F' = VSP2 ;
    VRES . 51 . 'SP3F' = VSP3 ;
    VRES . 51 . 'NRE2' = VR2 ;
    VRES . 51 . 'NCA2' = VC2 ;
    VRES . 51 . 'NHK2' = VH2 ;
    VRES . 51 . 'NMA2' = VM2 ;
    VRES . 51 . 'NRE3' = VR3 ;
    VRES . 51 . 'NCA3' = VC3 ;
    VRES . 51 . 'NHK3' = VH3 ;
    VRES . 51 . 'CL' = VCLA ;
    VRES . 51 . 'NCMP' = VNC2 ;
    VMSG = CHAI '<<< Cas' ' ' '51' ' ' 'sur' ' ' NTOT0 ' ' ':' ' ' 'Mooney_LRGTreloar_Traction' ' ' ':' ' ' 'niveau 1' ' ' VMOK2 ', niveau 2' ' ' VMOK3 ' ' '- ecart' ' ' VSE2 ', acceleration' ' ' VSS2 ' ' 'et' ' ' VSS3 ;
    MESS VMSG ;
    AVANCE VRES 51 NTOT0 'Mooney_LRGTreloar_Traction' NPASS 'termine' ;
    MENAGE 'OBLI' ;
FINSI ;

*
* ---------------------------------------------------------------------
* Procedure du cas 52 : gdtract (grands deplacements + endommagement (reutilisation exclue))
* Variables locales : le cas ne voit aucune variable des cas precedents
* ---------------------------------------------------------------------
DEBPROC VC52 VPSW*'LOGIQUE' VNIV*'ENTIER' VTFPR*'TABLE' VTCT*'TABLE' IECHO0*'ENTIER' ;
* ----- debut du cas gdtract

* fichier : gdtract.dgibi
************************************************************************
* Section : Mecanique Elastique
************************************************************************
*======================================================================*
*         MODELE HYPERELASTIQUE GORNET-DESMORAT INCOMPRESSIBLE         *
*           EN GRANDES TRANSFORMATIONS - CONTRAINTES PLANES            *
*                                                                      *
*   TEST DE VALIDATION DU MODELE : TRACTION SELON LA DIRECTION Y       *
*   COMPARAISON AVEC LA SOLUTION ANALYTIQUE                            *
*                                                                      *
*   Contribution de Laurent Gornet - Ecole Centrale de Nantes (2010)   *
*======================================================================*
*  Pour plus d'informations, voir la presentation de L. Gornet lors    *
*  du Club Cast3m 2009, disponible sur le site Web de Cast3m.          *
*======================================================================*
*  Exemple d'utilisation d'un modele UMAT en grandes transformations   *
*                                                                      *
*  Note : Actuellement en grandes deformations dans PASAPAS, le modele *
*         ne peut contenir que des modeles de type UMAT. On ne peut    *
*         pas melanger les derivees objectives et les modeles de C3m.  *
*======================================================================*

'OPTION' 'DIME' 2 'MODE' 'PLAN' 'CONT' 'ECHO' IECHO0 ;


* Mettre VRAI si l'on souhaite divers traces.
GRAPH = VRAI ;
GRAPH = FAUX ;
title = 'CHAINE' 'GORNET - DESMORAT - ' 'TRACTION UNIAXIALE Y' ;

*======================================================================*
*             Geometrie - Maillage                                     *
*======================================================================*
* Longueur (direction x) de la plaque/membrane :
Lg_x = 1. ;
* Largeur (direction y) de la plaque/membrane :
Lg_y = 1. ;
* Nombre d'elements selon les directions x et y :
Nel_x = 3;
Nel_y = 4;
* 'TRI6' 'TRI3'   'QUA8' 'QUA4'
'OPTION' 'ELEM' 'QUA4' ;
*
P1 =  0.    0. ;
P2 = Lg_x   0. ;
P3 = Lg_x Lg_y ;
P4 =  0.  Lg_y ;
*
L1 = 'DROITE' Nel_x P1 P2 ;
L2 = 'DROITE' Nel_y P2 P3 ;
L3 = 'DROITE' Nel_x P3 P4 ;
L4 = 'DROITE' Nel_y P4 P1 ;
*
SU = 'DALLER' L1 L2 L3 L4 ;
'SI' GRAPH ;
  'TRACER' SU 'TITRE' ('CHAINE' title ' - MAILLAGE') ;
'FINSI' ;

*======================================================================*
*             Modele - Materiau - Caracteristiques (en MPa)             *
*======================================================================*
'SI' (('NEG' ('VALEUR' 'DIME') 2) 'OU'
      ('NEG' ('VALEUR' 'MODE') 'PLANCONT')) ;
  'MESS' 'Ce modele ne fonctionne qu en 2D CONTRAINTES PLANES' ;
  'ERREUR' 5 ;
'FINSI' ;
* Calcul du Module d'Young
* Ne pas oublier de definir les parametres lies a l'elasticite.
* Meme si ce n'est pas utilise dans le modele, cela est utile pour
* l'operateur de convergence mecanique de PASAPAS-INCREME.
*
LCMAT = MOTS 'YOUN' 'NU  '    'H1'  'H2'  'H3'  ;
MO = MODE SU 'MECANIQUE' 'ELASTIQUE' 'ISOTROPE'
                    'NON_LINEAIRE' 'UTILISATEUR'
                'NUME_LOI' 33  'C_MATERIAU' LCMAT ;
*  'Q8RI'
* Pour calculer le module d'Young, on utilise les
* Coefficients du modele de Mooney-Rivlin (en  MPa) :
*
C1 = 0.183  ;     C2 = 0.0034   ;
*
* On fixe le coefficient de Poisson XNU a une valeur proche de 0.5
* du fait de l'incompressibilite inherente au modele.
* Le module de Young YOU est alors connu, car, pour ce modele, le
* module de cisaillement MU vaut : MU = YOU/(2*(1+XNU)) = 2.(C1+C2)
* Il s'agit de la valeur initiale et de la borne inferieure dans le cas
* de la traction. En fonction du niveau de deformation atteinte en
* traction, il faut augmenter cette valeur afin de pouvoir faire
* converger les calculs (module tangent en fin de calculs).
* Prendre des valeurs superieures n'entraine pas de modification des
* resultats, cela modifie seulement le nombre d'iterations mecaniques.
*
XNU = 0.497 ;
YOUini = 3.*(2.*(C1+C2)) ;   YOU = 20000. * YOUini ;
*
*Parametres du modèle GD : essais Treloar/Kawabata MPa
*CoeD  = 1.E-4   ;
H1 = 0.142236  ;
H2 = 1.5854659E-2   ;
H3 = 3.4946541E-4   ;
*
MA = MATE MO 'YOUN' YOU 'NU  ' XNU  'H1' H1 'H2' H2 'H3' H3 ;
*
*
*======================================================================*
*             Conditions aux limites - Traction suivant UY             *
*======================================================================*
BL1 = 'BLOQUER' 'UY  ' L1 ;
BL2 = 'BLOQUER' 'UY  ' L3 ;
BL4 = 'BLOQUER' 'UX  ' P1 ;
BLTOT = BL1 'ET' BL2 'ET' BL4 ;
*
* Definition des instants du chargement :
t_deb = 0. ;   t_fin = 10. ;
L_tps = 'PROG' t_deb t_fin ;
* Deplacement suivant Y :
L_UY = 'PROG' 0. ( 3. * Lg_y) ;
L_UY = 'PROG' 0. (5. * Lg_y) ;
L_UY = 'PROG' 0. (8. * Lg_y) ;
L_UY = 'PROG' 0. (9. * Lg_y) ;
FF_y = 'DEPIMP' BL2 1. ;
EV_y = 'EVOL' 'MANU' 'TEMPS' L_tps  'LAMY' L_UY ;
*
CHARTOT = 'CHARGEMENT' 'DIMP' FF_y EV_y ;
*
*======================================================================*
*             Initialisation de la table pour appel a PASAPAS          *
*======================================================================*
TAB1 = 'TABLE' ;
TAB1.'MODELE' = MO ;
TAB1.'CARACTERISTIQUES' = MA ;
TAB1.'BLOCAGES_MECANIQUES' = BLTOT ;
TAB1.'CHARGEMENT' = CHARTOT ;
***** LG
*TAB1.'K_TANGENT'=VRAI;
TAB1.'MAXITERATION'= 150;
*TAB1 . 'DELTAITER' = 150;
*TAB1.'PRECISION' = 1.E-8;
*TAB1.'FTOL' = 1.E-5 ;
*TAB1.'MTOL' = 1.E-5 ;
*****
TAB1.'CONVERGENCE_FORCEE' = FAUX ;
TAB1.'GRANDS_DEPLACEMENTS' = VRAI ;
TAB1.'HYPOTHESE_DEFORMATIONS' = MOT 'UTILISATEUR' ;
TAB1.'TEMPS_CALCULES' = 'PROG' t_deb 'PAS' 0.1 t_fin ;
TAB1.'TEMPS_SAUVES' = 'PROG' t_deb 'PAS' 0.1 t_fin ;
tab1.'REAC_GRANDS'=500.;
*
L_abs = TAB1.'TEMPS_SAUVES' ;
n_abs = 'DIMENSION' L_abs ;
*
TAB1 . 'PERF_RAID' = VPSW ; TAB1 . 'PERF_RAID_NIVEAU' = VNIV ; PASAPAS TAB1 ; FPREC TAB1 VTFPR ;
*
* Quelques traces de controle apres calculs
'SI' GRAPH ;
  Defo_0 = 'DEFORMEE' SU (TAB1.'DEPLACEMENTS'.(n_abs-1)) 0. ;
  Defo_1 = 'DEFORMEE' SU (TAB1.'DEPLACEMENTS'.(n_abs-1)) 1. 'VERT' ;
  'TRACER' (Defo_0 'ET' Defo_1)
           'TITRE' ('CHAINE' title ' - DEFORMEES INITIALE ET FINALE') ;
  'TRACER' MO (TAB1.'CONTRAINTES'.(n_abs-1))
           'TITRE' ('CHAINE' title ' - CONTRAINTES EN FIN DE CALCUL') ;
'FINSI' ;
*
*======================================================================*
*             Construction de la solution analytique                   *
*======================================================================*
* Definitions :
* - Allongement selon direction y : Lamy = 1 + (UY/Lg_y)
* - Densite d'energie de deformation hyperelastique : W(I1,I2)
* - I1, I2 : trois invariants du tenseur de Cauchy-Green droit
* Dans le cas du modele GD  : Incompressible
* Les contraintes de Cauchy sont calculables analytiquement :
* - SCxx = 0.
* - SCyy = 2.(Lamy**2 - 1./Lamy).(dW/dI1 + 1./Lamy.dW/dI2)
* - SCxy = 0  (pas de cisaillement)
* - SCzz = 0  (hypothese des contraintes planes)
*
L_Un  = 'PROG' n_abs '*' 1. ;
Lamy  = L_Un + (('IPOL' L_abs L_tps L_UY) / Lg_Y) ;
*
L_z1 = Lamy * Lamy ;  L_z2 = L_Un / Lamy ;
*
L_tr = L_Un * 3.;
I1 = L_z1 + (2. * L_z2);
I2 = (2. * Lamy) + ( L_Un /  L_z1 );
************************************************************************
dWI1= H1 * (exp (H3 *((I1 - L_tr)**2)));
dWI2= 3. * H2 * L_Un / (I2**0.5);
************************************************************************
SCxx_th = 0. * L_Un ;
SCyy_th =(L_z1 - L_z2) * ((2.*dWI1*L_Un) + (2.*dWI2*L_z2)) ;
SCxy_th = 0. * L_Un ;
*
Evyy_th = 'EVOL' 'BLEU' 'MANU' 'LAMB' Lamy 'SCYY' SCyy_th ;
*dess  Evyy_th ;
*@EXCEL1 Evyy_th 'GD.txt' ;
*======================================================================*
*             Comparaison des resultats avec la solution analytique    *
*======================================================================*
* La comparaison s'effectue entre les valeurs moyennes des contraintes
* calculees et les solutions analytiques correspondantes.
* On ne cherche pas a verifier l'uniformite du champ de contraintes.
* (Faire le calcul en mettant GRAPH a VRAI et voir les isovaleurs !)
*
TabD = TAB1.'DEPLACEMENTS' ;
TabS = TAB1.'CONTRAINTES' ;
Confini = 'FORM' ;
ChmUn = 'MANU' 'CHML' MO 'SCAL' 1. ;
*
SCxx = 'PROG' 0. ;
SCyy = 'PROG' 0. ;
SCxy = 'PROG' 0. ;
'REPETER' Boucle (n_abs - 1) ;
  'FORM' (TabD.&Boucle) ;
  VolSU = 'INTG' MO ChmUn ;
  SCxx = SCxx 'ET' ('PROG' (('INTG' MO (TabS. &Boucle) 'SMXX')/VolSU)) ;
  SCyy = SCyy 'ET' ('PROG' (('INTG' MO (TabS. &Boucle) 'SMYY')/VolSU)) ;
  SCxy = SCxy 'ET' ('PROG' (('INTG' MO (TabS. &Boucle) 'SMXY')/VolSU)) ;
  'FORM' Confini ;
'FIN' Boucle ;
*  LG lamb
L_abs = Lamy;
*
'SI' GRAPH ;
  tlege = 'TABLE' ;
  tlege. 1 = 'MARQ CROI' ;
  tlege.'TITRE' = 'TABLE' ;
  tlege.'TITRE'. 1 = 'Numerique' ;
  tlege.'TITRE'. 2 = 'Analytique' ;
  Evxx    = 'EVOL' 'ROUG' 'MANU' 'LAMB' L_abs 'SCXX' SCxx ;
  Evxx_th = 'EVOL' 'BLEU' 'MANU' 'LAMB' L_abs 'SCXX' SCxx_th ;
  'DESSIN' (Evxx 'ET' Evxx_th) 'LEGE' tlege
           'TITRE' ('CHAINE' title ' - CONTRAINTE DE CAUCHY XX (MPa)') ;
  Evyy    = 'EVOL' 'ROUG' 'MANU' 'LAMB' L_abs 'SCYY' SCyy ;
  Evyy_th = 'EVOL' 'BLEU' 'MANU' 'LAMB' L_abs 'SCYY' SCyy_th ;
  'DESSIN' (Evyy 'ET' Evyy_th) 'LEGE' tlege
           'TITRE' ('CHAINE' title ' - CONTRAINTE DE CAUCHY YY (MPa)') ;
  Evxy    = 'EVOL' 'ROUG' 'MANU' 'LAMB' L_abs 'SCXY' SCxy ;
  Evxy_th = 'EVOL' 'BLEU' 'MANU' 'LAMB' L_abs 'SCXY' SCxy_th ;
  'DESSIN' (Evxy 'ET' Evxy_th) 'LEGE' tlege
           'TITRE' ('CHAINE' title ' - CONTRAINTE DE CAUCHY XY (MPa)');
'FINSI' ;
*
* Tests de bon fonctionnement :
r_z = 'MAXIMUM' ('ABS' SCyy_th) ;
r_xx = 'MAXIMUM' ('ABS' (SCxx - SCxx_th)) / r_z ;
r_yy = 'MAXIMUM' ('ABS' (SCyy - SCyy_th)) / r_z ;
r_xy = 'MAXIMUM' ('ABS' (SCxy - SCxy_th)) / r_z ;
*
MESS ' RESULTATS : ' title ;
MESS ' ------------------------------------------------- ';
'SAUTER' 1 'LIGNE' ;
'MESS' '  Tests de bon fonctionnement :' ;
'MESS' ' -------------------------------' ;
'MESS' ' Comparaison effectuee sur les contraintes de Cauchy' ;
'MESS' ' Ecart relatif maximal entre la valeur moyenne '
       'calculee' ;
'MESS' '                          et la '
       'solution analytique associee' ;
'MESS' ' Composante XX : ' r_xx ;
'MESS' ' Composante YY : ' r_yy ;
'MESS' ' Composante XY : ' r_xy ;
'SAUTER' 1 'LIGNE' ;
* Ecart relatif maximal tolere
Sigref = 1.E-3 ;
'SI' ('>EG' ('MAXIMUM' ('PROG' r_xx r_yy r_xy)) Sigref) ;
  'MESS' ' ---------------------' ;
  'MESS' '  ECHEC DU CAS-TEST !' ;
  'MESS' ' ---------------------' ;
  'ERREUR' 5 ;
'SINON' ;
  'MESS' ' ----------------------' ;
  'MESS' '  SUCCES DU CAS-TEST !' ;
  'MESS' ' ----------------------' ;
'FINSI' ;
'SAUTER' 1 'LIGNE' ;
* [valid] FIN final


* ----- fin du cas gdtract
FINPROC ;
*
* ---------------------------------------------------------------------
* Cas 52 : gdtract (grands deplacements + endommagement (reutilisation exclue))
* ---------------------------------------------------------------------
SI ((IDEB0 '<EG' 52) 'ET' (IFIN0 '>EG' 52) 'ET' ('NON' ('EXIS' TSKIP 52))) ;
    MENAGE 'OBLI' ;
    MESS ' ' ;
    VMSG = CHAI '>>> Cas' ' ' '52' ' ' 'sur' ' ' NTOT0 ' ' ':' ' ' 'gdtract' ' ' '(grands deplacements + endommagement (reutilisation exclue))' ;
    MESS VMSG ;
    NPASS = 2 ;
    SI IPASS3 ;
        NPASS = 3 ;
    FINSI ;
    VTH1 = 0 ;
    VTH2 = 0 ;
    VTH3 = 0 ;
    VNE51 = 0 ;
    VNE01 = 0 ;
    VNE52 = 0 ;
    VNE02 = 0 ;
    VNE53 = 0 ;
    VNE03 = 0 ;
    REPETER ZVRUN NPASS ;
* ordre des passes alterne d'un cas a l'autre (derive des temps en session)
        VIP = NPASS + 1 - &ZVRUN ;
        VPSW = (VIP '>' 1) ;
        VNIV = 1 ;
        VMPS = 'inactif' ;
        SI (VIP 'EGA' 2) ;
            VMPS = 'actif niveau 1' ;
        FINSI ;
        SI (VIP 'EGA' 3) ;
            VNIV = 2 ;
            VMPS = 'actif niveau 2' ;
        FINSI ;
        AVANCE VRES 52 NTOT0 'gdtract' VIP 'en_cours' ;
        VMSG = CHAI '    passe' ' ' VIP ' ' 'sur' ' ' NPASS ' ' ': optimisations' ' ' VMPS ;
        MESS VMSG ;
        SI ITRACE0 ;
            OPTI 'IMPR' 'valid_trace.log' ;
        FINSI ;
        OPTI 'DIME' 3 'MODE' 'TRID' 'ELEM' 'CUB8' 'ECHO' IECHO0 ;
        VTHM = 0 ;
        REPETER ZVREP NREP0 ;
            VIR = &ZVREP ;
            VTFPR = TABL ;
            VTCT = TABL ;
            VTCT . 'N0' = 0 ;
            VTCT . 'N5' = 0 ;
            SI ITEMPS0 ;
                TEMP 'ZERO' ;
            FINSI ;
* Le cas s'execute dans une procedure (variables locales) : les variables
* d'un cas precedent ne peuvent pas masquer un mot-cle ou un operateur
            VC52 VPSW VNIV VTFPR VTCT IECHO0 ;
            VTHR = 0 ;
            SI ITEMPS0 ;
                VTHR = CHRONO ;
            FINSI ;
            SI (VIR 'EGA' 1) ;
                VTHM = VTHR ;
            SINON ;
                SI (VTHR '<' VTHM) ;
                    VTHM = VTHR ;
                FINSI ;
            FINSI ;
        FIN ZVREP ;
        VNER5 = VTCT . 'N5' ;
        VNER0 = VTCT . 'N0' ;
        SI (VIP 'EGA' 1) ;
            VTF1 = VTFPR ;
            VTH1 = VTHM ;
            VNE51 = VNER5 ;
            VNE01 = VNER0 ;
        FINSI ;
        SI (VIP 'EGA' 2) ;
            VTF2 = VTFPR ;
            VTH2 = VTHM ;
            VNE52 = VNER5 ;
            VNE02 = VNER0 ;
        FINSI ;
        SI (VIP 'EGA' 3) ;
            VTF3 = VTFPR ;
            VTH3 = VTHM ;
            VNE53 = VNER5 ;
            VNE03 = VNER0 ;
        FINSI ;
    FIN ZVRUN ;
*   comparaison des empreintes avec la passe 1
    VER2 VNL2 VNC2 = COMPAR VTF1 VTF2 ;
    VMOK2 = 'OK' ;
    SI ((VER2 '>' TOLV0) 'OU' (VNL2 '>' 0) 'OU' ('NON' (VNE52 'EGA' VNE51))) ;
        VMOK2 = 'ECART' ;
        VNBK2 = VNBK2 + 1 ;
    FINSI ;
    VER3 = 0. ;
    VNC3 = 0 ;
    VMOK3 = 'sans_objet' ;
    SI IPASS3 ;
        VER3 VNL3 VNC3 = COMPAR VTF1 VTF3 ;
        VMOK3 = 'OK' ;
        SI ((VER3 '>' TOLV3) 'OU' (VNL3 '>' 0) 'OU' ('NON' (VNE53 'EGA' VNE51))) ;
            VMOK3 = 'ECART' ;
            VNBK3 = VNBK3 + 1 ;
        FINSI ;
    FINSI ;
*   accelerations (temps de la passe 1 / temps de la passe)
    VSP2 = 0. ;
    VSP3 = 0. ;
    SI ((VTH1 '>' 0) 'ET' (VTH2 '>' 0)) ;
        VSP2 = (FLOT VTH1) '/' (FLOT VTH2) ;
    FINSI ;
    SI ((VTH1 '>' 0) 'ET' (VTH3 '>' 0)) ;
        VSP3 = (FLOT VTH1) '/' (FLOT VTH3) ;
    FINSI ;
    VSUM1 = VSUM1 + VTH1 ;
    VSUM2 = VSUM2 + VTH2 ;
    VSUM3 = VSUM3 + VTH3 ;
    VCLA = VTF2 . 'CL' ;
    VR2 = VTF2 . 'NRE' ;
    VC2 = VTF2 . 'NCA' ;
    VH2 = VTF2 . 'NHK' ;
    VM2 = VTF2 . 'NMA' ;
    VR3 = -1 ;
    VC3 = -1 ;
    VH3 = -1 ;
    VM3 = -1 ;
    SI IPASS3 ;
        VR3 = VTF3 . 'NRE' ;
        VC3 = VTF3 . 'NCA' ;
        VH3 = VTF3 . 'NHK' ;
        VM3 = VTF3 . 'NMA' ;
    FINSI ;
    VSE2 = CHAI 'FORMAT' '(1PE10.3)' VER2 ;
    VSE3 = CHAI 'FORMAT' '(1PE10.3)' VER3 ;
    VSS2 = CHAI 'FORMAT' '(F6.2)' VSP2 ;
    VSS3 = CHAI 'FORMAT' '(F6.2)' VSP3 ;
*   fichier de resultat du cas (SORT) et affichage console (MESS)
    OPTI 'SORT' 'valid_gdtract.log' ;
    VMSG = CHAI '=== Cas' ' ' '52' ' ' ':' ' ' 'gdtract' ' ' '(grands deplacements + endommagement (reutilisation exclue))' ' ' '===' ;
    MESS VMSG ;
    SORT 'CHAI' VMSG ;
    VMSG = CHAI 'Valeurs comparees :' ' ' VNC2 ;
    MESS VMSG ;
    SORT 'CHAI' VMSG ;
    VMSG = CHAI 'Temps horloge (ms) : origine' ' ' VTH1 ' ' '; niveau 1' ' ' VTH2 ' ' '; niveau 2' ' ' VTH3 ;
    MESS VMSG ;
    SORT 'CHAI' VMSG ;
    VMSG = CHAI 'Acceleration par rapport a l origine : niveau 1' ' ' VSS2 ' ' '; niveau 2' ' ' VSS3 ;
    MESS VMSG ;
    SORT 'CHAI' VMSG ;
    VMSG = CHAI 'Controles internes du cas : echecs origine' ' ' VNE51 ' ' '; niveau 1' ' ' VNE52 ' ' '; niveau 2' ' ' VNE53 ' ' '- reussites origine' ' ' VNE01 ' ' '; niveau 1' ' ' VNE02 ' ' '; niveau 2' ' ' VNE03 ;
    MESS VMSG ;
    SORT 'CHAI' VMSG ;
    VMSG = CHAI 'Classes exercees (1 MATVAR, 10 ENDOM, 20 VISCODOM, 100 GD) :' ' ' VCLA ;
    MESS VMSG ;
    SORT 'CHAI' VMSG ;
    VMSG = CHAI 'Niveau 1 : raideur reutilisee' ' ' VR2 ' ' 'fois, recalculee' ' ' VC2 ' ' 'fois ; HOOK evite' ' ' VH2 ' ' 'fois ; caracteristiques reutilisees' ' ' VM2 ' ' 'fois' ;
    MESS VMSG ;
    SORT 'CHAI' VMSG ;
    VMSG = CHAI 'Niveau 2 : raideur reutilisee' ' ' VR3 ' ' 'fois, recalculee' ' ' VC3 ' ' 'fois ; HOOK evite' ' ' VH3 ' ' 'fois ; caracteristiques reutilisees' ' ' VM3 ' ' 'fois' ;
    MESS VMSG ;
    SORT 'CHAI' VMSG ;
    VMSG = CHAI 'Ecart relatif maximal : niveau 1' ' ' VSE2 ' ' '; niveau 2' ' ' VSE3 ;
    MESS VMSG ;
    SORT 'CHAI' VMSG ;
    VMSG = CHAI 'RESULTAT : niveau 1' ' ' VMOK2 ' ' '; niveau 2' ' ' VMOK3 ;
    MESS VMSG ;
    SORT 'CHAI' VMSG ;
    SI (('EGA' VNC2 0) ) ;
        VMSG = CHAI 'ATTENTION : aucune valeur comparee (resultats non stockes ?)' ;
        MESS VMSG ;
        SORT 'CHAI' VMSG ;
    FINSI ;
    OPTI 'SORT' 'valid_inutile.tmp' ;
    VRES . 52 = TABL ;
    VRES . 52 . 'NOM' = 'gdtract' ;
    VRES . 52 . 'OKM' = VMOK2 ;
    VRES . 52 . 'OK3' = VMOK3 ;
    VRES . 52 . 'ERR2' = VER2 ;
    VRES . 52 . 'ERR3' = VER3 ;
    VRES . 52 . 'TH1' = VTH1 ;
    VRES . 52 . 'TH2' = VTH2 ;
    VRES . 52 . 'TH3' = VTH3 ;
    VRES . 52 . 'SP2F' = VSP2 ;
    VRES . 52 . 'SP3F' = VSP3 ;
    VRES . 52 . 'NRE2' = VR2 ;
    VRES . 52 . 'NCA2' = VC2 ;
    VRES . 52 . 'NHK2' = VH2 ;
    VRES . 52 . 'NMA2' = VM2 ;
    VRES . 52 . 'NRE3' = VR3 ;
    VRES . 52 . 'NCA3' = VC3 ;
    VRES . 52 . 'NHK3' = VH3 ;
    VRES . 52 . 'CL' = VCLA ;
    VRES . 52 . 'NCMP' = VNC2 ;
    VMSG = CHAI '<<< Cas' ' ' '52' ' ' 'sur' ' ' NTOT0 ' ' ':' ' ' 'gdtract' ' ' ':' ' ' 'niveau 1' ' ' VMOK2 ', niveau 2' ' ' VMOK3 ' ' '- ecart' ' ' VSE2 ', acceleration' ' ' VSS2 ' ' 'et' ' ' VSS3 ;
    MESS VMSG ;
    AVANCE VRES 52 NTOT0 'gdtract' NPASS 'termine' ;
    MENAGE 'OBLI' ;
FINSI ;

*
* ---------------------------------------------------------------------
* Procedure du cas 53 : newmark1 (dynamique Newmark poutre)
* Variables locales : le cas ne voit aucune variable des cas precedents
* ---------------------------------------------------------------------
DEBPROC VC53 VPSW*'LOGIQUE' VNIV*'ENTIER' VTFPR*'TABLE' VTCT*'TABLE' IECHO0*'ENTIER' ;
* ----- debut du cas newmark1

* fichier :  newmark1.dgibi
************************************************************************
* Section : Mecanique Dynamique
* Section : Mecanique Plastique
************************************************************************
*
* Ce cas test verifie que le bilan energetique en dynamique est correct
*
* Verification en comportement et en choc
*
optio dime 2 elem qua4;dens 1;
optio mode plan cont;
*
*   test comportement
*
p1=(0 0); p2= 1 0;
l1 = manu seg2 p1 p2;
mo = model l1  MECANIQUE ELASTIQUE PLASTIQUE parfait barr;
ma = mater mo young 1 nu 0.0 rho 0 sigy 1 sect 1;
mas = masse 'DEPL' 1 (manu poi1 p2);
bl = bloq depl (p1 );
lis1=prog 0 pas 0.1   3;
fo=force (manu poi1 p2 ) (2.5 0);
li1 = prog 0  1000;
li2 = prog 1 1;
ev = evol manu t li1 f(t) li2;
cha1 = char meca fo ev;
tab1 = table;
tab1.'BLOCAGES_MECANIQUES'=bl;
tab1.'MODELE'=mo;
tab1.'CARACTERISTIQUES'=ma;
tab1.'CHARGEMENT'=cha1;
tab1.'DYNAMIQUE'=vrai;
tab1.'MASSE_CONSTANTE'=mas;
tab1.'TEMPS_CALCULES'=lis1;
tab1.'SOUS_INCREMENT'=100;
tab1.'MAXDEFOR'=1e-1;
tab1.'HYPOTHESE_DEFORMATIONS'='LINEAIRE' ;
tab1 . 'PERF_RAID' = VPSW ; tab1 . 'PERF_RAID_NIVEAU' = VNIV ; PASAPAS tab1 ; FPREC tab1 VTFPR ;
vxx = tab1.vitesses.30 extr p2 ux;
uxx = tab1.deplacements.30 extr p2 ux;
ecin = vxx*vxx / 2.;
eabs = 1.0*(uxx - 1) + 0.5;
eext = 2.5* uxx;
optio echo IECHO0;
mess 'position            ' uxx   ;
mess 'vitesse             ' vxx   ;
mess 'energie cinetique   ' ecin ;
mess 'energie absorbee    ' eabs ;
mess 'travail             ' eext ;
bilan = eext - ecin - eabs;
mess 'bilan               ' bilan;
optio echo IECHO0;
si ((ABS bilan) > 5E-3) ; erreur 5; finsi;


*
* test choc
*
ma = mater mo young 1 nu 0.0 rho 0 sigy 1000 sect 1;
blu = bloq 'MAXI' 'UX' p2;
lis2=prog 0 pas 0.1 1;
di = depi blu 0.5;
cha2 = cha1 et (char dimp di ev);
tab2 = table;
tab2.'BLOCAGES_MECANIQUES'=(bl et blu);
tab2.'MODELE'=mo;
tab2.'CARACTERISTIQUES'=ma;
tab2.'CHARGEMENT'=cha2;
tab2.'DYNAMIQUE'=vrai;
tab2.'MASSE_CONSTANTE'=mas;
tab2.'TEMPS_CALCULES'=lis2;
tab2.'HYPOTHESE_DEFORMATIONS'='LINEAIRE' ;
tab2 . 'PERF_RAID' = VPSW ; tab2 . 'PERF_RAID_NIVEAU' = VNIV ; PASAPAS tab2 ; FPREC tab2 VTFPR ;
vxx = tab2.vitesses.10 extr p2 'UX';
uxx = tab2.deplacements.10 extr p2 'UX';
ecin = vxx*vxx / 2.;
eabs = uxx*uxx/2.;
eext = 2.5* uxx;
optio echo IECHO0;
mess 'position            ' uxx   ;
mess 'vitesse             ' vxx   ;
mess 'energie cinetique   ' ecin ;
mess 'energie absorbee    ' eabs ;
mess 'travail             ' eext ;
bilan = eext - ecin - eabs;
mess 'bilan               ' bilan;
optio echo IECHO0;
si ((ABS bilan) > 5E-3) ; erreur 5; finsi;
* [valid] FIN final


* ----- fin du cas newmark1
FINPROC ;
*
* ---------------------------------------------------------------------
* Cas 53 : newmark1 (dynamique Newmark poutre)
* ---------------------------------------------------------------------
SI ((IDEB0 '<EG' 53) 'ET' (IFIN0 '>EG' 53) 'ET' ('NON' ('EXIS' TSKIP 53))) ;
    MENAGE 'OBLI' ;
    MESS ' ' ;
    VMSG = CHAI '>>> Cas' ' ' '53' ' ' 'sur' ' ' NTOT0 ' ' ':' ' ' 'newmark1' ' ' '(dynamique Newmark poutre)' ;
    MESS VMSG ;
    NPASS = 2 ;
    SI IPASS3 ;
        NPASS = 3 ;
    FINSI ;
    VTH1 = 0 ;
    VTH2 = 0 ;
    VTH3 = 0 ;
    VNE51 = 0 ;
    VNE01 = 0 ;
    VNE52 = 0 ;
    VNE02 = 0 ;
    VNE53 = 0 ;
    VNE03 = 0 ;
    REPETER ZVRUN NPASS ;
* ordre des passes alterne d'un cas a l'autre (derive des temps en session)
        VIP = &ZVRUN ;
        VPSW = (VIP '>' 1) ;
        VNIV = 1 ;
        VMPS = 'inactif' ;
        SI (VIP 'EGA' 2) ;
            VMPS = 'actif niveau 1' ;
        FINSI ;
        SI (VIP 'EGA' 3) ;
            VNIV = 2 ;
            VMPS = 'actif niveau 2' ;
        FINSI ;
        AVANCE VRES 53 NTOT0 'newmark1' VIP 'en_cours' ;
        VMSG = CHAI '    passe' ' ' VIP ' ' 'sur' ' ' NPASS ' ' ': optimisations' ' ' VMPS ;
        MESS VMSG ;
        SI ITRACE0 ;
            OPTI 'IMPR' 'valid_trace.log' ;
        FINSI ;
        OPTI 'DIME' 3 'MODE' 'TRID' 'ELEM' 'CUB8' 'ECHO' IECHO0 ;
        VTHM = 0 ;
        REPETER ZVREP NREP0 ;
            VIR = &ZVREP ;
            VTFPR = TABL ;
            VTCT = TABL ;
            VTCT . 'N0' = 0 ;
            VTCT . 'N5' = 0 ;
            SI ITEMPS0 ;
                TEMP 'ZERO' ;
            FINSI ;
* Le cas s'execute dans une procedure (variables locales) : les variables
* d'un cas precedent ne peuvent pas masquer un mot-cle ou un operateur
            VC53 VPSW VNIV VTFPR VTCT IECHO0 ;
            VTHR = 0 ;
            SI ITEMPS0 ;
                VTHR = CHRONO ;
            FINSI ;
            SI (VIR 'EGA' 1) ;
                VTHM = VTHR ;
            SINON ;
                SI (VTHR '<' VTHM) ;
                    VTHM = VTHR ;
                FINSI ;
            FINSI ;
        FIN ZVREP ;
        VNER5 = VTCT . 'N5' ;
        VNER0 = VTCT . 'N0' ;
        SI (VIP 'EGA' 1) ;
            VTF1 = VTFPR ;
            VTH1 = VTHM ;
            VNE51 = VNER5 ;
            VNE01 = VNER0 ;
        FINSI ;
        SI (VIP 'EGA' 2) ;
            VTF2 = VTFPR ;
            VTH2 = VTHM ;
            VNE52 = VNER5 ;
            VNE02 = VNER0 ;
        FINSI ;
        SI (VIP 'EGA' 3) ;
            VTF3 = VTFPR ;
            VTH3 = VTHM ;
            VNE53 = VNER5 ;
            VNE03 = VNER0 ;
        FINSI ;
    FIN ZVRUN ;
*   comparaison des empreintes avec la passe 1
    VER2 VNL2 VNC2 = COMPAR VTF1 VTF2 ;
    VMOK2 = 'OK' ;
    SI ((VER2 '>' TOLV0) 'OU' (VNL2 '>' 0) 'OU' ('NON' (VNE52 'EGA' VNE51))) ;
        VMOK2 = 'ECART' ;
        VNBK2 = VNBK2 + 1 ;
    FINSI ;
    VER3 = 0. ;
    VNC3 = 0 ;
    VMOK3 = 'sans_objet' ;
    SI IPASS3 ;
        VER3 VNL3 VNC3 = COMPAR VTF1 VTF3 ;
        VMOK3 = 'OK' ;
        SI ((VER3 '>' TOLV3) 'OU' (VNL3 '>' 0) 'OU' ('NON' (VNE53 'EGA' VNE51))) ;
            VMOK3 = 'ECART' ;
            VNBK3 = VNBK3 + 1 ;
        FINSI ;
    FINSI ;
*   accelerations (temps de la passe 1 / temps de la passe)
    VSP2 = 0. ;
    VSP3 = 0. ;
    SI ((VTH1 '>' 0) 'ET' (VTH2 '>' 0)) ;
        VSP2 = (FLOT VTH1) '/' (FLOT VTH2) ;
    FINSI ;
    SI ((VTH1 '>' 0) 'ET' (VTH3 '>' 0)) ;
        VSP3 = (FLOT VTH1) '/' (FLOT VTH3) ;
    FINSI ;
    VSUM1 = VSUM1 + VTH1 ;
    VSUM2 = VSUM2 + VTH2 ;
    VSUM3 = VSUM3 + VTH3 ;
    VCLA = VTF2 . 'CL' ;
    VR2 = VTF2 . 'NRE' ;
    VC2 = VTF2 . 'NCA' ;
    VH2 = VTF2 . 'NHK' ;
    VM2 = VTF2 . 'NMA' ;
    VR3 = -1 ;
    VC3 = -1 ;
    VH3 = -1 ;
    VM3 = -1 ;
    SI IPASS3 ;
        VR3 = VTF3 . 'NRE' ;
        VC3 = VTF3 . 'NCA' ;
        VH3 = VTF3 . 'NHK' ;
        VM3 = VTF3 . 'NMA' ;
    FINSI ;
    VSE2 = CHAI 'FORMAT' '(1PE10.3)' VER2 ;
    VSE3 = CHAI 'FORMAT' '(1PE10.3)' VER3 ;
    VSS2 = CHAI 'FORMAT' '(F6.2)' VSP2 ;
    VSS3 = CHAI 'FORMAT' '(F6.2)' VSP3 ;
*   fichier de resultat du cas (SORT) et affichage console (MESS)
    OPTI 'SORT' 'valid_newmark1.log' ;
    VMSG = CHAI '=== Cas' ' ' '53' ' ' ':' ' ' 'newmark1' ' ' '(dynamique Newmark poutre)' ' ' '===' ;
    MESS VMSG ;
    SORT 'CHAI' VMSG ;
    VMSG = CHAI 'Valeurs comparees :' ' ' VNC2 ;
    MESS VMSG ;
    SORT 'CHAI' VMSG ;
    VMSG = CHAI 'Temps horloge (ms) : origine' ' ' VTH1 ' ' '; niveau 1' ' ' VTH2 ' ' '; niveau 2' ' ' VTH3 ;
    MESS VMSG ;
    SORT 'CHAI' VMSG ;
    VMSG = CHAI 'Acceleration par rapport a l origine : niveau 1' ' ' VSS2 ' ' '; niveau 2' ' ' VSS3 ;
    MESS VMSG ;
    SORT 'CHAI' VMSG ;
    VMSG = CHAI 'Controles internes du cas : echecs origine' ' ' VNE51 ' ' '; niveau 1' ' ' VNE52 ' ' '; niveau 2' ' ' VNE53 ' ' '- reussites origine' ' ' VNE01 ' ' '; niveau 1' ' ' VNE02 ' ' '; niveau 2' ' ' VNE03 ;
    MESS VMSG ;
    SORT 'CHAI' VMSG ;
    VMSG = CHAI 'Classes exercees (1 MATVAR, 10 ENDOM, 20 VISCODOM, 100 GD) :' ' ' VCLA ;
    MESS VMSG ;
    SORT 'CHAI' VMSG ;
    VMSG = CHAI 'Niveau 1 : raideur reutilisee' ' ' VR2 ' ' 'fois, recalculee' ' ' VC2 ' ' 'fois ; HOOK evite' ' ' VH2 ' ' 'fois ; caracteristiques reutilisees' ' ' VM2 ' ' 'fois' ;
    MESS VMSG ;
    SORT 'CHAI' VMSG ;
    VMSG = CHAI 'Niveau 2 : raideur reutilisee' ' ' VR3 ' ' 'fois, recalculee' ' ' VC3 ' ' 'fois ; HOOK evite' ' ' VH3 ' ' 'fois ; caracteristiques reutilisees' ' ' VM3 ' ' 'fois' ;
    MESS VMSG ;
    SORT 'CHAI' VMSG ;
    VMSG = CHAI 'Ecart relatif maximal : niveau 1' ' ' VSE2 ' ' '; niveau 2' ' ' VSE3 ;
    MESS VMSG ;
    SORT 'CHAI' VMSG ;
    VMSG = CHAI 'RESULTAT : niveau 1' ' ' VMOK2 ' ' '; niveau 2' ' ' VMOK3 ;
    MESS VMSG ;
    SORT 'CHAI' VMSG ;
    SI (('EGA' VNC2 0) ) ;
        VMSG = CHAI 'ATTENTION : aucune valeur comparee (resultats non stockes ?)' ;
        MESS VMSG ;
        SORT 'CHAI' VMSG ;
    FINSI ;
    OPTI 'SORT' 'valid_inutile.tmp' ;
    VRES . 53 = TABL ;
    VRES . 53 . 'NOM' = 'newmark1' ;
    VRES . 53 . 'OKM' = VMOK2 ;
    VRES . 53 . 'OK3' = VMOK3 ;
    VRES . 53 . 'ERR2' = VER2 ;
    VRES . 53 . 'ERR3' = VER3 ;
    VRES . 53 . 'TH1' = VTH1 ;
    VRES . 53 . 'TH2' = VTH2 ;
    VRES . 53 . 'TH3' = VTH3 ;
    VRES . 53 . 'SP2F' = VSP2 ;
    VRES . 53 . 'SP3F' = VSP3 ;
    VRES . 53 . 'NRE2' = VR2 ;
    VRES . 53 . 'NCA2' = VC2 ;
    VRES . 53 . 'NHK2' = VH2 ;
    VRES . 53 . 'NMA2' = VM2 ;
    VRES . 53 . 'NRE3' = VR3 ;
    VRES . 53 . 'NCA3' = VC3 ;
    VRES . 53 . 'NHK3' = VH3 ;
    VRES . 53 . 'CL' = VCLA ;
    VRES . 53 . 'NCMP' = VNC2 ;
    VMSG = CHAI '<<< Cas' ' ' '53' ' ' 'sur' ' ' NTOT0 ' ' ':' ' ' 'newmark1' ' ' ':' ' ' 'niveau 1' ' ' VMOK2 ', niveau 2' ' ' VMOK3 ' ' '- ecart' ' ' VSE2 ', acceleration' ' ' VSS2 ' ' 'et' ' ' VSS3 ;
    MESS VMSG ;
    AVANCE VRES 53 NTOT0 'newmark1' NPASS 'termine' ;
    MENAGE 'OBLI' ;
FINSI ;

*
* ---------------------------------------------------------------------
* Procedure du cas 54 : dyna_nl1 (dynamique non lineaire)
* Variables locales : le cas ne voit aucune variable des cas precedents
* ---------------------------------------------------------------------
DEBPROC VC54 VPSW*'LOGIQUE' VNIV*'ENTIER' VTFPR*'TABLE' VTCT*'TABLE' IECHO0*'ENTIER' ;
* ----- debut du cas dyna_nl1

* fichier :  dyna_nl1.dgibi
************************************************************************
* Section : Mecanique Dynamique
************************************************************************
*         Test Dyna_nl1.dgibi: Jeux de données        *
*         ------------------------------------        *
*                                                     *
complet = vrai;
*
*************************************************
*  pour calcul complet mettre complet à : vrai;
*************************************************
*******************************************************
*
*  dynamique non lineaire geometrique
*
*  oscillations libres d'un oscillateur de type Duffing
*
*  reference :J. ARGYRIS H.P. MLEJNEK
*             DYNAMICS OF STRUCTURES (p. 494)
*
*******************************************************
opti echo IECHO0 ;
graph = faux ;


OPTI DIME 2 ELEM SEG2 MODE PLAN CONT ;

P1 = 0.    0.    ; P2 = 1. 0.  ;
ST = P1 D 1  P2 ;

MO = MODE ST  MECANIQUE  BARR     ;
MA1 = MATE MO YOUN 1E7  NU 0.3 RHO 0.;
CAR1 = CARA MO SECT 1. ;
MACA= MA1 ET CAR1;
MASS1 = MASS UY 250. P2 ;

CL1 = BLOQ UX uy  P1 ;
CL2 = BLOQ UX P2 ;
CL3 = BLOQ UY P2 ;
CL = CL1 ET CL2 ;


* precontrainte de 500 N

RI1 = RIGI MACA  MO ;
f1 = force fx 500 p2 ;
dep1 = reso (ri1 et cl1 et cl3) f1 ;
sig1 = sigm dep1 mo maca ;
*sig1 = manu 'CHML' mo  'EFFX' 500. 'TYPE' 'CONTRAIN'
*        'STRESSES' ;

* deplacement impose en statique

t1 = 1e-10 ;
FP11 = DEPI CL3 .2;
LIX1 = PROG 0. t1  100  ;
LIY1 = PROG 0. 1  1  ;
EV1 = EVOL MANU T LIX1 F(T) LIY1 ;
CHA1 = CHAR MECA FP11   EV1 ;
tab2 = table ;
tab2.'GRANDS_DEPLACEMENTS'=VRAI;
TAB2.'BLOCAGES_MECANIQUES' = CL et cl3  ;
TAB2.'MODELE' = MO;
Tab2.'K_SIGMA' = VRAI ;
TAB2.'CARACTERISTIQUES' = MACA;
TAB2.'CHARGEMENT' = CHA1;
TAB2.'CONTRAINTES' = TABLE;
TAB2.'CONTRAINTES' . 0 =  SIG1 ;
LIS11 = PROG 0.  (.33*t1)  (.66*t1)  t1  ;
TAB2.'TEMPS_CALCULES' = LIS11;
TAB2 . 'PERF_RAID' = VPSW ; TAB2 . 'PERF_RAID_NIVEAU' = VNIV ; PASAPAS TAB2 ; FPREC TAB2 VTFPR ;

* lacher et oscillations libres en dynamique
si complet;
t2 = .27 ;
sinon;
t2 = .02;
finsi;
dt = .002 ;
f1 = force fy 0. p2 ;
cha2 = char meca f1 ev1 ;
tab2.dynamique = vrai ;
tab2.masse_constante = mass1 ;
tab2.ftol = 1e-4 ;
vv = manu chpo ST 1 'UX' 0.;
tab2.'CONTINUATION'.'VITESSES'= vv;
nso= dime (tab2.'TEMPS');tab2.'VITESSES'= table;
tab2.'VITESSES'.(nso + 1) = vv;
tab2.'CONTINUATION'.'ACCELERATIONS'= vv;
tab2.'ACCELERATIONS'= table;
tab2.'ACCELERATIONS'.(nso + 1) = vv;
TAB2.'BLOCAGES_MECANIQUES' = CL ;
LIS22 = PROG (t1 + dt)  pas dt  (t1 + t2)  ;
TAB2.'TEMPS_CALCULES' = LIS22;
TAB2.'CHARGEMENT' = CHA2;
TAB2 . 'PERF_RAID' = VPSW ; TAB2 . 'PERF_RAID_NIVEAU' = VNIV ; PASAPAS TAB2 ; FPREC TAB2 VTFPR ;


NDIM = (DIME ( TAB2 . DEPLACEMENTS )) ;
PGY = PROG ;
REPETER TBOU2 NDIM;
 LEDEP = TAB2 . DEPLACEMENTS.  (&TBOU2 - 1);
 V   = EXTR LEDEP UY P2 ;
 PGY = PGY ET ( PROG V ) ;
FIN TBOU2 ;

ev1 = evol manu 'temps' (lis11 et lis22) 'depl' pgy ;
 si graph ;
   dess ev1 ;
 finsi ;

*recherche de l'amplitude et de la periode
si complet;
dim1 = enti ((t2 - .25)/dt) ;
maxuy = 0 ;
tt = .25 ;
tp=0.;
 repeter bou1 dim1 ;
  tt = tt + dt ;
  uy1 = ipol tt (lis11 et lis22) pgy ;
    si (uy1 >  maxuy) ;
      maxuy = uy1 ;
      tp = tt ;
    finsi ;
 fin bou1 ;
valres = .2;
sinon;
tp =.2648;
valres =   .171 ;maxuy = pgy extr ( dime pgy);
finsi;


** periode theorique .264791269s
** amplitude theorique .2 ;
err1 = abs ((maxuy - valres)/valres * 100) ;
err2 = abs ((tp - .2648)/.2648 *100) ;
mess 'erreur en amplitude'err1'%';
mess 'erreur en periode'err2'%' ;
 si ((err1 > .1) ou (err2 > .5));
  VTCT . 'N5' = (VTCT . 'N5') + 1 ;
 sinon ;
  VTCT . 'N0' = (VTCT . 'N0') + 1 ;
 finsi ;
* [valid] FIN final


* ----- fin du cas dyna_nl1
FINPROC ;
*
* ---------------------------------------------------------------------
* Cas 54 : dyna_nl1 (dynamique non lineaire)
* ---------------------------------------------------------------------
SI ((IDEB0 '<EG' 54) 'ET' (IFIN0 '>EG' 54) 'ET' ('NON' ('EXIS' TSKIP 54))) ;
    MENAGE 'OBLI' ;
    MESS ' ' ;
    VMSG = CHAI '>>> Cas' ' ' '54' ' ' 'sur' ' ' NTOT0 ' ' ':' ' ' 'dyna_nl1' ' ' '(dynamique non lineaire)' ;
    MESS VMSG ;
    NPASS = 2 ;
    SI IPASS3 ;
        NPASS = 3 ;
    FINSI ;
    VTH1 = 0 ;
    VTH2 = 0 ;
    VTH3 = 0 ;
    VNE51 = 0 ;
    VNE01 = 0 ;
    VNE52 = 0 ;
    VNE02 = 0 ;
    VNE53 = 0 ;
    VNE03 = 0 ;
    REPETER ZVRUN NPASS ;
* ordre des passes alterne d'un cas a l'autre (derive des temps en session)
        VIP = NPASS + 1 - &ZVRUN ;
        VPSW = (VIP '>' 1) ;
        VNIV = 1 ;
        VMPS = 'inactif' ;
        SI (VIP 'EGA' 2) ;
            VMPS = 'actif niveau 1' ;
        FINSI ;
        SI (VIP 'EGA' 3) ;
            VNIV = 2 ;
            VMPS = 'actif niveau 2' ;
        FINSI ;
        AVANCE VRES 54 NTOT0 'dyna_nl1' VIP 'en_cours' ;
        VMSG = CHAI '    passe' ' ' VIP ' ' 'sur' ' ' NPASS ' ' ': optimisations' ' ' VMPS ;
        MESS VMSG ;
        SI ITRACE0 ;
            OPTI 'IMPR' 'valid_trace.log' ;
        FINSI ;
        OPTI 'DIME' 3 'MODE' 'TRID' 'ELEM' 'CUB8' 'ECHO' IECHO0 ;
        VTHM = 0 ;
        REPETER ZVREP NREP0 ;
            VIR = &ZVREP ;
            VTFPR = TABL ;
            VTCT = TABL ;
            VTCT . 'N0' = 0 ;
            VTCT . 'N5' = 0 ;
            SI ITEMPS0 ;
                TEMP 'ZERO' ;
            FINSI ;
* Le cas s'execute dans une procedure (variables locales) : les variables
* d'un cas precedent ne peuvent pas masquer un mot-cle ou un operateur
            VC54 VPSW VNIV VTFPR VTCT IECHO0 ;
            VTHR = 0 ;
            SI ITEMPS0 ;
                VTHR = CHRONO ;
            FINSI ;
            SI (VIR 'EGA' 1) ;
                VTHM = VTHR ;
            SINON ;
                SI (VTHR '<' VTHM) ;
                    VTHM = VTHR ;
                FINSI ;
            FINSI ;
        FIN ZVREP ;
        VNER5 = VTCT . 'N5' ;
        VNER0 = VTCT . 'N0' ;
        SI (VIP 'EGA' 1) ;
            VTF1 = VTFPR ;
            VTH1 = VTHM ;
            VNE51 = VNER5 ;
            VNE01 = VNER0 ;
        FINSI ;
        SI (VIP 'EGA' 2) ;
            VTF2 = VTFPR ;
            VTH2 = VTHM ;
            VNE52 = VNER5 ;
            VNE02 = VNER0 ;
        FINSI ;
        SI (VIP 'EGA' 3) ;
            VTF3 = VTFPR ;
            VTH3 = VTHM ;
            VNE53 = VNER5 ;
            VNE03 = VNER0 ;
        FINSI ;
    FIN ZVRUN ;
*   comparaison des empreintes avec la passe 1
    VER2 VNL2 VNC2 = COMPAR VTF1 VTF2 ;
    VMOK2 = 'OK' ;
    SI ((VER2 '>' TOLV0) 'OU' (VNL2 '>' 0) 'OU' ('NON' (VNE52 'EGA' VNE51))) ;
        VMOK2 = 'ECART' ;
        VNBK2 = VNBK2 + 1 ;
    FINSI ;
    VER3 = 0. ;
    VNC3 = 0 ;
    VMOK3 = 'sans_objet' ;
    SI IPASS3 ;
        VER3 VNL3 VNC3 = COMPAR VTF1 VTF3 ;
        VMOK3 = 'OK' ;
        SI ((VER3 '>' TOLV3) 'OU' (VNL3 '>' 0) 'OU' ('NON' (VNE53 'EGA' VNE51))) ;
            VMOK3 = 'ECART' ;
            VNBK3 = VNBK3 + 1 ;
        FINSI ;
    FINSI ;
*   accelerations (temps de la passe 1 / temps de la passe)
    VSP2 = 0. ;
    VSP3 = 0. ;
    SI ((VTH1 '>' 0) 'ET' (VTH2 '>' 0)) ;
        VSP2 = (FLOT VTH1) '/' (FLOT VTH2) ;
    FINSI ;
    SI ((VTH1 '>' 0) 'ET' (VTH3 '>' 0)) ;
        VSP3 = (FLOT VTH1) '/' (FLOT VTH3) ;
    FINSI ;
    VSUM1 = VSUM1 + VTH1 ;
    VSUM2 = VSUM2 + VTH2 ;
    VSUM3 = VSUM3 + VTH3 ;
    VCLA = VTF2 . 'CL' ;
    VR2 = VTF2 . 'NRE' ;
    VC2 = VTF2 . 'NCA' ;
    VH2 = VTF2 . 'NHK' ;
    VM2 = VTF2 . 'NMA' ;
    VR3 = -1 ;
    VC3 = -1 ;
    VH3 = -1 ;
    VM3 = -1 ;
    SI IPASS3 ;
        VR3 = VTF3 . 'NRE' ;
        VC3 = VTF3 . 'NCA' ;
        VH3 = VTF3 . 'NHK' ;
        VM3 = VTF3 . 'NMA' ;
    FINSI ;
    VSE2 = CHAI 'FORMAT' '(1PE10.3)' VER2 ;
    VSE3 = CHAI 'FORMAT' '(1PE10.3)' VER3 ;
    VSS2 = CHAI 'FORMAT' '(F6.2)' VSP2 ;
    VSS3 = CHAI 'FORMAT' '(F6.2)' VSP3 ;
*   fichier de resultat du cas (SORT) et affichage console (MESS)
    OPTI 'SORT' 'valid_dyna_nl1.log' ;
    VMSG = CHAI '=== Cas' ' ' '54' ' ' ':' ' ' 'dyna_nl1' ' ' '(dynamique non lineaire)' ' ' '===' ;
    MESS VMSG ;
    SORT 'CHAI' VMSG ;
    VMSG = CHAI 'Valeurs comparees :' ' ' VNC2 ;
    MESS VMSG ;
    SORT 'CHAI' VMSG ;
    VMSG = CHAI 'Temps horloge (ms) : origine' ' ' VTH1 ' ' '; niveau 1' ' ' VTH2 ' ' '; niveau 2' ' ' VTH3 ;
    MESS VMSG ;
    SORT 'CHAI' VMSG ;
    VMSG = CHAI 'Acceleration par rapport a l origine : niveau 1' ' ' VSS2 ' ' '; niveau 2' ' ' VSS3 ;
    MESS VMSG ;
    SORT 'CHAI' VMSG ;
    VMSG = CHAI 'Controles internes du cas : echecs origine' ' ' VNE51 ' ' '; niveau 1' ' ' VNE52 ' ' '; niveau 2' ' ' VNE53 ' ' '- reussites origine' ' ' VNE01 ' ' '; niveau 1' ' ' VNE02 ' ' '; niveau 2' ' ' VNE03 ;
    MESS VMSG ;
    SORT 'CHAI' VMSG ;
    VMSG = CHAI 'Classes exercees (1 MATVAR, 10 ENDOM, 20 VISCODOM, 100 GD) :' ' ' VCLA ;
    MESS VMSG ;
    SORT 'CHAI' VMSG ;
    VMSG = CHAI 'Niveau 1 : raideur reutilisee' ' ' VR2 ' ' 'fois, recalculee' ' ' VC2 ' ' 'fois ; HOOK evite' ' ' VH2 ' ' 'fois ; caracteristiques reutilisees' ' ' VM2 ' ' 'fois' ;
    MESS VMSG ;
    SORT 'CHAI' VMSG ;
    VMSG = CHAI 'Niveau 2 : raideur reutilisee' ' ' VR3 ' ' 'fois, recalculee' ' ' VC3 ' ' 'fois ; HOOK evite' ' ' VH3 ' ' 'fois ; caracteristiques reutilisees' ' ' VM3 ' ' 'fois' ;
    MESS VMSG ;
    SORT 'CHAI' VMSG ;
    VMSG = CHAI 'Ecart relatif maximal : niveau 1' ' ' VSE2 ' ' '; niveau 2' ' ' VSE3 ;
    MESS VMSG ;
    SORT 'CHAI' VMSG ;
    VMSG = CHAI 'RESULTAT : niveau 1' ' ' VMOK2 ' ' '; niveau 2' ' ' VMOK3 ;
    MESS VMSG ;
    SORT 'CHAI' VMSG ;
    SI (('EGA' VNC2 0) ) ;
        VMSG = CHAI 'ATTENTION : aucune valeur comparee (resultats non stockes ?)' ;
        MESS VMSG ;
        SORT 'CHAI' VMSG ;
    FINSI ;
    OPTI 'SORT' 'valid_inutile.tmp' ;
    VRES . 54 = TABL ;
    VRES . 54 . 'NOM' = 'dyna_nl1' ;
    VRES . 54 . 'OKM' = VMOK2 ;
    VRES . 54 . 'OK3' = VMOK3 ;
    VRES . 54 . 'ERR2' = VER2 ;
    VRES . 54 . 'ERR3' = VER3 ;
    VRES . 54 . 'TH1' = VTH1 ;
    VRES . 54 . 'TH2' = VTH2 ;
    VRES . 54 . 'TH3' = VTH3 ;
    VRES . 54 . 'SP2F' = VSP2 ;
    VRES . 54 . 'SP3F' = VSP3 ;
    VRES . 54 . 'NRE2' = VR2 ;
    VRES . 54 . 'NCA2' = VC2 ;
    VRES . 54 . 'NHK2' = VH2 ;
    VRES . 54 . 'NMA2' = VM2 ;
    VRES . 54 . 'NRE3' = VR3 ;
    VRES . 54 . 'NCA3' = VC3 ;
    VRES . 54 . 'NHK3' = VH3 ;
    VRES . 54 . 'CL' = VCLA ;
    VRES . 54 . 'NCMP' = VNC2 ;
    VMSG = CHAI '<<< Cas' ' ' '54' ' ' 'sur' ' ' NTOT0 ' ' ':' ' ' 'dyna_nl1' ' ' ':' ' ' 'niveau 1' ' ' VMOK2 ', niveau 2' ' ' VMOK3 ' ' '- ecart' ' ' VSE2 ', acceleration' ' ' VSS2 ' ' 'et' ' ' VSS3 ;
    MESS VMSG ;
    AVANCE VRES 54 NTOT0 'dyna_nl1' NPASS 'termine' ;
    MENAGE 'OBLI' ;
FINSI ;

*
* ---------------------------------------------------------------------
* Procedure du cas 55 : Contact2D (contact 2D)
* Variables locales : le cas ne voit aucune variable des cas precedents
* ---------------------------------------------------------------------
DEBPROC VC55 VPSW*'LOGIQUE' VNIV*'ENTIER' VTFPR*'TABLE' VTCT*'TABLE' IECHO0*'ENTIER' ;
* ----- debut du cas Contact2D

* fichier : Contact2D.dgibi
************************************************************************
* Section : Mecanique Contact
************************************************************************
*---------------------------------------------------------------------*
*    Ce cas-test permet de tester la gestion du contact par PASAPAS.  *
* Il simule la mise en contact, en deplacements imposes, d'un carre   *
* sur une surface rigide. Le probleme est traite en 2D, contraintes   *
* planes. On impose le deplacement de l'arete sup. du carre. Sa base  *
* entre en contact, le carre est mis en compression. On compare la    *
* solution EF a la solution analytique.                               *
*---------------------------------------------------------------------*
*                                                                     *
**'OPTI' ECHO IECHO0 ;
*                                                                     *
'OPTI' 'DIME' 2 'ELEM' QUA4 'MODE' 'PLAN' 'CONT' ;
*                                                                     *
* Si TRACes desires, mettre IG1 a VRAI :                              *
IG1      = FAUX ;
*                                                                     *
*---------------------------------------------------------------------*
*                              MAILLAGE                               *
*---------------------------------------------------------------------*
*                                                                     *
S1       = -10. 0.9999 ;
S2       = 10. 0.9999 ;
NLS1     = 5 ;
LS1      = S1 'DROI' NLS1 S2 ;
*                                                                     *
M1       = -5. 1. ;
M2       = 5. 1. ;
NLM1     =  7 ;
LM1      = M1 'DROI' NLM1 M2 ;
SM1      = LM1 'TRAN' NLM1 (0. 10.) ;
*                                                                     *
* Maillages de contact :                                              *
*                                                                     *
**MCONT1   = ('IMPO' 'MAIL' LM1 ('INVE' LS1)) 'COUL' 'JAUN' ;
*list MCONT1;
*                                                                     *
* Traces :                                                            *
*                                                                     *
'SI' IG1 ;
  'TITR' 'Maillages' ;
**  'TRAC' 'FACE' (LS1 'ET' SM1 'ET' MCONT1) ;
'FINS' ;
*                                                                     *
*---------------------------------------------------------------------*
*                      MODELES / CARACTERISTIQUES                     *
*---------------------------------------------------------------------*
*                                                                     *
MODM1    = 'MODE' SM1 'MECANIQUE' 'ELASTIQUE' ;
MATM1    = 'MATE' MODM1 'YOUN' 1.E3 'NU' 0.3 ;
*                                                                     *
*---------------------------------------------------------------------*
*                          C.L. / CHARGEMENT                          *
*---------------------------------------------------------------------*
*                                                                     *
* Deplacements imposes :                                              *
*                                                                     *
LM3      = SM1 'COTE' 3 ;
LM4      = SM1 'COTE' 4 ;
CLLM3    = 'BLOQ' LM3 'UY' ;
CLLM4    = 'BLOQ' LM4 'UX' ;
CLS1     = 'BLOQ' LS1 'DEPL' ;
CL0      = CLLM3 'ET' CLLM4 'ET' CLS1 ;
*                                                                     *
UY0      = -0.0003 ;
DCLLM3   = 'DEPI' CLLM3 UY0 ;
*                                                                     *
'SI' IG1 ;
  'TITR' 'Deplacement impose au bord superieur du carre.' ;
  'TRAC' ('VECT' (DCLLM3 'NOMC' 'UY') 1. 'UX' 'UY' 'VERT')
  (LS1 'ET' SM1) ;
'FINS' ;
*                                                                     *
* Chargements :                                                       *
*                                                                     *
LTPS1    = 'PROG' 0. 1. ;
EV1      = 'EVOL' 'MANU' 'TEMPS' LTPS1 ('PROG' 0. 1.) ;
*                                                                     *
CHARU1   = 'CHAR' 'DIMP' DCLLM3 EV1 ;
CHAR0    = CHARU1 ;
MODCONTA= model lm1 contact unilateral (inve ls1) 'SYME';
list modconta;
*                                                                     *
*---------------------------------------------------------------------*
*                             RESOLUTION                              *
*---------------------------------------------------------------------*
*                                                                     *
* Construction de la table PASAPAS :                                  *
*                                                                     *
TAB1                         = 'TABL' ;
TAB1 . 'TEMPS_CALCULES'      = LTPS1 ;
TAB1 . 'MODELE'              = MODM1  et modconta;
TAB1 . 'CARACTERISTIQUES'    = MATM1 ;
TAB1 . 'BLOCAGES_MECANIQUES' = CL0 ;
TAB1 . 'CHARGEMENT'          = CHAR0 ;
*TAB1 . 'CONTACT'             = MCONT1 ;
*TAB1 . 'GRANDS_DEPLACEMENTS' = FAUX ;
*                                                                     *
* Resolution :                                                        *
*                                                                   *
TAB1 . 'PERF_RAID' = VPSW ; TAB1 . 'PERF_RAID_NIVEAU' = VNIV ; TAB2     = PASAPAS TAB1 ; FPREC TAB1 VTFPR ;
*                                                                     *
*---------------------------------------------------------------------*
*                            DEPOUILLEMENT                            *
*---------------------------------------------------------------------*
*                                                                     *
DEP1     = (TAB2 . 'DEPLACEMENTS' . 1) 'ENLE' 'LX' ;
*                                                                     *
* Deformee :                                                          *
*                                                                     *
DEFO0    = 'DEFO' (SM1 'ET' LS1) DEP1 0. 'VERT' ;
DEFO1    = 'DEFO' (SM1 'ET' LS1) DEP1 1. 'ROUG' ;
*                                                                     *
'SI' IG1 ;
  'TITR' 'Maillages non deforme (vert) et deforme (rouge).' ;
  'TRAC' (DEFO0 'ET' DEFO1) ;
'FINS' ;
*                                                                     *
* Definition des deplacements solutions et comparaison avec la        *
* solution EF :                                                       *
*                                                                     *
EPXX1    = ((-1. * UY0) - 0.0001) * 0.1 * 0.3;
UXSM1    = (('COOR' 1 SM1) + 5.) * EPXX1 ;
SOLUX1   = UXSM1 'NOMC' 'UX' ;
EPYY1    = ((-1. * UY0) - 0.0001) * 0.1 ;
UYSM1    = ((('COOR' 2 SM1) - 1.) * EPYY1) + 0.0001;
SOLUY1   = (-1. * UYSM1) 'NOMC' 'UY' ;
SOLU1    = SOLUX1 'ET' SOLUY1 ;
ERR1     = 'MAXI' ('ABS' ((SOLU1 - DEP1) / ('MAXI' 'ABS' (SOLU1)))) ;
*                                                                     *
'SI' IG1 ;
  'TITR' 'Champ de deplacements.' ;
  'TRAC' ('CHAN' 'CHAM' DEP1 MODM1 'NOEUDS') MODM1 ;
'FINS' ;
*                                                                     *
* Comparaison des champs de contraintes :                             *
*                                                                     *
EPS1     = 'EPSI' MODM1 SOLU1 ;
SIG1     = 'ELAS' MODM1 EPS1 MATM1 ;
SIG2     = TAB2 . 'CONTRAINTES' . 1 ;
ERR2     = 'MAXI' ('ABS' ((SIG1 - SIG2) / ('MAXI' 'ABS' (SIG1)))) ;
*                                                                     *
'SI' IG1 ;
  'TITR' 'Champ de contraintes.' ;
  'TRAC' SIG2 MODM1 ;
'FINS' ;
*                                                                     *
* Visualisations des reactions :                                      *
*                                                                     *
'SI' IG1 ;
  REAC1    = TAB2 . 'REACTIONS' . 1 ;
  VR1      = 'VECT' REAC1 0.8E-2 'FX' 'FY' 'ROUG' ;
  'TITR' 'Forces de reaction.' ;
  'TRAC' VR1 (LS1 'ET' SM1) ;
'FINS' ;
*                                                                     *
LERR0    = 'PROG' ERR1 ERR2 ;
ERR0     = 'MAXI' LERR0 ;
ERRMAX1  = 1.E-3 ;
*                                                                     *
'OPTI'  'ECHO' IECHO0 ;
'SAUT' 1 'LIGN' ;
'MESS'
'------------------------ RESULTAT CAS-TEST ------------------------' ;
'SAUT' 1 'LIGN' ;
'MESS'
'Ecart relatif a la solution calculee sur les deplacements' ;
'MESS'
'et les contraintes :' ;
'MESS'
'-----------------------------------------------------------' ;
'MESS' ;
'MESS' '    MAX. ERREUR =' ERR0 ;
'SAUT' 1 'LIGN' ;
'SI' (ERR0 '<EG' ERRMAX1) ;
  'MESS' '==> Erreur relative inferieure a' ERRMAX1 ':' ;
  'MESS' '' ;
  'MESS' '                        __________________' ;
  'MESS' '                        |                |' ;
  'MESS' '                        |  TEST REUSSI ! |' ;
  'MESS' '                        |________________|' ;
  'SAUT' 1 'LIGN' ;
'SINO' ;
  'MESS' '==> Erreur relative superrieure a' ERRMAX1 ':' ;
  'MESS' '' ;
  'MESS' '                        __________________' ;
  'MESS' '                        |                |' ;
  'MESS' '                        |     ERREUR !   |' ;
  'MESS' '                        |________________|' ;
  'SAUT' 1 'LIGN' ;
  VTCT . 'N5' = (VTCT . 'N5') + 1 ;
'FINS' ;
'MESS'
'-------------------------- FIN CAS-TEST ---------------------------' ;
*                                                                     *
* [valid] FIN final
'OPTI'  'ECHO' IECHO0 ;


* ----- fin du cas Contact2D
FINPROC ;
*
* ---------------------------------------------------------------------
* Cas 55 : Contact2D (contact 2D)
* ---------------------------------------------------------------------
SI ((IDEB0 '<EG' 55) 'ET' (IFIN0 '>EG' 55) 'ET' ('NON' ('EXIS' TSKIP 55))) ;
    MENAGE 'OBLI' ;
    MESS ' ' ;
    VMSG = CHAI '>>> Cas' ' ' '55' ' ' 'sur' ' ' NTOT0 ' ' ':' ' ' 'Contact2D' ' ' '(contact 2D)' ;
    MESS VMSG ;
    NPASS = 2 ;
    SI IPASS3 ;
        NPASS = 3 ;
    FINSI ;
    VTH1 = 0 ;
    VTH2 = 0 ;
    VTH3 = 0 ;
    VNE51 = 0 ;
    VNE01 = 0 ;
    VNE52 = 0 ;
    VNE02 = 0 ;
    VNE53 = 0 ;
    VNE03 = 0 ;
    REPETER ZVRUN NPASS ;
* ordre des passes alterne d'un cas a l'autre (derive des temps en session)
        VIP = &ZVRUN ;
        VPSW = (VIP '>' 1) ;
        VNIV = 1 ;
        VMPS = 'inactif' ;
        SI (VIP 'EGA' 2) ;
            VMPS = 'actif niveau 1' ;
        FINSI ;
        SI (VIP 'EGA' 3) ;
            VNIV = 2 ;
            VMPS = 'actif niveau 2' ;
        FINSI ;
        AVANCE VRES 55 NTOT0 'Contact2D' VIP 'en_cours' ;
        VMSG = CHAI '    passe' ' ' VIP ' ' 'sur' ' ' NPASS ' ' ': optimisations' ' ' VMPS ;
        MESS VMSG ;
        SI ITRACE0 ;
            OPTI 'IMPR' 'valid_trace.log' ;
        FINSI ;
        OPTI 'DIME' 3 'MODE' 'TRID' 'ELEM' 'CUB8' 'ECHO' IECHO0 ;
        VTHM = 0 ;
        REPETER ZVREP NREP0 ;
            VIR = &ZVREP ;
            VTFPR = TABL ;
            VTCT = TABL ;
            VTCT . 'N0' = 0 ;
            VTCT . 'N5' = 0 ;
            SI ITEMPS0 ;
                TEMP 'ZERO' ;
            FINSI ;
* Le cas s'execute dans une procedure (variables locales) : les variables
* d'un cas precedent ne peuvent pas masquer un mot-cle ou un operateur
            VC55 VPSW VNIV VTFPR VTCT IECHO0 ;
            VTHR = 0 ;
            SI ITEMPS0 ;
                VTHR = CHRONO ;
            FINSI ;
            SI (VIR 'EGA' 1) ;
                VTHM = VTHR ;
            SINON ;
                SI (VTHR '<' VTHM) ;
                    VTHM = VTHR ;
                FINSI ;
            FINSI ;
        FIN ZVREP ;
        VNER5 = VTCT . 'N5' ;
        VNER0 = VTCT . 'N0' ;
        SI (VIP 'EGA' 1) ;
            VTF1 = VTFPR ;
            VTH1 = VTHM ;
            VNE51 = VNER5 ;
            VNE01 = VNER0 ;
        FINSI ;
        SI (VIP 'EGA' 2) ;
            VTF2 = VTFPR ;
            VTH2 = VTHM ;
            VNE52 = VNER5 ;
            VNE02 = VNER0 ;
        FINSI ;
        SI (VIP 'EGA' 3) ;
            VTF3 = VTFPR ;
            VTH3 = VTHM ;
            VNE53 = VNER5 ;
            VNE03 = VNER0 ;
        FINSI ;
    FIN ZVRUN ;
*   comparaison des empreintes avec la passe 1
    VER2 VNL2 VNC2 = COMPAR VTF1 VTF2 ;
    VMOK2 = 'OK' ;
    SI ((VER2 '>' TOLV0) 'OU' (VNL2 '>' 0) 'OU' ('NON' (VNE52 'EGA' VNE51))) ;
        VMOK2 = 'ECART' ;
        VNBK2 = VNBK2 + 1 ;
    FINSI ;
    VER3 = 0. ;
    VNC3 = 0 ;
    VMOK3 = 'sans_objet' ;
    SI IPASS3 ;
        VER3 VNL3 VNC3 = COMPAR VTF1 VTF3 ;
        VMOK3 = 'OK' ;
        SI ((VER3 '>' TOLV3) 'OU' (VNL3 '>' 0) 'OU' ('NON' (VNE53 'EGA' VNE51))) ;
            VMOK3 = 'ECART' ;
            VNBK3 = VNBK3 + 1 ;
        FINSI ;
    FINSI ;
*   accelerations (temps de la passe 1 / temps de la passe)
    VSP2 = 0. ;
    VSP3 = 0. ;
    SI ((VTH1 '>' 0) 'ET' (VTH2 '>' 0)) ;
        VSP2 = (FLOT VTH1) '/' (FLOT VTH2) ;
    FINSI ;
    SI ((VTH1 '>' 0) 'ET' (VTH3 '>' 0)) ;
        VSP3 = (FLOT VTH1) '/' (FLOT VTH3) ;
    FINSI ;
    VSUM1 = VSUM1 + VTH1 ;
    VSUM2 = VSUM2 + VTH2 ;
    VSUM3 = VSUM3 + VTH3 ;
    VCLA = VTF2 . 'CL' ;
    VR2 = VTF2 . 'NRE' ;
    VC2 = VTF2 . 'NCA' ;
    VH2 = VTF2 . 'NHK' ;
    VM2 = VTF2 . 'NMA' ;
    VR3 = -1 ;
    VC3 = -1 ;
    VH3 = -1 ;
    VM3 = -1 ;
    SI IPASS3 ;
        VR3 = VTF3 . 'NRE' ;
        VC3 = VTF3 . 'NCA' ;
        VH3 = VTF3 . 'NHK' ;
        VM3 = VTF3 . 'NMA' ;
    FINSI ;
    VSE2 = CHAI 'FORMAT' '(1PE10.3)' VER2 ;
    VSE3 = CHAI 'FORMAT' '(1PE10.3)' VER3 ;
    VSS2 = CHAI 'FORMAT' '(F6.2)' VSP2 ;
    VSS3 = CHAI 'FORMAT' '(F6.2)' VSP3 ;
*   fichier de resultat du cas (SORT) et affichage console (MESS)
    OPTI 'SORT' 'valid_Contact2D.log' ;
    VMSG = CHAI '=== Cas' ' ' '55' ' ' ':' ' ' 'Contact2D' ' ' '(contact 2D)' ' ' '===' ;
    MESS VMSG ;
    SORT 'CHAI' VMSG ;
    VMSG = CHAI 'Valeurs comparees :' ' ' VNC2 ;
    MESS VMSG ;
    SORT 'CHAI' VMSG ;
    VMSG = CHAI 'Temps horloge (ms) : origine' ' ' VTH1 ' ' '; niveau 1' ' ' VTH2 ' ' '; niveau 2' ' ' VTH3 ;
    MESS VMSG ;
    SORT 'CHAI' VMSG ;
    VMSG = CHAI 'Acceleration par rapport a l origine : niveau 1' ' ' VSS2 ' ' '; niveau 2' ' ' VSS3 ;
    MESS VMSG ;
    SORT 'CHAI' VMSG ;
    VMSG = CHAI 'Controles internes du cas : echecs origine' ' ' VNE51 ' ' '; niveau 1' ' ' VNE52 ' ' '; niveau 2' ' ' VNE53 ' ' '- reussites origine' ' ' VNE01 ' ' '; niveau 1' ' ' VNE02 ' ' '; niveau 2' ' ' VNE03 ;
    MESS VMSG ;
    SORT 'CHAI' VMSG ;
    VMSG = CHAI 'Classes exercees (1 MATVAR, 10 ENDOM, 20 VISCODOM, 100 GD) :' ' ' VCLA ;
    MESS VMSG ;
    SORT 'CHAI' VMSG ;
    VMSG = CHAI 'Niveau 1 : raideur reutilisee' ' ' VR2 ' ' 'fois, recalculee' ' ' VC2 ' ' 'fois ; HOOK evite' ' ' VH2 ' ' 'fois ; caracteristiques reutilisees' ' ' VM2 ' ' 'fois' ;
    MESS VMSG ;
    SORT 'CHAI' VMSG ;
    VMSG = CHAI 'Niveau 2 : raideur reutilisee' ' ' VR3 ' ' 'fois, recalculee' ' ' VC3 ' ' 'fois ; HOOK evite' ' ' VH3 ' ' 'fois ; caracteristiques reutilisees' ' ' VM3 ' ' 'fois' ;
    MESS VMSG ;
    SORT 'CHAI' VMSG ;
    VMSG = CHAI 'Ecart relatif maximal : niveau 1' ' ' VSE2 ' ' '; niveau 2' ' ' VSE3 ;
    MESS VMSG ;
    SORT 'CHAI' VMSG ;
    VMSG = CHAI 'RESULTAT : niveau 1' ' ' VMOK2 ' ' '; niveau 2' ' ' VMOK3 ;
    MESS VMSG ;
    SORT 'CHAI' VMSG ;
    SI (('EGA' VNC2 0) ) ;
        VMSG = CHAI 'ATTENTION : aucune valeur comparee (resultats non stockes ?)' ;
        MESS VMSG ;
        SORT 'CHAI' VMSG ;
    FINSI ;
    OPTI 'SORT' 'valid_inutile.tmp' ;
    VRES . 55 = TABL ;
    VRES . 55 . 'NOM' = 'Contact2D' ;
    VRES . 55 . 'OKM' = VMOK2 ;
    VRES . 55 . 'OK3' = VMOK3 ;
    VRES . 55 . 'ERR2' = VER2 ;
    VRES . 55 . 'ERR3' = VER3 ;
    VRES . 55 . 'TH1' = VTH1 ;
    VRES . 55 . 'TH2' = VTH2 ;
    VRES . 55 . 'TH3' = VTH3 ;
    VRES . 55 . 'SP2F' = VSP2 ;
    VRES . 55 . 'SP3F' = VSP3 ;
    VRES . 55 . 'NRE2' = VR2 ;
    VRES . 55 . 'NCA2' = VC2 ;
    VRES . 55 . 'NHK2' = VH2 ;
    VRES . 55 . 'NMA2' = VM2 ;
    VRES . 55 . 'NRE3' = VR3 ;
    VRES . 55 . 'NCA3' = VC3 ;
    VRES . 55 . 'NHK3' = VH3 ;
    VRES . 55 . 'CL' = VCLA ;
    VRES . 55 . 'NCMP' = VNC2 ;
    VMSG = CHAI '<<< Cas' ' ' '55' ' ' 'sur' ' ' NTOT0 ' ' ':' ' ' 'Contact2D' ' ' ':' ' ' 'niveau 1' ' ' VMOK2 ', niveau 2' ' ' VMOK3 ' ' '- ecart' ' ' VSE2 ', acceleration' ' ' VSS2 ' ' 'et' ' ' VSS3 ;
    MESS VMSG ;
    AVANCE VRES 55 NTOT0 'Contact2D' NPASS 'termine' ;
    MENAGE 'OBLI' ;
FINSI ;

*
* ---------------------------------------------------------------------
* Procedure du cas 56 : Coulomb3D (contact frottant 3D)
* Variables locales : le cas ne voit aucune variable des cas precedents
* ---------------------------------------------------------------------
DEBPROC VC56 VPSW*'LOGIQUE' VNIV*'ENTIER' VTFPR*'TABLE' VTCT*'TABLE' IECHO0*'ENTIER' ;
* ----- debut du cas Coulomb3D

**optio surv 2225630;
*optio resou iter;
* fichier : Coulomb3D.dgibi
************************************************************************
* Section : Mecanique Contact
************************************************************************
*----------------------------------------------------------------------*
* Ce cas-test permet de tester la gestion du frottement de Coulomb par *
* PASAPAS.                                                             *
* Il calcule la mise en contact d'un lopin parallelipedique sur une    *
* surface rigide, puis sa mise en glissement partiel dans la dir. Ox.  *
* On pilote la face superieure du lopin en deplacements imposes.       *
* La convergence en glissement partiel necessite une trentaine         *
* d'iterations.                                                        *
* On ne verifie que le respect de la condition de contact et de la loi *
* de Coulomb (T <= mu*N).                                              *
* Si IG1 = VRAI, on visualise la solution, notamment les points en     *
* glissement et ceux adherents.                                        *
*----------------------------------------------------------------------*
*                                                                      *
* Si TRACes desires, mettre IG1 a VRAI :                               *
IG1      = VRAI ;
optio trac psc ;
*                                                                      *
'OPTI' 'DIME' 3 'ELEM' CUB8 ;
*                                                                      *
*----------------------------------------------------------------------*
*                              MAILLAGE                                *
*----------------------------------------------------------------------*
*                                                                      *
* Maillage "Sol" :                                                     *
S1       = -10. -5. 0. ;
S2       = +10. -5. 0. ;
NLS1     = 25;
LS1      = S1  'DROI' NLS1 S2 ;
SOL1     = LS1 'TRAN' NLS1 (0. 20. 0.) ;
SOL1     = SOL1 'COUL' 'OLIV' ;
*                                                                      *
* Maillage "Cube" :                                                    *
C1       = -5. 0. 0.1 ;
M2       = +5. 0. 0.1 ;
NLC1     =  17;
LC1      = C1  'DROI' NLC1 M2 ;
SC1      = LC1 'TRAN' NLC1 (0. 10. 0.) ;
LOP1     = SC1 'VOLU' NLC1 'TRAN' (0. 0. 8.) ;
LOP1     = LOP1 'COUL' 'ORAN' ;
*                                                                      *
MTOT1    = (SOL1 'ET' LOP1) 'COUL' 'DEFA' ;
*                                                                      *
* Maillages de contact orientes :                                      *
SOL2     = 'ORIE' ('CHAN' 'TRI3' SOL1) (0. 0. +1.) ;
SCC1     = 'ORIE' ('CHAN' 'TRI3' SC1 ) (0. 0. -1.) ;
**MCONT1   = ('IMPO' 'MAIL' SOL2 SCC1) 'COUL' 'ROUG' ;
*                                                                      *
* Traces :                                                             *
'SI' IG1 ;
  'TITR' 'Maillages Cube / Sol ' ;
  'TRAC' 'FACE' (LOP1 ET SOL1) ;
  'TITR' 'Maillages Cube / Sol & Maillage de contact (rouge) ' ;
**  'TRAC' 'FACE' (MTOT1 ET MCONT1) ;
'FINS' ;
*                                                                      *
*----------------------------------------------------------------------*
*                      MODELES / CARACTERISTIQUES                      *
*----------------------------------------------------------------------*
*                                                                      *
MOD1     = 'MODE' LOP1 'MECANIQUE' 'ELASTIQUE' ;
MAT1     = 'MATE' MOD1 'YOUN' 1.E1 'NU' 0.32;
*                                                                      *
MU1      = 0.2 ;
MODF1    = 'MODE' SOL2 'CONTACT' 'FROTTANT' 'COULOMB' SCC1 'MESC';
MATF1    = 'MATE' MODF1 'MU' MU1 ;
sptco = SCC1;
*                                                                      *
MOD0     = MOD1 'ET' MODF1 ;
MAT0     = MAT1 'ET' MATF1 ;
*                                                                      *
*----------------------------------------------------------------------*
*                          C.L. / CHARGEMENT                           *
*----------------------------------------------------------------------*
*                                                                      *
* Deplacements imposes :                                               *
CL1      = 'BLOQ' SOL1 'DEPL' ;
*                                                                      *
SCZ1     = (LOP1 'COOR' 3) 'POIN' 'MAXI' ;
CL2      = 'BLOQ' 'UX' SCZ1 ;
CL3      = 'BLOQ' 'UY' SCZ1 ;
CL4      = 'BLOQ' 'UZ' SCZ1 ;
*
CL0      = CL1 'ET' CL2 'ET' CL3 'ET' CL4 ;
*                                                                      *
UX0      = +0.600 ;
UZ0      = -0.500 ;
DCL2     = 'DEPI' CL2 UX0 ;
DCL4     = 'DEPI' CL4 UZ0 ;
*                                                                      *
'SI' IG1 ;
  'TRAC' ('VECT' ('EXCO' DCL4 'FLX' 'UZ') 'DEPL' 'ROUG') ('ARET' MTOT1)
  'TITR'
'Deplacement impose a la surface superieure du lopin : mise en contact.'
;
  'TRAC' ('VECT' ('EXCO' DCL2 'FLX' 'UX') 'DEPL' 'ROUG') ('ARET' MTOT1)
  'TITR'
'Deplacement impose a la surface superieure du lopin : glissement.' ;
'FINS' ;
*                                                                      *
* Chargements :                                                        *
LTPS1    = 'PROG' 0. 1. 2. ;
EV1      = 'EVOL' 'MANU' 'TEMPS' LTPS1 ('PROG' 0. 1. 1.) ;
EV2      = 'EVOL' 'MANU' 'TEMPS' LTPS1 ('PROG' 0. 0. 1.) ;
CHARU1   = 'CHAR' 'DIMP' DCL4 EV1 ;
CHARU2   = 'CHAR' 'DIMP' DCL2 EV2 ;
CHAR0    = CHARU1 'ET' CHARU2 ;
*                                                                      *
*----------------------------------------------------------------------*
*                             RESOLUTION                               *
*----------------------------------------------------------------------*
*                                                                      *
* Construction de la table PASAPAS :                                   *
*                                                                      *
PREC1    = 2.E-5 ;
TAB1                         = 'TABL' ;
TAB1 . 'MODELE'              = MOD0 ;
TAB1 . 'CARACTERISTIQUES'    = MAT0 ;
TAB1 . 'BLOCAGES_MECANIQUES' = CL0 ;
TAB1 . 'CHARGEMENT'          = CHAR0 ;
TAB1 . 'TEMPS_CALCULES'      = 'PROG' 0. pas 0.25 2;
TAB1 . 'PRECISION'           = PREC1 ;
TAB1.'DELTAITER' = 20;
*                                                                      *
* Resolution :                                                         *
*                                                                      *
TAB1 . 'PERF_RAID' = VPSW ; TAB1 . 'PERF_RAID_NIVEAU' = VNIV ; TAB2     = PASAPAS TAB1 ; FPREC TAB1 VTFPR ;
*                                                                      *
*----------------------------------------------------------------------*
*                            DEPOUILLEMENT                             *
*----------------------------------------------------------------------*
*                                                                      *
IND1     = ('DIME' TAB2 . 'DEPLACEMENTS') - 1 ;
DEP1     = (TAB2 . 'DEPLACEMENTS' . IND1) 'ENLE' 'LX' ;
REA1     = TAB2 . 'REACTIONS' . IND1 ;
* Reactions sur la surface du lopin en contact :                       *
MREA1    = 'EXTR' REA1 'MAIL' ;
SCREA1   = SC1 'ELEM' 'APPU' 'STRI' MREA1 ;
REASC1   = 'REDU' (TAB1 . REACTIONS . IND1) SCREA1 ;
*                                                                      *
*--------------------------- Visualisations ---------------------------*
'SI' IG1 ;
*                                                                      *
* Deformee :                                                           *
  DEFO0    = 'DEFO' (LOP1 'ET' SOL1) DEP1 0. 'VERT' ;
  DEFO1    = 'DEFO' (LOP1 'ET' SOL1) DEP1 1. 'ROUG' ;
  MOT1     = 'CHAI'
  'Geometrie non deformee (vert) et deformee (rouge)' ;
  'TITR' MOT1 ;
  'TRAC' 'CACH' (DEFO0 'ET' DEFO1) ;
  OEIL1    = (0. -1.E5 0.) ;
  'TRAC' 'CACH' (DEFO0 'ET' DEFO1) OEIL1 ;
*                                                                      *
* Deplacements :                                                       *
  UXF1     = 'DEFO' (LOP1 'ET' SOL1) DEP1 1. ('EXCO' DEP1 'UX' 'UX') ;
  UYF1     = 'DEFO' (LOP1 'ET' SOL1) DEP1 1. ('EXCO' DEP1 'UY' 'UY') ;
  UZF1     = 'DEFO' (LOP1 'ET' SOL1) DEP1 1. ('EXCO' DEP1 'UZ' 'UZ') ;
  'TRAC' UXF1 'TITR' 'Deplacements Ux' ;
  'TRAC' UYF1 'TITR' 'Deplacements Uy' ;
  'TRAC' UZF1 'TITR' 'Deplacements Uz' ;
*                                                                      *
* Contraintes :                                                        *
  CONF0      = 'FORM' ;
  'FORM' DEP1 ;
  SIG1       = TAB1 . 'CONTRAINTES' . IND1 ;
  'TITR' ' Contraintes dans la CONFiguration deformee ' ;
  'TRAC' SIG1 MOD1 (LOP1 ET SOL1) ;
  'FORM' CONF0 ;
*                                                                      *
* Reactions :                                                          *
  VR1      = 'VECT' REA1 'FORC' 'ROUG' ;
  OEIL1    = (1.E5 -1.E5 1.E5) ;
  'TRAC' OEIL1 VR1 ('ARET' MTOT1) 'TITR' 'Forces de reaction.' ;
'FINS' ;
*                                                                      *
* Critere de glissement (T = mu*N) :                                  *
RN1      = 'EXCO' REASC1 'FZ' ;
RX1      = 'EXCO' REASC1 'FX' ;
RY1      = 'EXCO' REASC1 'FY' ;
RT1      = ((RX1 * RX1) + (RY1 * RY1)) ** 0.5 ;
* La partie en glissement verifie mu*N-T > 0 a la precision pres :    *
CGLIS1   = (MU1 * RN1 - RT1) / ('MAXI' 'ABS' RN1) ;
GLISS1   = ('ABS' CGLIS1) 'MASQ' 'INFE' PREC1 ;
*                                                                      *
'SI' IG1 ;
  'TITR' ' Parties adherentes (Bleu) / en glissement (rouge) ' ;
  'TRAC' GLISS1 SCREA1 ;
'FINS' ;
*                                                                      *
*-------------------- Verifications de la solution --------------------*
*                                                                      *
* On verifie qu'on ne tranverse pas la surface :                       *
ERR1     = ('MAXI' (SOL1 'COOR' 3))
  - ('MINI' ((LOP1 'COOR' 3) + ('EXCO' 'UZ' DEP1))) ;
'MESS' ' ****** ECART RELATIF POSITION DE CONTACT : ' ERR1 ;
*                                                                      *
* On verifie la loi de Coulomb au critere pres :                       *
ERR2     = 'MINI' CGLIS1 ;
ERR0     = 'MAXI' ('PROG' ERR1 (ERR2 * -1)) ;
*                                                                      *
'OPTI'  'ECHO' IECHO0 ;
'SAUT' 1 'LIGN' ;
'MESS'
'---------------------- RESULTAT CAS-TEST ------------------------' ;
'MESS' ' ' ;
'MESS'
'Ecart relatif a la solution calculee sur les deplacements' ;
'MESS'
'et les contraintes :' ;
'MESS' ;
*****prec1 = prec1 * 1d-2;
'SI' (ERR0 '<EG' PREC1) ;
  'MESS' ('CHAI' '  ==> MAXI ERREUR =' ERR0 ' < ' PREC1 ) ;
  'MESS' ' ' ;
  'MESS' '                      __________________' ;
  'MESS' '                      |                |' ;
  'MESS' '                      |  TEST REUSSI ! |' ;
  'MESS' '                      |________________|' ;
  'SAUT' 1 'LIGN' ;
'SINO' ;
  'MESS' ('CHAI' '  ==> MAXI ERREUR =' ERR0 ' > ' PREC1 ) ;
  'MESS' ' ' ;
  'MESS' '                      __________________' ;
  'MESS' '                      |                |' ;
  'MESS' '                      |     ERREUR !   |' ;
  'MESS' '                      |________________|' ;
  'SAUT' 1 'LIGN' ;
VTCT . 'N5' = (VTCT . 'N5') + 1 ;
'FINS' ;
'MESS'
'------------------------ FIN CAS-TEST ---------------------------' ;
*                                                                     *
*'FIN' ;
'OPTI'  'ECHO' IECHO0 ;
* [valid] FIN final


* ----- fin du cas Coulomb3D
FINPROC ;
*
* ---------------------------------------------------------------------
* Cas 56 : Coulomb3D (contact frottant 3D)
* ---------------------------------------------------------------------
SI ((IDEB0 '<EG' 56) 'ET' (IFIN0 '>EG' 56) 'ET' ('NON' ('EXIS' TSKIP 56))) ;
    MENAGE 'OBLI' ;
    MESS ' ' ;
    VMSG = CHAI '>>> Cas' ' ' '56' ' ' 'sur' ' ' NTOT0 ' ' ':' ' ' 'Coulomb3D' ' ' '(contact frottant 3D)' ;
    MESS VMSG ;
    NPASS = 2 ;
    SI IPASS3 ;
        NPASS = 3 ;
    FINSI ;
    VTH1 = 0 ;
    VTH2 = 0 ;
    VTH3 = 0 ;
    VNE51 = 0 ;
    VNE01 = 0 ;
    VNE52 = 0 ;
    VNE02 = 0 ;
    VNE53 = 0 ;
    VNE03 = 0 ;
    REPETER ZVRUN NPASS ;
* ordre des passes alterne d'un cas a l'autre (derive des temps en session)
        VIP = NPASS + 1 - &ZVRUN ;
        VPSW = (VIP '>' 1) ;
        VNIV = 1 ;
        VMPS = 'inactif' ;
        SI (VIP 'EGA' 2) ;
            VMPS = 'actif niveau 1' ;
        FINSI ;
        SI (VIP 'EGA' 3) ;
            VNIV = 2 ;
            VMPS = 'actif niveau 2' ;
        FINSI ;
        AVANCE VRES 56 NTOT0 'Coulomb3D' VIP 'en_cours' ;
        VMSG = CHAI '    passe' ' ' VIP ' ' 'sur' ' ' NPASS ' ' ': optimisations' ' ' VMPS ;
        MESS VMSG ;
        SI ITRACE0 ;
            OPTI 'IMPR' 'valid_trace.log' ;
        FINSI ;
        OPTI 'DIME' 3 'MODE' 'TRID' 'ELEM' 'CUB8' 'ECHO' IECHO0 ;
        VTHM = 0 ;
        REPETER ZVREP NREP0 ;
            VIR = &ZVREP ;
            VTFPR = TABL ;
            VTCT = TABL ;
            VTCT . 'N0' = 0 ;
            VTCT . 'N5' = 0 ;
            SI ITEMPS0 ;
                TEMP 'ZERO' ;
            FINSI ;
* Le cas s'execute dans une procedure (variables locales) : les variables
* d'un cas precedent ne peuvent pas masquer un mot-cle ou un operateur
            VC56 VPSW VNIV VTFPR VTCT IECHO0 ;
            VTHR = 0 ;
            SI ITEMPS0 ;
                VTHR = CHRONO ;
            FINSI ;
            SI (VIR 'EGA' 1) ;
                VTHM = VTHR ;
            SINON ;
                SI (VTHR '<' VTHM) ;
                    VTHM = VTHR ;
                FINSI ;
            FINSI ;
        FIN ZVREP ;
        VNER5 = VTCT . 'N5' ;
        VNER0 = VTCT . 'N0' ;
        SI (VIP 'EGA' 1) ;
            VTF1 = VTFPR ;
            VTH1 = VTHM ;
            VNE51 = VNER5 ;
            VNE01 = VNER0 ;
        FINSI ;
        SI (VIP 'EGA' 2) ;
            VTF2 = VTFPR ;
            VTH2 = VTHM ;
            VNE52 = VNER5 ;
            VNE02 = VNER0 ;
        FINSI ;
        SI (VIP 'EGA' 3) ;
            VTF3 = VTFPR ;
            VTH3 = VTHM ;
            VNE53 = VNER5 ;
            VNE03 = VNER0 ;
        FINSI ;
    FIN ZVRUN ;
*   comparaison des empreintes avec la passe 1
    VER2 VNL2 VNC2 = COMPAR VTF1 VTF2 ;
    VMOK2 = 'OK' ;
    SI ((VER2 '>' TOLV0) 'OU' (VNL2 '>' 0) 'OU' ('NON' (VNE52 'EGA' VNE51))) ;
        VMOK2 = 'ECART' ;
        VNBK2 = VNBK2 + 1 ;
    FINSI ;
    VER3 = 0. ;
    VNC3 = 0 ;
    VMOK3 = 'sans_objet' ;
    SI IPASS3 ;
        VER3 VNL3 VNC3 = COMPAR VTF1 VTF3 ;
        VMOK3 = 'OK' ;
        SI ((VER3 '>' TOLV3) 'OU' (VNL3 '>' 0) 'OU' ('NON' (VNE53 'EGA' VNE51))) ;
            VMOK3 = 'ECART' ;
            VNBK3 = VNBK3 + 1 ;
        FINSI ;
    FINSI ;
*   accelerations (temps de la passe 1 / temps de la passe)
    VSP2 = 0. ;
    VSP3 = 0. ;
    SI ((VTH1 '>' 0) 'ET' (VTH2 '>' 0)) ;
        VSP2 = (FLOT VTH1) '/' (FLOT VTH2) ;
    FINSI ;
    SI ((VTH1 '>' 0) 'ET' (VTH3 '>' 0)) ;
        VSP3 = (FLOT VTH1) '/' (FLOT VTH3) ;
    FINSI ;
    VSUM1 = VSUM1 + VTH1 ;
    VSUM2 = VSUM2 + VTH2 ;
    VSUM3 = VSUM3 + VTH3 ;
    VCLA = VTF2 . 'CL' ;
    VR2 = VTF2 . 'NRE' ;
    VC2 = VTF2 . 'NCA' ;
    VH2 = VTF2 . 'NHK' ;
    VM2 = VTF2 . 'NMA' ;
    VR3 = -1 ;
    VC3 = -1 ;
    VH3 = -1 ;
    VM3 = -1 ;
    SI IPASS3 ;
        VR3 = VTF3 . 'NRE' ;
        VC3 = VTF3 . 'NCA' ;
        VH3 = VTF3 . 'NHK' ;
        VM3 = VTF3 . 'NMA' ;
    FINSI ;
    VSE2 = CHAI 'FORMAT' '(1PE10.3)' VER2 ;
    VSE3 = CHAI 'FORMAT' '(1PE10.3)' VER3 ;
    VSS2 = CHAI 'FORMAT' '(F6.2)' VSP2 ;
    VSS3 = CHAI 'FORMAT' '(F6.2)' VSP3 ;
*   fichier de resultat du cas (SORT) et affichage console (MESS)
    OPTI 'SORT' 'valid_Coulomb3D.log' ;
    VMSG = CHAI '=== Cas' ' ' '56' ' ' ':' ' ' 'Coulomb3D' ' ' '(contact frottant 3D)' ' ' '===' ;
    MESS VMSG ;
    SORT 'CHAI' VMSG ;
    VMSG = CHAI 'Valeurs comparees :' ' ' VNC2 ;
    MESS VMSG ;
    SORT 'CHAI' VMSG ;
    VMSG = CHAI 'Temps horloge (ms) : origine' ' ' VTH1 ' ' '; niveau 1' ' ' VTH2 ' ' '; niveau 2' ' ' VTH3 ;
    MESS VMSG ;
    SORT 'CHAI' VMSG ;
    VMSG = CHAI 'Acceleration par rapport a l origine : niveau 1' ' ' VSS2 ' ' '; niveau 2' ' ' VSS3 ;
    MESS VMSG ;
    SORT 'CHAI' VMSG ;
    VMSG = CHAI 'Controles internes du cas : echecs origine' ' ' VNE51 ' ' '; niveau 1' ' ' VNE52 ' ' '; niveau 2' ' ' VNE53 ' ' '- reussites origine' ' ' VNE01 ' ' '; niveau 1' ' ' VNE02 ' ' '; niveau 2' ' ' VNE03 ;
    MESS VMSG ;
    SORT 'CHAI' VMSG ;
    VMSG = CHAI 'Classes exercees (1 MATVAR, 10 ENDOM, 20 VISCODOM, 100 GD) :' ' ' VCLA ;
    MESS VMSG ;
    SORT 'CHAI' VMSG ;
    VMSG = CHAI 'Niveau 1 : raideur reutilisee' ' ' VR2 ' ' 'fois, recalculee' ' ' VC2 ' ' 'fois ; HOOK evite' ' ' VH2 ' ' 'fois ; caracteristiques reutilisees' ' ' VM2 ' ' 'fois' ;
    MESS VMSG ;
    SORT 'CHAI' VMSG ;
    VMSG = CHAI 'Niveau 2 : raideur reutilisee' ' ' VR3 ' ' 'fois, recalculee' ' ' VC3 ' ' 'fois ; HOOK evite' ' ' VH3 ' ' 'fois ; caracteristiques reutilisees' ' ' VM3 ' ' 'fois' ;
    MESS VMSG ;
    SORT 'CHAI' VMSG ;
    VMSG = CHAI 'Ecart relatif maximal : niveau 1' ' ' VSE2 ' ' '; niveau 2' ' ' VSE3 ;
    MESS VMSG ;
    SORT 'CHAI' VMSG ;
    VMSG = CHAI 'RESULTAT : niveau 1' ' ' VMOK2 ' ' '; niveau 2' ' ' VMOK3 ;
    MESS VMSG ;
    SORT 'CHAI' VMSG ;
    SI (('EGA' VNC2 0) ) ;
        VMSG = CHAI 'ATTENTION : aucune valeur comparee (resultats non stockes ?)' ;
        MESS VMSG ;
        SORT 'CHAI' VMSG ;
    FINSI ;
    OPTI 'SORT' 'valid_inutile.tmp' ;
    VRES . 56 = TABL ;
    VRES . 56 . 'NOM' = 'Coulomb3D' ;
    VRES . 56 . 'OKM' = VMOK2 ;
    VRES . 56 . 'OK3' = VMOK3 ;
    VRES . 56 . 'ERR2' = VER2 ;
    VRES . 56 . 'ERR3' = VER3 ;
    VRES . 56 . 'TH1' = VTH1 ;
    VRES . 56 . 'TH2' = VTH2 ;
    VRES . 56 . 'TH3' = VTH3 ;
    VRES . 56 . 'SP2F' = VSP2 ;
    VRES . 56 . 'SP3F' = VSP3 ;
    VRES . 56 . 'NRE2' = VR2 ;
    VRES . 56 . 'NCA2' = VC2 ;
    VRES . 56 . 'NHK2' = VH2 ;
    VRES . 56 . 'NMA2' = VM2 ;
    VRES . 56 . 'NRE3' = VR3 ;
    VRES . 56 . 'NCA3' = VC3 ;
    VRES . 56 . 'NHK3' = VH3 ;
    VRES . 56 . 'CL' = VCLA ;
    VRES . 56 . 'NCMP' = VNC2 ;
    VMSG = CHAI '<<< Cas' ' ' '56' ' ' 'sur' ' ' NTOT0 ' ' ':' ' ' 'Coulomb3D' ' ' ':' ' ' 'niveau 1' ' ' VMOK2 ', niveau 2' ' ' VMOK3 ' ' '- ecart' ' ' VSE2 ', acceleration' ' ' VSS2 ' ' 'et' ' ' VSS3 ;
    MESS VMSG ;
    AVANCE VRES 56 NTOT0 'Coulomb3D' NPASS 'termine' ;
    MENAGE 'OBLI' ;
FINSI ;

*
* ---------------------------------------------------------------------
* Procedure du cas 57 : contact2D-adhe (contact adherent)
* Variables locales : le cas ne voit aucune variable des cas precedents
* ---------------------------------------------------------------------
DEBPROC VC57 VPSW*'LOGIQUE' VNIV*'ENTIER' VTFPR*'TABLE' VTCT*'TABLE' IECHO0*'ENTIER' ;
* ----- debut du cas contact2D-adhe

* fichier : contact2D-adhe.dgibi
*
* TEST  du MODELE CONTACT AVEC COMPOSANTE MATERIAU ADHE
*
*
OPTI DIME 2 ELEM QUA4 ;
OPTI DEBU 1 ;
*
* Maillage
NEL1 = 10 ;
*NEL1 = 14 ;
*NEL1 = 2 ;
P1 = -1. 1.E-3 ; P2 = 1. 1.E-3 ;
L1 = DROI NEL1 P1 P2 ;
S1 = L1 TRAN NEL1 (0. 1.) ;
S1D = S1 'COTE' 2 ;
S1H = S1 'COTE' 3 ;
S1G = S1 'COTE' 4 ;
*
NEL2 = 14 ;
*NEL2 = 5 ;
P3 = -1.5 0. ; P4 = 1.5 0. ;
L2 = DROI NEL2 P3 P4 ;
S2 = L2 TRAN NEL2 (0. -1.) ;
S2D = S2 'COTE' 2 ;
S2B = S2 'COTE' 3 ;
S2G = S2 'COTE' 4 ;
*
**LC = 'IMPO' 'MAIL' 'SYME' ('INVE' L2) L1 ;
*
* Conditions aux limites
CL1 = 'BLOQ' 'UX' (S2D 'ET' S2G) ;
CL2 = 'BLOQ' 'UY' S2B ;
CL3 = 'BLOQ' 'UY' S1H ;
CL4 = 'BLOQ' 'UX' (S1G POIN INITIAL) ;
CL4 = 'BLOQ' 'UX' (S1D 'ET' S1G) ;
CL4 = 'BLOQ' 'UX' S1G ;
CLT = CL1 'ET' CL2 'ET' CL3 'ET' CL4 ;
*
* Chargements
COOX = 'COOR' 1 S1H ;
*DEIM = 'DEPI' CL3 (-1.E-3 * ('ABS' (('ABS' COOX) - 2.))) ;
DEIM = 'DEPI' CL3 'RELA' (-1.E-3 * (COOX + ('ABS' ('MINI' COOX)))) ;
LTPS = 'PROG' 0. 1.  2.  3.  4. ;
LCOE = 'PROG' 0. 2. -1. -2. -3. ;
EVZ  = 'EVOL' 'MANU' 'TEMPS' LTPS 'COEF' (30. * LCOE) ;
CHAT = 'CHAR' 'DIMP' DEIM EVZ ;
*
* Modeles
MOD1 = 'MODE' S1 'MECANIQUE' 'ELASTIQUE' ;
MAT1 = 'MATE' MOD1 'YOUN' 200.E9 'NU' 0.3 ;
MOD2 = 'MODE' S2 'MECANIQUE' 'ELASTIQUE' ;
MAT2 = 'MATE' MOD2 'YOUN' 100.E9 'NU' 0.3 ;
*
MODC = 'MODE' (inve l2)  'CONTACT' l1; ;
MATC = 'MATE' MODC 'ADHE' 7.E8 ;
MODT = MOD1 'ET' MOD2 'ET' MODC ;
MATT = MAT1 'ET' MAT2 'ET' MATC ;
*
* Resolution
LTIME = 'PROG' 0. 0.5 1. PAS 0.2 4.0 ;

TAB1 = 'TABL' ;
TAB1.'MAITOT' = S1 ET S2 ;
**TAB1.'MAICON'= LC ;
TAB1.'MODELE' = MODT ;
TAB1.'CARACTERISTIQUES' = MATT ;
TAB1.'BLOCAGES_MECANIQUES' = CLT ;
TAB1.'CHARGEMENT' = CHAT ;
TAB1.'TEMPS_CALCULES' = LTIME ;
TAB1 . 'PERF_RAID' = VPSW ; TAB1 . 'PERF_RAID_NIVEAU' = VNIV ; PASAPAS TAB1 ; FPREC TAB1 VTFPR ;
*
* Post-traitement
OPTI TRAC PSC ;
DEP = TAB1.'DEPLACEMENTS' ;
DEPP = TAB1.'DEPLACEMENTS'. 0 ;
CONF0 = 'FORM' ;
'REPE' BCL ('DIME' DEP) ;
  TPSZ = TAB1.'TEMPS'. (&BCL - 1) ;
  TITZ = 'CHAI' 'Deformee a l instant 'TPSZ ;
  DEPZ = DEP. (&BCL-1) ;
  DEF0 = 'DEFO' (S1 'ET' S2) DEPZ 0. ;
  DEF1 = 'DEFO' (S1 'ET' S2) DEPZ 1. ;
  TRAC (DEF0 'ET' (DEF1 COUL ROUG)) 'TITR' TITZ ;
'FIN' BCL ;
* [valid] FIN final


* ----- fin du cas contact2D-adhe
FINPROC ;
*
* ---------------------------------------------------------------------
* Cas 57 : contact2D-adhe (contact adherent)
* ---------------------------------------------------------------------
SI ((IDEB0 '<EG' 57) 'ET' (IFIN0 '>EG' 57) 'ET' ('NON' ('EXIS' TSKIP 57))) ;
    MENAGE 'OBLI' ;
    MESS ' ' ;
    VMSG = CHAI '>>> Cas' ' ' '57' ' ' 'sur' ' ' NTOT0 ' ' ':' ' ' 'contact2D-adhe' ' ' '(contact adherent)' ;
    MESS VMSG ;
    NPASS = 2 ;
    SI IPASS3 ;
        NPASS = 3 ;
    FINSI ;
    VTH1 = 0 ;
    VTH2 = 0 ;
    VTH3 = 0 ;
    VNE51 = 0 ;
    VNE01 = 0 ;
    VNE52 = 0 ;
    VNE02 = 0 ;
    VNE53 = 0 ;
    VNE03 = 0 ;
    REPETER ZVRUN NPASS ;
* ordre des passes alterne d'un cas a l'autre (derive des temps en session)
        VIP = &ZVRUN ;
        VPSW = (VIP '>' 1) ;
        VNIV = 1 ;
        VMPS = 'inactif' ;
        SI (VIP 'EGA' 2) ;
            VMPS = 'actif niveau 1' ;
        FINSI ;
        SI (VIP 'EGA' 3) ;
            VNIV = 2 ;
            VMPS = 'actif niveau 2' ;
        FINSI ;
        AVANCE VRES 57 NTOT0 'contact2D-adhe' VIP 'en_cours' ;
        VMSG = CHAI '    passe' ' ' VIP ' ' 'sur' ' ' NPASS ' ' ': optimisations' ' ' VMPS ;
        MESS VMSG ;
        SI ITRACE0 ;
            OPTI 'IMPR' 'valid_trace.log' ;
        FINSI ;
        OPTI 'DIME' 3 'MODE' 'TRID' 'ELEM' 'CUB8' 'ECHO' IECHO0 ;
        VTHM = 0 ;
        REPETER ZVREP NREP0 ;
            VIR = &ZVREP ;
            VTFPR = TABL ;
            VTCT = TABL ;
            VTCT . 'N0' = 0 ;
            VTCT . 'N5' = 0 ;
            SI ITEMPS0 ;
                TEMP 'ZERO' ;
            FINSI ;
* Le cas s'execute dans une procedure (variables locales) : les variables
* d'un cas precedent ne peuvent pas masquer un mot-cle ou un operateur
            VC57 VPSW VNIV VTFPR VTCT IECHO0 ;
            VTHR = 0 ;
            SI ITEMPS0 ;
                VTHR = CHRONO ;
            FINSI ;
            SI (VIR 'EGA' 1) ;
                VTHM = VTHR ;
            SINON ;
                SI (VTHR '<' VTHM) ;
                    VTHM = VTHR ;
                FINSI ;
            FINSI ;
        FIN ZVREP ;
        VNER5 = VTCT . 'N5' ;
        VNER0 = VTCT . 'N0' ;
        SI (VIP 'EGA' 1) ;
            VTF1 = VTFPR ;
            VTH1 = VTHM ;
            VNE51 = VNER5 ;
            VNE01 = VNER0 ;
        FINSI ;
        SI (VIP 'EGA' 2) ;
            VTF2 = VTFPR ;
            VTH2 = VTHM ;
            VNE52 = VNER5 ;
            VNE02 = VNER0 ;
        FINSI ;
        SI (VIP 'EGA' 3) ;
            VTF3 = VTFPR ;
            VTH3 = VTHM ;
            VNE53 = VNER5 ;
            VNE03 = VNER0 ;
        FINSI ;
    FIN ZVRUN ;
*   comparaison des empreintes avec la passe 1
    VER2 VNL2 VNC2 = COMPAR VTF1 VTF2 ;
    VMOK2 = 'OK' ;
    SI ((VER2 '>' TOLV0) 'OU' (VNL2 '>' 0) 'OU' ('NON' (VNE52 'EGA' VNE51))) ;
        VMOK2 = 'ECART' ;
        VNBK2 = VNBK2 + 1 ;
    FINSI ;
    VER3 = 0. ;
    VNC3 = 0 ;
    VMOK3 = 'sans_objet' ;
    SI IPASS3 ;
        VER3 VNL3 VNC3 = COMPAR VTF1 VTF3 ;
        VMOK3 = 'OK' ;
        SI ((VER3 '>' TOLV3) 'OU' (VNL3 '>' 0) 'OU' ('NON' (VNE53 'EGA' VNE51))) ;
            VMOK3 = 'ECART' ;
            VNBK3 = VNBK3 + 1 ;
        FINSI ;
    FINSI ;
*   accelerations (temps de la passe 1 / temps de la passe)
    VSP2 = 0. ;
    VSP3 = 0. ;
    SI ((VTH1 '>' 0) 'ET' (VTH2 '>' 0)) ;
        VSP2 = (FLOT VTH1) '/' (FLOT VTH2) ;
    FINSI ;
    SI ((VTH1 '>' 0) 'ET' (VTH3 '>' 0)) ;
        VSP3 = (FLOT VTH1) '/' (FLOT VTH3) ;
    FINSI ;
    VSUM1 = VSUM1 + VTH1 ;
    VSUM2 = VSUM2 + VTH2 ;
    VSUM3 = VSUM3 + VTH3 ;
    VCLA = VTF2 . 'CL' ;
    VR2 = VTF2 . 'NRE' ;
    VC2 = VTF2 . 'NCA' ;
    VH2 = VTF2 . 'NHK' ;
    VM2 = VTF2 . 'NMA' ;
    VR3 = -1 ;
    VC3 = -1 ;
    VH3 = -1 ;
    VM3 = -1 ;
    SI IPASS3 ;
        VR3 = VTF3 . 'NRE' ;
        VC3 = VTF3 . 'NCA' ;
        VH3 = VTF3 . 'NHK' ;
        VM3 = VTF3 . 'NMA' ;
    FINSI ;
    VSE2 = CHAI 'FORMAT' '(1PE10.3)' VER2 ;
    VSE3 = CHAI 'FORMAT' '(1PE10.3)' VER3 ;
    VSS2 = CHAI 'FORMAT' '(F6.2)' VSP2 ;
    VSS3 = CHAI 'FORMAT' '(F6.2)' VSP3 ;
*   fichier de resultat du cas (SORT) et affichage console (MESS)
    OPTI 'SORT' 'valid_contact2D-adhe.log' ;
    VMSG = CHAI '=== Cas' ' ' '57' ' ' ':' ' ' 'contact2D-adhe' ' ' '(contact adherent)' ' ' '===' ;
    MESS VMSG ;
    SORT 'CHAI' VMSG ;
    VMSG = CHAI 'Valeurs comparees :' ' ' VNC2 ;
    MESS VMSG ;
    SORT 'CHAI' VMSG ;
    VMSG = CHAI 'Temps horloge (ms) : origine' ' ' VTH1 ' ' '; niveau 1' ' ' VTH2 ' ' '; niveau 2' ' ' VTH3 ;
    MESS VMSG ;
    SORT 'CHAI' VMSG ;
    VMSG = CHAI 'Acceleration par rapport a l origine : niveau 1' ' ' VSS2 ' ' '; niveau 2' ' ' VSS3 ;
    MESS VMSG ;
    SORT 'CHAI' VMSG ;
    VMSG = CHAI 'Controles internes du cas : echecs origine' ' ' VNE51 ' ' '; niveau 1' ' ' VNE52 ' ' '; niveau 2' ' ' VNE53 ' ' '- reussites origine' ' ' VNE01 ' ' '; niveau 1' ' ' VNE02 ' ' '; niveau 2' ' ' VNE03 ;
    MESS VMSG ;
    SORT 'CHAI' VMSG ;
    VMSG = CHAI 'Classes exercees (1 MATVAR, 10 ENDOM, 20 VISCODOM, 100 GD) :' ' ' VCLA ;
    MESS VMSG ;
    SORT 'CHAI' VMSG ;
    VMSG = CHAI 'Niveau 1 : raideur reutilisee' ' ' VR2 ' ' 'fois, recalculee' ' ' VC2 ' ' 'fois ; HOOK evite' ' ' VH2 ' ' 'fois ; caracteristiques reutilisees' ' ' VM2 ' ' 'fois' ;
    MESS VMSG ;
    SORT 'CHAI' VMSG ;
    VMSG = CHAI 'Niveau 2 : raideur reutilisee' ' ' VR3 ' ' 'fois, recalculee' ' ' VC3 ' ' 'fois ; HOOK evite' ' ' VH3 ' ' 'fois ; caracteristiques reutilisees' ' ' VM3 ' ' 'fois' ;
    MESS VMSG ;
    SORT 'CHAI' VMSG ;
    VMSG = CHAI 'Ecart relatif maximal : niveau 1' ' ' VSE2 ' ' '; niveau 2' ' ' VSE3 ;
    MESS VMSG ;
    SORT 'CHAI' VMSG ;
    VMSG = CHAI 'RESULTAT : niveau 1' ' ' VMOK2 ' ' '; niveau 2' ' ' VMOK3 ;
    MESS VMSG ;
    SORT 'CHAI' VMSG ;
    SI (('EGA' VNC2 0) ) ;
        VMSG = CHAI 'ATTENTION : aucune valeur comparee (resultats non stockes ?)' ;
        MESS VMSG ;
        SORT 'CHAI' VMSG ;
    FINSI ;
    OPTI 'SORT' 'valid_inutile.tmp' ;
    VRES . 57 = TABL ;
    VRES . 57 . 'NOM' = 'contact2D-adhe' ;
    VRES . 57 . 'OKM' = VMOK2 ;
    VRES . 57 . 'OK3' = VMOK3 ;
    VRES . 57 . 'ERR2' = VER2 ;
    VRES . 57 . 'ERR3' = VER3 ;
    VRES . 57 . 'TH1' = VTH1 ;
    VRES . 57 . 'TH2' = VTH2 ;
    VRES . 57 . 'TH3' = VTH3 ;
    VRES . 57 . 'SP2F' = VSP2 ;
    VRES . 57 . 'SP3F' = VSP3 ;
    VRES . 57 . 'NRE2' = VR2 ;
    VRES . 57 . 'NCA2' = VC2 ;
    VRES . 57 . 'NHK2' = VH2 ;
    VRES . 57 . 'NMA2' = VM2 ;
    VRES . 57 . 'NRE3' = VR3 ;
    VRES . 57 . 'NCA3' = VC3 ;
    VRES . 57 . 'NHK3' = VH3 ;
    VRES . 57 . 'CL' = VCLA ;
    VRES . 57 . 'NCMP' = VNC2 ;
    VMSG = CHAI '<<< Cas' ' ' '57' ' ' 'sur' ' ' NTOT0 ' ' ':' ' ' 'contact2D-adhe' ' ' ':' ' ' 'niveau 1' ' ' VMOK2 ', niveau 2' ' ' VMOK3 ' ' '- ecart' ' ' VSE2 ', acceleration' ' ' VSS2 ' ' 'et' ' ' VSS3 ;
    MESS VMSG ;
    AVANCE VRES 57 NTOT0 'contact2D-adhe' NPASS 'termine' ;
    MENAGE 'OBLI' ;
FINSI ;

*
* ---------------------------------------------------------------------
* Synthese
* ---------------------------------------------------------------------
OPTI 'SORT' 'valid_synthese.log' ;
VMSG = CHAI '==================================================' ;
MESS VMSG ;
SORT 'CHAI' VMSG ;
VMSG = CHAI 'Synthese de la validation et du benchmark PERF-RAID' ;
MESS VMSG ;
SORT 'CHAI' VMSG ;
VMSG = CHAI 'Classes : 1 MATVAR, 10 ENDOM, 20 VISCODOM, 100 GD' ;
MESS VMSG ;
SORT 'CHAI' VMSG ;
VMSG = CHAI 'cas'*4 't.orig'*12 't.niv1'*20 't.niv2'*28 'acc1'*35 'acc2'*42 'ecart1'*54 'ecart2'*65 'r1'*70 'c1'*75 'h1'*80 'r2'*85 'c2'*90 'h2'*95 'm1'*100 ' ' 'res1' ' ' 'res2' ' ' 'nom' ;
MESS VMSG ;
SORT 'CHAI' VMSG ;
REPETER ZVSY NTOT0 ;
    VI = &ZVSY ;
    SI ('EXIS' VRES VI) ;
        VR1 = VRES . VI ;
        VN1 = VR1 . 'NOM' ;
        VO1 = VR1 . 'OKM' ;
        VO3 = VR1 . 'OK3' ;
        VX2 = VR1 . 'ERR2' ;
        VX3 = VR1 . 'ERR3' ;
        VA1 = VR1 . 'TH1' ;
        VA2 = VR1 . 'TH2' ;
        VA3 = VR1 . 'TH3' ;
        VS2 = VR1 . 'SP2F' ;
        VS3 = VR1 . 'SP3F' ;
        VB1 = VR1 . 'NRE2' ;
        VB2 = VR1 . 'NCA2' ;
        VB3 = VR1 . 'NHK2' ;
        VB4 = VR1 . 'NRE3' ;
        VB5 = VR1 . 'NCA3' ;
        VB6 = VR1 . 'NHK3' ;
        VB7 = VR1 . 'NMA2' ;
        VMSG = CHAI VI*4 VA1*12 VA2*20 VA3*28 'FORMAT' '(F6.2)' VS2*35 VS3*42 'FORMAT' '(1PE10.3)' VX2*54 VX3*65 VB1*70 VB2*75 VB3*80 VB4*85 VB5*90 VB6*95 VB7*100 ' ' VO1 ' ' VO3 ' ' VN1 ;
        MESS VMSG ;
        SORT 'CHAI' VMSG ;
    FINSI ;
FIN ZVSY ;
VSP2 = 0. ;
VSP3 = 0. ;
SI ((VSUM1 '>' 0) 'ET' (VSUM2 '>' 0)) ;
    VSP2 = (FLOT VSUM1) '/' (FLOT VSUM2) ;
FINSI ;
SI ((VSUM1 '>' 0) 'ET' (VSUM3 '>' 0)) ;
    VSP3 = (FLOT VSUM1) '/' (FLOT VSUM3) ;
FINSI ;
VSS2 = CHAI 'FORMAT' '(F6.2)' VSP2 ;
VSS3 = CHAI 'FORMAT' '(F6.2)' VSP3 ;
VMSG = CHAI 'Temps cumules (ms) : origine' ' ' VSUM1 ' ' '; niveau 1' ' ' VSUM2 ' ' '; niveau 2' ' ' VSUM3 ;
MESS VMSG ;
SORT 'CHAI' VMSG ;
VMSG = CHAI 'Acceleration cumulee : niveau 1' ' ' VSS2 ' ' '; niveau 2' ' ' VSS3 ;
MESS VMSG ;
SORT 'CHAI' VMSG ;
VMSG = CHAI 'Nombre de cas en ecart : niveau 1 (tolerance identique)' ' ' VNBK2 ' ' '; niveau 2 (tolerance approchee)' ' ' VNBK3 ;
MESS VMSG ;
SORT 'CHAI' VMSG ;
VMSG = CHAI 'r1 c1 h1 m1 : raideur reutilisee, recalculee, HOOK evite, caracteristiques reutilisees (niveau 1) ; r2 c2 h2 : idem niveau 2' ;
MESS VMSG ;
SORT 'CHAI' VMSG ;
VMSG = CHAI 'Les temps de cas de quelques ms sont peu significatifs : augmenter NREP0 pour lisser' ;
MESS VMSG ;
SORT 'CHAI' VMSG ;
VMSG = CHAI 'Fin de la synthese' ;
MESS VMSG ;
SORT 'CHAI' VMSG ;
OPTI 'SORT' 'valid_inutile.tmp' ;
AVANCE VRES NTOT0 NTOT0 'fin' 3 'VALIDATION_TERMINEE' ;
MESS '==================================================' ;
VMSG = CHAI 'VALIDATION TERMINEE :' ' ' NTOT0 ' ' 'cas, dont' ' ' VNBK2 ' ' 'en ecart au niveau 1 et' ' ' VNBK3 ' ' 'au niveau 2' ;
MESS VMSG ;
MESS '==================================================' ;
*
FIN ;
