$$$$ CHANVESP
* CHANVESP  PROCEDUR  AURI      97/12/24    21:15:24     3025
 DEBMETH CHANVESP NUNU*ENTIER TATA*OBJET ;
 MOBID = TATA.'CLASSE' ;
*'SI' ( 'NEG' TATA.CLASSE  'LIESPECE' ) ;
 'SI' ( 'NEG' MOBID  'LIESPECE' ) ;
    ERREUR 21 ;
 'QUITTER' CHANVESP ;
 'FINSI';
 'SI' ( 'EXIS' %NVESP ) ;
       %NVESP%GINDIOBJ NUNU TATA ;
 'SINON' ;
       %NVESP= OBJET INDIOBJE  ;
       %NVESP%GINDIOBJ NUNU TATA ;
 'FINSI' ;
 FINMETH ;
