$$$$ G_CALCUL
* G_CALCUL  PROCEDUR  JB251061  22/09/05    21:15:01     11444
DEBP G_CALCUL SUPTAB*'TABLE' OBJUTI*'TABLE' BOOL*'TABLE';
* =============================================================================
*           PROCEDURE DE CALCUL DES INTEGRALES NECESSAIRES A G_THETA
*           --------------------------------------------------------
*
* DESCRIPTION : EFFECTUE LE CALCUL DE L'INTEGRALE SPECIFIEE DANS L'INDICE
*               'OBJECTIF' DE LA TABLE SUPTAB.
*               ON BOUCLE SUR LES PAS DE CALCUL, SUR LES INTEGRALES A CALCULER
*               ET ENFIN SUR LES NOEUDS DU FRONT DE FISSURE.
* =============================================================================

* QUELQUES OBJETS UTILES

MOD_MEC_R = OBJUTI.'MOD_MEC_R';
MAILMOD = EXTR MOD_MEC_R 'MAILLAGE';
SI BOOL.'DECOUPLAGE';
    CH_AUX = SUPTAB.'CH_AUX';
FINSI;
* CHAMPS NULS
CMD000 = CHAN 'NOEUD' MOD_MEC_R (ZERO MOD_MEC_R 'DEPLACEM');
CMD001 = CHAN 'STRESSES' MOD_MEC_R (ZERO MOD_MEC_R 'DEPLACEM');
GRA000 = ZERO MOD_MEC_R 'GRADIENT';
FOR000 = CHAN 'CHPO' MOD_MEC_R (ZERO MOD_MEC_R 'FORCES  ');
DEP000 = CHAN 'CHPO' MOD_MEC_R (ZERO MOD_MEC_R 'DEPLACEM');
SI (EGA GMODE 'PLANGENE');
    FOR000 = MANU 'CHPO' (EXTR MOD_MEC_R 'MAIL') 2 'FX' 0.
                'FY' 0. 'TITR' 'FORCES  ' 'NATURE' 'DIFFUS';
    FOR000 = FOR000 ET (MANU 'CHPO' (VALE 'MODE' 'PLANGENE')
                3 'FZ' 0. 'MX' 0. 'MY' 0.
                'TITR' 'FORCES  ' 'NATURE' 'DIFFUS');
    DEP000 = MANU 'CHPO' (EXTR MOD_MEC_R 'MAIL') 2 'UX' 0.
                'UY' 0. 'TITR' 'DEPLACEM' 'NATURE' 'DIFFUS';
    DEP000 = DEP000 ET (MANU 'CHPO' (VALE 'MODE' 'PLANGENE')
                3 'UZ' 0. 'RX' 0. 'RY' 0.
                'TITR' 'DEPLACEM' 'NATURE' 'DIFFUS');
FINSI;
* EN CAS D'UN MODELE DE PRESSION
SI BOOL.'MODE_PRES';
    MODCHA = EXTR OBJUTI.'MOD_TOT' 'FORM' 'CHARGEMENT';
    MODPRE = EXTR MODCHA 'COMP' 'PRESSION';
    SI (NON BOOL.'PASAPAS');
        MATPRE = REDU (SUPTAB.'PRESSION') MODPRE;
    FINSI;
    MAILPTOT = EXTR MODPRE 'MAIL';
    MAILPF = INTE MAILPTOT (SUPTAB.'FISSURE');
FINSI;


SI (BOOL.'COQ' ET BOOL.'EL_QUA');
   MAT2 = MAT_INST;
SINON;
   MAT2 = TEXT '        ';
FINSI;
SI BOOL.'COQ';
    MATCOMP = EXTR MAT_MEC 'COMP';
    MOTCARA = MOTS 'EPAI' 'EXCE' 'DIM3';
    CAR1 = EXCO MAT_MEC MOTCARA 'NOID';
SINON;
    CAR1 = TEXT '   ';
FINSI;

NBG = OBJUTI.'NBG';

* FRONT DE FISSURE EN POI1
FF = SUPTAB.'FRONT_FISSURE';
SI (EGA (TYPE FF) 'POINT');
    FF1 = MANU 'POI1' FF;
FINSI;
SI (EGA (TYPE FF) 'MAILLAGE');
    FF1 = CHAN 'POI1' FF;
FINSI;

* QUELQUES MOTS POUR SIMPLIFIER L'ECRITURE

NEXTR = GDIME;
SI BOOL.'COQ';
    NEXTR = 6;
FINSI;
MUI = EXTR (EXTR MOD_MEC_R 'DEPL') (LECT 1 PAS 1 NEXTR);
MFI = EXTR (EXTR MOD_MEC_R 'FORC') (LECT 1 PAS 1 NEXTR);
MGI = EXTR MOD_MEC_R 'GRAD';
MU1 = EXTR MUI 1 ; MU2 = EXTR MUI 2 ; MU3  = MOT 'UZ';
MF1 = EXTR MFI 1 ; MF2 = EXTR MFI 2 ; MF3  = MOT 'FZ';
MFA1= MOT  'FAX' ; MFA2 = MOT 'FAY' ; MFA3 = MOT 'FAZ';
GR1 GR2 GR3 = (EXTR MGI 1) (EXTR MGI 2) (EXTR MGI 3);
GR4 GR5 GR6 = (EXTR MGI 4) (EXTR MGI 5) (EXTR MGI 6);
GR7 GR8 GR9 = (EXTR MGI 7) (EXTR MGI 8) (EXTR MGI 9);
SM1 = MOT  'SMXX' ; SM2  = MOT 'SMYY' ; SM3  = MOT 'SMZZ';
SM4 = MOT  'SMXY' ; SM5  = MOT 'SMXZ' ; SM6  = MOT 'SMYZ';
EP1 = MOT  'EPXX' ; EP2  = MOT 'EPYY' ; EP3  = MOT 'EPZZ';
EP4 = MOT  'GAXY' ; EP5  = MOT 'GAXZ' ; EP6  = MOT 'GAYZ';
SI (EGA GMODE 'AXIS');
   MU3 = MOT 'UT';
   SM1 = MOT 'SMRR' ; SM2 = MOT 'SMZZ' ; SM3 = MOT 'SMTT';
   SM4 = MOT 'SMRZ';
   EP1 = MOT 'EPRR' ; EP2 = MOT 'EPZZ' ; EP3 = MOT 'EPTT';
   EP4 = MOT 'GARZ';
FINSI;
*BP: PETIT AJOUT DE NOM DE COMPOSANTE DE CHPOINT
SI (BOOL.'J' OU BOOL.'J_DYNA') ; MOCOMP = 'J' ;    FINSI;
SI (BOOL.'C*' OU BOOL.'C*H') ; MOCOMP = 'C*' ;   FINSI;
SI BOOL.'DJ/DA' ; MOCOMP = 'DJDA' ; FINSI;

* VALEURS INITIALES

S10  = 0. ; S20  = 0. ; S30  = 0. ; S40  = 0. ; S41 = 0. ; S50  = 0.;
S60  = 0. ; S70  = 0. ; S80  = 0. ; S90  = 0. ; S100 = 0.;
S110 = 0. ; S120 = 0. ; S130 = 0. ; S140 = 0. ; S141 = 0.;
S150 = 0. ; S160 = 0. ; S170 = 0. ; S180 = 0.;
S190 = 0. ; S200 = 0. ; S210 = 0. ; S220 = 0.;


* DETERMINATION DE LA TAILLE DE LA 1ERE COLONNE A AFFICHER
SI ((EGA GDIME 3) ET (NON BOOL.'COQ'));
    NDEC = DIME 'GLOBAL';
    REPE INO (NBEL FF1);
        PM = (FF1 ELEM &INO) POIN 1;
        NNO = NOEU PM;
        NDEC1 = DIME (CHAI NNO);
        NDEC = MAXI NDEC NDEC1;
    FIN INO;
SINON;
    PM = FF1 POIN 1;
    NNO = NOEU PM;
    NDEC = DIME (CHAI NNO);
FINSI;


* TITRES A AFFICHER SELON LE PROBLEME TRAITER
* *******************************************

* TITRE GENERAL
NMESS = OBJUTI.'NMESS';
MOBJ = MOT SUPTAB.'OBJECTIF';
CHINT = CHAI MOBJ;
SI (BOOL.'J_DYNA');
    MOBJ = CHAI 'J';
SINON;
    SI (BOOL.'DJ/DA');
        SI (EXIS SUPTAB 'FISSURE_2');
            MOBJ = CHAI 'CROISEE DJi/DAj';
            CHINT = CHAI 'DJi/DAj';
        FINSI;
    FINSI;
FINSI;
SI BOOL.'THER';
    CHATHE = CHAI ' THERMO-';
SINON;
    CHATHE = CHAI ' ';
FINSI;
SI BOOL.'DECOUPLAGE';
    CHACAL = CHAI 'SEPARATION DES F.I.C. EN' CHATHE 'ELASTICITE';
    CHINT = CHAI 'Ki';
SINON;
    SI BOOL.'PASAPAS';
        SI (BOOL.'J' OU BOOL.'DJ/DA');
            CHAMAT = CHAI 'ELASTO-PLASTICITE';
        SINON;
            SI BOOL.'J_DYNA';
                CHAMAT = CHAI 'ELASTO-DYNAMIQUE';
            SINON;
                CHAMAT = CHAI 'VISCO-PLASTICITE';
            FINSI;
        FINSI;
        CHACAL = CHAI 'INTEGRALE' ' ' MOBJ ' EN' CHATHE CHAMAT;
        SI (BOOL.'C*H');
            CHINT = CHAI 'C*(H)';
        FINSI;
    SINON;
        CHACAL = CHAI 'INTEGRALE' ' ' MOBJ ' EN ELASTICITE';
    FINSI;
FINSI;
* EN-TETE DES RESULTATS
CTITR = CHAI;
NCTITR = 0;
SI BOOL.'PASAPAS';
    CHPAS = CHAI 'No.Pas';
    NPMAX = NBG + NBDEP;
    NDPAS = NCTITR + (MAXI (DIME (CHAI NPMAX)) (DIME CHPAS)) + 1;
    CTITR = CHAI CTITR CHPAS*NDPAS;
    NCTITR = DIME CTITR;
FINSI;
SI BOOL.'DECOUPLAGE';
    NDDEC = NCTITR + 5;
    CTITR = CHAI CTITR 'Mode'*NDDEC;
    NCTITR = DIME CTITR;
FINSI;
SI BOOL.'COQ';
    NDCOQ = NCTITR + 7;
    CTITR = CHAI CTITR 'Plan'*NDCOQ;
    NCTITR = DIME CTITR;
FINSI;
SI ((EGA GDIME 3) ET (NON BOOL.'COQ'));
    SI BOOL.'XFEM';
        CHFRO = CHAI 'Int.';
    SINON;
        CHFRO = CHAI 'Noeud';
    FINSI;
    NDFRO = 6;
    REPE INO (NBEL FF1);
        PM = (FF1 ELEM &INO) POIN 1;
        NNO = NOEU PM;
        NDFRO = MAXI NDFRO (DIME (CHAI NNO));
    FIN INO;
    NDFRO = NDFRO + NCTITR + 1;
    CTITR = CHAI CTITR CHFRO*NDFRO;
    NCTITR = DIME CTITR;
FINSI;
NFLOT = 11 + 2;
NDMEC = (DIME CTITR) + NFLOT;
CTITR = CHAI CTITR 'Mecanique'*NDMEC;
NDTHE = NDMEC + NFLOT;
CTITR = CHAI CTITR 'Thermique'*NDTHE;
NDVOL = NDTHE + NFLOT;
CTITR = CHAI CTITR 'Volumique'*NDVOL;
NDINT = NDVOL + NFLOT;
CTITR = CHAI CTITR CHINT*NDINT;
NDTIT = (NDINT / 2) + ((DIME CHACAL) / 2);
SAUT 'LIGNE';
MESS CHACAL*NDTIT;
SLIGN = CHAI '_';
REPE ICHAR ((DIME CHACAL) - 1);
    SLIGN = CHAI SLIGN '_';
FIN ICHAR;
MESS SLIGN*NDTIT;
SAUT 'LIGNE';
NDCHA = (NDINT / 2) + (45 / 2);
MESS 'Detail des contributions de chaque chargement'*NDCHA;
MESS '_____________________________________________'*NDCHA;
MESS;
MESS CTITR;
MESS;


***********************************************
***********************************************
********* BOUCLE SUR LE PAS DE CALCUL *********
***********************************************
***********************************************

SI ((EGA GDIME 3) OU BOOL.'PASAPAS' OU BOOL.'DECOUPLAGE');
    TABRES = TABL SUPTAB.'RESULTATS';
FINSI;

REPE BOUCEXT NBDEP;

    IABC = NBG + &BOUCEXT;

* DECLARATION DES TABLES STOCKANT LES RESULTATS POUR LE PAS DE TEMPS IABC
    SI BOOL.'PASAPAS';
        SI (EGA GDIME 3);
            SI  BOOL.'DECOUPLAGE';
                REPE IRUPT GDIME;
                    TABRES.(EXTR 'III' 1 &IRUPT).IABC = TABL;
                FIN IRUPT;
            SINON;
                TABRES.IABC = TABL;
            FINSI;
        FINSI;
        SUPTAB.'CHPO_RESULTATS'.IABC = VIDE 'CHPOINT'/'DISCRET';
        SUPTAB.'CHAM_RESULTATS'.IABC = VIDE 'MCHAML';
    FINSI;

***************************************************
** DEPLACEMENTS,CONTRAINTES ... A L INSTANT INST **
***************************************************

    SI BOOL.'PASAPAS';
* SOLUTION_PASAPAS
        SI BOOL.'PERSO1';
* CAS PERSO1
            INST   =  ESTIM . 'TEMPS';
            DEPINT = (ESTIM . 'DEPLACEMENTS') REDU ELTETA;
            SIGF   = (ESTIM . 'CONTRAINTES' ) REDU MOD_MEC_R;
            SI (BOOL.'GRANDS_DEP' ET (NON BOOL.'ROT_RIG'));
                SIGF = 'CAPI' SIGF DEPINT MOD_MEC_R;
            FINSI;
            SI BOOL.'ROT_RIG';
                SI (NON (EXIS (SUPTAB.'ROTATION_RIGIDIFIANTE') IABC));
                    MESS 'ERREUR : Le deplacement du a une rotation';
                    MESS '         rigidifiante au pas ' IABC ' n est pas'
                    MESS '         donne';
                    ERRE 21 ; QUIT G_THETA;
                FINSI;
                DEPINT = DEPINT -
                (REDU SUPTAB.'ROTATION_RIGIDIFIANTE'.IABC ELTETA);
            FINSI;
            SI (EXIS ESTIM 'VARIABLES_INTERNES');
                VARF = (ESTIM . 'VARIABLES_INTERNES') REDU MOD_MEC_R;
            SINON;
                VARF = ZERO MOD_MEC_R 'VARINTER' ;;
            FINSI;
            SI BOOL.'C*';
                SI (EGA IABC 0);
                    DELTAT = INST + 1.E+30;
                    DEPINT = ESTIM . 'DEPLACEMENTS';
                    VITDFI = ESTIM . 'DEFORMATIONS_INELASTIQUES';
                    SIG1 = SIGF * 1.;
                FINSI;
                SI (IABC '>' 0);
                    DELTAT= INST - (ESTIM . 'TEMPS');
                    DEPINT= (ESTIM.'DEPLACEMENTS') - (ESTIM.'DEPLACEMENTS');
                    VITDFI= (ESTIM.'DEFORMATIONS_INELASTIQUES')
                                - (ESTIM.'DEFORMATIONS_INELASTIQUES');
                FINSI;
                DEPINT = (REDU ELTETA DEPINT) / DELTAT;
                VITDFI = (REDU ELTETA VITDFI) / DELTAT;
            FINSI;
            SI BOOL.'J_DYNA';
                VITF = (ESTIM .'VITESSES')      REDU ELTETA;
                ACCF = (ESTIM .'ACCELERATIONS') REDU ELTETA;
            FINSI;
        SINON;
* CAS OU ON APPELLE G_THETA APRES PASAPAS
            INST = SUPTAB.'SOLUTION_PASAPAS'.'TEMPS'.IABC;
            DEPINT = (SUPTAB.'SOLUTION_PASAPAS'.'DEPLACEMENTS'.IABC)
            REDU ELTETA;
            SIGF = (SUPTAB.'SOLUTION_PASAPAS'.'CONTRAINTES'.IABC)
                    REDU MOD_MEC_R;
            SI (BOOL.'GRANDS_DEP' ET (NON BOOL.'ROT_RIG'));
                SIGF = 'CAPI' SIGF DEPINT MOD_MEC_R;
            FINSI;
            SI BOOL.'ROT_RIG';
                SI (NON (EXIS (SUPTAB.'ROTATION_RIGIDIFIANTE') IABC));
                    MESS 'ERREUR : Le deplacement du a une rotation';
                    MESS '         rigidifiante au pas ' IABC ' n est pas'
                    MESS '         donne';
                    ERRE 21 ; QUIT G_THETA;
                FINSI;
                DEPINT = DEPINT -
                (REDU SUPTAB.'ROTATION_RIGIDIFIANTE'.IABC ELTETA);
            FINSI;
            SI (EXIS (SUPTAB.'SOLUTION_PASAPAS') 'VARIABLES_INTERNES');
                VARF = (SUPTAB.'SOLUTION_PASAPAS'.'VARIABLES_INTERNES'.IABC)
                REDU MOD_MEC_R;
            SINON;
                VARF = ZERO MOD_MEC_R 'VARINTER' ;;
            FINSI;
            SI BOOL.'C*';
                SI (EGA IABC 0);
                    DELTAT = INST + 1.E+30;
                    DEPINT = SUPTAB.'SOLUTION_PASAPAS'.'DEPLACEMENTS'.IABC;
                    VITDFI = SUPTAB.'SOLUTION_PASAPAS'.
                    'DEFORMATIONS_INELASTIQUES'.IABC;
                    SIG1 = SIGF * 1.;
                FINSI;
                SI (IABC > 0);
                    DELTAT = INST - (SUPTAB.'SOLUTION_PASAPAS'.'TEMPS'.
                                (IABC - 1));
                    DEPINT = (SUPTAB.'SOLUTION_PASAPAS'.'DEPLACEMENTS'.IABC) -
                    (SUPTAB.'SOLUTION_PASAPAS'.'DEPLACEMENTS'.(IABC - 1));
                    VITDFI = (SUPTAB.'SOLUTION_PASAPAS'.
                                'DEFORMATIONS_INELASTIQUES'.IABC) -
                                (SUPTAB.'SOLUTION_PASAPAS'.
                                'DEFORMATIONS_INELASTIQUES'.(IABC - 1));
                FINSI;
                DEPINT = (REDU ELTETA DEPINT) / DELTAT;
                VITDFI = (REDU ELTETA VITDFI) / DELTAT;
            FINSI;
            SI BOOL.'J_DYNA';
                VITF = (SUPTAB.'SOLUTION_PASAPAS'.'VITESSES'.IABC)
                REDU ELTETA;
                ACCF = (SUPTAB.'SOLUTION_PASAPAS'.'ACCELERATIONS'.IABC)
                REDU ELTETA;
            FINSI;
        FINSI;
    SINON;
* SOLUTION_RESO
        DEPINT = REDU (SUPTAB.'SOLUTION_RESO') ELTETA;
        SIGF = SIGM 'LINE' DEPINT MOD_MEC_R MAT_MEC;
    FINSI;

* ON CHANGE LE DEPLACEMENT DEPINT EN MCHAML AU NOEUD
    DEPINT = CHAN 'CHAM' DEPINT MOD_MEC_R 'NOEUD' 'DEPLACEMENTS';

****************************************************
* MODIFICATION DES CHAMPS THETA ET PI SI GRANDE ROT
****************************************************

    SI (BOOL.'PASAPAS' ET BOOL.'ROT_RIG');
        FORM SUPTAB.'ROTATION_RIGIDIFIANTE'.IABC;
        OTER SUPTAB 'TAB_THETA';
        SI BOOL.'DJ/DA';
            OTER SUPTAB 'TAB_PI';
        FINSI;
        CH_THETA SUPTAB OBJUTI BOOL;
    FINSI;

**********************************************************************
* CALCUL DES GRADIENTS ET DE LA DIVERGENCE DES CHAMPS THETA
**********************************************************************

    SI ((EGA &BOUCEXT 1) OU (BOOL.'PASAPAS' ET BOOL.'ROT_RIG'));
        TTHETA = SUPTAB.'TAB_THETA';
        INDTH = INDE TTHETA;
        NBOU = DIME TTHETA;
        SUPTAB.'GRTHETA' = TABL;
        SUPTAB.'DIVTHETA' = TABL;
        REPE BCNOEU NBOU;
            IND0 = INDTH.&BCNOEU;
            CHTHETA = TTHETA.IND0 + DEP000;
            GRTHETA = GRAD MOD_MEC_R CHTHETA CAR1;
            DIVTHETA = (EXCO GR1 GRTHETA 'SCAL') +
                        (EXCO GR5 GRTHETA 'SCAL') +
                        (EXCO GR9 GRTHETA 'SCAL');
            DIVTHETA = CHAN 'TYPE' DIVTHETA 'SCALAIRE';
            SUPTAB.'GRTHETA'.IND0 = GRTHETA;
            SUPTAB.'DIVTHETA'.IND0 = DIVTHETA;
        FIN BCNOEU;
    FINSI;


***************************************************
********** TEMPERATURES A L INSTANT INST **********
***************************************************

    SI BOOL.'THER';
        SI BOOL.'PASAPAS';
            SI BOOL.'THER_DECO';
                TEPINT = 'TIRE' CHAR1 INST 'T';
            SINON;
* bp, 2014-11-13 : ajout distinction cas BOOL.'THER' et BOOL.'THER_DECO'
                TEPINT = REDU ELTETA SUPTAB.'SOLUTION_PASAPAS'.'TEMPERATURES'.
                            IABC;
            FINSI;
        SINON;
            TEPINT = SUPTAB.'TEMPERATURES';
        FINSI;
    FINSI;


***************************************************
********** DEF IMPOSEE A L INSTANT INST **********
***************************************************

    SI BOOL.'DEF_IMP';
        SI BOOL.'PASAPAS';
            DEFI = 'TIRE' CHAR1 INST 'DEFI';
        SINON;
            DEFI = SUPTAB.'DEFORMATIONS_IMPOSEES';
        FINSI;
    FINSI;

***************************************************
********** CONTACT FROTTANT **********
***************************************************

    SI BOOL.'FROT';
        SI BOOL.'PASAPAS';
* ...TODO
        SINON;
* A PRIORI DEPLACEMENT_FISSURE PAS TRES UTILE ...
            SI (EXIS SUPTAB 'DEPLACEMENT_FISSURE');
                WDEP  = SUPTAB . 'DEPLACEMENT_FISSURE';
            SINON;
                WDEP  = REDU (SUPTAB.'SOLUTION_RESO') MAICON;
            FINSI;
            TOTO = EXTR WDEP 'MAIL';
            SI (EGA (NBEL TOTO) 0);
                MESS 'ERREUR : IL FAUT DEPLACEMENT_FISSURE SI MODELE_FISSURE';
                ERRE 21 ; QUIT G_THETA;
            FINSI;
            SI (EXIS SUPTAB 'PRESSION_FISSURE');
                SIGCON = SUPTAB . 'PRESSION_FISSURE';
            SINON;
                SIGCON = REDU SIGF OBJCON;
            FINSI;
* PEUT ETRE FAIRE UN TEST SUR SIGCON ...
        FINSI;
    FINSI;

*****************************************************
* CONTRAINTE RECALCULEE SI BOOL.'THER' = VRAI et NON BOOL.'PASAPAS' *
*****************************************************

    SI (BOOL.'THER' ET (NON BOOL.'PASAPAS'));
        SIGF = SIGF - (THET MOD_MEC_R MAT_MEC TEPINT);
    FINSI;


***************************************************
************ MATERIAU A L INSTANT INST ************
***************************************************

    SI (BOOL.'GRADPROP' ET BOOL.'THER' ET BOOL.'PASAPAS');
        MAT_INST = VARI 'NUAG' MOD_MEC_R MAT_MEC (EXCO 'T' TEPINT 'T');
    SINON;
        MAT_INST = MAT_MEC;
* bp: ne devrait on pas ecrire ci dessous..? inutile?
* MAT_INST = REDU MOD_MEC_R MAT_MEC
    FINSI;
    OBJUTI.'MAT_INST' = MAT_INST;


***************************************************
********* RIGIDITE TOTALE A L INSTANT INST ********
***************************************************

* bp: utilite?
    AUX_MECA = FAUX;
    SI BOOL.'DECOUPLAGE';
        AUX_MECA = EGA SUPTAB.'METH_AUX' 'MECA';
    FINSI;
    SI (BOOL.'DJ/DA' OU AUX_MECA);
        SI BOOL.'PASAPAS';
            SI (BOOL.'GRADPROP' ET BOOL.'THER');
                M1 = VARI 'NUAG' MOD_MEC_R (EXCO 'T' TEPINT 'T')
                (SUPTAB.'SOLUTION_PASAPAS'.'CARACTERISTIQUES');
            SINON;
                M1 = SUPTAB.'SOLUTION_PASAPAS'.'CARACTERISTIQUES';
            FINSI;
            RIGTOT = RIGI M1 (SUPTAB.'SOLUTION_PASAPAS'.'MODELE');
        SINON;
            RIGTOT = RIGI (SUPTAB.'CARACTERISTIQUES') (SUPTAB.'MODELE');
        FINSI;
    FINSI;

************************************
*** RIGTOT + BLOCAGES MECANIQUES ***
************************************

    SI  BOOL.'DJ/DA';
      SI BOOL.'PASAPAS';
         RIGTOT = RIGTOT ET
                 (SUPTAB.'SOLUTION_PASAPAS'.'BLOCAGES_MECANIQUES');
* rem bp: on suppose ceux ci identique a ceux de wtab...
      SINON;
         RIGTOT = RIGTOT ET SUPTAB.'BLOCAGES_MECANIQUES';
      FINSI;
    FINSI;
    OBJUTI.'RIGTOT' = RIGTOT;

********************************************************************
****** CHARGEMENT MECANIQUE (FORCES NODALES) A L INSTANT INST ******
********************************************************************

    PREINT = FOR000;
    SI BOOL.'PASAPAS';
*** SOLUTION_PASAPAS ******************************
        SI (EXIS CHAR1 'MECA');
            PREINT = PREINT + ((TIRE CHAR1 INST 'MECA') REDU ELTETA);
        FINSI;
        SI BOOL.'MODE_PRES';
* Dans le cas ou il y a un modele de pression
            MATPRE = TIRE CHAR1 'PRES' INST;
* --> on isole la partie du MMODEL de pression qui est appliquee
* sur la fissure
            SI BOOL.'PRES_FISS';
                MODPF = REDU MODPRE MAILPF;
                MATPF = REDU MATPRE MODPF;
            FINSI;
* --> on calcule les forces nodales equivalentes aux pressions
* appliquees hors de la fissure
            MAILPEXT = DIFF MAILPTOT MAILPF;
            SI ((NBEL MAILPEXT) > 0);
                MODPEXT = REDU MODPRE MAILPEXT;
                MATPEXT = REDU MATPRE MODPEXT;
                PREINT = PREINT + (BSIG MODPEXT MATPEXT);
            FINSI;
        FINSI;
    SINON;
*** SOLUTION_RESO **********************************
        SI (EXIS SUPTAB 'CHARGEMENTS_MECANIQUES');
            PREINT = PREINT + (SUPTAB.'CHARGEMENTS_MECANIQUES' REDU ELTETA);
        FINSI;
        SI BOOL.'MODE_PRES';
* Dans le cas ou il y a un modele de pression
* --> on isole la partie du MMODEL de pression qui est appliquee sur
* la fissure
            SI BOOL.'PRES_FISS';
                MODPF = REDU MODPRE MAILPF;
                MATPF = REDU MATPRE MODPF;
            FINSI;
* --> on calcule les forces nodales equivalentes aux pressions
* appliquees hors de la fissure
            MAILPEXT = DIFF MAILPTOT MAILPF;
            SI ((NBEL MAILPEXT) > 0);
                MODPEXT = REDU MODPRE MAILPEXT;
                MATPEXT = REDU MATPRE MODPEXT;
                PREINT = PREINT + (BSIG MODPEXT MATPEXT);
            FINSI;
        FINSI;
    FINSI;

**********************************************************************
******** POUR LES PRESSIONS APPLIQUEES SUR LA FISSURE
*        on calcule le MCHAML vectoriel de [pression * normale]
**********************************************************************

    SI BOOL.'PRES_FISS';
* champ de normale unitaire au maillage de la fissure
        MAT_INSTF = PRES MODPF 'PRES' 1.;
        NF1   = BSIG MODPF MAT_INSTF;
        LCOMP = EXTR NF1 'COMP';
        NF2   =  CHAN 'CHAM' NF1 MODPF 'STRESSES';
        XX    = PSCA NF2 NF2 LCOMP LCOMP;
        NF    = NF2 / (XX**0.5);
* champ de pression normale au maillage de la fissure
        PF    = CHAN 'STRESSES' MODPF MATPF;
        PF    = CHAN 'TYPE' PF 'FORCES';
        NCOMP = DIME LCOMP;
        LCP   = MOTS NCOMP*'PRES';
        PNF   = PF * NF LCP LCOMP LCOMP;
    FINSI;

****************************************************
***** APPEL A G_AUX POUR LES CHAMPS AUXILIAIRES ****
****************************************************

* G_AUX
    SI AUX_MECA;
        CH_AUX = G_AUX SUPTAB OBJUTI BOOL;
        SI (EGA (TYPE CH_AUX) (MOT 'ANNULE'));
            MESS 'ERREUR : G_AUX A RENCONTRE UN PROBLEME';
            QUIT G_CALCUL;
        FINSI;
        SUPTAB.'CH_AUX' = CH_AUX;
        MESS;
    FINSI;

*debut du cas contact frottant BOOL.'FROT' (btrolle 19/02/2013)
    SI (BOOL.'FROT');
        OBJCON = OBJUTI.'OBJCON';
        OBJCON2 = OBJUTI.'OBJCON2';
    FINSI;
*fin du cas contact frottant BOOL.'FROT' (btrolle 19/02/2013)


***********************************************
***********************************************
**** BOUCLE SUR LES INTEGRALES A CALCULER *****
***********************************************
***********************************************

* NBMIXT = nbre d integrale a calculer (=1 si J, =2 si K1 K2, =3
* si K1 K2 K3)
    NBMIXT = 1;
    SI BOOL.'DECOUPLAGE';
        C_MATE = OBJUTI.'C_MATE';
        MU_1 = OBJUTI.'MU_1';
        NBMIXT = 2;
        SI (EGA GDIME 3);
            NBMIXT = 3;
        FINSI;
    FINSI;
    REPE BOUCMIX NBMIXT;


*|=====================================================================|
*|=======  I. OBJETS NECESSAIRES  =====================================|


        SI BOOL.'DECOUPLAGE';
            MOCOMP = CHAI 'K' &BOUCMIX;
        FINSI;

****************************************************
**************** EN CAS DE DECOUPLAGE **************
****************************************************

        SI BOOL.'DECOUPLAGE';
            MOTMIX = CH_AUX.&BOUCMIX.'MOTMIX';
            MOTMIA = CH_AUX.&BOUCMIX.'MOTMIA';
            A_PREI = CH_AUX.&BOUCMIX.'A_PREI';
            A_DEPI = CH_AUX.&BOUCMIX.'A_DEPI';
            A_SIGF = CH_AUX.&BOUCMIX.'A_SIGF';
            A_DEPGR = CH_AUX.&BOUCMIX.'A_DEPGR';
*debut du cas contact frottant BOOL.'FROT' (btrolle 19/02/2013)
            SI (BOOL.'FROT');
                B_DEPGR = CH_AUX.&BOUCMIX.'B_DEPGR';
            FINSI;
*fin du cas contact frottant BOOL.'FROT' (btrolle 19/02/2013)
        FINSI;


****************************************************
******* EN CAS DE CALCUL EN VISCO_PLASTICITE *******
****************************************************

* INITIALISATION DE FACT1
        FACT1 = 1.;
        SI (BOOL.'C*' OU BOOL.'C*H');
            SI (EGA ITYPEF 1);
                CHAF1 = (CHAN 'STRESSES' MOD_MEC_R (EXCO 'AF1 ' MAT_INST 'SCAL'))
                CHAN 'TYPE' 'SCALAIRE';
                CHAF2 = (CHAN 'STRESSES' MOD_MEC_R (EXCO 'AF2 ' MAT_INST 'SCAL'))
                CHAN 'TYPE' 'SCALAIRE';
                CHAF3 = (CHAN 'STRESSES' MOD_MEC_R (EXCO 'AF3 ' MAT_INST 'SCAL'))
                CHAN 'TYPE' 'SCALAIRE';
                SI (EXIS MAT_INST 'AF0 ');
                    CHAF4 =( CHAN 'STRESSES' MOD_MEC_R (EXCO 'AF4 ' MAT_INST 'SCAL'))
                    CHAN 'TYPE' 'SCALAIRE';
                    CHAF5 =( CHAN 'STRESSES' MOD_MEC_R (EXCO 'AF5 ' MAT_INST 'SCAL'))
                    CHAN 'TYPE' 'SCALAIRE';
                    CHAF6 = (CHAN 'STRESSES' MOD_MEC_R (EXCO 'AF6 ' MAT_INST 'SCAL'))
                    CHAN 'TYPE' 'SCALAIRE';
                FINSI;
            FINSI;
            SI BOOL.'C*';
                SI (EGA ITYPEF 1);
* DENSITE D'ENERGIE POUR LES FLUAGES DONT ON A UNE
* EXPRESSION EXPLICITE DE L'INTEGRATION SUR LE TEMPS
                    SI (EXIS MAT_INST 'AF0 ');
                        COE1 = ((MINI (CHAF2 + 1.)) + (MAXI (CHAF2 + 1.)))/2.;
                        COE2 = ((MINI (CHAF4 + 1.)) + (MAXI (CHAF4 + 1.)))/2.;
                        COE3 = ((MINI (CHAF6 + 1.)) + (MAXI (CHAF6 + 1.)))/2.;
                        VMI1 = (EXCO ('VMIS' MOD_MEC_R SIGF MAT_INST) 'SCAL')
                        CHAN 'TYPE' 'SCALAIRE'        ;
                        ENERM1 = (CHAF2*((CHAF2 + 1.)**(-1.)))*CHAF1*(VMI1**COE1);
                        ENERM2 = (CHAF4*((CHAF4 + 1.)**(-1.)))*CHAF3*(VMI1**COE2);
                        ENERM3 = (CHAF6*((CHAF6 + 1.)**(-1.)))*CHAF5*(VMI1**COE3);
                        ENERM = ENERM1 + ENERM2 + ENERM3;
                    SINON;
                        COE1 = ((MINI (CHAF2 + 1.)) + (MAXI (CHAF2 + 1.)))/2.;
                        COE2 = ((MINI CHAF3) + (MAXI CHAF3))/2.;
                        VMI1 = (EXCO ('VMIS' MOD_MEC_R SIGF MAT_INST) 'SCAL')
                        CHAN 'TYPE' 'SCALAIRE'    ;
                        SI ((EGA INST 0. 1.E-10) ET ('<'(COE2 - 1) 0.));
                            V1 = 0.;
                        SINON;
                            V1 = INST**(COE2 - 1);
                        FINSI;
                        ENERM = (CHAF2*((CHAF2 + 1.)**(-1.)))*
                                    CHAF1*(VMI1**COE1)*CHAF3*V1;
                    FINSI;
                    SI (BOOL.'COQ' ET BOOL.'EL_LIN') ; ENERM = ENERM*MOD_MEC_R EPAICH ; FINSI;
                FINSI;
                SI (EGA ITYPEF 2);
* ON N'A PAS UNE EXPRESSION EXPLICITE DE
* L'INTEGRATION DU FLUAGE SUR LE TEMPS
                    SIGMOY = 0.5*(SIG1 + SIGF);
                    SI ((EGA IABC 0) ET (NON BOOL.'REPRI'));
                        ENERM = 'ENER' MOD_MEC_R VITDFI SIGMOY;
                    SINON;
                        ENERM = ENERM + ('ENER' MOD_MEC_R (VITDFI - VDI1) SIGMOY);
                    FINSI;
                    SIG11 = SIG1 ; SIG1 = SIGF ; VDI1 = VITDFI;
                FINSI;
            FINSI;
* FACTEUR AFFECTE A J SI ON CALCULE C*(H)
            SI BOOL.'C*H';
                CHAR2 = EXTR CHAR1 'MECA';
                COE1 = ((MINI CHAF1) + (MAXI CHAF1)) / 2.;
                COE2 = ((MINI CHAF2) + (MAXI CHAF2)) / 2.;
                COE3 = ((MINI CHAF3) + (MAXI CHAF3)) / 2.;
                N1 = COE2 / COE3;
                SI (EGA INST 0. 1.E-10) ; INST = 1.E-10 ; FINSI;
                P1 = PROG 0. 'PAS' (INST / 100.) INST;
                P2 = PROG;
                REPE BF1 (DIME P1);
                    T1 = EXTR P1 &BF1;
                    V1 = 0.;
                    REPE BF2 (DIME CHAR2);
                        E1 = EXTR CHAR2 'EVOL' &BF2;
                        V1 = V1 + ('IPOL' T1 (EXTR E1 'ABSC') (EXTR E1 ORDO));
                    FIN BF2;
                    P2 = P2 ET (PROG V1);
                FIN BF1;
                E1 = EVOL 'MANU' 'TEMPS' P1 'FORCE' (P2 ** N1);
                FACT1 = EXTR (INTG E1) 1;
                SI (EGA FACT1 0. 1.E-10) ; FACT1 = 1.E+30 ; FINSI;
                FACT1 = ((V1 ** N1) / FACT1) ** COE3;
            FINSI;
        FINSI;


********************************************************
* SI LA COURBE DE TRACTION DEPEND DE LA TEMPERATURE ON *
* CALCULE LA VARIATION DE CONTRAINTES DE VON-MISES LORS*
* D'UNE AUGMENTATION (DETATE) DE LA TEMPERATURE A INST *
********************************************************
*bp 11/08/2011 : on calcule plutot la variation de la limite d elasticite
*                ce qui est moins faux si presence de decharge...
*            => on construit VM1 comm VM2 !
        SI (((DIME MODPLA) '>' 0) ET BOOL.'THER');
            DETATE = 1.;
            TEP1 = TEPINT + (MANU 'CHPO' ELTETA 1 'T' DETATE);
            EPS1 = (EXCO VARF 'EPSE') CHAN 'TYPE' 'SCALAIRE';
            MSQ1 = 'MASQ' 'SUPERIEUR' EPS1 1.E-10;
            EPS1 = MSQ1 * EPS1;
* rem : on pourrait utiliser BORN dans le futur
* VMI1 = (CHAN ('VMIS' MOD_MEC_R SIGF MAT_INST)
*         'TYPE' 'SCALAIRE')*MSQ1;
* DETAVM = VMI1 * 0.;
            DETAVM = 0.;
            REPETER BCMOD2 NBOBJ;
                MODI = TABMOD.&BCMOD2;
* VM1 = REDU VMI1 MODI;
                EPS2 = redu EPS1 MODI;
                SI (EXIS MODPLA &BCMOD2);
                    SI (EGA MODPLA.&BCMOD2 1);
                        MA1 = VARI 'NUAG' MODI (MATE MODI
                                'ECRO' TABTRA.&BCMOD2) TEPINT;
                        VM1 = VARI 'NUAG' MODI (EXCO 'ECRO' MA1 'SIGM')
                        EPS2 'STRESSES' 'SCALAIRE';
                        VM1 = (EXCO VM1 'SIGM' 'SCAL') CHAN 'TYPE' 'SCALAIRE';
                        MA2 = 'VARI' 'NUAG' MODI (MATE MODI
                                'ECRO' TABTRA.&BCMOD2) TEP1;
* VM2 = 'VARI' 'NUAG' MODI (EXCO 'ECRO' MA2 SIGM)
*       (REDU EPS1 MODI) 'STRESSES' 'SCALAIRE';
* VM2 = ((EXCO VM2 SIGM 'SCAL')CHAN 'TYPE' 'SCALAIRE')
*         * (REDU MSQ1 MODI);
                        VM2 = VARI 'NUAG' MODI (EXCO 'ECRO' MA2 'SIGM')
                                EPS2 'STRESSES' 'SCALAIRE';
                        VM2 = (EXCO VM2 SIGM 'SCAL') CHAN 'TYPE' 'SCALAIRE';
                    FINSI;
                    SI ((EGA MODPLA.&BCMOD2 2) OU
                        (EGA MODPLA.&BCMOD2 3));
                        MA1 = VARI 'NUAG' MODI (REDU MAT_MEC MODI) TEPINT;
                        VM1 = CHAN 'STRESSES' MODI (EXCO MA1 'SIGY' 'SCAL');
                        MA2 = VARI 'NUAG' MODI (REDU MAT_MEC MODI) TEP1;
* EPS2 = REDU EPS1 MODI;
                        VM2 = CHAN 'STRESSES' MODI (EXCO MA2 'SIGY' 'SCAL');
                        SI (EGA MODPLA.&BCMOD2 2);
                            HSCAL1 = (EXCO MA1 'H' 'SCAL') CHAN 'TYPE' 'SCALAIRE';
                            VM1 = VM1 + ((CHAN 'STRESSES' MODI HSCAL1)*EPS2);
                            HSCAL2 = (EXCO MA2 'H' 'SCAL') CHAN 'TYPE' 'SCALAIRE';
                            VM2 = VM2 + ((CHAN 'STRESSES' MODI HSCAL2)*EPS2);
                        FINSI;
* VM2 = VM2 * (REDU MSQ1 MODI);
                    FINSI;
                    SI (EGA (TYPE DETAVM) 'FLOTTANT');
                        DETAVM = ((VM2 - VM1) / DETATE);
                    SINON;
                        DETAVM = DETAVM + ((VM2 - VM1) / DETATE);
                    FINSI;
                FINSI;
            FIN BCMOD2;
        FINSI;


*******************************************************
**** ENERGIE DE DEFORMATION ELASTIQUE ET PLASTIQUE ****
*******************************************************
***
*** DENSITE D'ENERGIE EN ELASTO OU THERMO-ELASTO-PLASTICITE ET
*** DENSITE D'ENERGIE LIEE A LA VARIATION DE COURBE DE TRACTION
***
        SI (NON BOOL.'C*');
            WELAS = 0.5*('ENER' MOD_MEC_R SIGF ('ELAS' MOD_MEC_R SIGF MAT_INST));
*         SI (BOOL.'PASAPAS' ET (NON BOOL.'DECOUPLAGE'));
            SI (BOOL.'PASAPAS');
                SI (EGA IABC 0);
                    VMI1 = CHAN ('VMIS' MOD_MEC_R SIGF MAT_INST) 'TYPE' 'SCALAIRE';
                    SI (BOOL.'COQ' ET BOOL.'EL_LIN') ; VMI1 = VMI1*MOD_MEC_R EPAICH ; FINSI;
                    WPLAS=0.5*VMI1*((EXCO VARF 'EPSE')CHAN 'TYPE' 'SCALAIRE');
                    SI (((DIME MODPLA) '>' 0) ET BOOL.'THER');
                        WVMIS = 0.5*DETAVM*((EXCO VARF 'EPSE')
                                    CHAN 'TYPE' 'SCALAIRE');
                    FINSI;
                SINON;
                    VMI1 = CHAN (0.5*(('VMIS' MOD_MEC_R SIG1 MAT_INST) +
                            ('VMIS' MOD_MEC_R SIGF MAT_INST))) 'TYPE' 'SCALAIRE';
                    SI (BOOL.'COQ' ET BOOL.'EL_LIN') ; VMI1 = VMI1*MOD_MEC_R EPAICH ; FINSI;
                    WPLAS = WPLAS + (VMI1*((EXCO (VARF - VAR1) 'EPSE')
                                CHAN 'TYPE' 'SCALAIRE'));
                    SI (((DIME MODPLA) '>' 0) ET BOOL.'THER');
                        WVMIS = WVMIS + ((0.5*(DETAV1 + DETAVM))*
                                    ((EXCO (VARF - VAR1) 'EPSE')
                                    CHAN 'TYPE' 'SCALAIRE') );
                    FINSI;
                FINSI;
                ENERM = WELAS + WPLAS;
                SIG11 = SIG1 ; SIG1 = SIGF*1. ; VAR11 = VAR1 ; VAR1 = VARF*1.;
                SI (((DIME MODPLA) '>' 0) ET BOOL.'THER');
                    DETAV1 = DETAVM;
                FINSI;
            SINON;
                ENERM = WELAS;
            FINSI;
        FINSI;


*|=====================================================================|
*|=======  II. CRITERES DE DECHARGES  =================================|


************************************************************
****** CRITERE GLOBAL 1 DE DECHARGE DES CONTRAINTES ********
************************************************************
***
*** EVALUATION EN ELASTO-PLASTICITE OU THERMO-ELASTO-PLASTICITE
*** PAR COMPARAISON AVEC UN CALCUL EN ELASTICITE NON-LINEAIRE
*** EN PRENANT POUR REFERENCE LES CONTRAINTES DE VON-MISES DU
*** CALCUL RENDU PAR PASAPAS ET LES CONTRAINTES EQUIVALENTES LUES
*** SUR LES COURBES DE TRACTION
***
        OUICRIT = FAUX;
        SI (EXIS SUPTAB 'CALCUL_CRITERE');
            OUICRIT = SUPTAB.'CALCUL_CRITERE';
        FINSI;
        SI (BOOL.'MESS' ET OUICRIT);
            MESS 'on va calculer les CRITERES DE DECHARGES, modpla=';
*        list modpla;
        FINSI;

        SI ((EGA ITYPEF 99) ET BOOL.'PASAPAS' ET OUICRIT);

            XCRIT = 1.;

            REPE BCMOD0 (DIME TABMOD);
                EXISCRIT = FAUX;
                MODI  = TABMOD.&BCMOD0;
                MATI  = REDU MAT_INST MODI;
                EPSE1 = EXCO VARF 'EPSE';
                EPSE1 = EPSE1 CHAN TYPE 'SCALAIRE';
                EPSET = REDU EPSE1 MODI;
                MSQ   = MASQ 'SUPERIEUR' EPSET 1.E-6;

* VMIS1 = contraintes de Von-Mises en elastoplastique
                VMIS1 = CHAN ('VMIS' MODI (REDU SIGF MODI) MATI)
                    TYPE 'SCALAIRE';

                SI ('EXIS' MODPLA &BCMOD0);
                    YOU = CHAN 'STRESSES' MODI (EXCO MATI 'YOUN');
                    YOU = YOU CHAN TYPE 'SCALAIRE';
                    SI (EGA MODPLA.&BCMOD0 1);
* modele est plastique isotrope. on utilise la
* courbe de traction TABTRA.&BCMOD0
                        EXISCRIT = VRAI;
                        MATA = VARI 'NUAG' MODI ('MATE' MODI
                               'ECRO' TABTRA.&BCMOD0) TEPINT;
                        EPELAST = EXCO (VMIS1*(YOU**(-1))) 'SCAL' 'EPSE';
                        EPSTOT = EPELAST + EPSET;
* VMIS2 = contraintes deduites des deformations
* equivalentes par la courbe de traction
                        VMIS2 = VARI 'NUAG' MODI (EXCO 'ECRO' MATA 'SIGM')
                                  EPSTOT 'STRESSES' 'SCALAIRE';
                    FINSI;

                    SI (EGA MODPLA.&BCMOD0 2);
* modele est plastique cinematique, cas ou
* SIGY et H sont des evolutions
                        EXISCRIT = VRAI;
                        VMIS22 = CHAN 'STRESSES' MODI (EXCO MATI 'SIGY' 'SCAL');
                        HSCAL = EXCO MATI 'H' 'SCAL';
                        HSCAL = HSCAL CHAN TYPE 'SCALAIRE';
                        VMIS2 = VMIS22 + ((CHAN 'STRESSES' MODI HSCAL) * EPSET);
                    FINSI;

                    SI (EGA MODPLA.&BCMOD0 3);
* modele est plastique parfait
                        EXISCRIT = VRAI;
                        VMIS2 = CHAN 'STRESSES' MODI ((EXCO MATI 'SIGY' 'SCAL')
                                CHAN TYPE 'SCALAIRE' );
                    FINSI;

                SINON;
*** modele elastoplastique et modele plastique cinematique
***  avec caracteristiques independantes de la temperature

                    SI (EXIS MATI 'ECRO');
* extraction de la courbe de traction du modele MODI
                        EXISCRIT = VRAI;
                        TRACTI = EXTR MATI 'ECRO' 1 1 1;
                        PEPSO  = EXTR TRACTI 'ABSC';
                        PSIGM  = EXTR TRACTI 'ORDO';
                        TRACTI = 'EVOL' 'MANU' 'EPSE' PEPSO 'SIGM' PSIGM;
                        YOU    = CHAN 'STRESSES' MODI (EXCO MATI 'YOUN');
                        YOU    = YOU CHAN TYPE 'SCALAIRE';
                        EPELAST= EXCO (VMIS1*(YOU**(-1))) 'SCAL' 'EPSE';
                        EPSTOT = EPELAST + EPSET;
* VMIS2 = contraintes deduites des deformations
* equivalentes par la courbe de traction
                        VMIS2 = 'VARI' MODI EPSTOT TRACTI 'STRESSES';
* ?       VMIS2  = VMIS2 CHAN TYPE 'SCALAIRE';
                    FINSI;

                    SI ((EXIS MATI 'SIGY') ET (EXIS MATI 'H'));
* modele est plastique cinematique traite ici separement du cas
* ou SIGY et H sont des evolutions c'est inutile car MAT_INST est
* deja instantie en temperature mais il faudra regler le pb de
* MODPLA dans son ensemble avec ZONE et une identification
* automatique de chacun des sous-modes
                        EXISCRIT = VRAI;
                        VMIS22 = CHAN 'STRESSES' MODI (EXCO MATI 'SIGY' 'SCAL');
                        VMIS22 = VMIS22 CHAN TYPE 'SACALAIRE';
                        HSCAL  = EXCO MATI 'H' 'SCAL';
                        HSCAL  = HSCAL CHAN TYPE 'SCALAIRE';
                        VMIS2  = VMIS22 + ((CHAN 'STRESSES' MODI HSCAL) * EPSET);
                    FINSI;
                    SI ((EXIS MATI 'SIGY') ET (NON (EXIS MATI 'H')));
* modele est plastique parfait
                        EXISCRIT = VRAI;
                        VMIS2  = CHAN 'STRESSES' MODI (EXCO MATI 'SIGY' 'SCAL');
                        VMIS2  = VMIS2 CHAN TYPE 'SCALAIRE';
                    FINSI;

                FINSI;

                SI EXISCRIT;
                    VMIS1P = VMIS1 * MSQ;
                    VMIS1S = INTG MODI VMIS1P;
                    VMIS2P = VMIS2 * MSQ;
                    VMIS2S = INTG MODI VMIS2P;
                    SI ('NEG' VMIS1S 0.);
                        XCRIT = XCRIT + ((VMIS2S/VMIS1S) - 1.);
                    FINSI;
                FINSI;

            FIN BCMOD0;

            SUPTAB.'CRIT_DECHA_GLOBAL1'.IABC = XCRIT;

        FINSI;


*********************************************************
****** CRITERE LOCAL 1 DE DECHARGE DES CONTRAINTES ******
*********************************************************

        SI ((EGA ITYPEF 99) ET BOOL.'PASAPAS' ET (IABC  > 0) ET OUICRIT);
            SI BOOL.'MESS';
                MESS 'CRITERE LOCAL 1';
            FINSI;
            EXISCRIT = FAUX;
            VMITOTF = ZERO MOD_MEC_R STRESSES;
            VMITOT1 = ZERO MOD_MEC_R STRESSES;
* initialisation

            REPE BCMOD0 (DIME TABMOD);

                MODI  = TABMOD.&BCMOD0;
                MATI  = REDU MAT_INST MODI;
                EPSE1 = EXCO VARF 'EPSE';
                EPSE1 =  EPSE1 CHAN TYPE 'SCALAIRE';
                EPSET = REDU EPSE1 MODI;
                MSQ   = 'MASQ' 'SUPERIEUR' EPSET 1.E-6;

                SI ('EXIS' MODPLA &BCMOD0);
                    INST1  = SUPTAB.'SOLUTION_PASAPAS'.'TEMPS'.(IABC-1);
                    TEPIN1 = TIRE CHAR1 INST1 'T';
                    TEPIN1 = REDU TEPIN1 ELTETA;
* TEPIN1 : temperature absolue au pas precedent

* modele plastique isotrope
                    SI (EGA MODPLA.&BCMOD0 1);
                        MATA = 'VARI' 'NUAG' MODI ('MATE' MODI
                                      'ECRO' TABTRA.&BCMOD0) TEPINT;
                        VMISF = CHAN ('VMIS' MODI SIGF MATA) TYPE 'SCALAIRE';
* VMISF : contrainte de Von Mises au pas courant
                        MATA1 = 'VARI' 'NUAG' MODI ('MATE' MODI
                                      'ECRO' TABTRA.&BCMOD0) TEPIN1;
                        VMIS1 = CHAN ('VMIS' MODI SIG11 MATA1) TYPE 'SCALAIRE';
* VMIS1 : contrainte de Von Mises au pas precedent
                    FINSI;

* modele plastique cinematique ou plastique parfait
                    SI  ((EGA MODPLA.&BCMOD0 2) OU (EGA MODPLA.&BCMOD0 3));
                        VMISF = CHAN ('VMIS' MODI SIGF MATI) TYPE 'SCALAIRE';
                        VMIS1 = CHAN ('VMIS' MODI SIG11 MATI) TYPE 'SCALAIRE';
                    FINSI;

* pour ces 3 modeles
                    SI ((EGA MODPLA.&BCMOD0 1) OU
                        (EGA MODPLA.&BCMOD0 2) OU
                        (EGA MODPLA.&BCMOD0 3));
                        EXISCRIT = VRAI;
                        VMISFP = VMISF * MSQ;
                        VMIS1P = VMIS1 * MSQ;
* VMISFP : contrainte de Von Mises aux points d'integration plastifies
**         au pas courant
* VMIS1P : contrainte de Von Mises aux points d'integration plastifies
**         au pas precedent
* on considere la plastification lorsque EPSET > 1E-6
                        VMISF1P = VMISFP - VMIS1P;
* VMISFP : difference entre la contrainte equivalente au temps de
* calcul t et celle au temps precedent (t-1)
                        VMITOTF = VMITOTF + VMISFP;
                        VMITOT1 = VMITOT1 + VMISF1P;
                    FINSI;

                SINON;

                    SI ('EXIS' MATI 'ECRO');
* modele elastoplastique avec
** caracteristiques independantes de la temperature
                        VMISF = CHAN ('VMIS' MODI (REDU SIGF MODI) MATI)
                                     TYPE 'SCALAIRE';
                        VMIS1 = CHAN ('VMIS' MODI (REDU SIG11 MODI) MATI)
                                     TYPE 'SCALAIRE';
                    FINSI;
                    SI (EXIS MATI 'SIGY');
* modele plastique cinematique et plastique parfait avec
** caracteristiques independantes de la temperature
                        VMISF = CHAN ('VMIS' MODI SIGF MATI)
                                     TYPE 'SCALAIRE';
                        VMIS1 = CHAN ('VMIS' MODI SIG11 MATI)
                                     TYPE 'SCALAIRE';
                    FINSI;

                    SI (('EXIS' MATI 'ECRO') OU (EXIS MATI 'SIGY'));
                        EXISCRIT = VRAI;
                        VMISFP   = VMISF * MSQ;
                        VMIS1P   = VMIS1 * MSQ;
                        VMISF1P  = VMISFP - VMIS1P;
                        VMITOTF  = VMITOTF + VMISFP;
                        VMITOT1  = VMITOT1 + VMISF1P;
                    FINSI;
                FINSI;

            FIN BCMOD0;

            SI EXISCRIT;
*      MSQO = (CHAN 'CHPO' MOD_MEC_R (VMITOT1*((VMITOTF)**(-1))))
*             'MASQ' 'INFERIEUR' 0.;
*      SUPTAB.'CRIT_DECHA_LOCAL1'.IABC =
*         (CHAN 'CHPO' MOD_MEC_R ((VMITOT1*((VMITOTF)**(-1)))) * MSQO);
* #MC 04/11/98 : pour le MASQ, un produit suffit (pas de risque de /0)
                MSQO = (CHAN 'CHPO' MOD_MEC_R (VMITOT1*VMITOTF))
                        'MASQ' 'INFERIEUR' 0.;
* #MC 04/11/98 : ou il y a des 0, on met 1.E-10
                SUPTAB.'CRIT_DECHA_LOCAL1'.IABC =
                        (CHAN 'CHPO' MOD_MEC_R ((VMITOT1*((
                        VMITOTF+(1.E-10*(VMITOTF 'MASQ' 'EGAL' 0.))
                        )**(-1)))) * MSQO);
*lorsque la valeur du critere est positive, c'est-a-dire qu'il n'y a
**pas de decharge, celle-ci est ramenee a zero
            FINSI;

        FINSI;


************************************************************
****** CRITERE GLOBAL 2 DE DECHARGE DES CONTRAINTES ********
************************************************************

        SI ((EGA ITYPEF 99) ET BOOL.'PASAPAS' ET (NON BOOL.'REPRI') ET OUICRIT);

            SI BOOL.'MESS';
                MESS 'CRITERE GLOBAL 2';
            FINSI;

            SI ('EXIS' SUPTAB.'SOLUTION_PASAPAS' 'DEFORMATIONS_INELASTIQUES');
                SI BOOL.'PERSO1';
                    EPPLASF = ESTIM . 'DEFORMATIONS_INELASTIQUES';
                SINON;
                    EPPLASF = SUPTAB.'SOLUTION_PASAPAS'.'DEFORMATIONS_INELASTIQUES'
                                      .IABC;
                FINSI;

                XCRIT = 1.;
                PRO1  = 0.;
                PRO2  = 0.;
                CRITLOCA = MANU 'CHML' MOD_MEC_R 'SCAL' 1. 'STRESSES';
                NUMERA   = ZERO MOD_MEC_R 'STRESSES';
                DENOMI   = ZERO MOD_MEC_R 'STRESSES';
* initialisation
* glob2 n'est pas calcule si reprise car on ne connait pas i-1

                VMISF = CHAN ('VMIS' MOD_MEC_R SIGF MAT_INST) TYPE 'SCALAIRE';
* VMISF : contrainte de Von Mises au pas courant
                SI ('EXIS' SUPTAB VMISMAX);
                    MQSIG = SUPTAB.VMISMAX MASQ 'SUPERIEUR' VMISF;
                    VMISF = VMISF + (MQSIG * ((SUPTAB.VMISMAX) - VMISF));
                FINSI;
                SUPTAB.VMISMAX = VMISF;

                REPE BCMOD0 (DIME TABMOD);
                    EXISCRIT = FAUX;
                    MODI   = TABMOD.&BCMOD0;
                    MATI   = REDU MAT_INST MODI;
                    MAILI  = EXTR MODI 'MAIL';
                    EPSEI  = REDU (EXCO VARF 'EPSE') MODI;
                    EPSEI  = EPSEI CHAN TYPE 'SCALAIRE';
*       EPPLASI = (SUPTAB.'SOLUTION_PASAPAS'.
*                'DEFORMATIONS_INELASTIQUES'.IABC) REDU MODI;
                    EPPLASI= REDU EPPLASF MODI;
                    VMISFI = REDU VMISF   MODI;
                    SIGFI  = REDU SIGF    MODI;
                    YOU = CHAN 'STRESSES' MODI (EXCO MATI 'YOUN');
                    YOU = YOU  CHAN TYPE 'SCALAIRE';
                    SI ('EXIS' MODPLA &BCMOD0);
                        SI ((EGA MODPLA.&BCMOD0 1) OU
                            (EGA MODPLA.&BCMOD0 2) OU
                            (EGA MODPLA.&BCMOD0 3));
* modele plastique isotrope
* modele plastique cinematique
* modele plastique parfait
                            lm_dein = EXTR epplasi 'COMP';
                            lm_defo = EXTR modi 'DEFO';
                            ep_u    = nomc lm_dein lm_defo epplasi;
                            ep_u    = changer ep_u type deformations;
*         PRO1    = PRO1 + (INTG MODI (ENER MODI SIGFI EPPLASI));
                            PRO1    = PRO1 + (INTG MODI (ENER MODI SIGFI ep_u));
                            PRO2    = PRO2 + (INTG MODI (VMISFI * EPSEI));
                            SI (PRO2 'NEG' 0.D0);
                                XCRIT = XCRIT + (1. - (PRO1/PRO2));
                            FINSI;
                        FINSI;
                    SINON;

                        SI (('EXIS' MATI 'ECRO') OU (EXIS MATI 'SIGY'));
* modele elastoplastique et
* modele plastique cinematique et plastique parfait
** avec caracteristiques independantes de la temperature
                            lm_dein = EXTR epplasi 'COMP';
                            lm_defo = EXTR modi 'DEFO';
                            ep_u    = NOMC lm_dein lm_defo epplasi;
                            ep_u    = ep_u changer type deformations;
*         PRO1    = PRO1 + (INTG MODI (ENER MODI  SIGFI EPPLASI));
                            PRO1    = PRO1 + (INTG MODI (ENER MODI  SIGFI ep_u));
                            PRO2    = PRO2 + (INTG MODI (VMISFI * EPSEI));
*         NUMERA  = NUMERA + (ENER MODI  SIGFI EPPLASI);
                            NUMERA  = NUMERA + (ENER MODI  SIGFI ep_u);
                            DENOMI  = DENOMI + (VMISFI * EPSEI);
*         petit traitement pour eviter de diviser par zero
                            MIN0 = MINI 'ABS' DENOMI;
                            MIN1 = MINI DENOMI;
                            MAX1 = MAXI DENOMI;
                            AMP = MAX1 - MIN1;
                            SI (AMP < 1.E-15);
                                AMP = 1.E-15;
                            FINSI;
                            SI (MIN0 < (1.E-15 * AMP));
                                DENOMI = DENOMI + (1.E-15 * AMP);
                            FINSI;
                            CRITLOCA = CRITLOCA + (1. - (NUMERA / DENOMI));
                        FINSI;
                    FINSI;
                FIN BCMOD0;

* Le maxi sert a corriger le probleme castem sur les EPSE
* (ENER MODI  SIGFI EPPLASI) n est pas toujours egal a
* (VMISFI * EPSEI) lorsque le chargement est proportionnel
* A supprimer quand le pb sera resolu
                SUPTAB.'CRIT_DECHA_GLOBAL2'  .IABC='MAXI'(prog 0.9999999999 XCRIT);
                SUPTAB.'CRIT_DECHA_GLOBAL2_L'.IABC= CRITLOCA;

* mess 'PRO1' , PRO1 , 'PRO2' , PRO2 ,  'XCRIT' , XCRIT;
            SINON;
                SI BOOL.'MESS';
                    MESS 'ATTENTION : LES DEFORMATIONS INELASTIQUES N''ONT';
                    MESS '            PAS ETE SAUVEGARDEES LORS DE PASAPAS.';
                    MESS '            LE CRITERE GLOBAL 2 NE PEUT DONC PAS';
                    MESS '            ETRE CALCULE.';
                FINSI;
            FINSI;
        FINSI;


*********************************************************
****** CRITERE LOCAL 2 DE DECHARGE DES CONTRAINTES ******
*********************************************************

        SI ((EGA ITYPEF 99) ET BOOL.'PASAPAS' ET (IABC  > 0) ET OUICRIT);
            SI BOOL.'MESS' ;   MESS 'CRITERE local 2' ; FINSI;

*initialisation
            EXISCRIT = FAUX;
            CRIT0 = 'ZERO' MOD_MEC_R STRESSES;

            REPE BCMOD0 (DIME TABMOD);
                MODI = TABMOD.&BCMOD0;
                MATI = REDU MAT_INST MODI;
                EPSE1 = EXCO VARF 'EPSE';
                EPSE1 = EPSE1 CHAN TYPE 'SCALAIRE';
                EPSET = REDU EPSE1 MODI;

                SI (('EXIS' MODPLA &BCMOD0) OU ('EXIS' MATI 'ECRO')
                    OU ('EXIS' MATI 'SIGY'));

                    MAT_z = 'MANU' 'CHML' MODI 'YOUN' 1. 'NU' 0. 'EPAI' 1.
                                  TYPE 'CARACTERISTIQUES' 'RIGIDITE';
                    EXISCRIT = VRAI;
                    DSIG = ELAS MODI (SIGF - SIG11) MAT_z;
                    INV1 = ENER MODI (REDU SIGF MODI) (REDU DSIG MODI);
                    SIGFTRA = ENER MODI (REDU SIGF MODI)
                               (REDU (ELAS MODI SIGF MAT_z) MODI);
                    DSIGTRA = ENER MODI (REDU DSIG MODI)
                               (ELAS MODI DSIG MAT_z);
                    NOR1 = SIGFTRA**(1./2);
                    DNOR = DSIGTRA**(1./2);
                    DENO = NOR1 * DNOR;
                    CRIT0 = CRIT0 + (INV1 * (DENO**(-1)));

                FINSI;

            FIN BCMOD0;

            SI EXISCRIT;
                SUPTAB.'CRIT_DECHA_LOCAL2'.IABC = CHAN 'CHPO' MOD_MEC_R CRIT0;
            FINSI;


        FINSI;


*|=====================================================================|
*|=======  III. TRAITEMENT DES CHAMPS MECANIQUES   ====================|

****************************************************
* ON CHANGE LA TEMPERATURE EN MCHAML AU NOEUD =TEPINT
****************************************************
        SI (EGA (TYPE TEPINT) 'CHPOINT ');
            TEPINT = REDU TEPINT ELTETA;
            TEPINT = CHAN 'CHAM' TEPINT MOD_MEC_R 'NOEUD' 'TEMPERATURES';
        SINON;
            SI (EGA (TYPE TEPINT) 'MCHAML  ');
                TEPINT = REDU TEPINT MOD_MEC_R;
                TEPINT = CHAN 'NOEUD' MOD_MEC_R TEPINT;
            FINSI;
        FINSI;
        SI (BOOL.'THER' ET (NON BOOL.'COQ'));
            EPT1 = EPTH MOD_MEC_R MAT_INST TEPINT;
            EPT1 VAR2 VAR3 = INVA MOD_MEC_R EPT1;
            EPT1 = CHAN 'CHAM' (EPT1/3.) MOD_MEC_R 'NOEUD';
            EPT1 = EPT1 - OBJUTI.'EPTREF';
        FINSI;

***************************************************
***** GRADIENT DU DEPLACEMENT DEPINT =GRADEP ******
***************************************************
        GRADEP = GRAD MOD_MEC_R MAT_INST DEPINT;
        GRADEF = TEXT '        ';
        SI (BOOL.'COQ' ET BOOL.'EL_LIN');
            GRADEF = 'GRAF' MOD_MEC_R MAT_INST DEPINT;
        FINSI;

***************************************************
***** CAS DU CONTACT FROTTANT : ON CALCULE WSAUTGR = GRADIENT DU SAUT ******
***************************************************
        SI BOOL.'FROT';
* WDEP = deplacement de la fissure de composante UX ... AX ...
* [grad(w)] = grad [w] car linearite (le saut [w] est donne par AX ...)
* on utilise un modele liee a la geo de la fissure (cohesif ou contact)
            WSAUTGR = GRAD OBJCON WDEP;
* SIGCON = sigma*n de composantes SMX... homogene a une contrainte
* supporte sur la levre superieure
            SI (NEG (TYPE SIGCON) 'MCHAML  ');
                SIGCON = REDU SIGCON (extr OBJCON2 'MAILLAGE');
                SIGCON = CHAN 'CHAM' SIGCON OBJCON2 'STRESSES' 'CONTRAINTES';
            FINSI;
*   Vsigcon = 'VECTEUR' sigcon objcon (1E-8) ('MOTS' 'SMX' 'SMY' 'SMZ');
*    'TRACER' vsigcon ('EXTRAIRE' objcon 'MAIL');
            SIGXN = (CHAN (exco SIGCON 'SMX' 'SCAL') TYPE 'SCALAIRE');
            SIGYN = (CHAN (exco SIGCON 'SMY' 'SCAL') TYPE 'SCALAIRE');
            SI (EGA GDIME 3);
                SIGZN = (CHAN (exco SIGCON 'SMZ' 'SCAL') TYPE 'SCALAIRE');
            FINSI;
        FINSI;

***************************************************
***** GRADIENT DE LA VITESSE VITF   =GRAVIT  ******
***************************************************
        SI  BOOL.'J_DYNA';
            GRAVIT = GRAD MOD_MEC_R MAT_INST VITF;
            VITF = CHAN 'CHAM'  MOD_MEC_R VITF 'STRESSES';
            ACCF = CHAN 'CHAM'  MOD_MEC_R ACCF 'STRESSES';
        FINSI;

***************************************************
** GRADIENT TEMPERATURE Grad T pour tous elements =TEPEGR
** et Grad Grad T pour les elements massifs seuls (si DJ/DA) =DEPDTGR
***************************************************
        SI BOOL.'THER';
            SI (NON BOOL.'COQ');
                TEPEGR = GRAD MOD_MEC_R MAT_INST (((EXCO 'T' TEPINT MU1)
                                CHAN TYPE 'SCALAIRE') + CMD000);
                GR_EPTH = GRAD MOD_MEC_R MAT_INST ((NOMC MU1 EPT1) + CMD000);
                SI  BOOL.'DJ/DA';
                    DEPDT = ((EXCO GR1 TEPEGR MU1) + (EXCO GR2 TEPEGR MU2))
                    CHAN TYPE 'SCALAIRE';
                    SI (GDIME EGA 3);
                        DEPDT=DEPDT + ((EXCO GR3 TEPEGR MU3) CHAN TYPE 'SCALAIRE');
                    FINSI;
                    DEPDTGR = GRAD MOD_MEC_R MAT_INST (CHAN TYPE
                                (CHAN 'NOEUD' MOD_MEC_R DEPDT) 'DEPLACEMENTS');
*           DEPDTGR = GRAD MOD_MEC_R MAT_INST (CHAN 'CHPO' MOD_MEC_R DEPDT);
                FINSI;
            SINON;
                TEPEGR = GRAD MOD_MEC_R MAT_INST ((((EXCO 'TINF' TEPINT MU1)
                            CHAN TYPE 'SCALAIRE') ET
                            ((EXCO 'T   ' TEPINT MU2)CHAN TYPE 'SCALAIRE') ET
                            ((EXCO 'TSUP' TEPINT MU3)CHAN TYPE 'SCALAIRE'))
                            + CMD000);
            FINSI;
        FINSI;

***************************************************
**GRADIENT DE PRESSIONS Grad P (si DJ/DA) =PRESGR
***************************************************
        SI  BOOL.'DJ/DA';
            SI ('>' (XTX PREINT) 1.E-10);
                M1 = EXTR MOD_MEC_R 'FORC';
                M2 = EXTR MOD_MEC_R 'DEPL';
                REPE B1 (DIME M1);
                    F1 = DEP000 + (EXCO (EXTR M1 &B1) PREINT (EXTR M2 &B1));
                FIN B1;
                PRESGR = GRAD MOD_MEC_R MAT_INST F1;
            FINSI;
        FINSI;

***************************************************
* PROFIL DE L'ENERGIE DANS L'EPAISSEUR DE LA COQUE
***************************************************
        SI BOOL.'COQ';
            PEX1 = PROG ; PEN1 = PROG;
            REPE NBJ7 (DIME OBJUTI.'MODCOU');
                MCOU1 = OBJUTI.'MODCOU'.&NBJ7;
                EX1 = EXTR (REDU MCOU1 MAT_INST) 'EXCE' 1 1 1;
                E1 = EXTR (REDU MCOU1 MAT_INST) 'EPAI' 1 1 1;
                SI ('<' (E1 / EPAITO) 1.E-4);
                    ENR1 = EXTR (REDU MCOU1 ENERM) 'SCAL' 1 1 1;
                    PEX1 = PEX1 ET ('PROG' EX1);
                    PEN1 = PEN1 ET ('PROG' ENR1);
                FINSI;
            FIN NBJ7;
            M1 = MOT ' DANS L EPAISSEUR DE LA COQUE A T =';
            TITR ('CHAI' 'INTEGRALE ' CHINT M1 INST);
            EVENR = 'EVOL' 'MANU' 'COOR.Z LOCAL' PEX1 CHINT PEN1;
            SOM1 = ('INTG' EVENR);
            SI (EGA SOM1 0.);
                SOM1 = SOM1 + 1.E-10;
            FINSI;
            EVENR = EVENR * EPAITO / SOM1;
            NN = DIME (EXTR EVENR 'ORDO' 1);
            V_SUPE = EXTR NN (EXTR EVENR 'ORDO' 1);
            V_MOYE = EXTR ((NN - 1) / 2) (EXTR EVENR 'ORDO' 1);
            V_INFE = EXTR 1 (EXTR EVENR 'ORDO' 1);
        FINSI;

****************************************************
*  RECUPERATION DU NOMBRE DE CALCULS A FAIRE
****************************************************
        TTHETA = SUPTAB.'TAB_THETA';
        INDTH = INDE TTHETA;
        NBOU = DIME TTHETA;
        SI  BOOL.'DJ/DA';
            TPI = SUPTAB.'TAB_PI';
            INDPI = INDE TPI;
        FINSI;

********************************************************
* DENSITE DE MATERIAU EN CAS DE CALCUL DE J DYNAMIQUE **
********************************************************
        SI  BOOL.'J_DYNA';
            RHO1 = REDU (EXCO MAT_INST 'RHO' 'SCAL') MOD_MEC_R;
            RHO1 = (CHAN MOD_MEC_R 'STRESSES' RHO1) CHAN TYPE 'SCALAIRE';
        FINSI;


*|=====================================================================|
*|======= BOUCLE SUR LES NOEUDS A AVANCER VIRTUELLEMENT =============>
        GCHAM1 = VIDE 'MCHAML';
        GCHPO1 = VIDE 'CHPOINT'/'DISCRET';

        REPE BCNOEU NBOU;
**************************************************
* RECUP DU CHAMP THETA ASSOCIE AU NOEUD PM DE NUMERO NUNOE
* ET DU CHAMP PI (SI DJ/DA)
**************************************************

            IND0 = INDTH.&BCNOEU;
            CHTHETA = TTHETA.IND0 + DEP000;
            SI  BOOL.'DJ/DA';
                CHPI = TPI.(INDPI.&BCNOEU);
            FINSI;


**************************************************
* GRADIENT, DIVERGENCE DU CHAMP THETA =TETAGR, DIVTETA
* CHAMELEM THETA =(TETX,TETY,TETZ)
**************************************************
            TETAGR = SUPTAB.'GRTHETA'.IND0;
            DIVTETA = SUPTAB.'DIVTHETA'.IND0;
* btrolle 2013 : ajout de TETAX, TETAY et TETAZ
            TETAX= CHAN 'CHAM' MOD_MEC_R (EXCO MU1 CHTHETA 'SCAL') 'SCALAIRE';
            TETAY= CHAN 'CHAM' MOD_MEC_R (EXCO MU2 CHTHETA 'SCAL') 'SCALAIRE';
            TETX = CHAN 'CHAM' MOD_MEC_R (EXCO MU1 CHTHETA 'SCAL') 'STRESSES';
            TETY = CHAN 'CHAM' MOD_MEC_R (EXCO MU2 CHTHETA 'SCAL') 'STRESSES';
            TETX = TETX CHAN TYPE'SCALAIRE';
            TETY = TETY CHAN TYPE'SCALAIRE';
            THET_GR = ZERO MOD_MEC_R 'GRADIENT';
            THET_GR = THET_GR + (NOMC GR1 TETX) + (NOMC GR2 TETY);
            SI (GDIME EGA 3);
                TETAZ= CHAN 'CHAM' MOD_MEC_R (EXCO MU3 CHTHETA 'SCAL') 'SCALAIRE';
                TETZ = CHAN 'CHAM' MOD_MEC_R (EXCO MU3 CHTHETA 'SCAL') 'STRESSES';
                TETZ = TETZ CHAN TYPE'SCALAIRE';
                THET_GR = THET_GR + (NOMC GR3 TETZ);
            FINSI;


**************************************************
* GRADIENT, DIVERGENCE DU CHAMP PI =PIGR, DIVPI
* CHAMELEM PI =(PIX,PIY,PIZ)
* ...
**************************************************
            SI  BOOL.'DJ/DA';
                NORM1 = ((EXCO MU1 CHPI 'SCAL')**2) + ((EXCO MU2 CHPI 'SCAL')**2);
                SI (EGA GDIME 3);
                    NORM1 = NORM1 + ((EXCO MU3 CHPI 'SCAL')**2);
                FINSI;
                CHPI = CHPI + DEP000;
                CHPI = CHPI / ('MAXI' (NORM1**0.5));
                PIGR = GRAD MOD_MEC_R MAT_INST CHPI;
                DIVPI = (EXCO GR1 PIGR 'SCAL') +
                         (EXCO GR5 PIGR 'SCAL') +
                         (EXCO GR9 PIGR 'SCAL');
                DIVPI = DIVPI CHAN TYPE 'SCALAIRE';
                PITAGR = (MOD_MEC_R PIGR * TETAGR);
                DIVPITA = (EXCO GR1 PITAGR 'SCAL') +
                            (EXCO GR5 PITAGR 'SCAL') +
                            (EXCO GR9 PITAGR 'SCAL');
                DIVPITA = DIVPITA CHAN TYPE 'SCALAIRE';
                ADJ = (DIVPITA - (DIVPI * DIVTETA));
                PIX = CHAN 'CHAM' MOD_MEC_R (EXCO MU1 CHPI 'SCAL') 'STRESSES';
                PIY = CHAN 'CHAM' MOD_MEC_R (EXCO MU2 CHPI 'SCAL') 'STRESSES';
                PIX= PIX CHAN TYPE'SCALAIRE';
                PIY= PIY CHAN TYPE'SCALAIRE';
                SI (GDIME EGA 3);
                    PIZ = CHAN 'CHAM' MOD_MEC_R (EXCO MU3 CHPI 'SCAL') 'STRESSES';
                    PIZ= PIZ CHAN TYPE'SCALAIRE';
                FINSI;
            FINSI;

********************************************************
*********** SI LE MATERIAU N'EST PAS CONSTANT **********
* YOU1 = YOUGR * THETA = (grad E) * THETA
* SIGPRIM = (grad D)*THETA*(EPSI elas)   ou grad D =D(grad E,nu) =DMAT
* ALF1 = ALFGR*THETA = (grad Alpha)*THETA
* DMAT = D(1,nu,ALF1)
********************************************************
            SI BOOL.'GRADPROP';
*** Le coefficient de Poisson est constant ***
*    NU1 = REDU (EXCO MAT_INST 'NU' 'SCAL') MOD_MEC_R;
*    NU1 = EXCO NU1 'SCAL' 'NU';
                NU1 = REDU (EXCO MAT_INST 'NU') MOD_MEC_R;
                NU1 = NU1 CHAN TYPE 'SCALAIRE';
****** Gradient de Module d'young ******
                SI BOOL.'GRADYOUN';
                    YOU1 = REDU (EXCO MAT_INST 'YOUN' 'SCAL') MOD_MEC_R;
                    YOU1 = YOU1   CHAN TYPE 'SCALAIRE';
                    YOUGR = GRA000 ; I = 0;
                    REPE NBJ2 (DIME TABMOD);
                        I = I + 1;
                        YO1 = CHAN 'STRESSES' TABMOD.I
                                (REDU ((EXCO MAT_INST 'YOUN' MU1)
                                CHAN TYPE 'SCALAIRE') TABMOD.I);
                        YOUGR = YOUGR + (GRAD TABMOD.I MAT_INST (YO1 +
                                (REDU CMD001 TABMOD.I)));
*       YO1 = CHAN 'CHPO' TABMOD.I
*            (REDU (EXCO MAT_INST 'YOUN' 'SCAL') TABMOD.I);
*       YOUGR = YOUGR + (GRAD TABMOD.I MAT_INST ((NOMC MU1 YO1)
*               + (REDU DEP000 (EXTR YO1 'MAIL'))));
                    FIN NBJ2;
                    YOU1 = (((EXCO GR1 YOUGR 'SCAL') CHAN TYPE 'SCALAIRE') *
                            MOD_MEC_R TETX) +
                            (((EXCO GR2 YOUGR 'SCAL') CHAN TYPE 'SCALAIRE') *
                            MOD_MEC_R TETY);
                    SI (GDIME EGA 3);
                        YOU1 = YOU1 + (((EXCO GR3 YOUGR 'SCAL')
                        CHAN TYPE 'SCALAIRE') * MOD_MEC_R TETZ);
                    FINSI;
                    YOU1 = (EXCO YOU1 'SCAL' 'YOUN') CHAN TYPE 'SCALAIRE';
                    DMAT = 'MATE' MOD_MEC_R 'YOUN' YOU1 'NU' NU1;
                    SIGPRIM = (HOOK MOD_MEC_R DMAT)*MOD_MEC_R
                                (ELAS MOD_MEC_R SIGF MAT_INST);
                FINSI;
****** Gradient de Coefficient de Dilatation ******
                SI (BOOL.'THER' ET BOOL.'GRADALPH');
                    ALF1 = REDU (EXCO MAT_INST 'ALPH' 'SCAL') MOD_MEC_R;
                    ALF1 = ALF1 CHAN TYPE 'SCALAIRE';
                    ALFGR = GRA000 ; I = 0;
                    REPE NBJ3 (DIME TABMOD);
                        I = I + 1;
                        AL1 = CHAN 'STRESSES' TABMOD.I
                                (REDU (EXCO MAT_INST 'ALPH' MU1) TABMOD.I);
                        AL1 = AL1 CHAN TYPE 'SCALAIRE';
                        ALFGR = ALFGR + (GRAD TABMOD.I MAT_INST (AL1 +
                                (REDU CMD001 TABMOD.I)));
*!       AL1 = CHAN 'CHPO' TABMOD.I
*!             (REDU (EXCO MAT_INST 'ALPH' 'SCAL') TABMOD.I);
*!       ALFGR = ALFGR + (GRAD TABMOD.I MAT_INST ((NOMC MU1 AL1)
*!               + (REDU DEP000 (EXTR AL1 'MAIL'))));
                    FIN NBJ3;
                    ALF1 = (((EXCO GR1 ALFGR 'SCAL') CHAN TYPE 'SCALAIRE') *
                            MOD_MEC_R TETX) +
                            (((EXCO GR2 ALFGR 'SCAL') CHAN TYPE 'SCALAIRE') *
                            MOD_MEC_R TETY);

                    SI (GDIME EGA 3);
                        ALF1 = ALF1 + (((EXCO GR3 ALFGR 'SCAL') CHAN TYPE 'SCALAIRE') *
                                MOD_MEC_R TETZ);
                    FINSI;
                    ALF1 = EXCO ALF1 'SCAL' 'ALPH';
                    ALF1 = ALF1 CHAN TYPE 'SCALAIRE';
                    DMAT = 'MATE' MOD_MEC_R 'YOUN' 1. 'NU' NU1 'ALPH' ALF1;
                FINSI;
            FINSI;

***********************************************
* TEMU  = (Grad T)*THETA
* TEMU1 = (Grad T)*PI
* TEMU2 = (Grad (Grad T))*PI*THETA
* EPSTU = D^-1 sigma^th
*         avec sigma^th = (-3lambda-2mu)*alpha*(grad T)*THETA*I
* GR_EPTH_THET = (grad epsilon_th)*THETA
***********************************************
            SI BOOL.'THER';
                SI (NON BOOL.'COQ');
                    TEMU = PSCA TEPEGR THET_GR MGI MGI;
                    TEMU = CHAN TYPE (EXCO 'SCAL' TEMU 'T') 'TEMPERATURES';
                    GR_EPTH_THET = PSCA GR_EPTH THET_GR MGI MGI;
                    GR_EPTH_THET = NOMC 'T' GR_EPTH_THET;
                    GR_EPTH_THET = CHAN 'TYPE' GR_EPTH_THET 'TEMPERATURES';
                    MAT0 = MATE MOD_MEC_R 'YOUN' 1. 'NU' 0. 'ALPH' 1.
                            'TALP' 0. 'TREF' 0.;
                    GR_EPTH_THET = EPTH MOD_MEC_R MAT0 GR_EPTH_THET;
                SINON;
                    T1 = (((EXCO GR1 TEPEGR 'SCAL')CHAN TYPE 'SCALAIRE') *
                            MOD_MEC_R TETX) +
                            (((EXCO GR2 TEPEGR 'SCAL')CHAN TYPE 'SCALAIRE') *
                            MOD_MEC_R TETY) +
                            (((EXCO GR3 TEPEGR 'SCAL')CHAN TYPE 'SCALAIRE') *
                            MOD_MEC_R TETZ);
                    T2 = (((EXCO GR4 TEPEGR 'SCAL')CHAN TYPE 'SCALAIRE') *
                            MOD_MEC_R TETX) +
                            (((EXCO GR5 TEPEGR 'SCAL')CHAN TYPE 'SCALAIRE') *
                            MOD_MEC_R TETY) +
                            (((EXCO GR6 TEPEGR 'SCAL')CHAN TYPE 'SCALAIRE') *
                            MOD_MEC_R TETZ);
                    T3 = (((EXCO GR7 TEPEGR 'SCAL')CHAN TYPE 'SCALAIRE') *
                            MOD_MEC_R TETX) +
                            (((EXCO GR8 TEPEGR 'SCAL')CHAN TYPE 'SCALAIRE') *
                            MOD_MEC_R TETY) +
                            (((EXCO GR9 TEPEGR 'SCAL')CHAN TYPE 'SCALAIRE') *
                            MOD_MEC_R TETZ);
                    TEMU = CHAN TYPE ((EXCO 'SCAL' T1 'TINF') ET
                            (EXCO 'SCAL' T2 'T   ') ET
                            (EXCO 'SCAL' T3 'TSUP')) 'TEMPERATURES';
                FINSI;
                EPSTU = ELAS MOD_MEC_R (THET MOD_MEC_R MAT_INST TEMU) MAT_INST;
                SI  BOOL.'DJ/DA';
                    TEMU1 = (((EXCO GR1 TEPEGR 'SCAL') CHAN TYPE 'SCALAIRE') *
                                MOD_MEC_R PIX) + (((EXCO GR2 TEPEGR 'SCAL')
                                CHAN TYPE 'SCALAIRE') * MOD_MEC_R PIY);
                    SI (GDIME EGA 3);
                        TEMU1 = TEMU1 + (((EXCO GR3 TEPEGR 'SCAL')
                                    CHAN TYPE 'SCALAIRE') * MOD_MEC_R PIZ);
                    FINSI;
                    SI BOOL.'COQ';
                        TEMU1 = CHAN TYPE ((EXCO 'SCAL' TEMU1 'T') ET
                                (EXCO 'SCAL' TEMU1 'TINF') ET
                                (EXCO 'SCAL' TEMU1 'TSUP')) 'TEMPERATURES';
                    SINON;
                        TEMU1 = CHAN TYPE (EXCO 'SCAL' TEMU1 'T')
                                'TEMPERATURES';
                    FINSI;
                    EPSTU1 = ELAS MOD_MEC_R (THET MOD_MEC_R MAT_INST TEMU1)
                                MAT_INST;
                    TXXPIX = ((EXCO GR1 DEPDTGR 'SCAL')CHAN TYPE 'SCALAIRE') *
                                MOD_MEC_R PIX;
                    TYXPIY = ((EXCO GR2 DEPDTGR 'SCAL')CHAN TYPE 'SCALAIRE') *
                                MOD_MEC_R PIY;
                    TXYPIX = ((EXCO GR4 DEPDTGR 'SCAL')CHAN TYPE 'SCALAIRE') *
                                MOD_MEC_R PIX;
                    TYYPIY = ((EXCO GR5 DEPDTGR 'SCAL')CHAN TYPE 'SCALAIRE') *
                                MOD_MEC_R PIY;
                    TEMU2 = (TETX*MOD_MEC_R (TXXPIX + TYXPIY)) +
                                (TETY*MOD_MEC_R (TXYPIX + TYYPIY));
                    SI (GDIME EGA 3);
                        TEMU1 = TEMU1 + (((EXCO GR3 TEPEGR 'SCAL')
                                    CHAN TYPE 'SCALAIRE') * MOD_MEC_R PIZ);
                        TZXPIZ = ((EXCO GR3 DEPDTGR 'SCAL')
                                    CHAN TYPE 'SCALAIRE') * MOD_MEC_R PIZ;
                        TZYPIZ = ((EXCO GR6 DEPDTGR 'SCAL')
                                    CHAN TYPE 'SCALAIRE') * MOD_MEC_R PIZ;
                        TXZPIX = ((EXCO GR7 DEPDTGR 'SCAL')
                                    CHAN TYPE 'SCALAIRE') * MOD_MEC_R PIX;
                        TYZPIY = ((EXCO GR8 DEPDTGR 'SCAL')
                                    CHAN TYPE 'SCALAIRE') * MOD_MEC_R PIY;
                        TZZPIY = ((EXCO GR9 DEPDTGR 'SCAL')
                                    CHAN TYPE 'SCALAIRE') * MOD_MEC_R PIZ;
                        TEMU2 = (TETX*MOD_MEC_R (TXXPIX + TYXPIY + TZXPIZ)) +
                                (TETY*MOD_MEC_R (TXYPIX + TYYPIY + TZYPIZ)) +
                                (TETZ*MOD_MEC_R (TXZPIX + TYZPIY + TZZPIZ));
                    FINSI;
                    SI BOOL.'COQ';
                        TEMU2 = CHAN TYPE ((EXCO 'SCAL' TEMU2 'T') ET
                                    (EXCO 'SCAL' TEMU2 'TINF') ET
                                    (EXCO 'SCAL' TEMU2 'TSUP')) 'TEMPERATURES';
                    SINON;
                        TEMU2 = CHAN TYPE (EXCO 'SCAL' TEMU2 'T') 'TEMPERATURES';
                    FINSI;
                    EPSTU2 = ELAS MOD_MEC_R (THET MOD_MEC_R MAT_INST TEMU2) MAT_INST;
                FINSI;
            FINSI;

* modif sm
***********************************************
* CUMDEFI = SIG_{IJ} * (deps_{ij} / dx_{,k}) * thet_{k}
***********************************************
            CUMDEFI = ZERO MOD_MEC_R 'STRESSES';
            SI (BOOL.'DEF_IMP' ET (NON BOOL.'COQ'));
                LMOEP = EXTR MOD_MEC_R 'DEFO';
                LMOSI = EXTR MOD_MEC_R 'CONT';
                LMOGR = EXTR MOD_MEC_R 'GRAD';
                NIDEF = DIME LMOSI;
                REPETER BDEFI NIDEF;
                    MOEP = EXTR LMOEP &BDEFI;
                    MOSI = EXTR LMOSI &BDEFI;
                    EIJ  = EXCO DEFI MOEP  MU1;
                    SMIJ = EXCO SIGF   MOSI 'SCAL';
                    GREIJ = GRAD MOD_MEC_R MAT_INST
                                ((CHAN (CHAN 'NOEUD' MOD_MEC_R EIJ)
                                'TYPE' 'SCALAIRE') + CMD000);
                    DEIJX = (CHAN (CHAN 'STRESSES' MOD_MEC_R
                                (EXCO GREIJ (EXTR LMOGR 1) 'SCAL'))
                                TYPE 'SCALAIRE') *
                                (CHAN SMIJ TYPE 'SCALAIRE') * TETX;
                    DEIJY = (CHAN (CHAN 'STRESSES' MOD_MEC_R
                                (EXCO GREIJ (EXTR LMOGR 2) 'SCAL'))
                                TYPE 'SCALAIRE') *
                                (CHAN SMIJ TYPE 'SCALAIRE') * TETY;
                    CUMDEFI = CUMDEFI + DEIJX + DEIJY;
                    SI (GDIME EGA 3);
                        DEIJZ = (CHAN (CHAN 'STRESSES' MOD_MEC_R
                                    (EXCO GREIJ (EXTR LMOGR 3) 'SCAL'))
                                    TYPE 'SCALAIRE') *
                                    (CHAN SMIJ TYPE 'SCALAIRE') * TETZ;
                        CUMDEFI = CUMDEFI + DEIJZ;
                    FINSI;
                FIN BDEFI;
            FINSI;

***********************************************
* PEMU1 = (Grad P)*TETA
* PEMU2 = (Grad P)*(Grad PI)*TETA
***********************************************
            SI  BOOL.'DJ/DA';
                SI ((XTX PREINT) > 1.E-10);
* NOUVELLE IMPLEMENTATION JB :
*                   PEMU = VIDE 'CHPOINT'/'DISCRET';
*                   REPE ICOMP GDIME;
*                           IDEB = 1 + (3*(&ICOMP - 1));
*                           IFIN = IDEB + GDIME - 1;
*                       LMO1 = EXTR MGI (LECT IDEB PAS 1 IFIN);
*                       LMO2 = EXTR MUI (LECT 1 PAS GDIME);
*                       FI = PSCA PRESGR PI LMO1 LMO2;
*                       FI = NOMC (EXTR MUI &ICOMP) FI;
*                       PEMU = PEMU + (CHAN 'CHPO' MOD_MEC_R FI);
*                   FIN ICOMP;
* CETTE SECTION N'EST PAS TESTEE ACTUELLEMENT DANS LA BASE DE CAS-TESTS
* IL FAUT DONC AJOUTER UN CAS-TEST AVANT DE POUVOIR REMPLACER CE QUI SUIT
* PAR LES LIGNES COMMENTEES CI-DESSUS
                    F1 = (((EXCO GR1 PRESGR 'SCAL') CHAN TYPE 'SCALAIRE') *
                            MOD_MEC_R PIX) +
                            (((EXCO GR2 PRESGR 'SCAL') CHAN TYPE 'SCALAIRE') *
                            MOD_MEC_R PIY);
                    F2 = (((EXCO GR4 PRESGR 'SCAL') CHAN TYPE 'SCALAIRE') *
                            MOD_MEC_R PIX) +
                            (((EXCO GR5 PRESGR 'SCAL') CHAN TYPE 'SCALAIRE') *
                            MOD_MEC_R PIY);
                    PEMU = CHAN 'CHPO' MOD_MEC_R ((EXCO 'SCAL' F1 MF1) ET
                            (EXCO 'SCAL' F2 MF2));
                    SI (EGA GDIME 3);
                        F1 = F1 +
                            (((EXCO GR3 PRESGR 'SCAL') CHAN TYPE 'SCALAIRE') *
                            MOD_MEC_R PIZ);
                        F2 = F2 +
                            (((EXCO GR6 PRESGR 'SCAL') CHAN TYPE 'SCALAIRE') *
                            MOD_MEC_R PIZ);
                        F3 = (((EXCO GR7 PRESGR 'SCAL') CHAN TYPE 'SCALAIRE') *
                            MOD_MEC_R PIX) +
                            (((EXCO GR8 PRESGR 'SCAL') CHAN TYPE 'SCALAIRE') *
                            MOD_MEC_R PIY) +
                            (((EXCO GR9 PRESGR 'SCAL') CHAN TYPE 'SCALAIRE') *
                            MOD_MEC_R PIZ);
                        PEMU = CHAN 'CHPO' MOD_MEC_R ((EXCO 'SCAL' F1 MF1) ET
                                (EXCO 'SCAL' F2 MF2) ET (EXCO 'SCAL' F3 MF3));
                    FINSI;
                    F1 = (((EXCO GR1 PRESGR 'SCAL') CHAN TYPE 'SCALAIRE') *
                            MOD_MEC_R TETX) +
                            (((EXCO GR2 PRESGR 'SCAL') CHAN TYPE 'SCALAIRE') *
                            MOD_MEC_R TETY);
                    F2 = (((EXCO GR4 PRESGR 'SCAL') CHAN TYPE 'SCALAIRE') *
                            MOD_MEC_R TETX) +
                            (((EXCO GR5 PRESGR 'SCAL') CHAN TYPE 'SCALAIRE') *
                            MOD_MEC_R TETY);
                    PEMU1 = CHAN 'CHPO' MOD_MEC_R ((EXCO 'SCAL' F1 MF1) ET
                            (EXCO 'SCAL' F2 MF2));
                    SI (EGA GDIME 3);
                        F1 = F1 +
                            (((EXCO GR3 PRESGR 'SCAL') CHAN TYPE 'SCALAIRE') *
                            MOD_MEC_R TETZ);
                        F2 = F2 +
                            (((EXCO GR6 PRESGR 'SCAL') CHAN TYPE 'SCALAIRE') *
                            MOD_MEC_R TETZ);
                        F3 = (((EXCO GR7 PRESGR 'SCAL') CHAN TYPE 'SCALAIRE') *
                            MOD_MEC_R TETX) +
                            (((EXCO GR8 PRESGR 'SCAL') CHAN TYPE 'SCALAIRE') *
                            MOD_MEC_R TETY) +
                            (((EXCO GR9 PRESGR 'SCAL') CHAN TYPE 'SCALAIRE') *
                            MOD_MEC_R TETZ);
                        PEMU1 = CHAN 'CHPO' MOD_MEC_R ((EXCO 'SCAL' F1 MF1) ET
                                (EXCO 'SCAL' F2 MF2) ET (EXCO 'SCAL' F3 MF3));
                    FINSI;
                    F1 = (((EXCO GR1 PIGR 'SCAL') CHAN TYPE 'SCALAIRE') *
                            MOD_MEC_R TETX) +
                            (((EXCO GR2 PIGR 'SCAL') CHAN TYPE 'SCALAIRE') *
                            MOD_MEC_R TETY);
                    F2 = (((EXCO GR4 PIGR 'SCAL') CHAN TYPE 'SCALAIRE') *
                            MOD_MEC_R TETX) +
                            (((EXCO GR5 PIGR 'SCAL') CHAN TYPE 'SCALAIRE') *
                            MOD_MEC_R TETY);
                    SI (EGA GDIME 3);
                        F1 = F1 +
                            (((EXCO GR3 PIGR 'SCAL') CHAN TYPE 'SCALAIRE') *
                            MOD_MEC_R TETZ);
                        F2 = F2 +
                            (((EXCO GR6 PIGR 'SCAL') CHAN TYPE 'SCALAIRE') *
                            MOD_MEC_R TETZ);
                        F3 = (((EXCO GR7 PIGR 'SCAL') CHAN TYPE 'SCALAIRE') *
                            MOD_MEC_R TETX) +
                            (((EXCO GR8 PIGR 'SCAL') CHAN TYPE 'SCALAIRE') *
                            MOD_MEC_R TETY) +
                            (((EXCO GR9 PIGR 'SCAL') CHAN TYPE 'SCALAIRE') *
                            MOD_MEC_R TETZ);
                    FINSI;
                    F4 = (((EXCO GR1 PRESGR 'SCAL') CHAN TYPE 'SCALAIRE') *
                            MOD_MEC_R F1) +
                            (((EXCO GR2 PRESGR 'SCAL') CHAN TYPE 'SCALAIRE') *
                            MOD_MEC_R F2);
                    F5 = (((EXCO GR4 PRESGR 'SCAL') CHAN TYPE 'SCALAIRE') *
                            MOD_MEC_R F1) +
                            (((EXCO GR5 PRESGR 'SCAL') CHAN TYPE 'SCALAIRE') *
                            MOD_MEC_R F2);
                    PEMU2 = CHAN 'CHPO' MOD_MEC_R ((EXCO 'SCAL' F4 MF1) ET
                            (EXCO 'SCAL' F5 MF2));
                    SI (EGA GDIME 3);
                        F4 = F4 +
                            (((EXCO GR3 PRESGR 'SCAL') CHAN TYPE 'SCALAIRE') *
                            MOD_MEC_R F3);
                        F5 = F5 +
                            (((EXCO GR6 PRESGR 'SCAL') CHAN TYPE 'SCALAIRE') *
                            MOD_MEC_R F3);
                        F6 = (((EXCO GR7 PRESGR 'SCAL') CHAN TYPE 'SCALAIRE') *
                            MOD_MEC_R F1) +
                            (((EXCO GR8 PRESGR 'SCAL') CHAN TYPE 'SCALAIRE') *
                            MOD_MEC_R F2) +
                            (((EXCO GR9 PRESGR 'SCAL') CHAN TYPE 'SCALAIRE') *
                            MOD_MEC_R F3);
                        PEMU2 = CHAN 'CHPO' MOD_MEC_R ((EXCO 'SCAL' F4 MF1) ET
                                (EXCO 'SCAL' F5 MF2) ET (EXCO 'SCAL' F6 MF3));
                    FINSI;
                FINSI;
            FINSI;

***********************************************
* DANS LE CAS DE CALCUL DE DJ/DA
* U^aux=A_DEPI  et  SIGMA^aux=A_SIGF
***********************************************
            SI  BOOL.'DJ/DA';
                GRAD11 = (MOD_MEC_R GRADEP * PIGR);
                EPXX1 = (EXCO GR1 GRAD11 'SCAL') CHAN TYPE 'SCALAIRE';
                EPYY1 = (EXCO GR5 GRAD11 'SCAL') CHAN TYPE 'SCALAIRE';
                EPZZ1 = (EXCO GR9 GRAD11 'SCAL') CHAN TYPE 'SCALAIRE';
                GAXY1 = ((EXCO GR2 GRAD11 'SCAL') + (EXCO GR4 GRAD11 'SCAL'))
                            CHAN TYPE 'SCALAIRE';
                GAXZ1 = ((EXCO GR3 GRAD11 'SCAL') + (EXCO GR7 GRAD11 'SCAL'))
                            CHAN TYPE 'SCALAIRE';
                GAYZ1 = ((EXCO GR6 GRAD11 'SCAL') + (EXCO GR8 GRAD11 'SCAL'))
                            CHAN TYPE 'SCALAIRE';
                SI (GDIME EGA 3);
                    EPSIA1 = MANU 'CHML' MOD_MEC_R EP1 EPXX1 EP2
                                EPYY1 EP3 EPZZ1 EP4 GAXY1 EP5 GAXZ1 EP6
                                GAYZ1 TYPE 'DEFORMATIONS' 'STRESSES';
                SINON;
                    EPSIA1 = MANU 'CHML' MOD_MEC_R EP1 EPXX1 EP2
                                EPYY1 EP3 EPZZ1 EP4 GAXY1
                                TYPE 'DEFORMATIONS' 'STRESSES';
                FINSI;
                SI BOOL.'THER' ; EPSIA1 = EPSIA1 + EPSTU1 ; FINSI;
                F11 = BSIG MOD_MEC_R (((HOOK MOD_MEC_R MAT_INST)*MOD_MEC_R EPSIA1)
                        - (MOD_MEC_R SIGF*DIVPI)) + (FOFI MOD_MEC_R SIGF PIGR);
                SI ((XTX PREINT) > 1.E-10);
                    F11 = F11 + PEMU + (PREINT*(CHAN 'CHPO' MOD_MEC_R DIVPI));
                FINSI;
                A_PREI = FOR000;
                A_DEPI = REDU (RESO F11 RIGTOT) ELTETA;
                A_SIGF = MOD_MEC_R (HOOK MOD_MEC_R MAT_INST) *
                            ((EPSI MOD_MEC_R A_DEPI) - EPSIA1);
                A_DEPGR = GRAD MOD_MEC_R MAT_INST A_DEPI;
                SI (BOOL.'COQ' ET BOOL.'EL_LIN');
                    A_DEPGF = 'GRAF' MOD_MEC_R MAT_INST A_DEPI;
                SINON;
                    A_DEPGF = TEXT '        ';
                FINSI;
            FINSI;

***********************************************
* DEP0 = (grad U)*THETA
***********************************************
            LO1 = ((BOOL.'J') OU  BOOL.'C*'  OU  BOOL.'C*H'
                    OU  BOOL.'DJ/DA'  OU  BOOL.'J_DYNA' )
                    ET ('>' (XTX PREINT) 1.E-10);
            LO2 = FAUX;
            SI  BOOL.'DECOUPLAGE';
                LO2 = (XTX A_PREI) > 1.E-10;
            FINSI;
            SI (LO1 OU LO2);
                GRADCH = CHAN 'CHPO' MOD_MEC_R GRADEP;
*  mess 'gcalcul : CHAN CHPO grad(U)';
*bp : on se ramene a un chpoint pour faire XTY avec preint ensuite
*     on moyenne avce CHAN CHPO, pourrait on l'eviter?
                DEPLX = ((EXCO GR1 GRADCH 'SCAL')*(EXCO MU1 CHTHETA 'SCAL')) +
                        ((EXCO GR2 GRADCH 'SCAL')*(EXCO MU2 CHTHETA 'SCAL'));
                DEPLY = ((EXCO GR4 GRADCH 'SCAL')*(EXCO MU1 CHTHETA 'SCAL')) +
                        ((EXCO GR5 GRADCH 'SCAL')*(EXCO MU2 CHTHETA 'SCAL'));
                DEP0 = (NOMC DEPLX MU1) + (NOMC DEPLY MU2);
                SI (GDIME EGA 3);
                    DEPLX = DEPLX +
                            ((EXCO GR3 GRADCH 'SCAL')*(EXCO MU3 CHTHETA 'SCAL'));
                    DEPLY = DEPLY +
                            ((EXCO GR6 GRADCH 'SCAL')*(EXCO MU3 CHTHETA 'SCAL'));
                    DEPLZ = ((EXCO GR7 GRADCH 'SCAL')*(EXCO MU1 CHTHETA 'SCAL')) +
                            ((EXCO GR8 GRADCH 'SCAL')*(EXCO MU2 CHTHETA 'SCAL')) +
                            ((EXCO GR9 GRADCH 'SCAL')*(EXCO MU3 CHTHETA 'SCAL'));
                    DEP0 = (NOMC DEPLX MU1) + (NOMC DEPLY MU2) +
                            (NOMC DEPLZ MU3);
                FINSI;
                SI (BOOL.'COQ' ET BOOL.'EL_LIN');
                    GRAFCH = CHAN 'CHPO' MOD_MEC_R GRADEF;
                    BXX = EXCO 'BX,X' GRAFCH 'SCAL';
                    BXY = EXCO 'BX,Y' GRAFCH 'SCAL';
                    BYX = EXCO 'BY,X' GRAFCH 'SCAL';
                    BYY = EXCO 'BY,Y' GRAFCH 'SCAL';
                    DEPFX = NOMC 'RX' ( (BXX*(EXCO 'UX' CHTHETA 'SCAL')) +
                            (BXY*(EXCO 'UY' CHTHETA 'SCAL')) );
                    DEPFY = NOMC 'RY' ( (BYX*(EXCO 'UX' CHTHETA 'SCAL')) +
                            (BYY*(EXCO 'UY' CHTHETA 'SCAL')) );
                    DEP0 = DEP0 + DEPFX + DEPFY;
                FINSI;
            FINSI;


***************************************************************
* S'il y a une pression sur la fissure, on calcule
* GRUTE = (grad U)*THETA sur les elements du modele de pression
* et dans la zone d'etude (ou le champ TETA est definit)
***************************************************************
            SI BOOL.'PRES_FISS';
* on isole les elements de la fissure ou la pression s'applique et ou le
* champ teta est definit
                FISSP = EXTR MODPRE 'MAIL';
                PFISSP = CHAN 'POI1' FISSP;
                FISSP = FISSP ELEM 'APPU' 'STRI' MAILMOD;
                MODPFT = VIDE 'MMODEL';
                GRADEPF = VIDE 'MCHAML';
* on interpole le gradient de deplacement (GRADEP) sur les elements du
* modele de pression touchant la levre inferieure
                SI (EXIS SUPTAB 'LEVRE_INFERIEURE');
                    FISI = INTE FISSP (SUPTAB . 'LEVRE_INFERIEURE');
                    MODPFI = REDU MODPF FISI;
                    MP1 = DIFF (CHAN 'POI1' FISI) FF1;
                    EL1 = MAILMOD ELEM 'APPU' 'LARG' MP1;
                    MOD_MEC_R1 = REDU MOD_MEC_R EL1;
                    GRADEP1 = REDU GRADEP MOD_MEC_R1;
                    GRADEP1 = CHAN 'CHAM' GRADEP1 MOD_MEC_R1 'NOEUD';
                    GRUI = PROI GRADEP1 MODPFI 'STRESSES';
                    MODPFT = MODPFT ET MODPFI;
                    GRADEPF = GRADEPF ET GRUI;
                FINSI;
* on interpole le gradient de deplacement (GRADEP) sur les elements du
* modele de pression touchant la levre superieure
                SI (EXIS SUPTAB 'LEVRE_SUPERIEURE');
                    FISS = INTE FISSP (SUPTAB . 'LEVRE_SUPERIEURE');
                    MODPFS = REDU MODPF FISS;
                    MP1 = DIFF (CHAN 'POI1' FISS) FF1;
                    EL1 = MAILMOD ELEM 'APPU' 'LARG' MP1;
                    MOD_MEC_R1 = REDU MOD_MEC_R EL1;
                    GRADEP1 = REDU GRADEP MOD_MEC_R1;
                    GRADEP1 = CHAN 'CHAM' GRADEP1 MOD_MEC_R1 'NOEUD';
                    GRUS = PROI GRADEP1 MODPFS 'STRESSES';
                    MODPFT = MODPFT ET MODPFS;
                    GRADEPF = GRADEPF ET GRUS;
                FINSI;
                GRADEPF = REDU GRADEPF MODPFT;
* on interpole le champ theta (THETA) sur les elements du modele de
* pression ==> TETAF
                TETAF = REDU CHTHETA FISSP;
                TETAF = CHAN 'CHAM' MODPFT TETAF 'STRESSES';
* on fait ensuite le produit (GRADEPF * TETAF) ==> GRUTE
                LCT = EXTR TETAF   'COMP';
                LCG = EXTR GRADEPF 'COMP';
                SI (EGA GDIME 2);
                    LCG12 = EXTR LCG (LECT 1 2);
                    LCG45 = EXTR LCG (LECT 4 5);
                    GRUTE1 = PSCA GRADEPF TETAF LCG12 LCT;
                    GRUTE2 = PSCA GRADEPF TETAF LCG45 LCT;
                    GRUTE  = (NOMC (EXTR LCT 1) GRUTE1) ET
                                (NOMC (EXTR LCT 2) GRUTE2);
                FINSI;
                SI (EGA GDIME 3);
                    LCG123 = EXTR LCG (LECT 1 2 3);
                    LCG456 = EXTR LCG (LECT 4 5 6);
                    LCG789 = EXTR LCG (LECT 7 8 9);
                    GRUTE1 = PSCA GRADEPF TETAF LCG123 LCT;
                    GRUTE2 = PSCA GRADEPF TETAF LCG456 LCT;
                    GRUTE3 = PSCA GRADEPF TETAF LCG789 LCT;
                    GRUTE  = (NOMC (EXTR LCT 1) GRUTE1) ET
                                (NOMC (EXTR LCT 2) GRUTE2) ET
                                (NOMC (EXTR LCT 3) GRUTE3);
                FINSI;
                GRUTE = CHAN 'TYPE' GRUTE 'FORCES';
            FINSI;


***********************************************
* DEP1 = (grad A_DEPI)*THETA
***********************************************
            LO1 =  BOOL.'DJ/DA'  ET ('>' (XTX PREINT) 1.E-10);
            LO2 = FAUX;
            SI  BOOL.'DECOUPLAGE';
                LO2 = ('>' (XTX A_PREI) 1.E-10) OU ('>' (XTX PREINT) 1.E-10);
            FINSI;
            SI (LO1 OU LO2);
*  mess 'gcalcul : CHAN CHPO grad(U^aux)';
                GRADCH = CHAN 'CHPO' MOD_MEC_R A_DEPGR;
*bp : on se ramene a un chpoint pour faire XTY avec preint ensuite
*     on moyenne avec CHAN CHPO, pourrait on l'eviter?
                DEPLX = ((EXCO GR1 GRADCH 'SCAL')*(EXCO MU1 CHTHETA 'SCAL')) +
                        ((EXCO GR2 GRADCH 'SCAL')*(EXCO MU2 CHTHETA 'SCAL'));
                DEPLY = ((EXCO GR4 GRADCH 'SCAL')*(EXCO MU1 CHTHETA 'SCAL')) +
                        ((EXCO GR5 GRADCH 'SCAL')*(EXCO MU2 CHTHETA 'SCAL'));
                DEP1 = (NOMC DEPLX MU1) + (NOMC DEPLY MU2);
                SI (GDIME EGA 3);
                    DEPLX = DEPLX +
                            ((EXCO GR3 GRADCH 'SCAL')*(EXCO MU3 CHTHETA 'SCAL'));
                    DEPLY = DEPLY +
                            ((EXCO GR6 GRADCH 'SCAL')*(EXCO MU3 CHTHETA 'SCAL'));
                    DEPLZ = ((EXCO GR7 GRADCH 'SCAL')*(EXCO MU1 CHTHETA 'SCAL')) +
                            ((EXCO GR8 GRADCH 'SCAL')*(EXCO MU2 CHTHETA 'SCAL')) +
                            ((EXCO GR9 GRADCH 'SCAL')*(EXCO MU3 CHTHETA 'SCAL'));
                    DEP1 = (NOMC DEPLX MU1) + (NOMC DEPLY MU2) +
                            (NOMC DEPLZ MU3);
                FINSI;
                SI (BOOL.'COQ' ET BOOL.'EL_LIN');
                    GRAFCH = CHAN 'CHPO' MOD_MEC_R GRADEF;
                    BXX = EXCO 'BX,X' GRAFCH 'SCAL';
                    BXY = EXCO 'BX,Y' GRAFCH 'SCAL';
                    BYX = EXCO 'BY,X' GRAFCH 'SCAL';
                    BYY = EXCO 'BY,Y' GRAFCH 'SCAL';
                    DEPFX = NOMC 'RX' ( (BXX*(EXCO 'UX' CHTHETA 'SCAL')) +
                            (BXY*(EXCO 'UY' CHTHETA 'SCAL')) );
                    DEPFY = NOMC 'RY' ( (BYX*(EXCO 'UX' CHTHETA 'SCAL')) +
                            (BYY*(EXCO 'UY' CHTHETA 'SCAL')) );
                    DEP1 = DEP1 + DEPFX + DEPFY;
                FINSI;
            FINSI;
***********************************************
* Termes supplemenetaire en Dynamique
* VCARE = V*V
* GRUTV = (grad U)*THETA*V      (Attigui)
* GRVTV = V^T * (grad V)*THETA  (BP)
* GRWTU = W^T * (grad U)*THETA  (BP)
***********************************************
            SI  BOOL.'J_DYNA';
                VCARE = PSCA VITF VITF MUI MUI;
* NOUVELLE IMPLEMENTATION JB :
*               CHML_TETA = CHAN 'CHAM' MOD_MEC_R TETA 'STRESSES';
*               GRUTV = MANU 'CHML' MOD_MEC_R 'SCAL' 0.
*                           'TYPE' 'DEPLACEM' 'STRESSES';
*               GRVTV = COPI GRUTV;
*               GRWTU = COPI GRUTV;
*               REPE ICOMP GDIME;
* CALCUL DE DEPFI ET VITFI
*                   IDEB = 1 + (3*(&ICOMP - 1));
*                   IFIN = IDEB + GDIME - 1;
*                   LMO1 = EXTR MGI (LECT IDEB PAS 1 IFIN);
*                   LMO2 = MUI;
*                   DEPFI = PSCA GRADEP CHML_TETA LMO1 LMO2;
*                   VITFI = PSCA GRAVIT CHML_TETA LMO1 LMO2;
* CALCUL DE GRUTV
*                   MO1 = EXTR MUI &ICOMP;
*                   GRUTV = GRUTV + ((EXCO MO1 VITF 'SCAL') * DEPFI);
* CALCUL DE GRVTV
*                   GRVTV = GRVTV + ((EXCO MO1 VITF 'SCAL') * VITFI);
* CALCUL DE GRWTU
*                   GRWTU = GRWTU + ((EXCO MO1 ACCF 'SCAL') * DEPFI);
*               FIN ICOMP;
* CETTE SECTION N'EST PAS ASSEZ TESTEE ACTUELLEMENT DANS LA BASE DE CAS-TESTS
* IL FAUT DONC AJOUTER DES CAS-TESTS AVANT DE POUVOIR REMPLACER CE QUI SUIT
* PAR LES LIGNES COMMENTEES CI-DESSUS
                DEPFX = (((EXCO GR1 GRADEP 'SCAL')CHAN TYPE 'SCALAIRE') *TETX) +
                        (((EXCO GR2 GRADEP 'SCAL')CHAN TYPE 'SCALAIRE') *TETY);
                DEPFY = (((EXCO GR4 GRADEP 'SCAL')CHAN TYPE 'SCALAIRE') *TETX) +
                        (((EXCO GR5 GRADEP 'SCAL')CHAN TYPE 'SCALAIRE') *TETY);
                VITFX = (((EXCO GR1 GRAVIT 'SCAL')CHAN TYPE 'SCALAIRE') *TETX) +
                        (((EXCO GR2 GRAVIT 'SCAL')CHAN TYPE 'SCALAIRE') *TETY);
                VITFY = (((EXCO GR4 GRAVIT 'SCAL')CHAN TYPE 'SCALAIRE') *TETX) +
                        (((EXCO GR5 GRAVIT 'SCAL')CHAN TYPE 'SCALAIRE') *TETY);
                SI (EGA GDIME 3);
                    DEPFX=DEPFX +(((EXCO GR3 GRADEP 'SCAL')CHAN TYPE 'SCALAIRE')*TETZ);
                    DEPFY=DEPFY +(((EXCO GR6 GRADEP 'SCAL')CHAN TYPE 'SCALAIRE')*TETZ);
                    DEPFZ = (((EXCO GR7 GRADEP 'SCAL')CHAN TYPE 'SCALAIRE')*TETX) +
                            (((EXCO GR8 GRADEP 'SCAL')CHAN TYPE 'SCALAIRE')*TETY) +
                            (((EXCO GR9 GRADEP 'SCAL')CHAN TYPE 'SCALAIRE')*TETZ);
                    VITFX=VITFX +(((EXCO GR3 GRAVIT 'SCAL')CHAN TYPE 'SCALAIRE')*TETZ);
                    VITFY=VITFY +(((EXCO GR6 GRAVIT 'SCAL')CHAN TYPE 'SCALAIRE')*TETZ);
                    VITFZ = (((EXCO GR7 GRAVIT 'SCAL')CHAN TYPE 'SCALAIRE')*TETX) +
                            (((EXCO GR8 GRAVIT 'SCAL')CHAN TYPE 'SCALAIRE')*TETY) +
                            (((EXCO GR9 GRAVIT 'SCAL')CHAN TYPE 'SCALAIRE')*TETZ);
                    GRUTV = ((EXCO MU1 VITF 'SCAL')*DEPFX) +
                            ((EXCO MU2 VITF 'SCAL')*DEPFY) +
                            ((EXCO MU3 VITF 'SCAL')*DEPFZ);
                    GRWTU = ((EXCO MU1 ACCF 'SCAL')*DEPFX) +
                            ((EXCO MU2 ACCF 'SCAL')*DEPFY) +
                            ((EXCO MU3 ACCF 'SCAL')*DEPFZ);
                    GRVTV = ((EXCO MU1 VITF 'SCAL')*VITFX) +
                            ((EXCO MU2 VITF 'SCAL')*VITFY) +
                            ((EXCO MU3 VITF 'SCAL')*VITFZ);
                SINON;
                    GRUTV = ((EXCO MU1 VITF 'SCAL')*DEPFX) +
                            ((EXCO MU2 VITF 'SCAL')*DEPFY);
                    GRWTU = ((EXCO MU1 ACCF 'SCAL')*DEPFX) +
                            ((EXCO MU2 ACCF 'SCAL')*DEPFY);
                    GRVTV = ((EXCO MU1 VITF 'SCAL')*VITFX) +
                            ((EXCO MU2 VITF 'SCAL')*VITFY);
                FINSI;
            FINSI;


*|=====================================================================|
*|========  IV. CALCUL DE J,C*,C*(h) ou J_DYNA  =======================|

***********************************************
* S10 = w*(div THETA)
* S20 = sigma*(grad U)*(grad THETA)
* S40 = Tr(sigma)*Alpha*(Grad T)*THETA
* S50 = F*(grad U)*THETA
* S60 = 0.5*(grad D)*THETA*(EPSI elas)*(EPSI elas)
* S70 = Tr(sigma)*T*(Grad Alpha)*THETA
* S100 = (W(b) - W(a))*THETA(x)
* S110 = SIGF*n*[ (dU/dX)(b) - (dU/dX)(a) ]*THETA(x)
* S120 = wvmis*(Grad T)*THETA
*     ou wvmis = SOME d(Von_mises)/d(Temperature) d(EPSE)
***********************************************
* Termes supplementaires pour le J dynamique (Formulation de Attigui)
* S130 = 0.5*RHO*(V^2)*(div THETA)
* S140 = [Delta (RHO*V*(grad U)*THETA)]/(Delta Temps)
* Termes supplementaires pour le J dynamique (Formulation de BP)
* S130 = -0.5*RHO*(V^2)*(div THETA)
* S140 =  RHO*W*(grad U)*THETA
* S141 = -RHO*V*(grad V)*THETA
***********************************************
* Termes supplementaires pour le J en grands-deplacements
* S150 = sigma*((grad U)t)*(grad U)*(grad THETA)
***********************************************
***********************************************
* Termes supplementaires pour un chaergement en deformation imposee (modif sm)
* S160 = sigma*(deps/dx)*(THETA)
*      = SIG_{IJ} * (deps^{imp}_{ij} / dx_{,k}) * thet_{k}
***********************************************
* Termes supplementaires pour le contact frottant (modif BP,BT)
* S111 = SIGF*n*[ (dU/dX)(b) - (dU/dX)(a) ]*THETA(x)
***********************************************


            SI ((BOOL.'J') OU  BOOL.'C*' OU BOOL.'C*H' OU  BOOL.'J_DYNA' );
                GMCANI = 0.;
                GTERMI = 0.;
                GPRESS = 0.;

                S10 = INTG MOD_MEC_R (ENERM*MOD_MEC_R DIVTETA) MAT2;
                GMCANI = GMCANI - S10;
                SI (BOOL.'COQ' ET BOOL.'EL_LIN');
                    S20 = INTG MOD_MEC_R (WORK MOD_MEC_R SIGF
                            (GRADEP*MOD_MEC_R TETAGR)
                            (GRADEF*MOD_MEC_R TETAGR));
                SINON;
                    S20 = INTG MOD_MEC_R (WORK MOD_MEC_R SIGF
                            (GRADEP*MOD_MEC_R TETAGR)) MAT2;
                FINSI;
                GMCANI = GMCANI + S20;
                SI BOOL.'GRANDS_DEP';
                    SI (BOOL.'COQ' ET BOOL.'EL_LIN');
                        S150 = INTG MOD_MEC_R (WORK MOD_MEC_R SIGF
                                (((TAGR GRADEP)*MOD_MEC_R GRADEP)*MOD_MEC_R TETAGR)
                                (((TAGR GRADEF)*MOD_MEC_R GRADEF)*MOD_MEC_R TETAGR));
                    SINON;
                        S150 = INTG MOD_MEC_R (WORK MOD_MEC_R SIGF
                                (((TAGR GRADEP)*MOD_MEC_R GRADEP)*MOD_MEC_R TETAGR)) MAT2;
                    FINSI;
                    GMCANI = GMCANI + S150;
                FINSI;
                SI (BOOL.'GRADPROP' ET BOOL.'GRADYOUN');
                    S60 = INTG MOD_MEC_R (0.5*(ENER MOD_MEC_R
                            SIGPRIM (ELAS MOD_MEC_R SIGF MAT_INST))) MAT2;
                    GMCANI = GMCANI - S60;
                FINSI;
                SI (((DIME LINTER) > 0) ET (NON BOOL.'PARAL'));
                    I = 0 ; IND1 = INDE LINTER;
                    REPE NBJ4 (DIME IND1);
                        I = I + 1;
                        LE1 = IND1.&NBJ4;
                        L1 = LINTER.LE1;
                        M1 = TABMOD.(EXTR LE1 1);
                        M2 = TABMOD.(EXTR LE1 2);
                        OBJINT = MODE L1 'MECANIQUE' 'ELASTIQUE';
                        TETXL = REDU L1 (EXCO MU1 CHTHETA 'SCAL');
                        TETXLC = CHAN 'CHAM' OBJINT TETXL 'STRESSES';
***
                        ENEMA = REDU L1 (CHAN 'CHPO' M1 (REDU M1 ENERM));
                        ENEMB = REDU L1 (CHAN 'CHPO' M2 (REDU M2 ENERM));
                        ENRMAL = CHAN 'CHAM' OBJINT ENEMA 'STRESSES';
                        ENRMBL = CHAN 'CHAM' OBJINT ENEMB 'STRESSES';
                        S100 = S100 + (INTG OBJINT
                                ((ENRMBL - ENRMAL) * OBJINT TETXLC) MAT2);
***
                        GRADA = REDU L1 (CHAN 'CHPO' M1 (REDU M1 GRADEP));
                        GRADB = REDU L1 (CHAN 'CHPO' M2 (REDU M2 GRADEP));
                        UXXAL = CHAN 'CHAM' OBJINT (EXCO GR1 GRADA 'SCAL')
                                'STRESSES';
                        UXXBL = CHAN 'CHAM' OBJINT (EXCO GR1 GRADB 'SCAL')
                                'STRESSES';
                        UYXAL = CHAN 'CHAM' OBJINT (EXCO GR4 GRADA 'SCAL')
                                'STRESSES';
                        UYXBL = CHAN 'CHAM' OBJINT (EXCO GR4 GRADB 'SCAL')
                                'STRESSES';
                        SIGML = REDU L1 (CHAN 'CHPO' MOD_MEC_R SIGF);
                        SIXXL = CHAN 'CHAM' OBJINT (EXCO SM1 SIGML 'SCAL')
                                'STRESSES';
                        SIXYL = CHAN 'CHAM' OBJINT (EXCO SM4 SIGML 'SCAL')
                                'STRESSES';
                        AAAA1 = (SIXXL * OBJINT (UXXBL - UXXAL)) +
                                (SIXYL * OBJINT (UYXBL - UYXAL));
                        S110 = S110 + (INTG OBJINT (AAAA1*OBJINT TETXLC) MAT2);
                    FIN NBJ4;
                    GMCANI = GMCANI - S100 + S110;
                FINSI;
* Termes supplementaire en Dynamique **********
                SI  BOOL.'J_DYNA';
                    S130 = INTG MOD_MEC_R (0.5*(RHO1 * VCARE * DIVTETA)) MAT2;
                    S140 = INTG MOD_MEC_R (RHO1 * GRWTU) MAT2;
                    S141 = INTG MOD_MEC_R (RHO1 * GRVTV) MAT2;
                    GMCANI = GMCANI - S130 + S140 - S141;
                FINSI;
* Termes supplementaire pour le contact frottant (btrolle 19/02/2013)
                SI (BOOL.'FROT');
* teta
                    TETXC = PROI OBJCON2 TETAX 'STRESSES';
                    TETYC = PROI OBJCON2 TETAY 'STRESSES';
                    SI (EGA GDIME 3);
                        TETZC = PROI OBJCON2 TETAZ 'STRESSES';
                    FINSI;
* [grad(w)] = grad [w] = WSAUTGR
* sigma*n
                    AAAAX = (SIGXN * (CHAN (exco WSAUTGR AX,X 'SCAL') TYPE 'SCALAIRE'))
                            + (SIGYN * (CHAN (exco WSAUTGR AY,X 'SCAL') TYPE 'SCALAIRE'));
                    AAAAY = (SIGXN * (CHAN (exco WSAUTGR AX,Y 'SCAL') TYPE 'SCALAIRE'))
                            + (SIGYN * (CHAN (exco WSAUTGR AY,Y 'SCAL') TYPE 'SCALAIRE'));
                    SI (EGA GDIME 3);
                        AAAAX = AAAAX
                                + (SIGZN *  (CHAN(exco WSAUTGR AZ,X) TYPE 'SCALAIRE'));
                        AAAAY = AAAAY
                                + (SIGZN *  (CHAN(exco WSAUTGR AZ,Y) TYPE 'SCALAIRE'));
                        AAAAZ = (SIGXN *  (CHAN(exco WSAUTGR AX,Z) TYPE 'SCALAIRE'))
                                + (SIGYN *  (CHAN(exco WSAUTGR AY,Z) TYPE 'SCALAIRE'))
                                + (SIGZN *  (CHAN(EXCO WSAUTGR AZ,Z) TYPE 'SCALAIRE'));
                        AAAA111 = (AAAAX * OBJCON2 TETXC) + (AAAAY * OBJCON2 TETYC)
                                    + (AAAAZ * OBJCON2 TETZC);
                    SINON;
                        AAAA111 = (AAAAX * OBJCON2 TETXC) + (AAAAY * OBJCON2 TETYC);
                    FINSI;
*    AAAA111 = 'MANUEL' CHML objcon 'SCAL' 1 TYPE 'SCALAIRE' 'STRESSES';
                    S111 = INTG OBJCON2 AAAA111 ; mess 'S111=' S111;
                    GMCANI = GMCANI - S111;
                SINON;
                    S111 = 0.0;
                FINSI;
* fin du cas contact frottant (btrolle 19/02/2013)

                S50 = 0.;
                SI ((XTX PREINT) > 1.E-10);
                    S50 = XTY PREINT DEP0 MFI MUI;
                FINSI;
                SI BOOL.'PRES_FISS';
                    PNF = REDU PNF MODPFT;
                    LC1 = EXTR PNF   'COMP';
                    LC2 = EXTR GRUTE 'COMP';
                    PGRU = MANU 'CHML' MODPFT 'SCAL' 0. 'STRESSES';
                    REPE B1 (DIME LC1);
                        PGRU = PGRU + ((EXCO (EXTR LC1 &B1) PNF   'SCAL') *
                                (EXCO (EXTR LC2 &B1) GRUTE 'SCAL'));
                    FIN B1;
                    S50 = S50 + (INTG MODPFT PGRU);
                FINSI;
                GPRESS = GPRESS - S50;
* Termes supplementaire pour un chargement en deformation imposee (SM) *********
                S160 = 0.;
                SI (BOOL.'J' ET BOOL.'DEF_IMP');
                    S160 = INTG MOD_MEC_R CUMDEFI MAT2;
                    GPRESS = GPRESS + S160;
                FINSI;

                SI BOOL.'THER';
                    SI BOOL.'COQ';
                        S40 = INTG MOD_MEC_R (ENER MOD_MEC_R SIGF EPSTU) MAT2;
                        GTERMI = GTERMI + S40;
                        SI BOOL.'GRADALPH';
                            S70 = INTG MOD_MEC_R (ENER MOD_MEC_R SIGF (ELAS
                                    MOD_MEC_R (THET MOD_MEC_R TEPINT DMAT) DMAT)) MAT2;
                            GTERMI = GTERMI + S70;
                        FINSI   ;
                    SINON;
                        S41 = INTG MOD_MEC_R (ENER MOD_MEC_R SIGF GR_EPTH_THET) MAT2;
                        GTERMI = GTERMI + S41;
                    FINSI;
                    SI ((DIME MODPLA) > 0);
                        TEMU = CHAN TYPE (EXCO 'T' TEMU 'SCAL') 'SCALAIRE';
                        S120 = INTG MOD_MEC_R (WVMIS * TEMU) MAT2;
                        GTERMI = GTERMI - S120   ;
                    FINSI;
                FINSI;

* somme des termes ***************************
                GTOTA = (GMCANI + GTERMI + GPRESS)*FACT1;
            FINSI;


*|=====================================================================|
*|=======  V. CALCUL DE DJ/DA  ========================================|

***********************************************
* S10 = -SIGF*(Grad U)*(Grad PI)*(Grad TETA)
* S20 = -SIGF*(Grad U)*(Grad TETA)*(Grad PI)
* S30 = SIGF*(Grad U)*(Grad TETA)*(Div PI)
* S40 = SIGF*(Grad U)*(Grad PI)*(Div TETA)
* S50 = ENEGIE*(ADJ TETA*PI)
* S60 = ALPH*SIGF*(Grad (Grad T))*PI*TETA
* S70 = ALPH*SIGF*((Grad T)*PI)*(Div TETA)
* S80 = ALPH*SIGF*((Grad T)*TETA)*(Div PI)
* S90 = SIG11*(Grad U)*(Grad TETA)
* S100= SIGF*(Grad U1)*(Grad TETA)
* S110= -SIGF*(Grad U1)*(Div TETA)
* S120= ALPH*SIG11*((Grad T)*TETA)
* S130= -PRESSION*(grad A_DEPI)*THETA
* S140= -(Grad PRESSION)*(Grad PI)*TETA*U
* S150= (Grad PRESSION)*TETA*U*(Div PI)
* S160= -(Grad PRESSION)*PI*(Grad U)*TETA
***********************************************
            SI  BOOL.'DJ/DA';
                S10 = 0. - (INTG MOD_MEC_R (WORK MOD_MEC_R SIGF
                        (MOD_MEC_R GRADEP * (MOD_MEC_R PIGR * TETAGR))));
                S20 = 0. - (INTG MOD_MEC_R (WORK MOD_MEC_R SIGF
                        (MOD_MEC_R GRADEP * (MOD_MEC_R TETAGR * PIGR))));
                S30 = INTG MOD_MEC_R (MOD_MEC_R (WORK MOD_MEC_R
                        SIGF (MOD_MEC_R GRADEP * TETAGR)) * DIVPI);
                S40 = INTG MOD_MEC_R (MOD_MEC_R (WORK MOD_MEC_R
                        SIGF (MOD_MEC_R GRADEP * PIGR)) * DIVTETA);
                S50 = INTG MOD_MEC_R (ENERM * ADJ);
                SI BOOL.'THER';
                    S60 = INTG MOD_MEC_R (ENER MOD_MEC_R SIGF EPSTU2);
                    S70 = INTG MOD_MEC_R ((ENER MOD_MEC_R SIGF EPSTU1)*DIVTETA);
                    S80 = INTG MOD_MEC_R ((ENER MOD_MEC_R SIGF EPSTU)*DIVPI);
                    S120 = INTG MOD_MEC_R (ENER MOD_MEC_R A_SIGF EPSTU);
                FINSI;
                SI ((XTX PREINT) > 1.E-10);
                    S130 = XTY PREINT DEP1 MFI MUI;
                    S140 = XTY PEMU2 (CHAN 'CHPO' MOD_MEC_R DEPINT) MFI MUI;
                    S150 = XTY (PEMU1*(CHAN 'CHPO' MOD_MEC_R DIVPI))
                            (CHAN 'CHPO' MOD_MEC_R DEPINT) MFI MUI;
                    S160 = XTY PEMU DEP0 MFI MUI;
                FINSI;
                S90 = INTG MOD_MEC_R (WORK MOD_MEC_R A_SIGF (MOD_MEC_R GRADEP * TETAGR));
                S100 = INTG MOD_MEC_R (WORK MOD_MEC_R SIGF (MOD_MEC_R A_DEPGR * TETAGR));
                S110 = 0. - (INTG MOD_MEC_R (MOD_MEC_R (WORK
                        MOD_MEC_R SIGF A_DEPGR) * DIVTETA));
                GMCANI = S10 + S20 + S30 + S40 + S50 + S90 + S100 + S110;
                GTERMI = S60 + S70 + S80 + S120;
                GPRESS = S150 - S130 - S140 - S160;
                GTOTA = GMCANI + GTERMI + GPRESS;
            FINSI;


*|=====================================================================|
*|======  VI. CALCUL DES FACTEURS D INTENSITE DES CONTRAINTES  =======|

***********************************************
* En pratique on les deduit de l integrale d interaction
* M(u,u^aux) = 2/E^* (K1*K1^aux + K2*K2^aux)
* On calcule donc :
*  J1 = 1/E^* K1^2 = M(u,u^aux_1)**2 / 4*J(u^aux_1,u^aux_1)
*  J2 = 1/E^* K2^2 = M(u,u^aux_2)**2 / 4*J(u^aux_2,u^aux_2)
***********************************************
* l'integrale J(u^aux, u^aux) est la somme de :
* S10 = 0.5*Tr(A_sigf*(grad A_depi))*(div THETA)
* S20 = Tr[A_sigf*(grad A_depi)*(grad THETA)] *
* S50 = A_prei*(grad A_depi)*THETA
***********************************************
* l'integrale M(u, u^aux) et la somme de :
* S60 = Tr[A_sigf*(Grad U)*(Grad THETA)]
* S70 = Tr[SIGF*(Grad A_depi)*(Grad THETA)]
* S80 = Tr[SIGF*(Grad A_depi)*(Div THETA)]
* S90 = PREINT*(grad A_depi)*THETA
* S100= A_prei*(grad U)*THETA
* S110= ALPH*A_sigf*((Grad T)*TETA)
***********************************************
* Termes supplementaires pour le contact frottant (modif BP,BT)
* S111 = SIGF*n*[ (dU^aux/dX)(b) - (dU^aux/dX)(a) ]*TETA(x)
***********************************************


            SI  BOOL.'DECOUPLAGE';
*    si(BOOL.'XFEM');
* *  REM: pour les elements XFEM on a contruit les champs aux. tq
* *      (K_I^aux, K_II^aux)  =  (1,0)  et (0,1)
* *      => inutile de calculer J(u^aux,u^aux) (= C_MATE)
*bp 07/07/2011 : cela est faux dans le cas d'une fissure courbee
*      COE_M2K = 2. * C_MATE;
*    SINON;
                S10 = 0.5*( INTG MOD_MEC_R
                        (MOD_MEC_R (WORK MOD_MEC_R A_SIGF A_DEPGR) * DIVTETA) );
                S20 = INTG MOD_MEC_R
                        (WORK MOD_MEC_R A_SIGF (A_DEPGR*MOD_MEC_R TETAGR) ) MAT2;
                SI ((XTX A_PREI) > 1.E-10);
                    S50 = XTY A_PREI DEP1 MFI MUI;
                FINSI;
                JETOILE = 'ABS' (S20 - S10 - S50);
                SI ((EGA &BOUCMIX 1) OU (EGA &BOUCMIX 2));
                    FACTK = 0.5 / ((C_MATE * JETOILE)**0.5);
                SINON;
                    FACTK = 0.5 * ((2. * MU_1 / JETOILE)**0.5);
                FINSI;
*    FINSI;
*  integrale M(u, u^aux)
                S60 = INTG MOD_MEC_R (WORK MOD_MEC_R A_SIGF (MOD_MEC_R GRADEP * TETAGR));
                S70 = INTG MOD_MEC_R (WORK MOD_MEC_R SIGF (MOD_MEC_R A_DEPGR * TETAGR));
                S80 = INTG MOD_MEC_R (MOD_MEC_R (WORK MOD_MEC_R SIGF A_DEPGR) * DIVTETA);
*rem: on pourrait calculer M avec les 2 lignes ci dessous:
*    S81 = INTG MOD_MEC_R (MOD_MEC_R (WORK MOD_MEC_R A_SIGF GRADEP) * DIVTETA);
*    S80 = 0.5*(S80+S81);
* Termes supplementaire pour le contact frottant (btrolle 19/02/2013)
* on calcule WSAUTGR^aux = GRADIENT DU SAUT^aux
                SI (BOOL.'FROT' 'ET' BOOL.'XFEM');
* WDEP = deplacement de la fissure de composante UX ... AX ...
* [grad(w)] = grad [w] car linearite (le saut [w] est donne par AX ...)
* on utilise un modele liee a la geo de la fissure (cohesif ou contact)
* mess 'I avec contact frottant';
* SIGCON = sigma*n de composantes SMX... homogene a une contrainte
* supporte sur la levre superieure
                    SI (NEG (TYPE SIGCON) 'MCHAML  ');
                        SIGCON = REDU SIGCON (extr OBJCON2 'MAILLAGE');
                        SIGCON = CHAN 'CHAM' SIGCON OBJCON2 'STRESSES' 'CONTRAINTES';
                    FINSI;
                    SIGXN = (CHAN (exco SIGCON 'SMX' 'SCAL') TYPE 'SCALAIRE');
                    SIGYN = (CHAN (exco SIGCON 'SMY' 'SCAL') TYPE 'SCALAIRE');
                    SI (EGA GDIME 3);
                        SIGZN = (CHAN (exco SIGCON 'SMZ' 'SCAL') TYPE 'SCALAIRE');
                    FINSI;
* teta
                    TETXC = PROI OBJCON2 TETAX 'STRESSES';
                    TETYC = PROI OBJCON2 TETAY 'STRESSES';
                    SI (EGA GDIME 3);
                        TETZC = PROI OBJCON2 TETAZ 'STRESSES';
                    FINSI;
* [grad(w)] = grad [w] = WSAUTGR
* sigma*n
                    AAAAX= (SIGXN * (CHAN (exco B_DEPGR AX,X 'SCAL') TYPE 'SCALAIRE'))
                    + (SIGYN * (CHAN (exco B_DEPGR AY,X 'SCAL') TYPE 'SCALAIRE'));
                    AAAAY= (SIGXN * (CHAN (exco B_DEPGR AX,Y 'SCAL') TYPE 'SCALAIRE'))
                    '+' (SIGYN * (CHAN (exco B_DEPGR AY,Y 'SCAL') TYPE 'SCALAIRE'));
                    SI (EGA GDIME 3);
                        AAAAX = AAAAX
                                + (SIGZN *  (CHAN(EXCO B_DEPGR AZ,X) TYPE 'SCALAIRE'));
                        AAAAY = AAAAY
                                + (SIGZN *  (CHAN(EXCO B_DEPGR AZ,Y) TYPE 'SCALAIRE'));
                        AAAAZ = (SIGXN *  (CHAN(EXCO B_DEPGR AX,Z) TYPE 'SCALAIRE'))
                                + (SIGYN *  (CHAN(EXCO B_DEPGR AY,Z) TYPE 'SCALAIRE'))
                                + (SIGZN *  (CHAN(EXCO B_DEPGR AZ,Z) TYPE 'SCALAIRE'));
                        AAAA111 = (AAAAX * OBJCON2 TETXC)
                                    + (AAAAY * OBJCON2 TETYC)
                                    + (AAAAZ * OBJCON2 TETZC);
                    SINON;
                        AAAA111 = (AAAAX * OBJCON2 TETXC)
                                    + (AAAAY * OBJCON2 TETYC);
                    FINSI;
                    S111 = INTG OBJCON2 AAAA111;
                SINON;
                    S111 = 0.0;
                FINSI;
* fin du cas contact frottant (btrolle 19/02/2013)
                SI ((XTX PREINT) > 1.E-10);
                    S90 = XTY PREINT DEP1 MFI MUI;
                FINSI;
                SI ((XTX A_PREI) > 1.E-10);
                    S100 = XTY A_PREI DEP0 MFI MUI;
                FINSI;
                SI BOOL.'THER';
                    S110 = INTG MOD_MEC_R (ENER MOD_MEC_R A_SIGF EPSTU);
                FINSI;
*  facteurs d intensite des contraintes
                GMCANI = (S60 + S70 - S80 + S111) * FACTK;
                GTERMI = (S110) * FACTK;
                GPRESS = (-1.*(S100 + S90)) * FACTK;
                GTOTA = GMCANI + GTERMI + GPRESS;
            FINSI;


*|=====================================================================|
*|=======  VII. STOCKAGE DES RESULTATS ET IMPRESSIONS  ===============|

            SI ((NBOU > 1) ET (EGA &BCNOEU NBOU));
                NUNOE = CHAI 'GLOBAL';
            SINON;
                SI ((EGA GDIME 2) OU BOOL.'COQ');
                    PM = FF1 POIN 1;
                    NUNOE = CHAI (NOEU PM)*NDEC;
                SINON;
                    SI BOOL.'XFEM';
                        NUNOE = &BCNOEU;
                    SINON;
                        FTHETA = REDU CHTHETA FF1;
                        NTHETA = (PSCA FTHETA FTHETA MUI MUI)**0.5;
                        PM = (NTHETA POIN 'MAXI') POIN 1;
                        NUNOE = CHAI (NOEU PM)*NDEC;
                    FINSI;
                FINSI;
            FINSI;

***************************************************
** PROFILE DE G DANS L EPAISSEUR EN CAS DE COQUE **
***************************************************
            SI BOOL.'COQ';
                SI BOOL.'PASAPAS';
                    SUPTAB.'EPAISSEUR_RESULTATS'.IABC = EVENR * GTOTA;
                SINON;
                    SUPTAB.'EPAISSEUR_RESULTATS' = EVENR * GTOTA;
                FINSI;
            FINSI;

****************************
** AFFICHAGE DES RESULTATS**
****************************
            CHARES = CHAI;
            SI BOOL.'PASAPAS';
                CHARES = CHAI CHARES IABC*NDPAS;
            FINSI;
            SI BOOL.'DECOUPLAGE';
                CHARES = CHAI CHARES MOTMIA*NDDEC;
            FINSI;
            SI ((EGA GDIME 3) ET (NON BOOL.'COQ'));
                CHARES = CHAI CHARES NUNOE*NDFRO;
            FINSI;
            SI BOOL.'COQ';
                PVAL = PROG V_SUPE V_MOYE V_INFE 1.;
                LMVAL = MOTS 'Superi' 'Median' 'Inferi' 'GLOBAL';
                REPE IVAL 4;
                    XVAL = EXTR PVAL &IVAL;
                    MVAL = EXTR LMVAL &IVAL;
                    CHARES = CHAI CHARES MVAL*NDCOQ;
                    MESS CHARES (GMCANI*XVAL)*NDMEC (GTERMI*XVAL)*NDTHE
                         (GPRESS*XVAL)*NDVOL (GTOTA*XVAL)*NDINT;
                FIN IVAL;
            SINON;
                MESS CHARES GMCANI*NDMEC GTERMI*NDTHE GPRESS*NDVOL
                     GTOTA*NDINT;
            FINSI;

***************************************************
** STOCKAGE DES RESULTATS DANS SUPTAB.'RESULTATS'**
***************************************************
            SI BOOL.'PASAPAS';
* CAS PASAPAS
                SI (EGA GDIME 2);
                    SI  BOOL.'DECOUPLAGE';
                        TABRES.MOTMIX.IABC = GTOTA;
                    SINON;
                        TABRES.IABC = GTOTA;
                    FINSI;
                FINSI;
                SI ((EGA GDIME 3) ET (NON BOOL.'COQ'));
                    SI  BOOL.'DECOUPLAGE';
                        TABRES.MOTMIX.IABC.NUNOE = GTOTA;
                    SINON;
                        TABRES.IABC.NUNOE = GTOTA;
                    FINSI;
                FINSI;
                SI BOOL.'COQ';
                    SI  BOOL.'DECOUPLAGE';
                        TABRES.MOTMIX = GTOTA;
                    SINON;
                        TABRES.IABC.'SUPERI' = GTOTA*V_SUPE;
                        TABRES.IABC.'MEDIAN' = GTOTA*V_MOYE;
                        TABRES.IABC.'INFERI' = GTOTA*V_INFE;
                        TABRES.IABC.'GLOBAL' = GTOTA;
                    FINSI;
                FINSI;
* CAS RESOU
            SINON;
                SI (EGA GDIME 2);
                    SI  BOOL.'DECOUPLAGE';
                        TABRES.MOTMIX = GTOTA;
                    SINON;
                        SUPTAB.'RESULTATS' = GTOTA;
                    FINSI;
                FINSI;
                SI ((EGA GDIME 3) ET (NON BOOL.'COQ'));
                    SI  BOOL.'DECOUPLAGE';
                        TABRES.MOTMIX.NUNOE = GTOTA;
                    SINON;
                        TABRES.NUNOE = GTOTA;
                    FINSI;
                FINSI;
                SI BOOL.'COQ';
                    SI  BOOL.'DECOUPLAGE';
                        TABRES.MOTMIX = GTOTA;
                    SINON;
                        TABRES.'SUPERI' = GTOTA*V_SUPE;
                        TABRES.'MEDIAN' = GTOTA*V_MOYE;
                        TABRES.'INFERI' = GTOTA*V_INFE;
                        TABRES.'GLOBAL' = GTOTA;
                    FINSI;
                FINSI;
            FINSI;

****************************
** AJOUT AU CHPO OU CHAML **
****************************
            SI ((&BCNOEU < NBOU) OU (EGA NBOU 1));
                SI (BOOL.'XFEM' ET (EGA GDIME 3));
                    GCHAM1 = GCHAM1 ET (MANU 'CHML' IND0 MOCOMP GTOTA);
                SINON;
                    GCHPO1 = GCHPO1 + (NOMC MOCOMP (GTOTA * IND0));
                FINSI;
            FINSI;

        FIN BCNOEU;
*<== FIN DE BOUCLE SUR LES NOEUDS A AVANCER VIRTUELLEMENT =============|
*|=====================================================================|


        SI (BOOL.'XFEM' ET (EGA GDIME 3));
* EN XFEM 3D ON A LE RESULTAT UNIQUEMENT SOUS FORME DE CHAMELEM
* ON LE TRANSFORME DONC EN CHPO
            EFJ = INTE (EXTR GCHAM1 'MAILLAGE') ELTETA;
            MOD_MEC_RJ = REDU MOD_MEC_R EFJ;
            GCHPO1 = CHAN 'CHPO' GCHAM1 MOD_MEC_RJ 'MOYE';
            GCHPO1 = INT_COMP ELTETA GCHPO1 SUPTAB.'FRONT_FISSURE';
        SINON;
* EN STD ON REDUIT LE CHAMP RESULTAT AU FRONT DE FISSURE
            GCHPO1 = REDU GCHPO1 SUPTAB.'FRONT_FISSURE';
        FINSI;

* ON AJOUTE LES COMPOSANTES DANS L'EPAISSEUR DANS LE CAS DES COQUES
        SI BOOL.'COQ';
            GCHPO1 = NOMC 'GLOB' GCHPO1;
            GCHPO2 = NOMC 'SUPE' (GCHPO1*V_SUPE);
            GCHPO3 = NOMC 'MEDI' (GCHPO1*V_MOYE);
            GCHPO4 = NOMC 'INFE' (GCHPO1*V_INFE);
            GCHPO1 = GCHPO2 ET GCHPO3 ET GCHPO4 ET GCHPO1;
        FINSI;

*********************************************************************
** STOCKAGE DES CHAMPS RESULTATS (+ logique qu'une table a priori) **
*********************************************************************
*CAS PASAPAS
        SI (BOOL.'PASAPAS');
            SUPTAB.'CHPO_RESULTATS'.IABC
                    = SUPTAB.'CHPO_RESULTATS'.IABC ET GCHPO1;
            SI (NON (VIDE GCHAM1) );
                SUPTAB.'CHAM_RESULTATS'.IABC
                    = SUPTAB.'CHAM_RESULTATS'.IABC ET GCHAM1;
            FINSI;
*CAS RESOU
        SINON;
            SUPTAB.'CHPO_RESULTATS' = SUPTAB.'CHPO_RESULTATS' ET GCHPO1;
            SI (NON (VIDE GCHAM1) );
                SUPTAB.'CHAM_RESULTATS' = SUPTAB.'CHAM_RESULTATS' ET GCHAM1;
            FINSI;
        FINSI;

* ON SE PREPARE A PARTIR...
        MENA;
        SI (BOOL.'PASAPAS' ET BOOL.'COQ');
            MESS;
        FINSI;
        SI (BOOL.'PASAPAS' ET (NBOU '>' 1));
            MESS;
        FINSI;
        SI (BOOL.'PASAPAS' ET (NBOU EGA 1) ET (NON BOOL.'COQ'));
            SI (EGA ((&BOUCEXT/10)*10) &BOUCEXT);
                'SAUT' 'LIGNE';
            FINSI;
        FINSI;


    FIN BOUCMIX;
* FIN DE BOUCLE SUR LES INTEGRALES A CALCULER ========================*

****************************************************
******* FIN DE BOUCLE SUR LES PAS DE CALCUL ********
****************************************************
FIN BOUCEXT;


****************************************************
** STOCKAGE DES RESULTATS DANS L OBJET EVOLUTIONS **
****************************************************
* en plus de ce qui existe dans SUPTAB.'RESULTATS'
* et dans CHPO_RESULTATS
SI (BOOL.'PASAPAS' ET (NON BOOL.'PERSO1'));
* TITRE DES EVOLUTIONS
    SI BOOL.'DECOUPLAGE';
        CHATIT = CHAI 'F.I.C. Ki';
    SINON;
        CHAINT = MOBJ;
        SI BOOL.'J_DYNA';
            CHAINT = CHAI 'J DYNAMIQUE';
        FINSI;
        CHATIT = CHAI 'INTEGRALE' ' ' CHAINT;
    FINSI;
    CHATIT = CHAI CHATIT ' EN FONCTION DU TEMPS';
    TITR CHATIT;
    PINST = PROG;
    TINST = SUPTAB.'SOLUTION_PASAPAS'.'TEMPS';
    LCHPO1 = VIDE 'LISTCHPO';
    REPE IINST (DIME TINST);
        PINST = PINST ET (PROG TINST.(&IINST - 1));
        CHPO1 = SUPTAB.'CHPO_RESULTATS'.(&IINST - 1);
        LCHPO1 = LCHPO1 ET (SUIT CHPO1);
    FIN IINST;
    MCOMP = EXTR CHPO1 'COMP';
    SI (EGA (DIME MCOMP) 1);
* MCOMP EST UN LISTMOT, ON LE TRANSFORME EN MOT S'IL Y EN A QU'UN
        MCOMP = EXTR MCOMP 1;
    FINSI;
    SI ((EGA GDIME 2) OU BOOL.'COQ');
* EN 2D ET 3D COQUE L'INDICE EVOLUTION_RESULTATS EST UNE EVOLUTION
        POIN1 = (FF1 ELEM 1) POIN 1;
        EVO1 = EVOL 'TEMP' LCHPO1 PINST MCOMP POIN1;
        SUPTAB.'EVOLUTION_RESULTATS' = EVO1;
    SINON;
* SINON C'EST UNE TABLE INDICEE PAR LES POINTS DU FRONT
        REPE INOEU (NBEL FF1);
            POIN1 = (FF1 ELEM &INOEU) POIN 1;
            EVO1 = EVOL 'TEMP' LCHPO1 PINST MCOMP POIN1;
            SUPTAB.'EVOLUTION_RESULTATS'.POIN1 = EVO1;
        FIN INOEU;
* ET IL Y A LE RESULTAT GLOBAL
        PG = PROG ;
        REPE IINST (DIME TINST) ;
            G0 = SUPTAB.'RESULTATS'.(&IINST - 1).'GLOBAL' ;
            PG = PG ET (PROG G0) ;
        FIN IINST ;
        EVO1 = EVOL 'MANU' 'TEMPS' PINST MCOMP PG ;
        SUPTAB.'EVOLUTION_RESULTATS'.'GLOBAL' = EVO1 ;
    FINSI;
FINSI;


********************************************************
**** STOCKAGE POUR UNE EVENTUELLE REPRISE DE CALCUL ****
********************************************************
SI BOOL.'PASAPAS';
    SUPTAB.'OBJ1' = MOT SUPTAB.'OBJECTIF';
    SUPTAB.'IABC' = IABC;
    SUPTAB.'MAT_INST' = MAT_INST;
    SUPTAB.'END1' = ENERM;
    SI (((DIME MODPLA) '>' 0) ET BOOL.'THER');
        SUPTAB.'ENV1' = WVMIS;
    FINSI;
    SI (EGA ITYPEF 2);
        SUPTAB.'VDI1' = VDI1;
    FINSI;
FINSI;

********************************************************
************* OBJETS POUR REPRISE ET XFEM **************
********************************************************
SI (EXIS SUPTAB 'COUCHE');
    SUPTAB.'COU1' = SUPTAB.'COUCHE';
FINSI;

*bp: soyons coherent... CHAMP_THETA est deja renseigne
SI (EXIS SUPTAB 'CHAMP_THETA');
    SUPTAB.'CHAMP_THET1' = SUPTAB.'CHAMP_THETA';
FINSI;
*OTER SUPTAB 'CHAMP_THETA';
OTER SUPTAB 'GRTHETA';
OTER SUPTAB 'DIVTHETA';

FINP;
$$$$
