$$$$ LIRSOSO
* LIRSOSO   PROCEDUR  AURI      97/12/24    21:27:04     3025
 DEBMETH LIRSOSO ;
 %IDEN= FAUX ;
 %ITYP= FAUX ;
 %SOLID= FAUX ;
 %FRACTIO=   FAUX ;
 %METHODE SOS_IDEN LINBIDEN ;
 %METHODE SOS_ITYP LESPITYP ;
 %METHODE SOS_SOLI LSOSSOLI ;
 %METHODE SOS_FRAC LSOSFRAC ;
 FINMETH ;
